<?xml version='1.0' encoding='UTF-8'?>
<neuroml xmlns="http://www.neuroml.org/schema/neuroml2" xmlns:xsi="http://www.w3.org/2001/XMLSchema-instance" xsi:schemaLocation="http://www.neuroml.org/schema/neuroml2 https://raw.githubusercontent.com/NeuroML/NeuroML2/development/Schemas/NeuroML2/NeuroML_v2beta4.xsd" id="gvft_network_bio_prior_lamW_0_144_DF_0_013_t10_net">
  <notes>NeuroML2 network generated from GVFT simulation on 2025-05-04 22:07:40
</notes>
  <include href="AVAL.cell.nml"/>
  <include href="AVAR.cell.nml"/>
  <include href="AVKL.cell.nml"/>
  <include href="AVKR.cell.nml"/>
  <include href="RIS.cell.nml"/>
  <include href="RMDDL.cell.nml"/>
  <include href="RMDDR.cell.nml"/>
  <include href="RMDVL.cell.nml"/>
  <include href="RMDVR.cell.nml"/>
  <include href="SMBVL.cell.nml"/>
  <include href="SMBVR.cell.nml"/>
  <include href="URXL.cell.nml"/>
  <include href="URXR.cell.nml"/>
  <include href="M3R.cell.nml"/>
  <include href="I3.cell.nml"/>
  <include href="I4.cell.nml"/>
  <include href="M2R.cell.nml"/>
  <include href="NSMR.cell.nml"/>
  <include href="M1.cell.nml"/>
  <include href="MI.cell.nml"/>
  <include href="MCL.cell.nml"/>
  <include href="I6.cell.nml"/>
  <include href="I2R.cell.nml"/>
  <include href="I5.cell.nml"/>
  <include href="MCR.cell.nml"/>
  <include href="I2L.cell.nml"/>
  <include href="M2L.cell.nml"/>
  <include href="M5.cell.nml"/>
  <include href="M4.cell.nml"/>
  <include href="I1L.cell.nml"/>
  <include href="I1R.cell.nml"/>
  <include href="M3L.cell.nml"/>
  <include href="NSML.cell.nml"/>
  <include href="pm1.cell.nml"/>
  <include href="pm2L.cell.nml"/>
  <include href="pm2R.cell.nml"/>
  <include href="pm3L.cell.nml"/>
  <include href="pm3R.cell.nml"/>
  <include href="pm4L.cell.nml"/>
  <include href="pm4R.cell.nml"/>
  <include href="pm5L.cell.nml"/>
  <include href="pm5R.cell.nml"/>
  <include href="pm6L.cell.nml"/>
  <include href="pm6R.cell.nml"/>
  <include href="pm7L.cell.nml"/>
  <include href="pm7R.cell.nml"/>
  <include href="pm8.cell.nml"/>
  <include href="Serotonin_Glutamate.synapse.nml"/>
  <include href="Generic_GJ.nml"/>
  <include href="Acetylcholine.synapse.nml"/>
  <include href="Glutamate.synapse.nml"/>
  <network id="gvft_network_bio_prior_lamW_0_144_DF_0_013_t10_net" type="networkWithTemperature" temperature="20.0 degC">
    <population id="M1" component="M1" type="populationList" size="1">
      <instance id="0">
        <location x="-0.959799" y="-0.7487437" z="0.0"/>
      </instance>
    </population>
    <population id="M2L" component="M2L" type="populationList" size="1">
      <instance id="0">
        <location x="0.0753769" y="0.03517589" z="0.0"/>
      </instance>
    </population>
    <population id="M2R" component="M2R" type="populationList" size="1">
      <instance id="0">
        <location x="-0.61809045" y="0.67839193" z="0.0"/>
      </instance>
    </population>
    <population id="M3L" component="M3L" type="populationList" size="1">
      <instance id="0">
        <location x="0.9798995" y="0.26633167" z="0.0"/>
      </instance>
    </population>
    <population id="M3R" component="M3R" type="populationList" size="1">
      <instance id="0">
        <location x="0.2763819" y="0.23618092" z="0.0"/>
      </instance>
    </population>
    <population id="M4" component="M4" type="populationList" size="1">
      <instance id="0">
        <location x="-0.7487437" y="0.14572865" z="0.0"/>
      </instance>
    </population>
    <population id="M5" component="M5" type="populationList" size="1">
      <instance id="0">
        <location x="-0.8492462" y="-0.0050251363" z="0.0"/>
      </instance>
    </population>
    <population id="I1L" component="I1L" type="populationList" size="1">
      <instance id="0">
        <location x="-0.9698492" y="0.51758796" z="0.0"/>
      </instance>
    </population>
    <population id="I1R" component="I1R" type="populationList" size="1">
      <instance id="0">
        <location x="0.7085427" y="0.39698493" z="0.0"/>
      </instance>
    </population>
    <population id="I2L" component="I2L" type="populationList" size="1">
      <instance id="0">
        <location x="-0.065326646" y="0.9798995" z="0.0"/>
      </instance>
    </population>
    <population id="I2R" component="I2R" type="populationList" size="1">
      <instance id="0">
        <location x="0.46733668" y="0.72864324" z="0.0"/>
      </instance>
    </population>
    <population id="I3" component="I3" type="populationList" size="1">
      <instance id="0">
        <location x="-0.43718594" y="0.8190955" z="0.0"/>
      </instance>
    </population>
    <population id="I4" component="I4" type="populationList" size="1">
      <instance id="0">
        <location x="-0.3467337" y="0.5678392" z="0.0"/>
      </instance>
    </population>
    <population id="I5" component="I5" type="populationList" size="1">
      <instance id="0">
        <location x="0.9296482" y="-0.19597991" z="0.0"/>
      </instance>
    </population>
    <population id="I6" component="I6" type="populationList" size="1">
      <instance id="0">
        <location x="0.46733668" y="-0.7085427" z="0.0"/>
      </instance>
    </population>
    <population id="MCL" component="MCL" type="populationList" size="1">
      <instance id="0">
        <location x="-0.3467337" y="0.7889447" z="0.0"/>
      </instance>
    </population>
    <population id="MCR" component="MCR" type="populationList" size="1">
      <instance id="0">
        <location x="-0.10552765" y="0.75879395" z="0.0"/>
      </instance>
    </population>
    <population id="MI" component="MI" type="populationList" size="1">
      <instance id="0">
        <location x="-0.959799" y="-0.015075387" z="0.0"/>
      </instance>
    </population>
    <population id="NSML" component="NSML" type="populationList" size="1">
      <instance id="0">
        <location x="0.7085427" y="-0.49748746" z="0.0"/>
      </instance>
    </population>
    <population id="NSMR" component="NSMR" type="populationList" size="1">
      <instance id="0">
        <location x="0.57788944" y="-0.6281407" z="0.0"/>
      </instance>
    </population>
    <population id="AVAL" component="AVAL" type="populationList" size="1">
      <instance id="0">
        <location x="5.0" y="0.0" z="0.0"/>
      </instance>
    </population>
    <population id="AVAR" component="AVAR" type="populationList" size="1">
      <instance id="0">
        <location x="5.0" y="0.0" z="0.0"/>
      </instance>
    </population>
    <population id="AVKL" component="AVKL" type="populationList" size="1">
      <instance id="0">
        <location x="5.0" y="0.0" z="0.0"/>
      </instance>
    </population>
    <population id="AVKR" component="AVKR" type="populationList" size="1">
      <instance id="0">
        <location x="5.0" y="0.0" z="0.0"/>
      </instance>
    </population>
    <population id="RIS" component="RIS" type="populationList" size="1">
      <instance id="0">
        <location x="5.0" y="0.0" z="0.0"/>
      </instance>
    </population>
    <population id="RMDDL" component="RMDDL" type="populationList" size="1">
      <instance id="0">
        <location x="5.0" y="0.0" z="0.0"/>
      </instance>
    </population>
    <population id="RMDDR" component="RMDDR" type="populationList" size="1">
      <instance id="0">
        <location x="5.0" y="0.0" z="0.0"/>
      </instance>
    </population>
    <population id="RMDVL" component="RMDVL" type="populationList" size="1">
      <instance id="0">
        <location x="5.0" y="0.0" z="0.0"/>
      </instance>
    </population>
    <population id="RMDVR" component="RMDVR" type="populationList" size="1">
      <instance id="0">
        <location x="5.0" y="0.0" z="0.0"/>
      </instance>
    </population>
    <population id="SMBVL" component="SMBVL" type="populationList" size="1">
      <instance id="0">
        <location x="5.0" y="0.0" z="0.0"/>
      </instance>
    </population>
    <population id="SMBVR" component="SMBVR" type="populationList" size="1">
      <instance id="0">
        <location x="5.0" y="0.0" z="0.0"/>
      </instance>
    </population>
    <population id="URXL" component="URXL" type="populationList" size="1">
      <instance id="0">
        <location x="5.0" y="0.0" z="0.0"/>
      </instance>
    </population>
    <population id="URXR" component="URXR" type="populationList" size="1">
      <instance id="0">
        <location x="5.0" y="0.0" z="0.0"/>
      </instance>
    </population>
    <population id="pm1" component="pm1" type="populationList" size="1">
      <instance id="0">
        <location x="1.5" y="0.0" z="0.0"/>
      </instance>
    </population>
    <population id="pm2L" component="pm2L" type="populationList" size="1">
      <instance id="0">
        <location x="1.3514533018536288" y="0.6508256086763372" z="0.0"/>
      </instance>
    </population>
    <population id="pm2R" component="pm2R" type="populationList" size="1">
      <instance id="0">
        <location x="0.9352347027881004" y="1.1727472237020446" z="0.0"/>
      </instance>
    </population>
    <population id="pm3L" component="pm3L" type="populationList" size="1">
      <instance id="0">
        <location x="0.3337814009344717" y="1.4623918682727355" z="0.0"/>
      </instance>
    </population>
    <population id="pm3R" component="pm3R" type="populationList" size="1">
      <instance id="0">
        <location x="-0.3337814009344715" y="1.4623918682727355" z="0.0"/>
      </instance>
    </population>
    <population id="pm4L" component="pm4L" type="populationList" size="1">
      <instance id="0">
        <location x="-0.9352347027881003" y="1.1727472237020449" z="0.0"/>
      </instance>
    </population>
    <population id="pm4R" component="pm4R" type="populationList" size="1">
      <instance id="0">
        <location x="-1.3514533018536286" y="0.6508256086763373" z="0.0"/>
      </instance>
    </population>
    <population id="pm5L" component="pm5L" type="populationList" size="1">
      <instance id="0">
        <location x="-1.5" y="1.8369701987210297e-16" z="0.0"/>
      </instance>
    </population>
    <population id="pm5R" component="pm5R" type="populationList" size="1">
      <instance id="0">
        <location x="-1.3514533018536288" y="-0.650825608676337" z="0.0"/>
      </instance>
    </population>
    <population id="pm6L" component="pm6L" type="populationList" size="1">
      <instance id="0">
        <location x="-0.9352347027881005" y="-1.1727472237020446" z="0.0"/>
      </instance>
    </population>
    <population id="pm6R" component="pm6R" type="populationList" size="1">
      <instance id="0">
        <location x="-0.3337814009344719" y="-1.4623918682727355" z="0.0"/>
      </instance>
    </population>
    <population id="pm7L" component="pm7L" type="populationList" size="1">
      <instance id="0">
        <location x="0.33378140093447" y="-1.4623918682727357" z="0.0"/>
      </instance>
    </population>
    <population id="pm7R" component="pm7R" type="populationList" size="1">
      <instance id="0">
        <location x="0.9352347027881001" y="-1.1727472237020449" z="0.0"/>
      </instance>
    </population>
    <population id="pm8" component="pm8" type="populationList" size="1">
      <instance id="0">
        <location x="1.351453301853629" y="-0.6508256086763362" z="0.0"/>
      </instance>
    </population>
    <projection id="NCXLS_M1_I1L" presynapticPopulation="M1" postsynapticPopulation="I1L" synapse="Acetylcholine">
      <connection id="0" preCellId="../M1/0/M1" postCellId="../I1L/0/I1L" preSegmentId="7" postSegmentId="8" preFractionAlong="0.034388521115218396" postFractionAlong="0.9093204020787821"/>
    </projection>
    <projection id="NCXLS_M1_I4" presynapticPopulation="M1" postsynapticPopulation="I4" synapse="Acetylcholine">
      <connection id="1" preCellId="../M1/0/M1" postCellId="../I4/0/I4" preSegmentId="4" postSegmentId="2" preFractionAlong="0.662522284353982" postFractionAlong="0.31171107608941095"/>
    </projection>
    <projection id="NCXLS_M1_I1R" presynapticPopulation="M1" postsynapticPopulation="I1R" synapse="Acetylcholine">
      <connection id="2" preCellId="../M1/0/M1" postCellId="../I1R/0/I1R" preSegmentId="6" postSegmentId="6" preFractionAlong="0.5467102793432796" postFractionAlong="0.18485445552552704"/>
    </projection>
    <projection id="NCXLS_M1_I2L" presynapticPopulation="M1" postsynapticPopulation="I2L" synapse="Acetylcholine">
      <connection id="3" preCellId="../M1/0/M1" postCellId="../I2L/0/I2L" preSegmentId="2" postSegmentId="2" preFractionAlong="0.3951502360018144" postFractionAlong="0.9266588657937942"/>
    </projection>
    <projection id="NCXLS_M1_I3" presynapticPopulation="M1" postsynapticPopulation="I3" synapse="Acetylcholine">
      <connection id="4" preCellId="../M1/0/M1" postCellId="../I3/0/I3" preSegmentId="8" postSegmentId="7" preFractionAlong="0.5208342600258237" postFractionAlong="0.9611720243493491"/>
    </projection>
    <projection id="NCXLS_M1_M2L" presynapticPopulation="M1" postsynapticPopulation="M2L" synapse="Glutamate">
      <connection id="5" preCellId="../M1/0/M1" postCellId="../M2L/0/M2L" preSegmentId="5" postSegmentId="2" preFractionAlong="0.5396921323890798" postFractionAlong="0.5867511656638482"/>
    </projection>
    <projection id="NCXLS_M1_M3L" presynapticPopulation="M1" postsynapticPopulation="M3L" synapse="Acetylcholine">
      <connection id="6" preCellId="../M1/0/M1" postCellId="../M3L/0/M3L" preSegmentId="9" postSegmentId="9" preFractionAlong="0.2962735057040824" postFractionAlong="0.1652669390630025"/>
    </projection>
    <projection id="NCXLS_M1_I5" presynapticPopulation="M1" postsynapticPopulation="I5" synapse="Acetylcholine">
      <connection id="7" preCellId="../M1/0/M1" postCellId="../I5/0/I5" preSegmentId="9" postSegmentId="7" preFractionAlong="0.4234014807063696" postFractionAlong="0.3948815181755697"/>
    </projection>
    <projection id="NCXLS_M1_MCR" presynapticPopulation="M1" postsynapticPopulation="MCR" synapse="Acetylcholine">
      <connection id="8" preCellId="../M1/0/M1" postCellId="../MCR/0/MCR" preSegmentId="8" postSegmentId="8" preFractionAlong="0.014079822715084456" postFractionAlong="0.19884240408880516"/>
    </projection>
    <projection id="NCXLS_M1_I6" presynapticPopulation="M1" postsynapticPopulation="I6" synapse="Acetylcholine">
      <connection id="9" preCellId="../M1/0/M1" postCellId="../I6/0/I6" preSegmentId="8" postSegmentId="3" preFractionAlong="0.7901755405312056" postFractionAlong="0.6059599747810114"/>
    </projection>
    <projection id="NCXLS_M1_MI" presynapticPopulation="M1" postsynapticPopulation="MI" synapse="Acetylcholine">
      <connection id="10" preCellId="../M1/0/M1" postCellId="../MI/0/MI" preSegmentId="7" postSegmentId="9" preFractionAlong="0.9149596755437808" postFractionAlong="0.8500385777897993"/>
    </projection>
    <projection id="NCXLS_M1_NSML" presynapticPopulation="M1" postsynapticPopulation="NSML" synapse="Acetylcholine">
      <connection id="11" preCellId="../M1/0/M1" postCellId="../NSML/0/NSML" preSegmentId="2" postSegmentId="1" preFractionAlong="0.06355835028602363" postFractionAlong="0.3109823217156622"/>
    </projection>
    <projection id="NCXLS_M1_M3R" presynapticPopulation="M1" postsynapticPopulation="M3R" synapse="Glutamate">
      <connection id="12" preCellId="../M1/0/M1" postCellId="../M3R/0/M3R" preSegmentId="8" postSegmentId="5" preFractionAlong="0.7296061783380641" postFractionAlong="0.6375574713552131"/>
    </projection>
    <projection id="NCXLS_M1_M2R" presynapticPopulation="M1" postsynapticPopulation="M2R" synapse="Acetylcholine">
      <connection id="13" preCellId="../M1/0/M1" postCellId="../M2R/0/M2R" preSegmentId="3" postSegmentId="1" preFractionAlong="0.38292687475378984" postFractionAlong="0.9717120953891037"/>
    </projection>
    <projection id="NCXLS_M1_MCL" presynapticPopulation="M1" postsynapticPopulation="MCL" synapse="Acetylcholine">
      <connection id="14" preCellId="../M1/0/M1" postCellId="../MCL/0/MCL" preSegmentId="3" postSegmentId="1" preFractionAlong="0.7217295211648732" postFractionAlong="0.23598491974895575"/>
    </projection>
    <projection id="NCXLS_M1_M5" presynapticPopulation="M1" postsynapticPopulation="M5" synapse="Glutamate">
      <connection id="15" preCellId="../M1/0/M1" postCellId="../M5/0/M5" preSegmentId="7" postSegmentId="9" preFractionAlong="0.7106628896857874" postFractionAlong="0.11089082081183133"/>
    </projection>
    <projection id="NCXLS_M1_NSMR" presynapticPopulation="M1" postsynapticPopulation="NSMR" synapse="Acetylcholine">
      <connection id="16" preCellId="../M1/0/M1" postCellId="../NSMR/0/NSMR" preSegmentId="3" postSegmentId="7" preFractionAlong="0.47537022318211175" postFractionAlong="0.5632755719763837"/>
    </projection>
    <projection id="NCXLS_M1_I2R" presynapticPopulation="M1" postsynapticPopulation="I2R" synapse="Acetylcholine">
      <connection id="17" preCellId="../M1/0/M1" postCellId="../I2R/0/I2R" preSegmentId="4" postSegmentId="5" preFractionAlong="0.24929222914887494" postFractionAlong="0.41038292303562973"/>
    </projection>
    <projection id="NCXLS_I1R_M3L" presynapticPopulation="I1R" postsynapticPopulation="M3L" synapse="Glutamate">
      <connection id="18" preCellId="../I1R/0/I1R" postCellId="../M3L/0/M3L" preSegmentId="4" postSegmentId="7" preFractionAlong="0.289751452913768" postFractionAlong="0.16122128725400442"/>
    </projection>
    <projection id="NCXLS_I3_M2R" presynapticPopulation="I3" postsynapticPopulation="M2R" synapse="Acetylcholine">
      <connection id="19" preCellId="../I3/0/I3" postCellId="../M2R/0/M2R" preSegmentId="2" postSegmentId="9" preFractionAlong="0.10549425983027061" postFractionAlong="0.45653457048291024"/>
    </projection>
    <projection id="NCXLS_M2L_I4" presynapticPopulation="M2L" postsynapticPopulation="I4" synapse="Acetylcholine">
      <connection id="20" preCellId="../M2L/0/M2L" postCellId="../I4/0/I4" preSegmentId="4" postSegmentId="7" preFractionAlong="0.8960912999234932" postFractionAlong="0.3180034749718639"/>
    </projection>
    <projection id="NCXLS_M2L_I1R" presynapticPopulation="M2L" postsynapticPopulation="I1R" synapse="Acetylcholine">
      <connection id="21" preCellId="../M2L/0/M2L" postCellId="../I1R/0/I1R" preSegmentId="1" postSegmentId="1" preFractionAlong="0.22793516254194168" postFractionAlong="0.4271077886262563"/>
    </projection>
    <projection id="NCXLS_M2L_I2L" presynapticPopulation="M2L" postsynapticPopulation="I2L" synapse="Acetylcholine">
      <connection id="22" preCellId="../M2L/0/M2L" postCellId="../I2L/0/I2L" preSegmentId="4" postSegmentId="9" preFractionAlong="0.30478125815802903" postFractionAlong="0.16465585314294173"/>
    </projection>
    <projection id="NCXLS_M2L_I3" presynapticPopulation="M2L" postsynapticPopulation="I3" synapse="Acetylcholine">
      <connection id="23" preCellId="../M2L/0/M2L" postCellId="../I3/0/I3" preSegmentId="9" postSegmentId="5" preFractionAlong="0.6924360328902703" postFractionAlong="0.2694123337985215"/>
    </projection>
    <projection id="NCXLS_M2L_M3L" presynapticPopulation="M2L" postsynapticPopulation="M3L" synapse="Glutamate">
      <connection id="24" preCellId="../M2L/0/M2L" postCellId="../M3L/0/M3L" preSegmentId="8" postSegmentId="6" preFractionAlong="0.21876421957307024" postFractionAlong="0.5581020020173412"/>
    </projection>
    <projection id="NCXLS_M2L_I5" presynapticPopulation="M2L" postsynapticPopulation="I5" synapse="Acetylcholine">
      <connection id="25" preCellId="../M2L/0/M2L" postCellId="../I5/0/I5" preSegmentId="4" postSegmentId="1" preFractionAlong="0.06489224710898156" postFractionAlong="0.2539154139343447"/>
    </projection>
    <projection id="NCXLS_M2L_MCR" presynapticPopulation="M2L" postsynapticPopulation="MCR" synapse="Acetylcholine">
      <connection id="26" preCellId="../M2L/0/M2L" postCellId="../MCR/0/MCR" preSegmentId="7" postSegmentId="2" preFractionAlong="0.712270589924442" postFractionAlong="0.1480869299533999"/>
    </projection>
    <projection id="NCXLS_M2L_MCL" presynapticPopulation="M2L" postsynapticPopulation="MCL" synapse="Acetylcholine">
      <connection id="27" preCellId="../M2L/0/M2L" postCellId="../MCL/0/MCL" preSegmentId="8" postSegmentId="1" preFractionAlong="0.266781014275285" postFractionAlong="0.9766149558326529"/>
    </projection>
    <projection id="NCXLS_M2L_I2R" presynapticPopulation="M2L" postsynapticPopulation="I2R" synapse="Acetylcholine">
      <connection id="28" preCellId="../M2L/0/M2L" postCellId="../I2R/0/I2R" preSegmentId="6" postSegmentId="7" preFractionAlong="0.27864646423661144" postFractionAlong="0.9082658859666537"/>
    </projection>
    <projection id="NCXLS_M3L_I1L" presynapticPopulation="M3L" postsynapticPopulation="I1L" synapse="Acetylcholine">
      <connection id="29" preCellId="../M3L/0/M3L" postCellId="../I1L/0/I1L" preSegmentId="3" postSegmentId="2" preFractionAlong="0.5309345833171364" postFractionAlong="0.44778316457309164"/>
    </projection>
    <projection id="NCXLS_M3L_I4" presynapticPopulation="M3L" postsynapticPopulation="I4" synapse="Acetylcholine">
      <connection id="30" preCellId="../M3L/0/M3L" postCellId="../I4/0/I4" preSegmentId="6" postSegmentId="7" preFractionAlong="0.6721355474058786" postFractionAlong="0.7616196153287176"/>
    </projection>
    <projection id="NCXLS_M3L_I1R" presynapticPopulation="M3L" postsynapticPopulation="I1R" synapse="Acetylcholine">
      <connection id="31" preCellId="../M3L/0/M3L" postCellId="../I1R/0/I1R" preSegmentId="1" postSegmentId="6" preFractionAlong="0.3677831327192532" postFractionAlong="0.6323058305935795"/>
    </projection>
    <projection id="NCXLS_M3L_I2L" presynapticPopulation="M3L" postsynapticPopulation="I2L" synapse="Acetylcholine">
      <connection id="32" preCellId="../M3L/0/M3L" postCellId="../I2L/0/I2L" preSegmentId="6" postSegmentId="6" preFractionAlong="0.5357746840747585" postFractionAlong="0.0902897700544083"/>
    </projection>
    <projection id="NCXLS_M3L_I3" presynapticPopulation="M3L" postsynapticPopulation="I3" synapse="Acetylcholine">
      <connection id="33" preCellId="../M3L/0/M3L" postCellId="../I3/0/I3" preSegmentId="1" postSegmentId="9" preFractionAlong="0.32078006497173583" postFractionAlong="0.18651851039985423"/>
    </projection>
    <projection id="NCXLS_M3L_MCR" presynapticPopulation="M3L" postsynapticPopulation="MCR" synapse="Acetylcholine">
      <connection id="34" preCellId="../M3L/0/M3L" postCellId="../MCR/0/MCR" preSegmentId="3" postSegmentId="4" preFractionAlong="0.32595890520188475" postFractionAlong="0.2202410475655483"/>
    </projection>
    <projection id="NCXLS_M3L_M2R" presynapticPopulation="M3L" postsynapticPopulation="M2R" synapse="Glutamate">
      <connection id="35" preCellId="../M3L/0/M3L" postCellId="../M2R/0/M2R" preSegmentId="3" postSegmentId="3" preFractionAlong="0.3486659872917294" postFractionAlong="0.09617655109142076"/>
    </projection>
    <projection id="NCXLS_M3L_MCL" presynapticPopulation="M3L" postsynapticPopulation="MCL" synapse="Acetylcholine">
      <connection id="36" preCellId="../M3L/0/M3L" postCellId="../MCL/0/MCL" preSegmentId="9" postSegmentId="1" preFractionAlong="0.3975720210875223" postFractionAlong="0.5177513505274801"/>
    </projection>
    <projection id="NCXLS_M3L_I2R" presynapticPopulation="M3L" postsynapticPopulation="I2R" synapse="Acetylcholine">
      <connection id="37" preCellId="../M3L/0/M3L" postCellId="../I2R/0/I2R" preSegmentId="8" postSegmentId="1" preFractionAlong="0.6756901170392807" postFractionAlong="0.7352161192407721"/>
    </projection>
    <projection id="NCXLS_MCR_I2L" presynapticPopulation="MCR" postsynapticPopulation="I2L" synapse="Acetylcholine">
      <connection id="38" preCellId="../MCR/0/MCR" postCellId="../I2L/0/I2L" preSegmentId="2" postSegmentId="7" preFractionAlong="0.5414479738275658" postFractionAlong="0.6957843993450822"/>
    </projection>
    <projection id="NCXLS_MCR_I3" presynapticPopulation="MCR" postsynapticPopulation="I3" synapse="Acetylcholine">
      <connection id="39" preCellId="../MCR/0/MCR" postCellId="../I3/0/I3" preSegmentId="7" postSegmentId="9" preFractionAlong="0.5166358912710143" postFractionAlong="0.260829174830409"/>
    </projection>
    <projection id="NCXLS_MCR_I2R" presynapticPopulation="MCR" postsynapticPopulation="I2R" synapse="Acetylcholine">
      <connection id="40" preCellId="../MCR/0/MCR" postCellId="../I2R/0/I2R" preSegmentId="1" postSegmentId="5" preFractionAlong="0.9004180571633305" postFractionAlong="0.6331014572732679"/>
    </projection>
    <projection id="NCXLS_M4_I1L" presynapticPopulation="M4" postsynapticPopulation="I1L" synapse="Acetylcholine">
      <connection id="41" preCellId="../M4/0/M4" postCellId="../I1L/0/I1L" preSegmentId="9" postSegmentId="9" preFractionAlong="0.3492095746126609" postFractionAlong="0.7259556788702394"/>
    </projection>
    <projection id="NCXLS_M4_MI" presynapticPopulation="M4" postsynapticPopulation="MI" synapse="Acetylcholine">
      <connection id="42" preCellId="../M4/0/M4" postCellId="../MI/0/MI" preSegmentId="3" postSegmentId="4" preFractionAlong="0.8870864242651173" postFractionAlong="0.7798755458576239"/>
    </projection>
    <projection id="NCXLS_M4_M2R" presynapticPopulation="M4" postsynapticPopulation="M2R" synapse="Acetylcholine">
      <connection id="43" preCellId="../M4/0/M4" postCellId="../M2R/0/M2R" preSegmentId="8" postSegmentId="4" preFractionAlong="0.08413996499504883" postFractionAlong="0.16162871409461377"/>
    </projection>
    <projection id="NCXLS_M4_M5" presynapticPopulation="M4" postsynapticPopulation="M5" synapse="Glutamate">
      <connection id="44" preCellId="../M4/0/M4" postCellId="../M5/0/M5" preSegmentId="6" postSegmentId="8" preFractionAlong="0.6064290596595899" postFractionAlong="0.009197051616629648"/>
    </projection>
    <projection id="NCXLS_I6_M1" presynapticPopulation="I6" postsynapticPopulation="M1" synapse="Acetylcholine">
      <connection id="45" preCellId="../I6/0/I6" postCellId="../M1/0/M1" preSegmentId="9" postSegmentId="3" preFractionAlong="0.9736638367553173" postFractionAlong="0.2839209747374657"/>
    </projection>
    <projection id="NCXLS_MI_M1" presynapticPopulation="MI" postsynapticPopulation="M1" synapse="Acetylcholine">
      <connection id="46" preCellId="../MI/0/MI" postCellId="../M1/0/M1" preSegmentId="2" postSegmentId="2" preFractionAlong="0.6918951976926933" postFractionAlong="0.6519612595026005"/>
    </projection>
    <projection id="NCXLS_M3R_I1R" presynapticPopulation="M3R" postsynapticPopulation="I1R" synapse="Acetylcholine">
      <connection id="47" preCellId="../M3R/0/M3R" postCellId="../I1R/0/I1R" preSegmentId="9" postSegmentId="4" preFractionAlong="0.7121792213475359" postFractionAlong="0.23724908749680007"/>
    </projection>
    <projection id="NCXLS_M3R_I5" presynapticPopulation="M3R" postsynapticPopulation="I5" synapse="Acetylcholine">
      <connection id="48" preCellId="../M3R/0/M3R" postCellId="../I5/0/I5" preSegmentId="5" postSegmentId="4" preFractionAlong="0.3664687845828599" postFractionAlong="0.7441705230565623"/>
    </projection>
    <projection id="NCXLS_M3R_I6" presynapticPopulation="M3R" postsynapticPopulation="I6" synapse="Acetylcholine">
      <connection id="49" preCellId="../M3R/0/M3R" postCellId="../I6/0/I6" preSegmentId="3" postSegmentId="1" preFractionAlong="0.3080607918523892" postFractionAlong="0.5425402305548993"/>
    </projection>
    <projection id="NCXLS_M3R_NSML" presynapticPopulation="M3R" postsynapticPopulation="NSML" synapse="Acetylcholine">
      <connection id="50" preCellId="../M3R/0/M3R" postCellId="../NSML/0/NSML" preSegmentId="3" postSegmentId="6" preFractionAlong="0.26520236768172545" postFractionAlong="0.24398964337908358"/>
    </projection>
    <projection id="NCXLS_M3R_NSMR" presynapticPopulation="M3R" postsynapticPopulation="NSMR" synapse="Acetylcholine">
      <connection id="51" preCellId="../M3R/0/M3R" postCellId="../NSMR/0/NSMR" preSegmentId="6" postSegmentId="6" preFractionAlong="0.3930977246667604" postFractionAlong="0.8920465551771133"/>
    </projection>
    <projection id="NCXLS_M2R_I4" presynapticPopulation="M2R" postsynapticPopulation="I4" synapse="Acetylcholine">
      <connection id="52" preCellId="../M2R/0/M2R" postCellId="../I4/0/I4" preSegmentId="2" postSegmentId="5" preFractionAlong="0.5026370931051921" postFractionAlong="0.5769038846263591"/>
    </projection>
    <projection id="NCXLS_M2R_I1R" presynapticPopulation="M2R" postsynapticPopulation="I1R" synapse="Acetylcholine">
      <connection id="53" preCellId="../M2R/0/M2R" postCellId="../I1R/0/I1R" preSegmentId="1" postSegmentId="5" preFractionAlong="0.23018526824155527" postFractionAlong="0.4991933798847523"/>
    </projection>
    <projection id="NCXLS_M2R_I2L" presynapticPopulation="M2R" postsynapticPopulation="I2L" synapse="Acetylcholine">
      <connection id="54" preCellId="../M2R/0/M2R" postCellId="../I2L/0/I2L" preSegmentId="4" postSegmentId="3" preFractionAlong="0.768554014306309" postFractionAlong="0.04360377175443375"/>
    </projection>
    <projection id="NCXLS_M2R_I3" presynapticPopulation="M2R" postsynapticPopulation="I3" synapse="Acetylcholine">
      <connection id="55" preCellId="../M2R/0/M2R" postCellId="../I3/0/I3" preSegmentId="5" postSegmentId="6" preFractionAlong="0.3701587002554444" postFractionAlong="0.015456616528867428"/>
    </projection>
    <projection id="NCXLS_M2R_M2L" presynapticPopulation="M2R" postsynapticPopulation="M2L" synapse="Glutamate">
      <connection id="56" preCellId="../M2R/0/M2R" postCellId="../M2L/0/M2L" preSegmentId="8" postSegmentId="1" preFractionAlong="0.5527649668354899" postFractionAlong="0.5722924691708383"/>
    </projection>
    <projection id="NCXLS_M2R_M3L" presynapticPopulation="M2R" postsynapticPopulation="M3L" synapse="Acetylcholine">
      <connection id="57" preCellId="../M2R/0/M2R" postCellId="../M3L/0/M3L" preSegmentId="1" postSegmentId="4" preFractionAlong="0.2944488920695857" postFractionAlong="0.38509772860192526"/>
    </projection>
    <projection id="NCXLS_M2R_I5" presynapticPopulation="M2R" postsynapticPopulation="I5" synapse="Acetylcholine">
      <connection id="58" preCellId="../M2R/0/M2R" postCellId="../I5/0/I5" preSegmentId="7" postSegmentId="1" preFractionAlong="0.31692200515627766" postFractionAlong="0.1694927466860925"/>
    </projection>
    <projection id="NCXLS_M2R_MCR" presynapticPopulation="M2R" postsynapticPopulation="MCR" synapse="Acetylcholine">
      <connection id="59" preCellId="../M2R/0/M2R" postCellId="../MCR/0/MCR" preSegmentId="9" postSegmentId="6" preFractionAlong="0.696029796674973" postFractionAlong="0.570061170089365"/>
    </projection>
    <projection id="NCXLS_M2R_NSML" presynapticPopulation="M2R" postsynapticPopulation="NSML" synapse="Acetylcholine">
      <connection id="60" preCellId="../M2R/0/M2R" postCellId="../NSML/0/NSML" preSegmentId="8" postSegmentId="2" preFractionAlong="0.6150072266991697" postFractionAlong="0.9900538501042633"/>
    </projection>
    <projection id="NCXLS_M2R_MCL" presynapticPopulation="M2R" postsynapticPopulation="MCL" synapse="Acetylcholine">
      <connection id="61" preCellId="../M2R/0/M2R" postCellId="../MCL/0/MCL" preSegmentId="2" postSegmentId="2" preFractionAlong="0.3225507642386005" postFractionAlong="0.8486697949246744"/>
    </projection>
    <projection id="NCXLS_M2R_I2R" presynapticPopulation="M2R" postsynapticPopulation="I2R" synapse="Acetylcholine">
      <connection id="62" preCellId="../M2R/0/M2R" postCellId="../I2R/0/I2R" preSegmentId="9" postSegmentId="6" preFractionAlong="0.35949115121975517" postFractionAlong="0.29359184426449336"/>
    </projection>
    <projection id="NCXLS_MCL_I1L" presynapticPopulation="MCL" postsynapticPopulation="I1L" synapse="Acetylcholine">
      <connection id="63" preCellId="../MCL/0/MCL" postCellId="../I1L/0/I1L" preSegmentId="7" postSegmentId="3" preFractionAlong="0.25620694359445806" postFractionAlong="0.6115137108656805"/>
    </projection>
    <projection id="NCXLS_MCL_I3" presynapticPopulation="MCL" postsynapticPopulation="I3" synapse="Acetylcholine">
      <connection id="64" preCellId="../MCL/0/MCL" postCellId="../I3/0/I3" preSegmentId="7" postSegmentId="9" preFractionAlong="0.6278944149486361" postFractionAlong="0.19427395351204224"/>
    </projection>
    <projection id="NCXLS_MCL_M2R" presynapticPopulation="MCL" postsynapticPopulation="M2R" synapse="Acetylcholine">
      <connection id="65" preCellId="../MCL/0/MCL" postCellId="../M2R/0/M2R" preSegmentId="8" postSegmentId="3" preFractionAlong="0.3379951568515358" postFractionAlong="0.375582952639944"/>
    </projection>
    <projection id="NCXLS_M5_M1" presynapticPopulation="M5" postsynapticPopulation="M1" synapse="Acetylcholine">
      <connection id="66" preCellId="../M5/0/M5" postCellId="../M1/0/M1" preSegmentId="2" postSegmentId="7" preFractionAlong="0.6720261352951994" postFractionAlong="0.32815266747473193"/>
    </projection>
    <projection id="NCXLS_M5_MI" presynapticPopulation="M5" postsynapticPopulation="MI" synapse="Acetylcholine">
      <connection id="67" preCellId="../M5/0/M5" postCellId="../MI/0/MI" preSegmentId="6" postSegmentId="6" preFractionAlong="0.25025136051586405" postFractionAlong="0.0388347344294232"/>
    </projection>
    <projection id="NCXLS_NSMR_I6" presynapticPopulation="NSMR" postsynapticPopulation="I6" synapse="Serotonin_Glutamate">
      <connection id="68" preCellId="../NSMR/0/NSMR" postCellId="../I6/0/I6" preSegmentId="6" postSegmentId="5" preFractionAlong="0.5222432600548044" postFractionAlong="0.7699935530986108"/>
    </projection>
    <projection id="NC_I1L_RMDDL" presynapticPopulation="I1L" postsynapticPopulation="RMDDL" synapse="Acetylcholine">
      <connection id="69" preCellId="../I1L/0/I1L" postCellId="../RMDDL/0/RMDDL" preSegmentId="5" postSegmentId="7" preFractionAlong="0.085347464993768" postFractionAlong="0.0516817211686077"/>
    </projection>
    <projection id="NC_I1L_RMDVL" presynapticPopulation="I1L" postsynapticPopulation="RMDVL" synapse="Acetylcholine">
      <connection id="70" preCellId="../I1L/0/I1L" postCellId="../RMDVL/0/RMDVL" preSegmentId="4" postSegmentId="3" preFractionAlong="0.6374299014982066" postFractionAlong="0.7260913337226615"/>
    </projection>
    <projection id="NC_I1R_RMDDR" presynapticPopulation="I1R" postsynapticPopulation="RMDDR" synapse="Acetylcholine">
      <connection id="71" preCellId="../I1R/0/I1R" postCellId="../RMDDR/0/RMDDR" preSegmentId="2" postSegmentId="3" preFractionAlong="0.7951861947687037" postFractionAlong="0.2708322512620742"/>
    </projection>
    <projection id="NC_I1R_RMDVR" presynapticPopulation="I1R" postsynapticPopulation="RMDVR" synapse="Acetylcholine">
      <connection id="72" preCellId="../I1R/0/I1R" postCellId="../RMDVR/0/RMDVR" preSegmentId="7" postSegmentId="5" preFractionAlong="0.18433367433137005" postFractionAlong="0.08087296661719767"/>
    </projection>
    <projection id="NC_I2L_URXL" presynapticPopulation="I2L" postsynapticPopulation="URXL" synapse="Glutamate">
      <connection id="73" preCellId="../I2L/0/I2L" postCellId="../URXL/0/URXL" preSegmentId="9" postSegmentId="5" preFractionAlong="0.05819359550844361" postFractionAlong="0.9152137276264805"/>
    </projection>
    <projection id="NC_I2R_URXR" presynapticPopulation="I2R" postsynapticPopulation="URXR" synapse="Glutamate">
      <connection id="74" preCellId="../I2R/0/I2R" postCellId="../URXR/0/URXR" preSegmentId="2" postSegmentId="6" preFractionAlong="0.7145959227000623" postFractionAlong="0.6601973767177313"/>
    </projection>
    <projection id="NC_AVKL_I1L" presynapticPopulation="AVKL" postsynapticPopulation="I1L" synapse="Acetylcholine">
      <connection id="75" preCellId="../AVKL/0/AVKL" postCellId="../I1L/0/I1L" preSegmentId="5" postSegmentId="1" preFractionAlong="0.9548652806631941" postFractionAlong="0.7378969166957685"/>
    </projection>
    <projection id="NC_AVKR_I1R" presynapticPopulation="AVKR" postsynapticPopulation="I1R" synapse="Acetylcholine">
      <connection id="76" preCellId="../AVKR/0/AVKR" postCellId="../I1R/0/I1R" preSegmentId="5" postSegmentId="6" preFractionAlong="0.7300393165618185" postFractionAlong="0.04771612769164879"/>
    </projection>
    <projection id="NC_RIS_I1L" presynapticPopulation="RIS" postsynapticPopulation="I1L" synapse="Glutamate">
      <connection id="77" preCellId="../RIS/0/RIS" postCellId="../I1L/0/I1L" preSegmentId="3" postSegmentId="5" preFractionAlong="0.12016464780564218" postFractionAlong="0.3418796667164016"/>
    </projection>
    <projection id="NC_RIS_I1R" presynapticPopulation="RIS" postsynapticPopulation="I1R" synapse="Glutamate">
      <connection id="78" preCellId="../RIS/0/RIS" postCellId="../I1R/0/I1R" preSegmentId="5" postSegmentId="1" preFractionAlong="0.3114133093912942" postFractionAlong="0.9795105286215086"/>
    </projection>
    <projection id="NC_AVAL_I2L" presynapticPopulation="AVAL" postsynapticPopulation="I2L" synapse="Acetylcholine">
      <connection id="79" preCellId="../AVAL/0/AVAL" postCellId="../I2L/0/I2L" preSegmentId="5" postSegmentId="5" preFractionAlong="0.4734717707805657" postFractionAlong="0.17320186991001518"/>
    </projection>
    <projection id="NC_AVAR_I2R" presynapticPopulation="AVAR" postsynapticPopulation="I2R" synapse="Acetylcholine">
      <connection id="80" preCellId="../AVAR/0/AVAR" postCellId="../I2R/0/I2R" preSegmentId="5" postSegmentId="7" preFractionAlong="0.048058924197033726" postFractionAlong="0.9491457315913859"/>
    </projection>
    <projection id="NC_SMBVL_I4" presynapticPopulation="SMBVL" postsynapticPopulation="I4" synapse="Acetylcholine">
      <connection id="81" preCellId="../SMBVL/0/SMBVL" postCellId="../I4/0/I4" preSegmentId="4" postSegmentId="2" preFractionAlong="0.26089362334171395" postFractionAlong="0.01530454029038475"/>
    </projection>
    <projection id="NC_SMBVR_I4" presynapticPopulation="SMBVR" postsynapticPopulation="I4" synapse="Acetylcholine">
      <connection id="82" preCellId="../SMBVR/0/SMBVR" postCellId="../I4/0/I4" preSegmentId="3" postSegmentId="1" preFractionAlong="0.5393774484000625" postFractionAlong="0.6839637693981411"/>
    </projection>
    <projection id="NCNMJ_M1_pm3L" presynapticPopulation="M1" postsynapticPopulation="pm3L" synapse="Acetylcholine">
      <connection id="83" preCellId="../M1/0/M1" postCellId="../pm3L/0/pm3L" preSegmentId="8" postSegmentId="7" preFractionAlong="0.9442515971251674" postFractionAlong="0.8671989335550038"/>
    </projection>
    <projection id="NCNMJ_M1_pm3R" presynapticPopulation="M1" postsynapticPopulation="pm3R" synapse="Acetylcholine">
      <connection id="84" preCellId="../M1/0/M1" postCellId="../pm3R/0/pm3R" preSegmentId="4" postSegmentId="8" preFractionAlong="0.6771683423829817" postFractionAlong="0.5733670416719333"/>
    </projection>
    <projection id="NCNMJ_M1_pm4L" presynapticPopulation="M1" postsynapticPopulation="pm4L" synapse="Acetylcholine">
      <connection id="85" preCellId="../M1/0/M1" postCellId="../pm4L/0/pm4L" preSegmentId="1" postSegmentId="1" preFractionAlong="0.811204176736003" postFractionAlong="0.8206394757439553"/>
    </projection>
    <projection id="NCNMJ_M1_pm4R" presynapticPopulation="M1" postsynapticPopulation="pm4R" synapse="Acetylcholine">
      <connection id="86" preCellId="../M1/0/M1" postCellId="../pm4R/0/pm4R" preSegmentId="3" postSegmentId="1" preFractionAlong="0.9611905638239142" postFractionAlong="0.9053506419560637"/>
    </projection>
    <projection id="NCNMJ_M2L_pm4L" presynapticPopulation="M2L" postsynapticPopulation="pm4L" synapse="Acetylcholine">
      <connection id="87" preCellId="../M2L/0/M2L" postCellId="../pm4L/0/pm4L" preSegmentId="2" postSegmentId="3" preFractionAlong="0.6182538843378929" postFractionAlong="0.3365542148887265"/>
    </projection>
    <projection id="NCNMJ_M2L_pm5L" presynapticPopulation="M2L" postsynapticPopulation="pm5L" synapse="Acetylcholine">
      <connection id="88" preCellId="../M2L/0/M2L" postCellId="../pm5L/0/pm5L" preSegmentId="8" postSegmentId="2" preFractionAlong="0.2606945282359031" postFractionAlong="0.4960374542934062"/>
    </projection>
    <projection id="NCNMJ_M2R_pm4R" presynapticPopulation="M2R" postsynapticPopulation="pm4R" synapse="Acetylcholine">
      <connection id="89" preCellId="../M2R/0/M2R" postCellId="../pm4R/0/pm4R" preSegmentId="5" postSegmentId="2" preFractionAlong="0.628942846779884" postFractionAlong="0.877472013527053"/>
    </projection>
    <projection id="NCNMJ_M2R_pm5R" presynapticPopulation="M2R" postsynapticPopulation="pm5R" synapse="Acetylcholine">
      <connection id="90" preCellId="../M2R/0/M2R" postCellId="../pm5R/0/pm5R" preSegmentId="4" postSegmentId="9" preFractionAlong="0.8034809303848486" postFractionAlong="0.2820345725713065"/>
    </projection>
    <projection id="NCNMJ_M3L_pm6L" presynapticPopulation="M3L" postsynapticPopulation="pm6L" synapse="Glutamate">
      <connection id="91" preCellId="../M3L/0/M3L" postCellId="../pm6L/0/pm6L" preSegmentId="5" postSegmentId="9" preFractionAlong="0.5685202837499583" postFractionAlong="0.5759245752580846"/>
    </projection>
    <projection id="NCNMJ_M3R_pm6R" presynapticPopulation="M3R" postsynapticPopulation="pm6R" synapse="Glutamate">
      <connection id="92" preCellId="../M3R/0/M3R" postCellId="../pm6R/0/pm6R" preSegmentId="3" postSegmentId="4" preFractionAlong="0.37201808579278317" postFractionAlong="0.7764129607419968"/>
    </projection>
    <projection id="NCNMJ_M4_pm5L" presynapticPopulation="M4" postsynapticPopulation="pm5L" synapse="Acetylcholine">
      <connection id="93" preCellId="../M4/0/M4" postCellId="../pm5L/0/pm5L" preSegmentId="8" postSegmentId="7" preFractionAlong="0.9307573256035647" postFractionAlong="0.8584127518430118"/>
    </projection>
    <projection id="NCNMJ_M4_pm5R" presynapticPopulation="M4" postsynapticPopulation="pm5R" synapse="Acetylcholine">
      <connection id="94" preCellId="../M4/0/M4" postCellId="../pm5R/0/pm5R" preSegmentId="1" postSegmentId="7" preFractionAlong="0.7508710677914974" postFractionAlong="0.7545428740846823"/>
    </projection>
    <projection id="NCNMJ_M5_pm5L" presynapticPopulation="M5" postsynapticPopulation="pm5L" synapse="Acetylcholine">
      <connection id="95" preCellId="../M5/0/M5" postCellId="../pm5L/0/pm5L" preSegmentId="9" postSegmentId="1" preFractionAlong="0.5343274735305634" postFractionAlong="0.4965611906830777"/>
    </projection>
    <projection id="NCNMJ_M5_pm5R" presynapticPopulation="M5" postsynapticPopulation="pm5R" synapse="Acetylcholine">
      <connection id="96" preCellId="../M5/0/M5" postCellId="../pm5R/0/pm5R" preSegmentId="9" postSegmentId="6" preFractionAlong="0.2976351745093109" postFractionAlong="0.09998488716186338"/>
    </projection>
    <projection id="NCNMJ_M5_pm6L" presynapticPopulation="M5" postsynapticPopulation="pm6L" synapse="Acetylcholine">
      <connection id="97" preCellId="../M5/0/M5" postCellId="../pm6L/0/pm6L" preSegmentId="4" postSegmentId="9" preFractionAlong="0.8471431440955898" postFractionAlong="0.3549051904627206"/>
    </projection>
    <projection id="NCNMJ_M5_pm6R" presynapticPopulation="M5" postsynapticPopulation="pm6R" synapse="Acetylcholine">
      <connection id="98" preCellId="../M5/0/M5" postCellId="../pm6R/0/pm6R" preSegmentId="4" postSegmentId="3" preFractionAlong="0.49302565777180496" postFractionAlong="0.08328441119525964"/>
    </projection>
    <projection id="NCNMJ_M5_pm7L" presynapticPopulation="M5" postsynapticPopulation="pm7L" synapse="Acetylcholine">
      <connection id="99" preCellId="../M5/0/M5" postCellId="../pm7L/0/pm7L" preSegmentId="5" postSegmentId="3" preFractionAlong="0.602440925901119" postFractionAlong="0.5537030523458008"/>
    </projection>
    <projection id="NCNMJ_M5_pm7R" presynapticPopulation="M5" postsynapticPopulation="pm7R" synapse="Acetylcholine">
      <connection id="100" preCellId="../M5/0/M5" postCellId="../pm7R/0/pm7R" preSegmentId="5" postSegmentId="4" preFractionAlong="0.9461945428816902" postFractionAlong="0.7812960504712025"/>
    </projection>
    <projection id="NCNMJ_M5_pm8" presynapticPopulation="M5" postsynapticPopulation="pm8" synapse="Acetylcholine">
      <connection id="101" preCellId="../M5/0/M5" postCellId="../pm8/0/pm8" preSegmentId="7" postSegmentId="5" preFractionAlong="0.49442030470258147" postFractionAlong="0.057558760016644284"/>
    </projection>
    <electricalProjection id="NCXLS_M1_M4_GJ" presynapticPopulation="M1" postsynapticPopulation="M4">
      <electricalConnection id="102" preCell="0" postCell="0" synapse="Generic_GJ" preSegment="5" postSegment="3" preFractionAlong="0.8877041827582998" postFractionAlong="0.3509150125520787"/>
    </electricalProjection>
    <electricalProjection id="NCXLS_I3_I1L_GJ" presynapticPopulation="I3" postsynapticPopulation="I1L">
      <electricalConnection id="103" preCell="0" postCell="0" synapse="Generic_GJ" preSegment="2" postSegment="9" preFractionAlong="0.7615106317174722" postFractionAlong="0.6182180633162611"/>
    </electricalProjection>
    <electricalProjection id="NCXLS_M2L_M3R_GJ" presynapticPopulation="M2L" postsynapticPopulation="M3R">
      <electricalConnection id="104" preCell="0" postCell="0" synapse="Generic_GJ" preSegment="6" postSegment="7" preFractionAlong="0.4260914750469411" postFractionAlong="0.22257641757103053"/>
    </electricalProjection>
    <electricalProjection id="NCXLS_M2L_M2R_GJ" presynapticPopulation="M2L" postsynapticPopulation="M2R">
      <electricalConnection id="105" preCell="0" postCell="0" synapse="Generic_GJ" preSegment="9" postSegment="2" preFractionAlong="0.8918969087767766" postFractionAlong="0.1466048216920255"/>
    </electricalProjection>
    <electricalProjection id="NCXLS_M3R_M3L_GJ" presynapticPopulation="M3R" postsynapticPopulation="M3L">
      <electricalConnection id="106" preCell="0" postCell="0" synapse="Generic_GJ" preSegment="5" postSegment="6" preFractionAlong="0.9866395785011755" postFractionAlong="0.3742707957561203"/>
    </electricalProjection>
    <electricalProjection id="NCXLS_M2R_M3R_GJ" presynapticPopulation="M2R" postsynapticPopulation="M3R">
      <electricalConnection id="107" preCell="0" postCell="0" synapse="Generic_GJ" preSegment="1" postSegment="6" preFractionAlong="0.8127995672575026" postFractionAlong="0.9472485773838587"/>
    </electricalProjection>
    <electricalProjection id="MuscleGJ_pm3L_pm3R" presynapticPopulation="pm3L" postsynapticPopulation="pm3R">
      <electricalConnection id="108" preCell="0" postCell="0" synapse="Generic_GJ" preSegment="9" postSegment="4" preFractionAlong="0.35021824670031354" postFractionAlong="0.7081811955831998"/>
    </electricalProjection>
    <electricalProjection id="MuscleGJ_pm4L_pm4R" presynapticPopulation="pm4L" postsynapticPopulation="pm4R">
      <electricalConnection id="109" preCell="0" postCell="0" synapse="Generic_GJ" preSegment="3" postSegment="6" preFractionAlong="0.7050843642966599" postFractionAlong="0.24872415443028795"/>
    </electricalProjection>
    <electricalProjection id="MuscleGJ_pm5L_pm5R" presynapticPopulation="pm5L" postsynapticPopulation="pm5R">
      <electricalConnection id="110" preCell="0" postCell="0" synapse="Generic_GJ" preSegment="3" postSegment="7" preFractionAlong="0.43445184448827134" postFractionAlong="0.25368217387313874"/>
    </electricalProjection>
    <electricalProjection id="MuscleGJ_pm6L_pm6R" presynapticPopulation="pm6L" postsynapticPopulation="pm6R">
      <electricalConnection id="111" preCell="0" postCell="0" synapse="Generic_GJ" preSegment="2" postSegment="4" preFractionAlong="0.11881791626807192" postFractionAlong="0.11752624677710488"/>
    </electricalProjection>
    <electricalProjection id="MuscleGJ_pm7L_pm7R" presynapticPopulation="pm7L" postsynapticPopulation="pm7R">
      <electricalConnection id="112" preCell="0" postCell="0" synapse="Generic_GJ" preSegment="9" postSegment="7" preFractionAlong="0.7460448792654233" postFractionAlong="0.5833687650971596"/>
    </electricalProjection>
    <electricalProjection id="MuscleGJ_pm4L_pm5L" presynapticPopulation="pm4L" postsynapticPopulation="pm5L">
      <electricalConnection id="113" preCell="0" postCell="0" synapse="Generic_GJ" preSegment="9" postSegment="1" preFractionAlong="0.08289132169335423" postFractionAlong="0.5283701212972092"/>
    </electricalProjection>
    <electricalProjection id="MuscleGJ_pm4R_pm5R" presynapticPopulation="pm4R" postsynapticPopulation="pm5R">
      <electricalConnection id="114" preCell="0" postCell="0" synapse="Generic_GJ" preSegment="5" postSegment="6" preFractionAlong="0.8021092490267341" postFractionAlong="0.9779006687542708"/>
    </electricalProjection>
    <electricalProjection id="MuscleGJ_pm5L_pm6L" presynapticPopulation="pm5L" postsynapticPopulation="pm6L">
      <electricalConnection id="115" preCell="0" postCell="0" synapse="Generic_GJ" preSegment="5" postSegment="6" preFractionAlong="0.924643330223596" postFractionAlong="0.9191157152786594"/>
    </electricalProjection>
    <electricalProjection id="MuscleGJ_pm5R_pm6R" presynapticPopulation="pm5R" postsynapticPopulation="pm6R">
      <electricalConnection id="116" preCell="0" postCell="0" synapse="Generic_GJ" preSegment="4" postSegment="3" preFractionAlong="0.6954111231066475" postFractionAlong="0.07543454708976927"/>
    </electricalProjection>
    <electricalProjection id="MuscleGJ_pm6L_pm7L" presynapticPopulation="pm6L" postsynapticPopulation="pm7L">
      <electricalConnection id="117" preCell="0" postCell="0" synapse="Generic_GJ" preSegment="9" postSegment="1" preFractionAlong="0.6957486889846172" postFractionAlong="0.45454106476777323"/>
    </electricalProjection>
    <electricalProjection id="MuscleGJ_pm6R_pm7R" presynapticPopulation="pm6R" postsynapticPopulation="pm7R">
      <electricalConnection id="118" preCell="0" postCell="0" synapse="Generic_GJ" preSegment="5" postSegment="6" preFractionAlong="0.5843143119231002" postFractionAlong="0.901158010490989"/>
    </electricalProjection>
  </network>
</neuroml>
