<?xml version='1.0' encoding='UTF-8'?>
<neuroml xmlns="http://www.neuroml.org/schema/neuroml2" xmlns:xsi="http://www.w3.org/2001/XMLSchema-instance" xsi:schemaLocation="http://www.neuroml.org/schema/neuroml2 https://raw.githubusercontent.com/NeuroML/NeuroML2/development/Schemas/NeuroML2/NeuroML_v2beta4.xsd" id="gvft_network_bio_prior_lamW_0_144_DF_0_013_t50_net">
  <notes>NeuroML2 network generated from GVFT simulation on 2025-05-04 22:07:53
</notes>
  <include href="AVAL.cell.nml"/>
  <include href="AVAR.cell.nml"/>
  <include href="AVKL.cell.nml"/>
  <include href="AVKR.cell.nml"/>
  <include href="RIS.cell.nml"/>
  <include href="RMDDL.cell.nml"/>
  <include href="RMDDR.cell.nml"/>
  <include href="RMDVL.cell.nml"/>
  <include href="RMDVR.cell.nml"/>
  <include href="SMBVL.cell.nml"/>
  <include href="SMBVR.cell.nml"/>
  <include href="URXL.cell.nml"/>
  <include href="URXR.cell.nml"/>
  <include href="M3R.cell.nml"/>
  <include href="I3.cell.nml"/>
  <include href="I4.cell.nml"/>
  <include href="M2R.cell.nml"/>
  <include href="NSMR.cell.nml"/>
  <include href="M1.cell.nml"/>
  <include href="MI.cell.nml"/>
  <include href="MCL.cell.nml"/>
  <include href="I6.cell.nml"/>
  <include href="I2R.cell.nml"/>
  <include href="I5.cell.nml"/>
  <include href="MCR.cell.nml"/>
  <include href="I2L.cell.nml"/>
  <include href="M2L.cell.nml"/>
  <include href="M5.cell.nml"/>
  <include href="M4.cell.nml"/>
  <include href="I1L.cell.nml"/>
  <include href="I1R.cell.nml"/>
  <include href="M3L.cell.nml"/>
  <include href="NSML.cell.nml"/>
  <include href="pm1.cell.nml"/>
  <include href="pm2L.cell.nml"/>
  <include href="pm2R.cell.nml"/>
  <include href="pm3L.cell.nml"/>
  <include href="pm3R.cell.nml"/>
  <include href="pm4L.cell.nml"/>
  <include href="pm4R.cell.nml"/>
  <include href="pm5L.cell.nml"/>
  <include href="pm5R.cell.nml"/>
  <include href="pm6L.cell.nml"/>
  <include href="pm6R.cell.nml"/>
  <include href="pm7L.cell.nml"/>
  <include href="pm7R.cell.nml"/>
  <include href="pm8.cell.nml"/>
  <include href="Serotonin_Glutamate.synapse.nml"/>
  <include href="Generic_GJ.nml"/>
  <include href="Acetylcholine.synapse.nml"/>
  <include href="Glutamate.synapse.nml"/>
  <network id="gvft_network_bio_prior_lamW_0_144_DF_0_013_t50_net" type="networkWithTemperature" temperature="20.0 degC">
    <population id="M1" component="M1" type="populationList" size="1">
      <instance id="0">
        <location x="-0.7386935" y="-0.9698492" z="0.0"/>
      </instance>
    </population>
    <population id="M2L" component="M2L" type="populationList" size="1">
      <instance id="0">
        <location x="-0.7085427" y="-0.8994975" z="0.0"/>
      </instance>
    </population>
    <population id="M2R" component="M2R" type="populationList" size="1">
      <instance id="0">
        <location x="-0.37688443" y="0.38693467" z="0.0"/>
      </instance>
    </population>
    <population id="M3L" component="M3L" type="populationList" size="1">
      <instance id="0">
        <location x="-0.36683416" y="-0.26633167" z="0.0"/>
      </instance>
    </population>
    <population id="M3R" component="M3R" type="populationList" size="1">
      <instance id="0">
        <location x="0.7386935" y="-0.19597991" z="0.0"/>
      </instance>
    </population>
    <population id="M4" component="M4" type="populationList" size="1">
      <instance id="0">
        <location x="0.9296482" y="0.21608041" z="0.0"/>
      </instance>
    </population>
    <population id="M5" component="M5" type="populationList" size="1">
      <instance id="0">
        <location x="-0.6281407" y="0.879397" z="0.0"/>
      </instance>
    </population>
    <population id="I1L" component="I1L" type="populationList" size="1">
      <instance id="0">
        <location x="-0.095477395" y="0.9296482" z="0.0"/>
      </instance>
    </population>
    <population id="I1R" component="I1R" type="populationList" size="1">
      <instance id="0">
        <location x="0.3467337" y="0.8592965" z="0.0"/>
      </instance>
    </population>
    <population id="I2L" component="I2L" type="populationList" size="1">
      <instance id="0">
        <location x="-0.71859294" y="0.26633167" z="0.0"/>
      </instance>
    </population>
    <population id="I2R" component="I2R" type="populationList" size="1">
      <instance id="0">
        <location x="-0.23618092" y="-0.959799" z="0.0"/>
      </instance>
    </population>
    <population id="I3" component="I3" type="populationList" size="1">
      <instance id="0">
        <location x="0.65829146" y="0.10552765" z="0.0"/>
      </instance>
    </population>
    <population id="I4" component="I4" type="populationList" size="1">
      <instance id="0">
        <location x="-0.57788944" y="-0.3266332" z="0.0"/>
      </instance>
    </population>
    <population id="I5" component="I5" type="populationList" size="1">
      <instance id="0">
        <location x="0.44723618" y="-0.28643218" z="0.0"/>
      </instance>
    </population>
    <population id="I6" component="I6" type="populationList" size="1">
      <instance id="0">
        <location x="0.49748746" y="-0.24623117" z="0.0"/>
      </instance>
    </population>
    <population id="MCL" component="MCL" type="populationList" size="1">
      <instance id="0">
        <location x="-0.41708544" y="-0.8592965" z="0.0"/>
      </instance>
    </population>
    <population id="MCR" component="MCR" type="populationList" size="1">
      <instance id="0">
        <location x="-0.72864324" y="0.1155779" z="0.0"/>
      </instance>
    </population>
    <population id="MI" component="MI" type="populationList" size="1">
      <instance id="0">
        <location x="-0.12562814" y="0.69849247" z="0.0"/>
      </instance>
    </population>
    <population id="NSML" component="NSML" type="populationList" size="1">
      <instance id="0">
        <location x="-0.83919597" y="-0.8994975" z="0.0"/>
      </instance>
    </population>
    <population id="NSMR" component="NSMR" type="populationList" size="1">
      <instance id="0">
        <location x="0.1557789" y="0.638191" z="0.0"/>
      </instance>
    </population>
    <population id="AVAL" component="AVAL" type="populationList" size="1">
      <instance id="0">
        <location x="5.0" y="0.0" z="0.0"/>
      </instance>
    </population>
    <population id="AVAR" component="AVAR" type="populationList" size="1">
      <instance id="0">
        <location x="5.0" y="0.0" z="0.0"/>
      </instance>
    </population>
    <population id="AVKL" component="AVKL" type="populationList" size="1">
      <instance id="0">
        <location x="5.0" y="0.0" z="0.0"/>
      </instance>
    </population>
    <population id="AVKR" component="AVKR" type="populationList" size="1">
      <instance id="0">
        <location x="5.0" y="0.0" z="0.0"/>
      </instance>
    </population>
    <population id="RIS" component="RIS" type="populationList" size="1">
      <instance id="0">
        <location x="5.0" y="0.0" z="0.0"/>
      </instance>
    </population>
    <population id="RMDDL" component="RMDDL" type="populationList" size="1">
      <instance id="0">
        <location x="5.0" y="0.0" z="0.0"/>
      </instance>
    </population>
    <population id="RMDDR" component="RMDDR" type="populationList" size="1">
      <instance id="0">
        <location x="5.0" y="0.0" z="0.0"/>
      </instance>
    </population>
    <population id="RMDVL" component="RMDVL" type="populationList" size="1">
      <instance id="0">
        <location x="5.0" y="0.0" z="0.0"/>
      </instance>
    </population>
    <population id="RMDVR" component="RMDVR" type="populationList" size="1">
      <instance id="0">
        <location x="5.0" y="0.0" z="0.0"/>
      </instance>
    </population>
    <population id="SMBVL" component="SMBVL" type="populationList" size="1">
      <instance id="0">
        <location x="5.0" y="0.0" z="0.0"/>
      </instance>
    </population>
    <population id="SMBVR" component="SMBVR" type="populationList" size="1">
      <instance id="0">
        <location x="5.0" y="0.0" z="0.0"/>
      </instance>
    </population>
    <population id="URXL" component="URXL" type="populationList" size="1">
      <instance id="0">
        <location x="5.0" y="0.0" z="0.0"/>
      </instance>
    </population>
    <population id="URXR" component="URXR" type="populationList" size="1">
      <instance id="0">
        <location x="5.0" y="0.0" z="0.0"/>
      </instance>
    </population>
    <population id="pm1" component="pm1" type="populationList" size="1">
      <instance id="0">
        <location x="1.5" y="0.0" z="0.0"/>
      </instance>
    </population>
    <population id="pm2L" component="pm2L" type="populationList" size="1">
      <instance id="0">
        <location x="1.3514533018536288" y="0.6508256086763372" z="0.0"/>
      </instance>
    </population>
    <population id="pm2R" component="pm2R" type="populationList" size="1">
      <instance id="0">
        <location x="0.9352347027881004" y="1.1727472237020446" z="0.0"/>
      </instance>
    </population>
    <population id="pm3L" component="pm3L" type="populationList" size="1">
      <instance id="0">
        <location x="0.3337814009344717" y="1.4623918682727355" z="0.0"/>
      </instance>
    </population>
    <population id="pm3R" component="pm3R" type="populationList" size="1">
      <instance id="0">
        <location x="-0.3337814009344715" y="1.4623918682727355" z="0.0"/>
      </instance>
    </population>
    <population id="pm4L" component="pm4L" type="populationList" size="1">
      <instance id="0">
        <location x="-0.9352347027881003" y="1.1727472237020449" z="0.0"/>
      </instance>
    </population>
    <population id="pm4R" component="pm4R" type="populationList" size="1">
      <instance id="0">
        <location x="-1.3514533018536286" y="0.6508256086763373" z="0.0"/>
      </instance>
    </population>
    <population id="pm5L" component="pm5L" type="populationList" size="1">
      <instance id="0">
        <location x="-1.5" y="1.8369701987210297e-16" z="0.0"/>
      </instance>
    </population>
    <population id="pm5R" component="pm5R" type="populationList" size="1">
      <instance id="0">
        <location x="-1.3514533018536288" y="-0.650825608676337" z="0.0"/>
      </instance>
    </population>
    <population id="pm6L" component="pm6L" type="populationList" size="1">
      <instance id="0">
        <location x="-0.9352347027881005" y="-1.1727472237020446" z="0.0"/>
      </instance>
    </population>
    <population id="pm6R" component="pm6R" type="populationList" size="1">
      <instance id="0">
        <location x="-0.3337814009344719" y="-1.4623918682727355" z="0.0"/>
      </instance>
    </population>
    <population id="pm7L" component="pm7L" type="populationList" size="1">
      <instance id="0">
        <location x="0.33378140093447" y="-1.4623918682727357" z="0.0"/>
      </instance>
    </population>
    <population id="pm7R" component="pm7R" type="populationList" size="1">
      <instance id="0">
        <location x="0.9352347027881001" y="-1.1727472237020449" z="0.0"/>
      </instance>
    </population>
    <population id="pm8" component="pm8" type="populationList" size="1">
      <instance id="0">
        <location x="1.351453301853629" y="-0.6508256086763362" z="0.0"/>
      </instance>
    </population>
    <projection id="NCXLS_I5_M3R" presynapticPopulation="I5" postsynapticPopulation="M3R" synapse="Glutamate">
      <connection id="0" preCellId="../I5/0/I5" postCellId="../M3R/0/M3R" preSegmentId="5" postSegmentId="3" preFractionAlong="0.19560927304451503" postFractionAlong="0.18672329577304148"/>
    </projection>
    <projection id="NCXLS_I5_I2R" presynapticPopulation="I5" postsynapticPopulation="I2R" synapse="Acetylcholine">
      <connection id="1" preCellId="../I5/0/I5" postCellId="../I2R/0/I2R" preSegmentId="8" postSegmentId="8" preFractionAlong="0.35667097414176474" postFractionAlong="0.7574818847894174"/>
    </projection>
    <projection id="NCXLS_M5_M3R" presynapticPopulation="M5" postsynapticPopulation="M3R" synapse="Acetylcholine">
      <connection id="2" preCellId="../M5/0/M5" postCellId="../M3R/0/M3R" preSegmentId="5" postSegmentId="5" preFractionAlong="0.31234910188551357" postFractionAlong="0.6426746576724236"/>
    </projection>
    <projection id="NCXLS_M5_I3" presynapticPopulation="M5" postsynapticPopulation="I3" synapse="Acetylcholine">
      <connection id="3" preCellId="../M5/0/M5" postCellId="../I3/0/I3" preSegmentId="8" postSegmentId="2" preFractionAlong="0.157954822835348" postFractionAlong="0.6958991181688025"/>
    </projection>
    <projection id="NCXLS_M5_M4" presynapticPopulation="M5" postsynapticPopulation="M4" synapse="Acetylcholine">
      <connection id="4" preCellId="../M5/0/M5" postCellId="../M4/0/M4" preSegmentId="2" postSegmentId="7" preFractionAlong="0.6134731386391763" postFractionAlong="0.36310073663401043"/>
    </projection>
    <projection id="NCXLS_M5_MI" presynapticPopulation="M5" postsynapticPopulation="MI" synapse="Acetylcholine">
      <connection id="5" preCellId="../M5/0/M5" postCellId="../MI/0/MI" preSegmentId="2" postSegmentId="8" preFractionAlong="0.507051103865441" postFractionAlong="0.598112629369018"/>
    </projection>
    <projection id="NCXLS_M5_I1R" presynapticPopulation="M5" postsynapticPopulation="I1R" synapse="Acetylcholine">
      <connection id="6" preCellId="../M5/0/M5" postCellId="../I1R/0/I1R" preSegmentId="7" postSegmentId="8" preFractionAlong="0.8939897100078704" postFractionAlong="0.6542925523249619"/>
    </projection>
    <projection id="NCXLS_M5_NSMR" presynapticPopulation="M5" postsynapticPopulation="NSMR" synapse="Acetylcholine">
      <connection id="7" preCellId="../M5/0/M5" postCellId="../NSMR/0/NSMR" preSegmentId="5" postSegmentId="4" preFractionAlong="0.7985932723827512" postFractionAlong="0.9677558771033888"/>
    </projection>
    <projection id="NCXLS_M5_I1L" presynapticPopulation="M5" postsynapticPopulation="I1L" synapse="Acetylcholine">
      <connection id="8" preCellId="../M5/0/M5" postCellId="../I1L/0/I1L" preSegmentId="3" postSegmentId="9" preFractionAlong="0.8036035354415352" postFractionAlong="0.5052067735766382"/>
    </projection>
    <projection id="NCXLS_M3R_I5" presynapticPopulation="M3R" postsynapticPopulation="I5" synapse="Acetylcholine">
      <connection id="9" preCellId="../M3R/0/M3R" postCellId="../I5/0/I5" preSegmentId="1" postSegmentId="7" preFractionAlong="0.12243389835894103" postFractionAlong="0.7251855480273908"/>
    </projection>
    <projection id="NCXLS_M3R_I2L" presynapticPopulation="M3R" postsynapticPopulation="I2L" synapse="Acetylcholine">
      <connection id="10" preCellId="../M3R/0/M3R" postCellId="../I2L/0/I2L" preSegmentId="2" postSegmentId="4" preFractionAlong="0.9970781570816617" postFractionAlong="0.9797824578545219"/>
    </projection>
    <projection id="NCXLS_M3R_M2L" presynapticPopulation="M3R" postsynapticPopulation="M2L" synapse="Glutamate">
      <connection id="11" preCellId="../M3R/0/M3R" postCellId="../M2L/0/M2L" preSegmentId="7" postSegmentId="5" preFractionAlong="0.5597556836383826" postFractionAlong="0.5273996221226763"/>
    </projection>
    <projection id="NCXLS_M3R_MCL" presynapticPopulation="M3R" postsynapticPopulation="MCL" synapse="Acetylcholine">
      <connection id="12" preCellId="../M3R/0/M3R" postCellId="../MCL/0/MCL" preSegmentId="9" postSegmentId="4" preFractionAlong="0.8902580530178021" postFractionAlong="0.07940658464302952"/>
    </projection>
    <projection id="NCXLS_M3R_I6" presynapticPopulation="M3R" postsynapticPopulation="I6" synapse="Acetylcholine">
      <connection id="13" preCellId="../M3R/0/M3R" postCellId="../I6/0/I6" preSegmentId="5" postSegmentId="3" preFractionAlong="0.18741194409758222" postFractionAlong="0.858177053157164"/>
    </projection>
    <projection id="NCXLS_M3R_M3L" presynapticPopulation="M3R" postsynapticPopulation="M3L" synapse="Glutamate">
      <connection id="14" preCellId="../M3R/0/M3R" postCellId="../M3L/0/M3L" preSegmentId="4" postSegmentId="6" preFractionAlong="0.5407937549855444" postFractionAlong="0.7102427986233115"/>
    </projection>
    <projection id="NCXLS_M3R_M2R" presynapticPopulation="M3R" postsynapticPopulation="M2R" synapse="Glutamate">
      <connection id="15" preCellId="../M3R/0/M3R" postCellId="../M2R/0/M2R" preSegmentId="9" postSegmentId="2" preFractionAlong="0.8216368977104717" postFractionAlong="0.4592651971732139"/>
    </projection>
    <projection id="NCXLS_M3R_I2R" presynapticPopulation="M3R" postsynapticPopulation="I2R" synapse="Acetylcholine">
      <connection id="16" preCellId="../M3R/0/M3R" postCellId="../I2R/0/I2R" preSegmentId="5" postSegmentId="8" preFractionAlong="0.4942124472502999" postFractionAlong="0.8282492524372184"/>
    </projection>
    <projection id="NCXLS_M3R_I4" presynapticPopulation="M3R" postsynapticPopulation="I4" synapse="Acetylcholine">
      <connection id="17" preCellId="../M3R/0/M3R" postCellId="../I4/0/I4" preSegmentId="5" postSegmentId="8" preFractionAlong="0.08717946783183117" postFractionAlong="0.7190774473538556"/>
    </projection>
    <projection id="NCXLS_M3R_MCR" presynapticPopulation="M3R" postsynapticPopulation="MCR" synapse="Acetylcholine">
      <connection id="18" preCellId="../M3R/0/M3R" postCellId="../MCR/0/MCR" preSegmentId="3" postSegmentId="4" preFractionAlong="0.9053598742778703" postFractionAlong="0.7396713007267637"/>
    </projection>
    <projection id="NCXLS_M3R_NSML" presynapticPopulation="M3R" postsynapticPopulation="NSML" synapse="Acetylcholine">
      <connection id="19" preCellId="../M3R/0/M3R" postCellId="../NSML/0/NSML" preSegmentId="2" postSegmentId="9" preFractionAlong="0.43550545439815935" postFractionAlong="0.5772497307686131"/>
    </projection>
    <projection id="NCXLS_M2L_I5" presynapticPopulation="M2L" postsynapticPopulation="I5" synapse="Acetylcholine">
      <connection id="20" preCellId="../M2L/0/M2L" postCellId="../I5/0/I5" preSegmentId="1" postSegmentId="5" preFractionAlong="0.8061958810037908" postFractionAlong="0.8437373264067243"/>
    </projection>
    <projection id="NCXLS_M2L_M5" presynapticPopulation="M2L" postsynapticPopulation="M5" synapse="Glutamate">
      <connection id="21" preCellId="../M2L/0/M2L" postCellId="../M5/0/M5" preSegmentId="3" postSegmentId="1" preFractionAlong="0.12626474156450274" postFractionAlong="0.676177562075434"/>
    </projection>
    <projection id="NCXLS_M2L_I2L" presynapticPopulation="M2L" postsynapticPopulation="I2L" synapse="Acetylcholine">
      <connection id="22" preCellId="../M2L/0/M2L" postCellId="../I2L/0/I2L" preSegmentId="2" postSegmentId="3" preFractionAlong="0.6863271966860974" postFractionAlong="0.06964114816240574"/>
    </projection>
    <projection id="NCXLS_M2L_I3" presynapticPopulation="M2L" postsynapticPopulation="I3" synapse="Acetylcholine">
      <connection id="23" preCellId="../M2L/0/M2L" postCellId="../I3/0/I3" preSegmentId="7" postSegmentId="6" preFractionAlong="0.8557372589057863" postFractionAlong="0.2271795570235149"/>
    </projection>
    <projection id="NCXLS_M2L_M4" presynapticPopulation="M2L" postsynapticPopulation="M4" synapse="Acetylcholine">
      <connection id="24" preCellId="../M2L/0/M2L" postCellId="../M4/0/M4" preSegmentId="8" postSegmentId="7" preFractionAlong="0.27927608845441043" postFractionAlong="0.6428819100587077"/>
    </projection>
    <projection id="NCXLS_M2L_MCL" presynapticPopulation="M2L" postsynapticPopulation="MCL" synapse="Acetylcholine">
      <connection id="25" preCellId="../M2L/0/M2L" postCellId="../MCL/0/MCL" preSegmentId="4" postSegmentId="9" preFractionAlong="0.21552986879133185" postFractionAlong="0.36037781993034756"/>
    </projection>
    <projection id="NCXLS_M2L_MI" presynapticPopulation="M2L" postsynapticPopulation="MI" synapse="Acetylcholine">
      <connection id="26" preCellId="../M2L/0/M2L" postCellId="../MI/0/MI" preSegmentId="5" postSegmentId="3" preFractionAlong="0.7631552912588894" postFractionAlong="0.4083063427594511"/>
    </projection>
    <projection id="NCXLS_M2L_I6" presynapticPopulation="M2L" postsynapticPopulation="I6" synapse="Acetylcholine">
      <connection id="27" preCellId="../M2L/0/M2L" postCellId="../I6/0/I6" preSegmentId="4" postSegmentId="4" preFractionAlong="0.871204482263052" postFractionAlong="0.7660647765353026"/>
    </projection>
    <projection id="NCXLS_M2L_M2R" presynapticPopulation="M2L" postsynapticPopulation="M2R" synapse="Acetylcholine">
      <connection id="28" preCellId="../M2L/0/M2L" postCellId="../M2R/0/M2R" preSegmentId="3" postSegmentId="2" preFractionAlong="0.6507685475587474" postFractionAlong="0.8742267241383516"/>
    </projection>
    <projection id="NCXLS_M2L_I2R" presynapticPopulation="M2L" postsynapticPopulation="I2R" synapse="Acetylcholine">
      <connection id="29" preCellId="../M2L/0/M2L" postCellId="../I2R/0/I2R" preSegmentId="7" postSegmentId="2" preFractionAlong="0.4470555438064254" postFractionAlong="0.4603582712019263"/>
    </projection>
    <projection id="NCXLS_M2L_I4" presynapticPopulation="M2L" postsynapticPopulation="I4" synapse="Acetylcholine">
      <connection id="30" preCellId="../M2L/0/M2L" postCellId="../I4/0/I4" preSegmentId="4" postSegmentId="5" preFractionAlong="0.5466482201877885" postFractionAlong="0.38040054897040965"/>
    </projection>
    <projection id="NCXLS_M2L_I1R" presynapticPopulation="M2L" postsynapticPopulation="I1R" synapse="Acetylcholine">
      <connection id="31" preCellId="../M2L/0/M2L" postCellId="../I1R/0/I1R" preSegmentId="4" postSegmentId="1" preFractionAlong="0.04202467517140529" postFractionAlong="0.7399041207669304"/>
    </projection>
    <projection id="NCXLS_M2L_MCR" presynapticPopulation="M2L" postsynapticPopulation="MCR" synapse="Acetylcholine">
      <connection id="32" preCellId="../M2L/0/M2L" postCellId="../MCR/0/MCR" preSegmentId="6" postSegmentId="7" preFractionAlong="0.12745395942286897" postFractionAlong="0.7076883263306187"/>
    </projection>
    <projection id="NCXLS_M2L_NSMR" presynapticPopulation="M2L" postsynapticPopulation="NSMR" synapse="Acetylcholine">
      <connection id="33" preCellId="../M2L/0/M2L" postCellId="../NSMR/0/NSMR" preSegmentId="3" postSegmentId="3" preFractionAlong="0.7539619035967839" postFractionAlong="0.8049067768414386"/>
    </projection>
    <projection id="NCXLS_M2L_I1L" presynapticPopulation="M2L" postsynapticPopulation="I1L" synapse="Acetylcholine">
      <connection id="34" preCellId="../M2L/0/M2L" postCellId="../I1L/0/I1L" preSegmentId="4" postSegmentId="7" preFractionAlong="0.6213444972535296" postFractionAlong="0.5591848068293265"/>
    </projection>
    <projection id="NCXLS_M4_M5" presynapticPopulation="M4" postsynapticPopulation="M5" synapse="Acetylcholine">
      <connection id="35" preCellId="../M4/0/M4" postCellId="../M5/0/M5" preSegmentId="7" postSegmentId="9" preFractionAlong="0.28152119841492995" postFractionAlong="0.872753839566128"/>
    </projection>
    <projection id="NCXLS_M4_I2L" presynapticPopulation="M4" postsynapticPopulation="I2L" synapse="Acetylcholine">
      <connection id="36" preCellId="../M4/0/M4" postCellId="../I2L/0/I2L" preSegmentId="8" postSegmentId="6" preFractionAlong="0.12024722651167563" postFractionAlong="0.0683409355322604"/>
    </projection>
    <projection id="NCXLS_M4_MI" presynapticPopulation="M4" postsynapticPopulation="MI" synapse="Acetylcholine">
      <connection id="37" preCellId="../M4/0/M4" postCellId="../MI/0/MI" preSegmentId="1" postSegmentId="9" preFractionAlong="0.01240403627731479" postFractionAlong="0.46876796546450583"/>
    </projection>
    <projection id="NCXLS_M4_M2R" presynapticPopulation="M4" postsynapticPopulation="M2R" synapse="Acetylcholine">
      <connection id="38" preCellId="../M4/0/M4" postCellId="../M2R/0/M2R" preSegmentId="9" postSegmentId="5" preFractionAlong="0.2972378077086172" postFractionAlong="0.2999191115069847"/>
    </projection>
    <projection id="NCXLS_M4_I4" presynapticPopulation="M4" postsynapticPopulation="I4" synapse="Acetylcholine">
      <connection id="39" preCellId="../M4/0/M4" postCellId="../I4/0/I4" preSegmentId="9" postSegmentId="4" preFractionAlong="0.06449127124916754" postFractionAlong="0.8772394571622004"/>
    </projection>
    <projection id="NCXLS_M4_I1R" presynapticPopulation="M4" postsynapticPopulation="I1R" synapse="Acetylcholine">
      <connection id="40" preCellId="../M4/0/M4" postCellId="../I1R/0/I1R" preSegmentId="2" postSegmentId="9" preFractionAlong="0.33040800387577385" postFractionAlong="0.3404058433495647"/>
    </projection>
    <projection id="NCXLS_M4_MCR" presynapticPopulation="M4" postsynapticPopulation="MCR" synapse="Acetylcholine">
      <connection id="41" preCellId="../M4/0/M4" postCellId="../MCR/0/MCR" preSegmentId="8" postSegmentId="7" preFractionAlong="0.5313165205680591" postFractionAlong="0.8381521835519244"/>
    </projection>
    <projection id="NCXLS_M4_NSMR" presynapticPopulation="M4" postsynapticPopulation="NSMR" synapse="Acetylcholine">
      <connection id="42" preCellId="../M4/0/M4" postCellId="../NSMR/0/NSMR" preSegmentId="3" postSegmentId="2" preFractionAlong="0.573349345635218" postFractionAlong="0.6588250701400705"/>
    </projection>
    <projection id="NCXLS_M4_I1L" presynapticPopulation="M4" postsynapticPopulation="I1L" synapse="Acetylcholine">
      <connection id="43" preCellId="../M4/0/M4" postCellId="../I1L/0/I1L" preSegmentId="4" postSegmentId="5" preFractionAlong="0.5989785081772105" postFractionAlong="0.11493299705956683"/>
    </projection>
    <projection id="NCXLS_MCL_M2L" presynapticPopulation="MCL" postsynapticPopulation="M2L" synapse="Acetylcholine">
      <connection id="44" preCellId="../MCL/0/MCL" postCellId="../M2L/0/M2L" preSegmentId="9" postSegmentId="9" preFractionAlong="0.6692002629380784" postFractionAlong="0.8292867993167555"/>
    </projection>
    <projection id="NCXLS_MCL_I2R" presynapticPopulation="MCL" postsynapticPopulation="I2R" synapse="Acetylcholine">
      <connection id="45" preCellId="../MCL/0/MCL" postCellId="../I2R/0/I2R" preSegmentId="8" postSegmentId="1" preFractionAlong="0.025141958277272725" postFractionAlong="0.6944504561307088"/>
    </projection>
    <projection id="NCXLS_MCL_M1" presynapticPopulation="MCL" postsynapticPopulation="M1" synapse="Acetylcholine">
      <connection id="46" preCellId="../MCL/0/MCL" postCellId="../M1/0/M1" preSegmentId="8" postSegmentId="6" preFractionAlong="0.43459596085871177" postFractionAlong="0.7738796557301564"/>
    </projection>
    <projection id="NCXLS_MI_M5" presynapticPopulation="MI" postsynapticPopulation="M5" synapse="Glutamate">
      <connection id="47" preCellId="../MI/0/MI" postCellId="../M5/0/M5" preSegmentId="9" postSegmentId="3" preFractionAlong="0.8925232899548461" postFractionAlong="0.4433800143791877"/>
    </projection>
    <projection id="NCXLS_MI_I1R" presynapticPopulation="MI" postsynapticPopulation="I1R" synapse="Acetylcholine">
      <connection id="48" preCellId="../MI/0/MI" postCellId="../I1R/0/I1R" preSegmentId="8" postSegmentId="5" preFractionAlong="0.6313075530919887" postFractionAlong="0.5916971623063255"/>
    </projection>
    <projection id="NCXLS_MI_I1L" presynapticPopulation="MI" postsynapticPopulation="I1L" synapse="Acetylcholine">
      <connection id="49" preCellId="../MI/0/MI" postCellId="../I1L/0/I1L" preSegmentId="3" postSegmentId="4" preFractionAlong="0.6764263623383923" postFractionAlong="0.13169343847203852"/>
    </projection>
    <projection id="NCXLS_I6_M3R" presynapticPopulation="I6" postsynapticPopulation="M3R" synapse="Glutamate">
      <connection id="50" preCellId="../I6/0/I6" postCellId="../M3R/0/M3R" preSegmentId="4" postSegmentId="6" preFractionAlong="0.7867503351544369" postFractionAlong="0.970766206474783"/>
    </projection>
    <projection id="NCXLS_I6_M4" presynapticPopulation="I6" postsynapticPopulation="M4" synapse="Acetylcholine">
      <connection id="51" preCellId="../I6/0/I6" postCellId="../M4/0/M4" preSegmentId="2" postSegmentId="8" preFractionAlong="0.6006510665483559" postFractionAlong="0.7435939161765598"/>
    </projection>
    <projection id="NCXLS_M3L_I5" presynapticPopulation="M3L" postsynapticPopulation="I5" synapse="Acetylcholine">
      <connection id="52" preCellId="../M3L/0/M3L" postCellId="../I5/0/I5" preSegmentId="1" postSegmentId="8" preFractionAlong="0.6341040313763313" postFractionAlong="0.07093221613377343"/>
    </projection>
    <projection id="NCXLS_M3L_I3" presynapticPopulation="M3L" postsynapticPopulation="I3" synapse="Acetylcholine">
      <connection id="53" preCellId="../M3L/0/M3L" postCellId="../I3/0/I3" preSegmentId="9" postSegmentId="2" preFractionAlong="0.3618530932051387" postFractionAlong="0.47249335500651357"/>
    </projection>
    <projection id="NCXLS_M3L_M4" presynapticPopulation="M3L" postsynapticPopulation="M4" synapse="Glutamate">
      <connection id="54" preCellId="../M3L/0/M3L" postCellId="../M4/0/M4" preSegmentId="8" postSegmentId="3" preFractionAlong="0.2768143077913058" postFractionAlong="0.9715326909010507"/>
    </projection>
    <projection id="NCXLS_M3L_MI" presynapticPopulation="M3L" postsynapticPopulation="MI" synapse="Acetylcholine">
      <connection id="55" preCellId="../M3L/0/M3L" postCellId="../MI/0/MI" preSegmentId="1" postSegmentId="3" preFractionAlong="0.19609771273839294" postFractionAlong="0.6107800710757683"/>
    </projection>
    <projection id="NCXLS_M3L_I6" presynapticPopulation="M3L" postsynapticPopulation="I6" synapse="Acetylcholine">
      <connection id="56" preCellId="../M3L/0/M3L" postCellId="../I6/0/I6" preSegmentId="4" postSegmentId="8" preFractionAlong="0.5908674412710415" postFractionAlong="0.5370074883513584"/>
    </projection>
    <projection id="NCXLS_M3L_M2R" presynapticPopulation="M3L" postsynapticPopulation="M2R" synapse="Acetylcholine">
      <connection id="57" preCellId="../M3L/0/M3L" postCellId="../M2R/0/M2R" preSegmentId="1" postSegmentId="1" preFractionAlong="0.21906880910185778" postFractionAlong="0.03672136250082114"/>
    </projection>
    <projection id="NCXLS_M3L_I1R" presynapticPopulation="M3L" postsynapticPopulation="I1R" synapse="Acetylcholine">
      <connection id="58" preCellId="../M3L/0/M3L" postCellId="../I1R/0/I1R" preSegmentId="1" postSegmentId="7" preFractionAlong="0.8025856795798129" postFractionAlong="0.5720486433693008"/>
    </projection>
    <projection id="NCXLS_M3L_NSMR" presynapticPopulation="M3L" postsynapticPopulation="NSMR" synapse="Acetylcholine">
      <connection id="59" preCellId="../M3L/0/M3L" postCellId="../NSMR/0/NSMR" preSegmentId="6" postSegmentId="9" preFractionAlong="0.39701504123719167" postFractionAlong="0.08709276679577149"/>
    </projection>
    <projection id="NCXLS_M3L_I1L" presynapticPopulation="M3L" postsynapticPopulation="I1L" synapse="Acetylcholine">
      <connection id="60" preCellId="../M3L/0/M3L" postCellId="../I1L/0/I1L" preSegmentId="9" postSegmentId="1" preFractionAlong="0.11383839347660141" postFractionAlong="0.3452231428016921"/>
    </projection>
    <projection id="NCXLS_M2R_I5" presynapticPopulation="M2R" postsynapticPopulation="I5" synapse="Acetylcholine">
      <connection id="61" preCellId="../M2R/0/M2R" postCellId="../I5/0/I5" preSegmentId="7" postSegmentId="7" preFractionAlong="0.8742225246851758" postFractionAlong="0.49354658034011867"/>
    </projection>
    <projection id="NCXLS_M2R_I2L" presynapticPopulation="M2R" postsynapticPopulation="I2L" synapse="Acetylcholine">
      <connection id="62" preCellId="../M2R/0/M2R" postCellId="../I2L/0/I2L" preSegmentId="3" postSegmentId="1" preFractionAlong="0.3898723529415441" postFractionAlong="0.7298603088484784"/>
    </projection>
    <projection id="NCXLS_M2R_M3R" presynapticPopulation="M2R" postsynapticPopulation="M3R" synapse="Glutamate">
      <connection id="63" preCellId="../M2R/0/M2R" postCellId="../M3R/0/M3R" preSegmentId="8" postSegmentId="8" preFractionAlong="0.6709430047425079" postFractionAlong="0.2581732541911692"/>
    </projection>
    <projection id="NCXLS_M2R_I3" presynapticPopulation="M2R" postsynapticPopulation="I3" synapse="Acetylcholine">
      <connection id="64" preCellId="../M2R/0/M2R" postCellId="../I3/0/I3" preSegmentId="1" postSegmentId="7" preFractionAlong="0.9540331275850406" postFractionAlong="0.7213934511062883"/>
    </projection>
    <projection id="NCXLS_M2R_M2L" presynapticPopulation="M2R" postsynapticPopulation="M2L" synapse="Acetylcholine">
      <connection id="65" preCellId="../M2R/0/M2R" postCellId="../M2L/0/M2L" preSegmentId="9" postSegmentId="7" preFractionAlong="0.7175721247315944" postFractionAlong="0.8295875568652503"/>
    </projection>
    <projection id="NCXLS_M2R_MCL" presynapticPopulation="M2R" postsynapticPopulation="MCL" synapse="Acetylcholine">
      <connection id="66" preCellId="../M2R/0/M2R" postCellId="../MCL/0/MCL" preSegmentId="1" postSegmentId="4" preFractionAlong="0.6865899134926068" postFractionAlong="0.11448763806590512"/>
    </projection>
    <projection id="NCXLS_M2R_I6" presynapticPopulation="M2R" postsynapticPopulation="I6" synapse="Acetylcholine">
      <connection id="67" preCellId="../M2R/0/M2R" postCellId="../I6/0/I6" preSegmentId="1" postSegmentId="4" preFractionAlong="0.3690530217609166" postFractionAlong="0.12102500048519305"/>
    </projection>
    <projection id="NCXLS_M2R_M3L" presynapticPopulation="M2R" postsynapticPopulation="M3L" synapse="Glutamate">
      <connection id="68" preCellId="../M2R/0/M2R" postCellId="../M3L/0/M3L" preSegmentId="8" postSegmentId="4" preFractionAlong="0.9003212680742715" postFractionAlong="0.4042397296442092"/>
    </projection>
    <projection id="NCXLS_M2R_I2R" presynapticPopulation="M2R" postsynapticPopulation="I2R" synapse="Acetylcholine">
      <connection id="69" preCellId="../M2R/0/M2R" postCellId="../I2R/0/I2R" preSegmentId="3" postSegmentId="9" preFractionAlong="0.941725711618925" postFractionAlong="0.668572646722914"/>
    </projection>
    <projection id="NCXLS_M2R_I4" presynapticPopulation="M2R" postsynapticPopulation="I4" synapse="Acetylcholine">
      <connection id="70" preCellId="../M2R/0/M2R" postCellId="../I4/0/I4" preSegmentId="9" postSegmentId="2" preFractionAlong="0.8880390643601178" postFractionAlong="0.5986924023190974"/>
    </projection>
    <projection id="NCXLS_M2R_MCR" presynapticPopulation="M2R" postsynapticPopulation="MCR" synapse="Acetylcholine">
      <connection id="71" preCellId="../M2R/0/M2R" postCellId="../MCR/0/MCR" preSegmentId="2" postSegmentId="3" preFractionAlong="0.9132869475762367" postFractionAlong="0.6125734683448192"/>
    </projection>
    <projection id="NCXLS_M2R_NSML" presynapticPopulation="M2R" postsynapticPopulation="NSML" synapse="Acetylcholine">
      <connection id="72" preCellId="../M2R/0/M2R" postCellId="../NSML/0/NSML" preSegmentId="3" postSegmentId="4" preFractionAlong="0.6378770926636339" postFractionAlong="0.7409812502745785"/>
    </projection>
    <projection id="NCXLS_I1R_I1L" presynapticPopulation="I1R" postsynapticPopulation="I1L" synapse="Glutamate">
      <connection id="73" preCellId="../I1R/0/I1R" postCellId="../I1L/0/I1L" preSegmentId="6" postSegmentId="3" preFractionAlong="0.5339674725477638" postFractionAlong="0.14213712379345766"/>
    </projection>
    <projection id="NCXLS_MCR_M5" presynapticPopulation="MCR" postsynapticPopulation="M5" synapse="Acetylcholine">
      <connection id="74" preCellId="../MCR/0/MCR" postCellId="../M5/0/M5" preSegmentId="1" postSegmentId="9" preFractionAlong="0.422034260127639" postFractionAlong="0.29504070765415624"/>
    </projection>
    <projection id="NCXLS_MCR_I2L" presynapticPopulation="MCR" postsynapticPopulation="I2L" synapse="Acetylcholine">
      <connection id="75" preCellId="../MCR/0/MCR" postCellId="../I2L/0/I2L" preSegmentId="1" postSegmentId="7" preFractionAlong="0.5771998867345508" postFractionAlong="0.04373907230894736"/>
    </projection>
    <projection id="NCXLS_NSMR_M4" presynapticPopulation="NSMR" postsynapticPopulation="M4" synapse="Serotonin_Glutamate">
      <connection id="76" preCellId="../NSMR/0/NSMR" postCellId="../M4/0/M4" preSegmentId="5" postSegmentId="1" preFractionAlong="0.2160513650116872" postFractionAlong="0.46660778469721587"/>
    </projection>
    <projection id="NCXLS_NSMR_I1R" presynapticPopulation="NSMR" postsynapticPopulation="I1R" synapse="Serotonin_Glutamate">
      <connection id="77" preCellId="../NSMR/0/NSMR" postCellId="../I1R/0/I1R" preSegmentId="8" postSegmentId="9" preFractionAlong="0.06738455478552252" postFractionAlong="0.3873925856686593"/>
    </projection>
    <projection id="NCXLS_NSMR_I1L" presynapticPopulation="NSMR" postsynapticPopulation="I1L" synapse="Serotonin_Glutamate">
      <connection id="78" preCellId="../NSMR/0/NSMR" postCellId="../I1L/0/I1L" preSegmentId="2" postSegmentId="4" preFractionAlong="0.6729666223944324" postFractionAlong="0.2753811742554185"/>
    </projection>
    <projection id="NCXLS_M1_I5" presynapticPopulation="M1" postsynapticPopulation="I5" synapse="Acetylcholine">
      <connection id="79" preCellId="../M1/0/M1" postCellId="../I5/0/I5" preSegmentId="5" postSegmentId="6" preFractionAlong="0.7889851599207933" postFractionAlong="0.4464195164015822"/>
    </projection>
    <projection id="NCXLS_M1_M5" presynapticPopulation="M1" postsynapticPopulation="M5" synapse="Acetylcholine">
      <connection id="80" preCellId="../M1/0/M1" postCellId="../M5/0/M5" preSegmentId="2" postSegmentId="3" preFractionAlong="0.4501233611819322" postFractionAlong="0.5792663538205268"/>
    </projection>
    <projection id="NCXLS_M1_I2L" presynapticPopulation="M1" postsynapticPopulation="I2L" synapse="Acetylcholine">
      <connection id="81" preCellId="../M1/0/M1" postCellId="../I2L/0/I2L" preSegmentId="9" postSegmentId="7" preFractionAlong="0.31886681832113883" postFractionAlong="0.5821987465941139"/>
    </projection>
    <projection id="NCXLS_M1_I3" presynapticPopulation="M1" postsynapticPopulation="I3" synapse="Acetylcholine">
      <connection id="82" preCellId="../M1/0/M1" postCellId="../I3/0/I3" preSegmentId="9" postSegmentId="6" preFractionAlong="0.7055858626438246" postFractionAlong="0.6884050184921369"/>
    </projection>
    <projection id="NCXLS_M1_M4" presynapticPopulation="M1" postsynapticPopulation="M4" synapse="Glutamate">
      <connection id="83" preCellId="../M1/0/M1" postCellId="../M4/0/M4" preSegmentId="7" postSegmentId="2" preFractionAlong="0.16686020169875282" postFractionAlong="0.43052933846220753"/>
    </projection>
    <projection id="NCXLS_M1_MCL" presynapticPopulation="M1" postsynapticPopulation="MCL" synapse="Acetylcholine">
      <connection id="84" preCellId="../M1/0/M1" postCellId="../MCL/0/MCL" preSegmentId="4" postSegmentId="5" preFractionAlong="0.8900970351838083" postFractionAlong="0.3458774607378574"/>
    </projection>
    <projection id="NCXLS_M1_MI" presynapticPopulation="M1" postsynapticPopulation="MI" synapse="Acetylcholine">
      <connection id="85" preCellId="../M1/0/M1" postCellId="../MI/0/MI" preSegmentId="4" postSegmentId="3" preFractionAlong="0.025447759905750877" postFractionAlong="0.6458223862864843"/>
    </projection>
    <projection id="NCXLS_M1_I6" presynapticPopulation="M1" postsynapticPopulation="I6" synapse="Acetylcholine">
      <connection id="86" preCellId="../M1/0/M1" postCellId="../I6/0/I6" preSegmentId="3" postSegmentId="1" preFractionAlong="0.10125991461515893" postFractionAlong="0.847139489693785"/>
    </projection>
    <projection id="NCXLS_M1_M3L" presynapticPopulation="M1" postsynapticPopulation="M3L" synapse="Glutamate">
      <connection id="87" preCellId="../M1/0/M1" postCellId="../M3L/0/M3L" preSegmentId="8" postSegmentId="2" preFractionAlong="0.8417233617446761" postFractionAlong="0.5802215187850294"/>
    </projection>
    <projection id="NCXLS_M1_I2R" presynapticPopulation="M1" postsynapticPopulation="I2R" synapse="Acetylcholine">
      <connection id="88" preCellId="../M1/0/M1" postCellId="../I2R/0/I2R" preSegmentId="6" postSegmentId="1" preFractionAlong="0.10525918519701238" postFractionAlong="0.16735973313862795"/>
    </projection>
    <projection id="NCXLS_M1_I4" presynapticPopulation="M1" postsynapticPopulation="I4" synapse="Acetylcholine">
      <connection id="89" preCellId="../M1/0/M1" postCellId="../I4/0/I4" preSegmentId="2" postSegmentId="5" preFractionAlong="0.22848674675477076" postFractionAlong="0.9774521179903679"/>
    </projection>
    <projection id="NCXLS_M1_I1R" presynapticPopulation="M1" postsynapticPopulation="I1R" synapse="Acetylcholine">
      <connection id="90" preCellId="../M1/0/M1" postCellId="../I1R/0/I1R" preSegmentId="3" postSegmentId="4" preFractionAlong="0.09930220275369295" postFractionAlong="0.20886407070573998"/>
    </projection>
    <projection id="NCXLS_M1_MCR" presynapticPopulation="M1" postsynapticPopulation="MCR" synapse="Acetylcholine">
      <connection id="91" preCellId="../M1/0/M1" postCellId="../MCR/0/MCR" preSegmentId="3" postSegmentId="2" preFractionAlong="0.313206261070174" postFractionAlong="0.14706185056658838"/>
    </projection>
    <projection id="NCXLS_M1_NSMR" presynapticPopulation="M1" postsynapticPopulation="NSMR" synapse="Acetylcholine">
      <connection id="92" preCellId="../M1/0/M1" postCellId="../NSMR/0/NSMR" preSegmentId="5" postSegmentId="5" preFractionAlong="0.8354802363823276" postFractionAlong="0.3703969862753065"/>
    </projection>
    <projection id="NCXLS_M1_I1L" presynapticPopulation="M1" postsynapticPopulation="I1L" synapse="Acetylcholine">
      <connection id="93" preCellId="../M1/0/M1" postCellId="../I1L/0/I1L" preSegmentId="5" postSegmentId="3" preFractionAlong="0.8884036723086812" postFractionAlong="0.6029428764794615"/>
    </projection>
    <projection id="NC_I1L_RMDDL" presynapticPopulation="I1L" postsynapticPopulation="RMDDL" synapse="Acetylcholine">
      <connection id="94" preCellId="../I1L/0/I1L" postCellId="../RMDDL/0/RMDDL" preSegmentId="9" postSegmentId="1" preFractionAlong="0.08820170378987069" postFractionAlong="0.60687734157693"/>
    </projection>
    <projection id="NC_I1L_RMDVL" presynapticPopulation="I1L" postsynapticPopulation="RMDVL" synapse="Acetylcholine">
      <connection id="95" preCellId="../I1L/0/I1L" postCellId="../RMDVL/0/RMDVL" preSegmentId="4" postSegmentId="1" preFractionAlong="0.3855119047369223" postFractionAlong="0.3403871042545057"/>
    </projection>
    <projection id="NC_I1R_RMDDR" presynapticPopulation="I1R" postsynapticPopulation="RMDDR" synapse="Acetylcholine">
      <connection id="96" preCellId="../I1R/0/I1R" postCellId="../RMDDR/0/RMDDR" preSegmentId="4" postSegmentId="5" preFractionAlong="0.1541450431784871" postFractionAlong="0.5537114853580112"/>
    </projection>
    <projection id="NC_I1R_RMDVR" presynapticPopulation="I1R" postsynapticPopulation="RMDVR" synapse="Acetylcholine">
      <connection id="97" preCellId="../I1R/0/I1R" postCellId="../RMDVR/0/RMDVR" preSegmentId="2" postSegmentId="6" preFractionAlong="0.24690742666758558" postFractionAlong="0.8385492149028282"/>
    </projection>
    <projection id="NC_I2L_URXL" presynapticPopulation="I2L" postsynapticPopulation="URXL" synapse="Glutamate">
      <connection id="98" preCellId="../I2L/0/I2L" postCellId="../URXL/0/URXL" preSegmentId="3" postSegmentId="2" preFractionAlong="0.25933489731709447" postFractionAlong="0.19462383670487193"/>
    </projection>
    <projection id="NC_I2R_URXR" presynapticPopulation="I2R" postsynapticPopulation="URXR" synapse="Glutamate">
      <connection id="99" preCellId="../I2R/0/I2R" postCellId="../URXR/0/URXR" preSegmentId="1" postSegmentId="5" preFractionAlong="0.34244797883471334" postFractionAlong="0.27024769213078326"/>
    </projection>
    <projection id="NC_AVKL_I1L" presynapticPopulation="AVKL" postsynapticPopulation="I1L" synapse="Acetylcholine">
      <connection id="100" preCellId="../AVKL/0/AVKL" postCellId="../I1L/0/I1L" preSegmentId="7" postSegmentId="4" preFractionAlong="0.34727703903050755" postFractionAlong="0.580467600993696"/>
    </projection>
    <projection id="NC_AVKR_I1R" presynapticPopulation="AVKR" postsynapticPopulation="I1R" synapse="Acetylcholine">
      <connection id="101" preCellId="../AVKR/0/AVKR" postCellId="../I1R/0/I1R" preSegmentId="8" postSegmentId="3" preFractionAlong="0.15052149166341355" postFractionAlong="0.8167569301195281"/>
    </projection>
    <projection id="NC_RIS_I1L" presynapticPopulation="RIS" postsynapticPopulation="I1L" synapse="Glutamate">
      <connection id="102" preCellId="../RIS/0/RIS" postCellId="../I1L/0/I1L" preSegmentId="4" postSegmentId="3" preFractionAlong="0.7823883294600873" postFractionAlong="0.7345779231214132"/>
    </projection>
    <projection id="NC_RIS_I1R" presynapticPopulation="RIS" postsynapticPopulation="I1R" synapse="Glutamate">
      <connection id="103" preCellId="../RIS/0/RIS" postCellId="../I1R/0/I1R" preSegmentId="2" postSegmentId="8" preFractionAlong="0.3258231175644498" postFractionAlong="0.7925213919629192"/>
    </projection>
    <projection id="NC_AVAL_I2L" presynapticPopulation="AVAL" postsynapticPopulation="I2L" synapse="Acetylcholine">
      <connection id="104" preCellId="../AVAL/0/AVAL" postCellId="../I2L/0/I2L" preSegmentId="3" postSegmentId="5" preFractionAlong="0.7308180287118088" postFractionAlong="0.14798414736583476"/>
    </projection>
    <projection id="NC_AVAR_I2R" presynapticPopulation="AVAR" postsynapticPopulation="I2R" synapse="Acetylcholine">
      <connection id="105" preCellId="../AVAR/0/AVAR" postCellId="../I2R/0/I2R" preSegmentId="5" postSegmentId="1" preFractionAlong="0.7108847166823191" postFractionAlong="0.9069428088348339"/>
    </projection>
    <projection id="NC_SMBVL_I4" presynapticPopulation="SMBVL" postsynapticPopulation="I4" synapse="Acetylcholine">
      <connection id="106" preCellId="../SMBVL/0/SMBVL" postCellId="../I4/0/I4" preSegmentId="5" postSegmentId="2" preFractionAlong="0.7221432354559059" postFractionAlong="0.5333866287653626"/>
    </projection>
    <projection id="NC_SMBVR_I4" presynapticPopulation="SMBVR" postsynapticPopulation="I4" synapse="Acetylcholine">
      <connection id="107" preCellId="../SMBVR/0/SMBVR" postCellId="../I4/0/I4" preSegmentId="6" postSegmentId="5" preFractionAlong="0.745860038627012" postFractionAlong="0.549322479403174"/>
    </projection>
    <projection id="NCNMJ_M1_pm3L" presynapticPopulation="M1" postsynapticPopulation="pm3L" synapse="Acetylcholine">
      <connection id="108" preCellId="../M1/0/M1" postCellId="../pm3L/0/pm3L" preSegmentId="5" postSegmentId="1" preFractionAlong="0.6807558929604856" postFractionAlong="0.4667820772311879"/>
    </projection>
    <projection id="NCNMJ_M1_pm3R" presynapticPopulation="M1" postsynapticPopulation="pm3R" synapse="Acetylcholine">
      <connection id="109" preCellId="../M1/0/M1" postCellId="../pm3R/0/pm3R" preSegmentId="6" postSegmentId="1" preFractionAlong="0.9491121430894405" postFractionAlong="0.5129024161471976"/>
    </projection>
    <projection id="NCNMJ_M1_pm4L" presynapticPopulation="M1" postsynapticPopulation="pm4L" synapse="Acetylcholine">
      <connection id="110" preCellId="../M1/0/M1" postCellId="../pm4L/0/pm4L" preSegmentId="4" postSegmentId="6" preFractionAlong="0.5887315221313199" postFractionAlong="0.37532990791960186"/>
    </projection>
    <projection id="NCNMJ_M1_pm4R" presynapticPopulation="M1" postsynapticPopulation="pm4R" synapse="Acetylcholine">
      <connection id="111" preCellId="../M1/0/M1" postCellId="../pm4R/0/pm4R" preSegmentId="6" postSegmentId="1" preFractionAlong="0.5627116990223392" postFractionAlong="0.44122371365532653"/>
    </projection>
    <projection id="NCNMJ_M2L_pm4L" presynapticPopulation="M2L" postsynapticPopulation="pm4L" synapse="Acetylcholine">
      <connection id="112" preCellId="../M2L/0/M2L" postCellId="../pm4L/0/pm4L" preSegmentId="9" postSegmentId="3" preFractionAlong="0.5772790292331312" postFractionAlong="0.8655771456245522"/>
    </projection>
    <projection id="NCNMJ_M2L_pm5L" presynapticPopulation="M2L" postsynapticPopulation="pm5L" synapse="Acetylcholine">
      <connection id="113" preCellId="../M2L/0/M2L" postCellId="../pm5L/0/pm5L" preSegmentId="2" postSegmentId="3" preFractionAlong="0.6021169853547795" postFractionAlong="0.5914067594224881"/>
    </projection>
    <projection id="NCNMJ_M2R_pm4R" presynapticPopulation="M2R" postsynapticPopulation="pm4R" synapse="Acetylcholine">
      <connection id="114" preCellId="../M2R/0/M2R" postCellId="../pm4R/0/pm4R" preSegmentId="7" postSegmentId="3" preFractionAlong="0.20047451552840279" postFractionAlong="0.10926421030962141"/>
    </projection>
    <projection id="NCNMJ_M2R_pm5R" presynapticPopulation="M2R" postsynapticPopulation="pm5R" synapse="Acetylcholine">
      <connection id="115" preCellId="../M2R/0/M2R" postCellId="../pm5R/0/pm5R" preSegmentId="4" postSegmentId="1" preFractionAlong="0.6401983115596238" postFractionAlong="0.2984349123618767"/>
    </projection>
    <projection id="NCNMJ_M3L_pm6L" presynapticPopulation="M3L" postsynapticPopulation="pm6L" synapse="Glutamate">
      <connection id="116" preCellId="../M3L/0/M3L" postCellId="../pm6L/0/pm6L" preSegmentId="8" postSegmentId="3" preFractionAlong="0.31189908000428046" postFractionAlong="0.2560475651049543"/>
    </projection>
    <projection id="NCNMJ_M3R_pm6R" presynapticPopulation="M3R" postsynapticPopulation="pm6R" synapse="Glutamate">
      <connection id="117" preCellId="../M3R/0/M3R" postCellId="../pm6R/0/pm6R" preSegmentId="5" postSegmentId="7" preFractionAlong="0.01911609442976403" postFractionAlong="0.4768434683178171"/>
    </projection>
    <projection id="NCNMJ_M4_pm5L" presynapticPopulation="M4" postsynapticPopulation="pm5L" synapse="Acetylcholine">
      <connection id="118" preCellId="../M4/0/M4" postCellId="../pm5L/0/pm5L" preSegmentId="6" postSegmentId="3" preFractionAlong="0.692532431537108" postFractionAlong="0.13443512940812186"/>
    </projection>
    <projection id="NCNMJ_M4_pm5R" presynapticPopulation="M4" postsynapticPopulation="pm5R" synapse="Acetylcholine">
      <connection id="119" preCellId="../M4/0/M4" postCellId="../pm5R/0/pm5R" preSegmentId="5" postSegmentId="2" preFractionAlong="0.3334073221591105" postFractionAlong="0.7330511898599934"/>
    </projection>
    <projection id="NCNMJ_M5_pm5L" presynapticPopulation="M5" postsynapticPopulation="pm5L" synapse="Acetylcholine">
      <connection id="120" preCellId="../M5/0/M5" postCellId="../pm5L/0/pm5L" preSegmentId="9" postSegmentId="3" preFractionAlong="0.9978208556819782" postFractionAlong="0.6768212988573956"/>
    </projection>
    <projection id="NCNMJ_M5_pm5R" presynapticPopulation="M5" postsynapticPopulation="pm5R" synapse="Acetylcholine">
      <connection id="121" preCellId="../M5/0/M5" postCellId="../pm5R/0/pm5R" preSegmentId="1" postSegmentId="8" preFractionAlong="0.29461939634619316" postFractionAlong="0.014315277667059978"/>
    </projection>
    <projection id="NCNMJ_M5_pm6L" presynapticPopulation="M5" postsynapticPopulation="pm6L" synapse="Acetylcholine">
      <connection id="122" preCellId="../M5/0/M5" postCellId="../pm6L/0/pm6L" preSegmentId="1" postSegmentId="4" preFractionAlong="0.8341445970006758" postFractionAlong="0.7404761319535191"/>
    </projection>
    <projection id="NCNMJ_M5_pm6R" presynapticPopulation="M5" postsynapticPopulation="pm6R" synapse="Acetylcholine">
      <connection id="123" preCellId="../M5/0/M5" postCellId="../pm6R/0/pm6R" preSegmentId="5" postSegmentId="8" preFractionAlong="0.9370910284587948" postFractionAlong="0.8219266359399297"/>
    </projection>
    <projection id="NCNMJ_M5_pm7L" presynapticPopulation="M5" postsynapticPopulation="pm7L" synapse="Acetylcholine">
      <connection id="124" preCellId="../M5/0/M5" postCellId="../pm7L/0/pm7L" preSegmentId="9" postSegmentId="1" preFractionAlong="0.8459214396777321" postFractionAlong="0.6136041142374584"/>
    </projection>
    <projection id="NCNMJ_M5_pm7R" presynapticPopulation="M5" postsynapticPopulation="pm7R" synapse="Acetylcholine">
      <connection id="125" preCellId="../M5/0/M5" postCellId="../pm7R/0/pm7R" preSegmentId="8" postSegmentId="7" preFractionAlong="0.48762780966721087" postFractionAlong="0.07764933467160506"/>
    </projection>
    <projection id="NCNMJ_M5_pm8" presynapticPopulation="M5" postsynapticPopulation="pm8" synapse="Acetylcholine">
      <connection id="126" preCellId="../M5/0/M5" postCellId="../pm8/0/pm8" preSegmentId="4" postSegmentId="6" preFractionAlong="0.3061373408795932" postFractionAlong="0.5491303362771727"/>
    </projection>
    <electricalProjection id="NCXLS_M3R_M1_GJ" presynapticPopulation="M3R" postsynapticPopulation="M1">
      <electricalConnection id="127" preCell="0" postCell="0" synapse="Generic_GJ" preSegment="2" postSegment="3" preFractionAlong="0.5225765993367452" postFractionAlong="0.2995656779538739"/>
    </electricalProjection>
    <electricalProjection id="NCXLS_M2L_M3R_GJ" presynapticPopulation="M2L" postsynapticPopulation="M3R">
      <electricalConnection id="128" preCell="0" postCell="0" synapse="Generic_GJ" preSegment="8" postSegment="1" preFractionAlong="0.5006242680704178" postFractionAlong="0.7945155444907487"/>
    </electricalProjection>
    <electricalProjection id="NCXLS_M2L_M3L_GJ" presynapticPopulation="M2L" postsynapticPopulation="M3L">
      <electricalConnection id="129" preCell="0" postCell="0" synapse="Generic_GJ" preSegment="6" postSegment="2" preFractionAlong="0.07290183536790351" postFractionAlong="0.4028732826326371"/>
    </electricalProjection>
    <electricalProjection id="NCXLS_M4_M3L_GJ" presynapticPopulation="M4" postsynapticPopulation="M3L">
      <electricalConnection id="130" preCell="0" postCell="0" synapse="Generic_GJ" preSegment="2" postSegment="7" preFractionAlong="0.4013060242197122" postFractionAlong="0.2925150910707418"/>
    </electricalProjection>
    <electricalProjection id="NCXLS_MCL_NSML_GJ" presynapticPopulation="MCL" postsynapticPopulation="NSML">
      <electricalConnection id="131" preCell="0" postCell="0" synapse="Generic_GJ" preSegment="8" postSegment="7" preFractionAlong="0.9061110021324971" postFractionAlong="0.32149570124788196"/>
    </electricalProjection>
    <electricalProjection id="NCXLS_M3L_M5_GJ" presynapticPopulation="M3L" postsynapticPopulation="M5">
      <electricalConnection id="132" preCell="0" postCell="0" synapse="Generic_GJ" preSegment="5" postSegment="7" preFractionAlong="0.22602899781599972" postFractionAlong="0.640476042175844"/>
    </electricalProjection>
    <electricalProjection id="NCXLS_M3L_M3R_GJ" presynapticPopulation="M3L" postsynapticPopulation="M3R">
      <electricalConnection id="133" preCell="0" postCell="0" synapse="Generic_GJ" preSegment="5" postSegment="5" preFractionAlong="0.21462807325880284" postFractionAlong="0.4161214280710923"/>
    </electricalProjection>
    <electricalProjection id="NCXLS_M2R_M4_GJ" presynapticPopulation="M2R" postsynapticPopulation="M4">
      <electricalConnection id="134" preCell="0" postCell="0" synapse="Generic_GJ" preSegment="9" postSegment="6" preFractionAlong="0.1878428525377741" postFractionAlong="0.7197914533546861"/>
    </electricalProjection>
    <electricalProjection id="NCXLS_M2R_M1_GJ" presynapticPopulation="M2R" postsynapticPopulation="M1">
      <electricalConnection id="135" preCell="0" postCell="0" synapse="Generic_GJ" preSegment="4" postSegment="8" preFractionAlong="0.5546573480350956" postFractionAlong="0.637090837080905"/>
    </electricalProjection>
    <electricalProjection id="NCXLS_M1_M3R_GJ" presynapticPopulation="M1" postsynapticPopulation="M3R">
      <electricalConnection id="136" preCell="0" postCell="0" synapse="Generic_GJ" preSegment="2" postSegment="2" preFractionAlong="0.7139526325065898" postFractionAlong="0.8225347943841967"/>
    </electricalProjection>
    <electricalProjection id="NCXLS_M1_M2L_GJ" presynapticPopulation="M1" postsynapticPopulation="M2L">
      <electricalConnection id="137" preCell="0" postCell="0" synapse="Generic_GJ" preSegment="8" postSegment="6" preFractionAlong="0.5632889309538147" postFractionAlong="0.11995369302388992"/>
    </electricalProjection>
    <electricalProjection id="NCXLS_M1_M2R_GJ" presynapticPopulation="M1" postsynapticPopulation="M2R">
      <electricalConnection id="138" preCell="0" postCell="0" synapse="Generic_GJ" preSegment="7" postSegment="8" preFractionAlong="0.27140938044671437" postFractionAlong="0.49669542281794654"/>
    </electricalProjection>
    <electricalProjection id="MuscleGJ_pm3L_pm3R" presynapticPopulation="pm3L" postsynapticPopulation="pm3R">
      <electricalConnection id="139" preCell="0" postCell="0" synapse="Generic_GJ" preSegment="2" postSegment="2" preFractionAlong="0.8237780901011652" postFractionAlong="0.7217215527171793"/>
    </electricalProjection>
    <electricalProjection id="MuscleGJ_pm4L_pm4R" presynapticPopulation="pm4L" postsynapticPopulation="pm4R">
      <electricalConnection id="140" preCell="0" postCell="0" synapse="Generic_GJ" preSegment="9" postSegment="1" preFractionAlong="0.31758679526111666" postFractionAlong="0.00013469300448532007"/>
    </electricalProjection>
    <electricalProjection id="MuscleGJ_pm5L_pm5R" presynapticPopulation="pm5L" postsynapticPopulation="pm5R">
      <electricalConnection id="141" preCell="0" postCell="0" synapse="Generic_GJ" preSegment="2" postSegment="6" preFractionAlong="0.7069764874557162" postFractionAlong="0.06268962162186587"/>
    </electricalProjection>
    <electricalProjection id="MuscleGJ_pm6L_pm6R" presynapticPopulation="pm6L" postsynapticPopulation="pm6R">
      <electricalConnection id="142" preCell="0" postCell="0" synapse="Generic_GJ" preSegment="2" postSegment="8" preFractionAlong="0.003819922658583108" postFractionAlong="0.24682386920190225"/>
    </electricalProjection>
    <electricalProjection id="MuscleGJ_pm7L_pm7R" presynapticPopulation="pm7L" postsynapticPopulation="pm7R">
      <electricalConnection id="143" preCell="0" postCell="0" synapse="Generic_GJ" preSegment="9" postSegment="9" preFractionAlong="0.3602339188004279" postFractionAlong="0.27039328638452553"/>
    </electricalProjection>
    <electricalProjection id="MuscleGJ_pm4L_pm5L" presynapticPopulation="pm4L" postsynapticPopulation="pm5L">
      <electricalConnection id="144" preCell="0" postCell="0" synapse="Generic_GJ" preSegment="2" postSegment="4" preFractionAlong="0.7889324717760072" postFractionAlong="0.8918721448107347"/>
    </electricalProjection>
    <electricalProjection id="MuscleGJ_pm4R_pm5R" presynapticPopulation="pm4R" postsynapticPopulation="pm5R">
      <electricalConnection id="145" preCell="0" postCell="0" synapse="Generic_GJ" preSegment="3" postSegment="1" preFractionAlong="0.3773136614063236" postFractionAlong="0.9363211539691568"/>
    </electricalProjection>
    <electricalProjection id="MuscleGJ_pm5L_pm6L" presynapticPopulation="pm5L" postsynapticPopulation="pm6L">
      <electricalConnection id="146" preCell="0" postCell="0" synapse="Generic_GJ" preSegment="3" postSegment="5" preFractionAlong="0.11602268134816929" postFractionAlong="0.042291749222681196"/>
    </electricalProjection>
    <electricalProjection id="MuscleGJ_pm5R_pm6R" presynapticPopulation="pm5R" postsynapticPopulation="pm6R">
      <electricalConnection id="147" preCell="0" postCell="0" synapse="Generic_GJ" preSegment="1" postSegment="9" preFractionAlong="0.7038570916343312" postFractionAlong="0.004363269650309087"/>
    </electricalProjection>
    <electricalProjection id="MuscleGJ_pm6L_pm7L" presynapticPopulation="pm6L" postsynapticPopulation="pm7L">
      <electricalConnection id="148" preCell="0" postCell="0" synapse="Generic_GJ" preSegment="7" postSegment="5" preFractionAlong="0.7130460506343187" postFractionAlong="0.6663854135782065"/>
    </electricalProjection>
    <electricalProjection id="MuscleGJ_pm6R_pm7R" presynapticPopulation="pm6R" postsynapticPopulation="pm7R">
      <electricalConnection id="149" preCell="0" postCell="0" synapse="Generic_GJ" preSegment="1" postSegment="8" preFractionAlong="0.761037790250783" postFractionAlong="0.950772707731338"/>
    </electricalProjection>
  </network>
</neuroml>
