<?xml version='1.0' encoding='UTF-8'?>
<neuroml xmlns="http://www.neuroml.org/schema/neuroml2" xmlns:xsi="http://www.w3.org/2001/XMLSchema-instance" xsi:schemaLocation="http://www.neuroml.org/schema/neuroml2 https://raw.githubusercontent.com/NeuroML/NeuroML2/development/Schemas/NeuroML2/NeuroML_v2beta4.xsd" id="gvft_network_bio_prior_lamW_0_144_DF_0_019_t10_net">
  <notes>NeuroML2 network generated from GVFT simulation on 2025-05-04 22:08:39
</notes>
  <include href="AVAL.cell.nml"/>
  <include href="AVAR.cell.nml"/>
  <include href="AVKL.cell.nml"/>
  <include href="AVKR.cell.nml"/>
  <include href="RIS.cell.nml"/>
  <include href="RMDDL.cell.nml"/>
  <include href="RMDDR.cell.nml"/>
  <include href="RMDVL.cell.nml"/>
  <include href="RMDVR.cell.nml"/>
  <include href="SMBVL.cell.nml"/>
  <include href="SMBVR.cell.nml"/>
  <include href="URXL.cell.nml"/>
  <include href="URXR.cell.nml"/>
  <include href="M3R.cell.nml"/>
  <include href="I3.cell.nml"/>
  <include href="I4.cell.nml"/>
  <include href="M2R.cell.nml"/>
  <include href="NSMR.cell.nml"/>
  <include href="M1.cell.nml"/>
  <include href="MI.cell.nml"/>
  <include href="MCL.cell.nml"/>
  <include href="I6.cell.nml"/>
  <include href="I2R.cell.nml"/>
  <include href="I5.cell.nml"/>
  <include href="MCR.cell.nml"/>
  <include href="I2L.cell.nml"/>
  <include href="M2L.cell.nml"/>
  <include href="M5.cell.nml"/>
  <include href="M4.cell.nml"/>
  <include href="I1L.cell.nml"/>
  <include href="I1R.cell.nml"/>
  <include href="M3L.cell.nml"/>
  <include href="NSML.cell.nml"/>
  <include href="pm1.cell.nml"/>
  <include href="pm2L.cell.nml"/>
  <include href="pm2R.cell.nml"/>
  <include href="pm3L.cell.nml"/>
  <include href="pm3R.cell.nml"/>
  <include href="pm4L.cell.nml"/>
  <include href="pm4R.cell.nml"/>
  <include href="pm5L.cell.nml"/>
  <include href="pm5R.cell.nml"/>
  <include href="pm6L.cell.nml"/>
  <include href="pm6R.cell.nml"/>
  <include href="pm7L.cell.nml"/>
  <include href="pm7R.cell.nml"/>
  <include href="pm8.cell.nml"/>
  <include href="Serotonin_Glutamate.synapse.nml"/>
  <include href="Generic_GJ.nml"/>
  <include href="Acetylcholine.synapse.nml"/>
  <include href="Glutamate.synapse.nml"/>
  <network id="gvft_network_bio_prior_lamW_0_144_DF_0_019_t10_net" type="networkWithTemperature" temperature="20.0 degC">
    <population id="M1" component="M1" type="populationList" size="1">
      <instance id="0">
        <location x="-0.67839193" y="-0.9396985" z="0.0"/>
      </instance>
    </population>
    <population id="M2L" component="M2L" type="populationList" size="1">
      <instance id="0">
        <location x="0.18592966" y="-0.71859294" z="0.0"/>
      </instance>
    </population>
    <population id="M2R" component="M2R" type="populationList" size="1">
      <instance id="0">
        <location x="-0.6482412" y="-0.9396985" z="0.0"/>
      </instance>
    </population>
    <population id="M3L" component="M3L" type="populationList" size="1">
      <instance id="0">
        <location x="-0.015075387" y="-0.9396985" z="0.0"/>
      </instance>
    </population>
    <population id="M3R" component="M3R" type="populationList" size="1">
      <instance id="0">
        <location x="-0.35678393" y="-0.7788945" z="0.0"/>
      </instance>
    </population>
    <population id="M4" component="M4" type="populationList" size="1">
      <instance id="0">
        <location x="-0.30653268" y="0.72864324" z="0.0"/>
      </instance>
    </population>
    <population id="M5" component="M5" type="populationList" size="1">
      <instance id="0">
        <location x="0.46733668" y="0.16582915" z="0.0"/>
      </instance>
    </population>
    <population id="I1L" component="I1L" type="populationList" size="1">
      <instance id="0">
        <location x="-0.7386935" y="0.8592965" z="0.0"/>
      </instance>
    </population>
    <population id="I1R" component="I1R" type="populationList" size="1">
      <instance id="0">
        <location x="0.71859294" y="0.51758796" z="0.0"/>
      </instance>
    </population>
    <population id="I2L" component="I2L" type="populationList" size="1">
      <instance id="0">
        <location x="-0.71859294" y="0.90954775" z="0.0"/>
      </instance>
    </population>
    <population id="I2R" component="I2R" type="populationList" size="1">
      <instance id="0">
        <location x="0.51758796" y="0.879397" z="0.0"/>
      </instance>
    </population>
    <population id="I3" component="I3" type="populationList" size="1">
      <instance id="0">
        <location x="0.71859294" y="0.3467337" z="0.0"/>
      </instance>
    </population>
    <population id="I4" component="I4" type="populationList" size="1">
      <instance id="0">
        <location x="-0.76884425" y="0.2964824" z="0.0"/>
      </instance>
    </population>
    <population id="I5" component="I5" type="populationList" size="1">
      <instance id="0">
        <location x="-0.55778897" y="-0.8592965" z="0.0"/>
      </instance>
    </population>
    <population id="I6" component="I6" type="populationList" size="1">
      <instance id="0">
        <location x="0.83919597" y="-0.8492462" z="0.0"/>
      </instance>
    </population>
    <population id="MCL" component="MCL" type="populationList" size="1">
      <instance id="0">
        <location x="-0.20603016" y="-0.57788944" z="0.0"/>
      </instance>
    </population>
    <population id="MCR" component="MCR" type="populationList" size="1">
      <instance id="0">
        <location x="-0.26633167" y="0.4874372" z="0.0"/>
      </instance>
    </population>
    <population id="MI" component="MI" type="populationList" size="1">
      <instance id="0">
        <location x="-0.83919597" y="0.065326646" z="0.0"/>
      </instance>
    </population>
    <population id="NSML" component="NSML" type="populationList" size="1">
      <instance id="0">
        <location x="0.36683416" y="-0.45728645" z="0.0"/>
      </instance>
    </population>
    <population id="NSMR" component="NSMR" type="populationList" size="1">
      <instance id="0">
        <location x="0.8492462" y="0.025125638" z="0.0"/>
      </instance>
    </population>
    <population id="AVAL" component="AVAL" type="populationList" size="1">
      <instance id="0">
        <location x="5.0" y="0.0" z="0.0"/>
      </instance>
    </population>
    <population id="AVAR" component="AVAR" type="populationList" size="1">
      <instance id="0">
        <location x="5.0" y="0.0" z="0.0"/>
      </instance>
    </population>
    <population id="AVKL" component="AVKL" type="populationList" size="1">
      <instance id="0">
        <location x="5.0" y="0.0" z="0.0"/>
      </instance>
    </population>
    <population id="AVKR" component="AVKR" type="populationList" size="1">
      <instance id="0">
        <location x="5.0" y="0.0" z="0.0"/>
      </instance>
    </population>
    <population id="RIS" component="RIS" type="populationList" size="1">
      <instance id="0">
        <location x="5.0" y="0.0" z="0.0"/>
      </instance>
    </population>
    <population id="RMDDL" component="RMDDL" type="populationList" size="1">
      <instance id="0">
        <location x="5.0" y="0.0" z="0.0"/>
      </instance>
    </population>
    <population id="RMDDR" component="RMDDR" type="populationList" size="1">
      <instance id="0">
        <location x="5.0" y="0.0" z="0.0"/>
      </instance>
    </population>
    <population id="RMDVL" component="RMDVL" type="populationList" size="1">
      <instance id="0">
        <location x="5.0" y="0.0" z="0.0"/>
      </instance>
    </population>
    <population id="RMDVR" component="RMDVR" type="populationList" size="1">
      <instance id="0">
        <location x="5.0" y="0.0" z="0.0"/>
      </instance>
    </population>
    <population id="SMBVL" component="SMBVL" type="populationList" size="1">
      <instance id="0">
        <location x="5.0" y="0.0" z="0.0"/>
      </instance>
    </population>
    <population id="SMBVR" component="SMBVR" type="populationList" size="1">
      <instance id="0">
        <location x="5.0" y="0.0" z="0.0"/>
      </instance>
    </population>
    <population id="URXL" component="URXL" type="populationList" size="1">
      <instance id="0">
        <location x="5.0" y="0.0" z="0.0"/>
      </instance>
    </population>
    <population id="URXR" component="URXR" type="populationList" size="1">
      <instance id="0">
        <location x="5.0" y="0.0" z="0.0"/>
      </instance>
    </population>
    <population id="pm1" component="pm1" type="populationList" size="1">
      <instance id="0">
        <location x="1.5" y="0.0" z="0.0"/>
      </instance>
    </population>
    <population id="pm2L" component="pm2L" type="populationList" size="1">
      <instance id="0">
        <location x="1.3514533018536288" y="0.6508256086763372" z="0.0"/>
      </instance>
    </population>
    <population id="pm2R" component="pm2R" type="populationList" size="1">
      <instance id="0">
        <location x="0.9352347027881004" y="1.1727472237020446" z="0.0"/>
      </instance>
    </population>
    <population id="pm3L" component="pm3L" type="populationList" size="1">
      <instance id="0">
        <location x="0.3337814009344717" y="1.4623918682727355" z="0.0"/>
      </instance>
    </population>
    <population id="pm3R" component="pm3R" type="populationList" size="1">
      <instance id="0">
        <location x="-0.3337814009344715" y="1.4623918682727355" z="0.0"/>
      </instance>
    </population>
    <population id="pm4L" component="pm4L" type="populationList" size="1">
      <instance id="0">
        <location x="-0.9352347027881003" y="1.1727472237020449" z="0.0"/>
      </instance>
    </population>
    <population id="pm4R" component="pm4R" type="populationList" size="1">
      <instance id="0">
        <location x="-1.3514533018536286" y="0.6508256086763373" z="0.0"/>
      </instance>
    </population>
    <population id="pm5L" component="pm5L" type="populationList" size="1">
      <instance id="0">
        <location x="-1.5" y="1.8369701987210297e-16" z="0.0"/>
      </instance>
    </population>
    <population id="pm5R" component="pm5R" type="populationList" size="1">
      <instance id="0">
        <location x="-1.3514533018536288" y="-0.650825608676337" z="0.0"/>
      </instance>
    </population>
    <population id="pm6L" component="pm6L" type="populationList" size="1">
      <instance id="0">
        <location x="-0.9352347027881005" y="-1.1727472237020446" z="0.0"/>
      </instance>
    </population>
    <population id="pm6R" component="pm6R" type="populationList" size="1">
      <instance id="0">
        <location x="-0.3337814009344719" y="-1.4623918682727355" z="0.0"/>
      </instance>
    </population>
    <population id="pm7L" component="pm7L" type="populationList" size="1">
      <instance id="0">
        <location x="0.33378140093447" y="-1.4623918682727357" z="0.0"/>
      </instance>
    </population>
    <population id="pm7R" component="pm7R" type="populationList" size="1">
      <instance id="0">
        <location x="0.9352347027881001" y="-1.1727472237020449" z="0.0"/>
      </instance>
    </population>
    <population id="pm8" component="pm8" type="populationList" size="1">
      <instance id="0">
        <location x="1.351453301853629" y="-0.6508256086763362" z="0.0"/>
      </instance>
    </population>
    <projection id="NCXLS_M1_I1R" presynapticPopulation="M1" postsynapticPopulation="I1R" synapse="Acetylcholine">
      <connection id="0" preCellId="../M1/0/M1" postCellId="../I1R/0/I1R" preSegmentId="7" postSegmentId="8" preFractionAlong="0.9437781113683691" postFractionAlong="0.25089031653410476"/>
    </projection>
    <projection id="NCXLS_M1_I3" presynapticPopulation="M1" postsynapticPopulation="I3" synapse="Acetylcholine">
      <connection id="1" preCellId="../M1/0/M1" postCellId="../I3/0/I3" preSegmentId="1" postSegmentId="5" preFractionAlong="0.03992253256375122" postFractionAlong="0.4490785141348759"/>
    </projection>
    <projection id="NCXLS_M1_I4" presynapticPopulation="M1" postsynapticPopulation="I4" synapse="Acetylcholine">
      <connection id="2" preCellId="../M1/0/M1" postCellId="../I4/0/I4" preSegmentId="2" postSegmentId="6" preFractionAlong="0.6537867511244616" postFractionAlong="0.35019868102321905"/>
    </projection>
    <projection id="NCXLS_M1_I6" presynapticPopulation="M1" postsynapticPopulation="I6" synapse="Acetylcholine">
      <connection id="3" preCellId="../M1/0/M1" postCellId="../I6/0/I6" preSegmentId="8" postSegmentId="5" preFractionAlong="0.09949466887296465" postFractionAlong="0.7665959447120516"/>
    </projection>
    <projection id="NCXLS_M1_M5" presynapticPopulation="M1" postsynapticPopulation="M5" synapse="Glutamate">
      <connection id="4" preCellId="../M1/0/M1" postCellId="../M5/0/M5" preSegmentId="2" postSegmentId="4" preFractionAlong="0.5166275918542753" postFractionAlong="0.284600382304681"/>
    </projection>
    <projection id="NCXLS_M1_MI" presynapticPopulation="M1" postsynapticPopulation="MI" synapse="Acetylcholine">
      <connection id="5" preCellId="../M1/0/M1" postCellId="../MI/0/MI" preSegmentId="9" postSegmentId="4" preFractionAlong="0.8481814982799472" postFractionAlong="0.6851745132777806"/>
    </projection>
    <projection id="NCXLS_M1_I1L" presynapticPopulation="M1" postsynapticPopulation="I1L" synapse="Acetylcholine">
      <connection id="6" preCellId="../M1/0/M1" postCellId="../I1L/0/I1L" preSegmentId="3" postSegmentId="7" preFractionAlong="0.2652085369968291" postFractionAlong="0.16975920139282652"/>
    </projection>
    <projection id="NCXLS_M1_I2L" presynapticPopulation="M1" postsynapticPopulation="I2L" synapse="Acetylcholine">
      <connection id="7" preCellId="../M1/0/M1" postCellId="../I2L/0/I2L" preSegmentId="8" postSegmentId="2" preFractionAlong="0.056224294850972245" postFractionAlong="0.4856342984133404"/>
    </projection>
    <projection id="NCXLS_M1_M2L" presynapticPopulation="M1" postsynapticPopulation="M2L" synapse="Acetylcholine">
      <connection id="8" preCellId="../M1/0/M1" postCellId="../M2L/0/M2L" preSegmentId="9" postSegmentId="5" preFractionAlong="0.16459927369957472" postFractionAlong="0.06387976743090285"/>
    </projection>
    <projection id="NCXLS_M1_MCL" presynapticPopulation="M1" postsynapticPopulation="MCL" synapse="Acetylcholine">
      <connection id="9" preCellId="../M1/0/M1" postCellId="../MCL/0/MCL" preSegmentId="3" postSegmentId="3" preFractionAlong="0.8520484158046929" postFractionAlong="0.5592181317684581"/>
    </projection>
    <projection id="NCXLS_M1_I5" presynapticPopulation="M1" postsynapticPopulation="I5" synapse="Acetylcholine">
      <connection id="10" preCellId="../M1/0/M1" postCellId="../I5/0/I5" preSegmentId="2" postSegmentId="2" preFractionAlong="0.37698616728684164" postFractionAlong="0.6032130620995043"/>
    </projection>
    <projection id="NCXLS_M1_I2R" presynapticPopulation="M1" postsynapticPopulation="I2R" synapse="Acetylcholine">
      <connection id="11" preCellId="../M1/0/M1" postCellId="../I2R/0/I2R" preSegmentId="2" postSegmentId="5" preFractionAlong="0.3940901527745031" postFractionAlong="0.8509518994068"/>
    </projection>
    <projection id="NCXLS_M1_NSML" presynapticPopulation="M1" postsynapticPopulation="NSML" synapse="Acetylcholine">
      <connection id="12" preCellId="../M1/0/M1" postCellId="../NSML/0/NSML" preSegmentId="7" postSegmentId="8" preFractionAlong="0.7461796385522723" postFractionAlong="0.8020382702828686"/>
    </projection>
    <projection id="NCXLS_M1_MCR" presynapticPopulation="M1" postsynapticPopulation="MCR" synapse="Acetylcholine">
      <connection id="13" preCellId="../M1/0/M1" postCellId="../MCR/0/MCR" preSegmentId="5" postSegmentId="5" preFractionAlong="0.19195543899572576" postFractionAlong="0.7192344190441468"/>
    </projection>
    <projection id="NCXLS_M1_M2R" presynapticPopulation="M1" postsynapticPopulation="M2R" synapse="Glutamate">
      <connection id="14" preCellId="../M1/0/M1" postCellId="../M2R/0/M2R" preSegmentId="9" postSegmentId="5" preFractionAlong="0.31621512256333006" postFractionAlong="0.8449708536401014"/>
    </projection>
    <projection id="NCXLS_M1_NSMR" presynapticPopulation="M1" postsynapticPopulation="NSMR" synapse="Acetylcholine">
      <connection id="15" preCellId="../M1/0/M1" postCellId="../NSMR/0/NSMR" preSegmentId="8" postSegmentId="7" preFractionAlong="0.7604000672874827" postFractionAlong="0.676398368910006"/>
    </projection>
    <projection id="NCXLS_M4_M1" presynapticPopulation="M4" postsynapticPopulation="M1" synapse="Acetylcholine">
      <connection id="16" preCellId="../M4/0/M4" postCellId="../M1/0/M1" preSegmentId="4" postSegmentId="5" preFractionAlong="0.372999835566863" postFractionAlong="0.20903703738592228"/>
    </projection>
    <projection id="NCXLS_M4_I4" presynapticPopulation="M4" postsynapticPopulation="I4" synapse="Acetylcholine">
      <connection id="17" preCellId="../M4/0/M4" postCellId="../I4/0/I4" preSegmentId="5" postSegmentId="7" preFractionAlong="0.3261702541282535" postFractionAlong="0.46855699459113465"/>
    </projection>
    <projection id="NCXLS_M4_MI" presynapticPopulation="M4" postsynapticPopulation="MI" synapse="Acetylcholine">
      <connection id="18" preCellId="../M4/0/M4" postCellId="../MI/0/MI" preSegmentId="1" postSegmentId="7" preFractionAlong="0.20909736458961425" postFractionAlong="0.13035313004326554"/>
    </projection>
    <projection id="NCXLS_M4_I1L" presynapticPopulation="M4" postsynapticPopulation="I1L" synapse="Acetylcholine">
      <connection id="19" preCellId="../M4/0/M4" postCellId="../I1L/0/I1L" preSegmentId="4" postSegmentId="8" preFractionAlong="0.565415939752538" postFractionAlong="0.021009156986360744"/>
    </projection>
    <projection id="NCXLS_M4_I2L" presynapticPopulation="M4" postsynapticPopulation="I2L" synapse="Acetylcholine">
      <connection id="20" preCellId="../M4/0/M4" postCellId="../I2L/0/I2L" preSegmentId="9" postSegmentId="5" preFractionAlong="0.30180936966269367" postFractionAlong="0.03739699040879729"/>
    </projection>
    <projection id="NCXLS_M4_M2L" presynapticPopulation="M4" postsynapticPopulation="M2L" synapse="Glutamate">
      <connection id="21" preCellId="../M4/0/M4" postCellId="../M2L/0/M2L" preSegmentId="9" postSegmentId="5" preFractionAlong="0.9132296862792705" postFractionAlong="0.38797275439788637"/>
    </projection>
    <projection id="NCXLS_M4_MCL" presynapticPopulation="M4" postsynapticPopulation="MCL" synapse="Acetylcholine">
      <connection id="22" preCellId="../M4/0/M4" postCellId="../MCL/0/MCL" preSegmentId="8" postSegmentId="3" preFractionAlong="0.1336956543994362" postFractionAlong="0.9353944896677987"/>
    </projection>
    <projection id="NCXLS_M4_I5" presynapticPopulation="M4" postsynapticPopulation="I5" synapse="Acetylcholine">
      <connection id="23" preCellId="../M4/0/M4" postCellId="../I5/0/I5" preSegmentId="7" postSegmentId="6" preFractionAlong="0.2755667763091785" postFractionAlong="0.33217252206173253"/>
    </projection>
    <projection id="NCXLS_M4_M3R" presynapticPopulation="M4" postsynapticPopulation="M3R" synapse="Glutamate">
      <connection id="24" preCellId="../M4/0/M4" postCellId="../M3R/0/M3R" preSegmentId="8" postSegmentId="9" preFractionAlong="0.7653162995253863" postFractionAlong="0.9294034838491538"/>
    </projection>
    <projection id="NCXLS_M4_MCR" presynapticPopulation="M4" postsynapticPopulation="MCR" synapse="Acetylcholine">
      <connection id="25" preCellId="../M4/0/M4" postCellId="../MCR/0/MCR" preSegmentId="9" postSegmentId="6" preFractionAlong="0.31030711579169745" postFractionAlong="0.3991261004449661"/>
    </projection>
    <projection id="NCXLS_I3_I1R" presynapticPopulation="I3" postsynapticPopulation="I1R" synapse="Acetylcholine">
      <connection id="26" preCellId="../I3/0/I3" postCellId="../I1R/0/I1R" preSegmentId="6" postSegmentId="3" preFractionAlong="0.20348799455531252" postFractionAlong="0.9545538424175"/>
    </projection>
    <projection id="NCXLS_M5_I1R" presynapticPopulation="M5" postsynapticPopulation="I1R" synapse="Acetylcholine">
      <connection id="27" preCellId="../M5/0/M5" postCellId="../I1R/0/I1R" preSegmentId="2" postSegmentId="8" preFractionAlong="0.33881302160484816" postFractionAlong="0.40514855367840663"/>
    </projection>
    <projection id="NCXLS_M5_I3" presynapticPopulation="M5" postsynapticPopulation="I3" synapse="Acetylcholine">
      <connection id="28" preCellId="../M5/0/M5" postCellId="../I3/0/I3" preSegmentId="2" postSegmentId="4" preFractionAlong="0.6288728969881755" postFractionAlong="0.640380746644241"/>
    </projection>
    <projection id="NCXLS_M5_I4" presynapticPopulation="M5" postsynapticPopulation="I4" synapse="Acetylcholine">
      <connection id="29" preCellId="../M5/0/M5" postCellId="../I4/0/I4" preSegmentId="5" postSegmentId="2" preFractionAlong="0.7408692683852178" postFractionAlong="0.5425733269659556"/>
    </projection>
    <projection id="NCXLS_M5_I1L" presynapticPopulation="M5" postsynapticPopulation="I1L" synapse="Acetylcholine">
      <connection id="30" preCellId="../M5/0/M5" postCellId="../I1L/0/I1L" preSegmentId="9" postSegmentId="7" preFractionAlong="0.2739887815430181" postFractionAlong="0.5930561899673576"/>
    </projection>
    <projection id="NCXLS_M5_I2L" presynapticPopulation="M5" postsynapticPopulation="I2L" synapse="Acetylcholine">
      <connection id="31" preCellId="../M5/0/M5" postCellId="../I2L/0/I2L" preSegmentId="9" postSegmentId="2" preFractionAlong="0.7423699370897818" postFractionAlong="0.22833125236861085"/>
    </projection>
    <projection id="NCXLS_M5_I2R" presynapticPopulation="M5" postsynapticPopulation="I2R" synapse="Acetylcholine">
      <connection id="32" preCellId="../M5/0/M5" postCellId="../I2R/0/I2R" preSegmentId="4" postSegmentId="5" preFractionAlong="0.28924390281966816" postFractionAlong="0.3693541300894323"/>
    </projection>
    <projection id="NCXLS_M5_MCR" presynapticPopulation="M5" postsynapticPopulation="MCR" synapse="Acetylcholine">
      <connection id="33" preCellId="../M5/0/M5" postCellId="../MCR/0/MCR" preSegmentId="1" postSegmentId="8" preFractionAlong="0.5833072481842045" postFractionAlong="0.8843434279712875"/>
    </projection>
    <projection id="NCXLS_M3L_M1" presynapticPopulation="M3L" postsynapticPopulation="M1" synapse="Acetylcholine">
      <connection id="34" preCellId="../M3L/0/M3L" postCellId="../M1/0/M1" preSegmentId="7" postSegmentId="1" preFractionAlong="0.3389447753484487" postFractionAlong="0.795660230661442"/>
    </projection>
    <projection id="NCXLS_M3L_I1R" presynapticPopulation="M3L" postsynapticPopulation="I1R" synapse="Acetylcholine">
      <connection id="35" preCellId="../M3L/0/M3L" postCellId="../I1R/0/I1R" preSegmentId="4" postSegmentId="1" preFractionAlong="0.2823138342107202" postFractionAlong="0.5852968283343113"/>
    </projection>
    <projection id="NCXLS_M3L_M4" presynapticPopulation="M3L" postsynapticPopulation="M4" synapse="Glutamate">
      <connection id="36" preCellId="../M3L/0/M3L" postCellId="../M4/0/M4" preSegmentId="7" postSegmentId="2" preFractionAlong="0.9339779741445192" postFractionAlong="0.13105863080429037"/>
    </projection>
    <projection id="NCXLS_M3L_I3" presynapticPopulation="M3L" postsynapticPopulation="I3" synapse="Acetylcholine">
      <connection id="37" preCellId="../M3L/0/M3L" postCellId="../I3/0/I3" preSegmentId="8" postSegmentId="3" preFractionAlong="0.5144896023120388" postFractionAlong="0.8568353497231763"/>
    </projection>
    <projection id="NCXLS_M3L_I4" presynapticPopulation="M3L" postsynapticPopulation="I4" synapse="Acetylcholine">
      <connection id="38" preCellId="../M3L/0/M3L" postCellId="../I4/0/I4" preSegmentId="1" postSegmentId="9" preFractionAlong="0.7978046813410725" postFractionAlong="0.8643662664559733"/>
    </projection>
    <projection id="NCXLS_M3L_M5" presynapticPopulation="M3L" postsynapticPopulation="M5" synapse="Glutamate">
      <connection id="39" preCellId="../M3L/0/M3L" postCellId="../M5/0/M5" preSegmentId="4" postSegmentId="4" preFractionAlong="0.7569276593414415" postFractionAlong="0.6891210904957582"/>
    </projection>
    <projection id="NCXLS_M3L_MI" presynapticPopulation="M3L" postsynapticPopulation="MI" synapse="Acetylcholine">
      <connection id="40" preCellId="../M3L/0/M3L" postCellId="../MI/0/MI" preSegmentId="2" postSegmentId="9" preFractionAlong="0.9968091806811089" postFractionAlong="0.42685832879508956"/>
    </projection>
    <projection id="NCXLS_M3L_I1L" presynapticPopulation="M3L" postsynapticPopulation="I1L" synapse="Acetylcholine">
      <connection id="41" preCellId="../M3L/0/M3L" postCellId="../I1L/0/I1L" preSegmentId="7" postSegmentId="5" preFractionAlong="0.4171642789757021" postFractionAlong="0.8777494048626249"/>
    </projection>
    <projection id="NCXLS_M3L_I2L" presynapticPopulation="M3L" postsynapticPopulation="I2L" synapse="Acetylcholine">
      <connection id="42" preCellId="../M3L/0/M3L" postCellId="../I2L/0/I2L" preSegmentId="7" postSegmentId="6" preFractionAlong="0.5576886911854527" postFractionAlong="0.05461030321346905"/>
    </projection>
    <projection id="NCXLS_M3L_MCL" presynapticPopulation="M3L" postsynapticPopulation="MCL" synapse="Acetylcholine">
      <connection id="43" preCellId="../M3L/0/M3L" postCellId="../MCL/0/MCL" preSegmentId="5" postSegmentId="5" preFractionAlong="0.2908768542315825" postFractionAlong="0.4694068419892581"/>
    </projection>
    <projection id="NCXLS_M3L_I5" presynapticPopulation="M3L" postsynapticPopulation="I5" synapse="Acetylcholine">
      <connection id="44" preCellId="../M3L/0/M3L" postCellId="../I5/0/I5" preSegmentId="3" postSegmentId="2" preFractionAlong="0.1756720999559107" postFractionAlong="0.5131898917098298"/>
    </projection>
    <projection id="NCXLS_M3L_I2R" presynapticPopulation="M3L" postsynapticPopulation="I2R" synapse="Acetylcholine">
      <connection id="45" preCellId="../M3L/0/M3L" postCellId="../I2R/0/I2R" preSegmentId="4" postSegmentId="4" preFractionAlong="0.9732608830304917" postFractionAlong="0.20140630921335223"/>
    </projection>
    <projection id="NCXLS_M3L_M3R" presynapticPopulation="M3L" postsynapticPopulation="M3R" synapse="Acetylcholine">
      <connection id="46" preCellId="../M3L/0/M3L" postCellId="../M3R/0/M3R" preSegmentId="9" postSegmentId="5" preFractionAlong="0.3327294765103791" postFractionAlong="0.9399243728857088"/>
    </projection>
    <projection id="NCXLS_M3L_MCR" presynapticPopulation="M3L" postsynapticPopulation="MCR" synapse="Acetylcholine">
      <connection id="47" preCellId="../M3L/0/M3L" postCellId="../MCR/0/MCR" preSegmentId="5" postSegmentId="7" preFractionAlong="0.9881240759546354" postFractionAlong="0.4852304557653562"/>
    </projection>
    <projection id="NCXLS_MI_I1L" presynapticPopulation="MI" postsynapticPopulation="I1L" synapse="Acetylcholine">
      <connection id="48" preCellId="../MI/0/MI" postCellId="../I1L/0/I1L" preSegmentId="7" postSegmentId="5" preFractionAlong="0.4502362866726173" postFractionAlong="0.25474870733671884"/>
    </projection>
    <projection id="NCXLS_MI_I2L" presynapticPopulation="MI" postsynapticPopulation="I2L" synapse="Serotonin_Glutamate">
      <connection id="49" preCellId="../MI/0/MI" postCellId="../I2L/0/I2L" preSegmentId="3" postSegmentId="5" preFractionAlong="0.09669455978756714" postFractionAlong="0.7204567414627562"/>
    </projection>
    <projection id="NCXLS_M2L_M1" presynapticPopulation="M2L" postsynapticPopulation="M1" synapse="Acetylcholine">
      <connection id="50" preCellId="../M2L/0/M2L" postCellId="../M1/0/M1" preSegmentId="7" postSegmentId="5" preFractionAlong="0.7658684256625315" postFractionAlong="0.07921315000837081"/>
    </projection>
    <projection id="NCXLS_M2L_I1R" presynapticPopulation="M2L" postsynapticPopulation="I1R" synapse="Acetylcholine">
      <connection id="51" preCellId="../M2L/0/M2L" postCellId="../I1R/0/I1R" preSegmentId="1" postSegmentId="5" preFractionAlong="0.01944805036808117" postFractionAlong="0.18879402777344445"/>
    </projection>
    <projection id="NCXLS_M2L_M4" presynapticPopulation="M2L" postsynapticPopulation="M4" synapse="Acetylcholine">
      <connection id="52" preCellId="../M2L/0/M2L" postCellId="../M4/0/M4" preSegmentId="4" postSegmentId="8" preFractionAlong="0.42835180056884625" postFractionAlong="0.027106652336233106"/>
    </projection>
    <projection id="NCXLS_M2L_I3" presynapticPopulation="M2L" postsynapticPopulation="I3" synapse="Acetylcholine">
      <connection id="53" preCellId="../M2L/0/M2L" postCellId="../I3/0/I3" preSegmentId="4" postSegmentId="2" preFractionAlong="0.010513224541653488" postFractionAlong="0.761889894377484"/>
    </projection>
    <projection id="NCXLS_M2L_I4" presynapticPopulation="M2L" postsynapticPopulation="I4" synapse="Acetylcholine">
      <connection id="54" preCellId="../M2L/0/M2L" postCellId="../I4/0/I4" preSegmentId="1" postSegmentId="1" preFractionAlong="0.9866876116170241" postFractionAlong="0.2508734717161105"/>
    </projection>
    <projection id="NCXLS_M2L_M3L" presynapticPopulation="M2L" postsynapticPopulation="M3L" synapse="Glutamate">
      <connection id="55" preCellId="../M2L/0/M2L" postCellId="../M3L/0/M3L" preSegmentId="6" postSegmentId="9" preFractionAlong="0.8939335106699905" postFractionAlong="0.3358163646415345"/>
    </projection>
    <projection id="NCXLS_M2L_MI" presynapticPopulation="M2L" postsynapticPopulation="MI" synapse="Acetylcholine">
      <connection id="56" preCellId="../M2L/0/M2L" postCellId="../MI/0/MI" preSegmentId="5" postSegmentId="8" preFractionAlong="0.930998619712584" postFractionAlong="0.05050739238280655"/>
    </projection>
    <projection id="NCXLS_M2L_I1L" presynapticPopulation="M2L" postsynapticPopulation="I1L" synapse="Acetylcholine">
      <connection id="57" preCellId="../M2L/0/M2L" postCellId="../I1L/0/I1L" preSegmentId="6" postSegmentId="6" preFractionAlong="0.8904409480010858" postFractionAlong="0.2627209435613028"/>
    </projection>
    <projection id="NCXLS_M2L_I2L" presynapticPopulation="M2L" postsynapticPopulation="I2L" synapse="Acetylcholine">
      <connection id="58" preCellId="../M2L/0/M2L" postCellId="../I2L/0/I2L" preSegmentId="5" postSegmentId="2" preFractionAlong="0.3243288791369666" postFractionAlong="0.9521439170763514"/>
    </projection>
    <projection id="NCXLS_M2L_MCL" presynapticPopulation="M2L" postsynapticPopulation="MCL" synapse="Acetylcholine">
      <connection id="59" preCellId="../M2L/0/M2L" postCellId="../MCL/0/MCL" preSegmentId="3" postSegmentId="1" preFractionAlong="0.9987929358156545" postFractionAlong="0.054966306839822066"/>
    </projection>
    <projection id="NCXLS_M2L_I5" presynapticPopulation="M2L" postsynapticPopulation="I5" synapse="Acetylcholine">
      <connection id="60" preCellId="../M2L/0/M2L" postCellId="../I5/0/I5" preSegmentId="5" postSegmentId="3" preFractionAlong="0.08257215803527718" postFractionAlong="0.15452082999051897"/>
    </projection>
    <projection id="NCXLS_M2L_I2R" presynapticPopulation="M2L" postsynapticPopulation="I2R" synapse="Acetylcholine">
      <connection id="61" preCellId="../M2L/0/M2L" postCellId="../I2R/0/I2R" preSegmentId="6" postSegmentId="7" preFractionAlong="0.07433460888607146" postFractionAlong="0.11536280130570387"/>
    </projection>
    <projection id="NCXLS_M2L_M3R" presynapticPopulation="M2L" postsynapticPopulation="M3R" synapse="Glutamate">
      <connection id="62" preCellId="../M2L/0/M2L" postCellId="../M3R/0/M3R" preSegmentId="2" postSegmentId="5" preFractionAlong="0.4722264257562043" postFractionAlong="0.7128823693447365"/>
    </projection>
    <projection id="NCXLS_M2L_MCR" presynapticPopulation="M2L" postsynapticPopulation="MCR" synapse="Acetylcholine">
      <connection id="63" preCellId="../M2L/0/M2L" postCellId="../MCR/0/MCR" preSegmentId="6" postSegmentId="3" preFractionAlong="0.2587109474156345" postFractionAlong="0.34719216756221194"/>
    </projection>
    <projection id="NCXLS_M2L_M2R" presynapticPopulation="M2L" postsynapticPopulation="M2R" synapse="Acetylcholine">
      <connection id="64" preCellId="../M2L/0/M2L" postCellId="../M2R/0/M2R" preSegmentId="9" postSegmentId="1" preFractionAlong="0.6252161250314382" postFractionAlong="0.937639779957902"/>
    </projection>
    <projection id="NCXLS_MCL_M1" presynapticPopulation="MCL" postsynapticPopulation="M1" synapse="Acetylcholine">
      <connection id="65" preCellId="../MCL/0/MCL" postCellId="../M1/0/M1" preSegmentId="8" postSegmentId="7" preFractionAlong="0.5701816317546939" postFractionAlong="0.6101960089858345"/>
    </projection>
    <projection id="NCXLS_MCL_M3L" presynapticPopulation="MCL" postsynapticPopulation="M3L" synapse="Acetylcholine">
      <connection id="66" preCellId="../MCL/0/MCL" postCellId="../M3L/0/M3L" preSegmentId="4" postSegmentId="9" preFractionAlong="0.014196634471723701" postFractionAlong="0.25763199876352916"/>
    </projection>
    <projection id="NCXLS_MCL_I5" presynapticPopulation="MCL" postsynapticPopulation="I5" synapse="Acetylcholine">
      <connection id="67" preCellId="../MCL/0/MCL" postCellId="../I5/0/I5" preSegmentId="4" postSegmentId="3" preFractionAlong="0.7331603781367996" postFractionAlong="0.9954215129254561"/>
    </projection>
    <projection id="NCXLS_MCL_M3R" presynapticPopulation="MCL" postsynapticPopulation="M3R" synapse="Acetylcholine">
      <connection id="68" preCellId="../MCL/0/MCL" postCellId="../M3R/0/M3R" preSegmentId="5" postSegmentId="6" preFractionAlong="0.5382201018684752" postFractionAlong="0.533323547859605"/>
    </projection>
    <projection id="NCXLS_MCL_M2R" presynapticPopulation="MCL" postsynapticPopulation="M2R" synapse="Acetylcholine">
      <connection id="69" preCellId="../MCL/0/MCL" postCellId="../M2R/0/M2R" preSegmentId="4" postSegmentId="8" preFractionAlong="0.1691618938424202" postFractionAlong="0.9774565631838426"/>
    </projection>
    <projection id="NCXLS_M3R_I1R" presynapticPopulation="M3R" postsynapticPopulation="I1R" synapse="Acetylcholine">
      <connection id="70" preCellId="../M3R/0/M3R" postCellId="../I1R/0/I1R" preSegmentId="5" postSegmentId="4" preFractionAlong="0.6032454226840298" postFractionAlong="0.2272610535596623"/>
    </projection>
    <projection id="NCXLS_M3R_I3" presynapticPopulation="M3R" postsynapticPopulation="I3" synapse="Acetylcholine">
      <connection id="71" preCellId="../M3R/0/M3R" postCellId="../I3/0/I3" preSegmentId="3" postSegmentId="8" preFractionAlong="0.6949701331214758" postFractionAlong="0.5151670283865888"/>
    </projection>
    <projection id="NCXLS_M3R_I4" presynapticPopulation="M3R" postsynapticPopulation="I4" synapse="Acetylcholine">
      <connection id="72" preCellId="../M3R/0/M3R" postCellId="../I4/0/I4" preSegmentId="9" postSegmentId="3" preFractionAlong="0.6113416562477262" postFractionAlong="0.37097371259216905"/>
    </projection>
    <projection id="NCXLS_M3R_I6" presynapticPopulation="M3R" postsynapticPopulation="I6" synapse="Acetylcholine">
      <connection id="73" preCellId="../M3R/0/M3R" postCellId="../I6/0/I6" preSegmentId="8" postSegmentId="3" preFractionAlong="0.01366168547060942" postFractionAlong="0.8957263555151146"/>
    </projection>
    <projection id="NCXLS_M3R_M5" presynapticPopulation="M3R" postsynapticPopulation="M5" synapse="Acetylcholine">
      <connection id="74" preCellId="../M3R/0/M3R" postCellId="../M5/0/M5" preSegmentId="9" postSegmentId="8" preFractionAlong="0.335843487039316" postFractionAlong="0.5138665257132716"/>
    </projection>
    <projection id="NCXLS_M3R_M3L" presynapticPopulation="M3R" postsynapticPopulation="M3L" synapse="Acetylcholine">
      <connection id="75" preCellId="../M3R/0/M3R" postCellId="../M3L/0/M3L" preSegmentId="3" postSegmentId="4" preFractionAlong="0.23828967055309158" postFractionAlong="0.2243829797997955"/>
    </projection>
    <projection id="NCXLS_M3R_I1L" presynapticPopulation="M3R" postsynapticPopulation="I1L" synapse="Acetylcholine">
      <connection id="76" preCellId="../M3R/0/M3R" postCellId="../I1L/0/I1L" preSegmentId="1" postSegmentId="7" preFractionAlong="0.511093821472398" postFractionAlong="0.4455178144931612"/>
    </projection>
    <projection id="NCXLS_M3R_I2L" presynapticPopulation="M3R" postsynapticPopulation="I2L" synapse="Acetylcholine">
      <connection id="77" preCellId="../M3R/0/M3R" postCellId="../I2L/0/I2L" preSegmentId="2" postSegmentId="7" preFractionAlong="0.8725199518293624" postFractionAlong="0.24414756050690722"/>
    </projection>
    <projection id="NCXLS_M3R_M2L" presynapticPopulation="M3R" postsynapticPopulation="M2L" synapse="Acetylcholine">
      <connection id="78" preCellId="../M3R/0/M3R" postCellId="../M2L/0/M2L" preSegmentId="8" postSegmentId="6" preFractionAlong="0.9258273744435174" postFractionAlong="0.6599934501353172"/>
    </projection>
    <projection id="NCXLS_M3R_MCL" presynapticPopulation="M3R" postsynapticPopulation="MCL" synapse="Acetylcholine">
      <connection id="79" preCellId="../M3R/0/M3R" postCellId="../MCL/0/MCL" preSegmentId="4" postSegmentId="2" preFractionAlong="0.13141238285526846" postFractionAlong="0.26248500790059104"/>
    </projection>
    <projection id="NCXLS_M3R_I2R" presynapticPopulation="M3R" postsynapticPopulation="I2R" synapse="Acetylcholine">
      <connection id="80" preCellId="../M3R/0/M3R" postCellId="../I2R/0/I2R" preSegmentId="9" postSegmentId="9" preFractionAlong="0.24399530235247224" postFractionAlong="0.9667342275351081"/>
    </projection>
    <projection id="NCXLS_M3R_NSML" presynapticPopulation="M3R" postsynapticPopulation="NSML" synapse="Acetylcholine">
      <connection id="81" preCellId="../M3R/0/M3R" postCellId="../NSML/0/NSML" preSegmentId="3" postSegmentId="2" preFractionAlong="0.2476316430714387" postFractionAlong="0.3480519554773205"/>
    </projection>
    <projection id="NCXLS_M3R_MCR" presynapticPopulation="M3R" postsynapticPopulation="MCR" synapse="Acetylcholine">
      <connection id="82" preCellId="../M3R/0/M3R" postCellId="../MCR/0/MCR" preSegmentId="4" postSegmentId="7" preFractionAlong="0.9666222208961075" postFractionAlong="0.44343910283604404"/>
    </projection>
    <projection id="NCXLS_M3R_NSMR" presynapticPopulation="M3R" postsynapticPopulation="NSMR" synapse="Acetylcholine">
      <connection id="83" preCellId="../M3R/0/M3R" postCellId="../NSMR/0/NSMR" preSegmentId="2" postSegmentId="6" preFractionAlong="0.2667720636239239" postFractionAlong="0.11953086954707781"/>
    </projection>
    <projection id="NCXLS_MCR_I1R" presynapticPopulation="MCR" postsynapticPopulation="I1R" synapse="Acetylcholine">
      <connection id="84" preCellId="../MCR/0/MCR" postCellId="../I1R/0/I1R" preSegmentId="6" postSegmentId="7" preFractionAlong="0.04929449276441644" postFractionAlong="0.3862877051455452"/>
    </projection>
    <projection id="NCXLS_MCR_M4" presynapticPopulation="MCR" postsynapticPopulation="M4" synapse="Acetylcholine">
      <connection id="85" preCellId="../MCR/0/MCR" postCellId="../M4/0/M4" preSegmentId="1" postSegmentId="7" preFractionAlong="0.3156332153671523" postFractionAlong="0.49101976266891"/>
    </projection>
    <projection id="NCXLS_MCR_I1L" presynapticPopulation="MCR" postsynapticPopulation="I1L" synapse="Acetylcholine">
      <connection id="86" preCellId="../MCR/0/MCR" postCellId="../I1L/0/I1L" preSegmentId="5" postSegmentId="2" preFractionAlong="0.006796548586111784" postFractionAlong="0.763856500200214"/>
    </projection>
    <projection id="NCXLS_MCR_I2L" presynapticPopulation="MCR" postsynapticPopulation="I2L" synapse="Acetylcholine">
      <connection id="87" preCellId="../MCR/0/MCR" postCellId="../I2L/0/I2L" preSegmentId="7" postSegmentId="2" preFractionAlong="0.7793651703351198" postFractionAlong="0.5224968088905885"/>
    </projection>
    <projection id="NCXLS_MCR_I2R" presynapticPopulation="MCR" postsynapticPopulation="I2R" synapse="Acetylcholine">
      <connection id="88" preCellId="../MCR/0/MCR" postCellId="../I2R/0/I2R" preSegmentId="1" postSegmentId="4" preFractionAlong="0.4051080545878567" postFractionAlong="0.002708149820452088"/>
    </projection>
    <projection id="NCXLS_M2R_I1R" presynapticPopulation="M2R" postsynapticPopulation="I1R" synapse="Acetylcholine">
      <connection id="89" preCellId="../M2R/0/M2R" postCellId="../I1R/0/I1R" preSegmentId="3" postSegmentId="7" preFractionAlong="0.49604272601658306" postFractionAlong="0.007766642153968717"/>
    </projection>
    <projection id="NCXLS_M2R_I3" presynapticPopulation="M2R" postsynapticPopulation="I3" synapse="Acetylcholine">
      <connection id="90" preCellId="../M2R/0/M2R" postCellId="../I3/0/I3" preSegmentId="2" postSegmentId="6" preFractionAlong="0.9864874015717295" postFractionAlong="0.27826766081876964"/>
    </projection>
    <projection id="NCXLS_M2R_I4" presynapticPopulation="M2R" postsynapticPopulation="I4" synapse="Acetylcholine">
      <connection id="91" preCellId="../M2R/0/M2R" postCellId="../I4/0/I4" preSegmentId="2" postSegmentId="6" preFractionAlong="0.8438128636583061" postFractionAlong="0.4603290506427651"/>
    </projection>
    <projection id="NCXLS_M2R_I6" presynapticPopulation="M2R" postsynapticPopulation="I6" synapse="Acetylcholine">
      <connection id="92" preCellId="../M2R/0/M2R" postCellId="../I6/0/I6" preSegmentId="3" postSegmentId="3" preFractionAlong="0.133778144993968" postFractionAlong="0.9533071675823725"/>
    </projection>
    <projection id="NCXLS_M2R_M5" presynapticPopulation="M2R" postsynapticPopulation="M5" synapse="Acetylcholine">
      <connection id="93" preCellId="../M2R/0/M2R" postCellId="../M5/0/M5" preSegmentId="3" postSegmentId="1" preFractionAlong="0.6202348489611205" postFractionAlong="0.5448010852760984"/>
    </projection>
    <projection id="NCXLS_M2R_M3L" presynapticPopulation="M2R" postsynapticPopulation="M3L" synapse="Acetylcholine">
      <connection id="94" preCellId="../M2R/0/M2R" postCellId="../M3L/0/M3L" preSegmentId="4" postSegmentId="7" preFractionAlong="0.7153641152288897" postFractionAlong="0.27114225338058806"/>
    </projection>
    <projection id="NCXLS_M2R_MI" presynapticPopulation="M2R" postsynapticPopulation="MI" synapse="Acetylcholine">
      <connection id="95" preCellId="../M2R/0/M2R" postCellId="../MI/0/MI" preSegmentId="3" postSegmentId="5" preFractionAlong="0.7224113844635446" postFractionAlong="0.007391901444293025"/>
    </projection>
    <projection id="NCXLS_M2R_I1L" presynapticPopulation="M2R" postsynapticPopulation="I1L" synapse="Acetylcholine">
      <connection id="96" preCellId="../M2R/0/M2R" postCellId="../I1L/0/I1L" preSegmentId="3" postSegmentId="5" preFractionAlong="0.39091742684116226" postFractionAlong="0.9764565294354102"/>
    </projection>
    <projection id="NCXLS_M2R_I2L" presynapticPopulation="M2R" postsynapticPopulation="I2L" synapse="Acetylcholine">
      <connection id="97" preCellId="../M2R/0/M2R" postCellId="../I2L/0/I2L" preSegmentId="3" postSegmentId="3" preFractionAlong="0.44439561845108055" postFractionAlong="0.3032829394045271"/>
    </projection>
    <projection id="NCXLS_M2R_M2L" presynapticPopulation="M2R" postsynapticPopulation="M2L" synapse="Acetylcholine">
      <connection id="98" preCellId="../M2R/0/M2R" postCellId="../M2L/0/M2L" preSegmentId="6" postSegmentId="3" preFractionAlong="0.26679454943383085" postFractionAlong="0.5059258001463939"/>
    </projection>
    <projection id="NCXLS_M2R_MCL" presynapticPopulation="M2R" postsynapticPopulation="MCL" synapse="Acetylcholine">
      <connection id="99" preCellId="../M2R/0/M2R" postCellId="../MCL/0/MCL" preSegmentId="8" postSegmentId="4" preFractionAlong="0.7466032046442038" postFractionAlong="0.012596401271786961"/>
    </projection>
    <projection id="NCXLS_M2R_I5" presynapticPopulation="M2R" postsynapticPopulation="I5" synapse="Acetylcholine">
      <connection id="100" preCellId="../M2R/0/M2R" postCellId="../I5/0/I5" preSegmentId="6" postSegmentId="1" preFractionAlong="0.18286452675487241" postFractionAlong="0.23240404621441313"/>
    </projection>
    <projection id="NCXLS_M2R_I2R" presynapticPopulation="M2R" postsynapticPopulation="I2R" synapse="Acetylcholine">
      <connection id="101" preCellId="../M2R/0/M2R" postCellId="../I2R/0/I2R" preSegmentId="1" postSegmentId="9" preFractionAlong="0.9929434657829072" postFractionAlong="0.7777174890725507"/>
    </projection>
    <projection id="NCXLS_M2R_NSML" presynapticPopulation="M2R" postsynapticPopulation="NSML" synapse="Acetylcholine">
      <connection id="102" preCellId="../M2R/0/M2R" postCellId="../NSML/0/NSML" preSegmentId="2" postSegmentId="4" preFractionAlong="0.1760247550411338" postFractionAlong="0.8662328702676704"/>
    </projection>
    <projection id="NCXLS_M2R_M3R" presynapticPopulation="M2R" postsynapticPopulation="M3R" synapse="Acetylcholine">
      <connection id="103" preCellId="../M2R/0/M2R" postCellId="../M3R/0/M3R" preSegmentId="6" postSegmentId="7" preFractionAlong="0.8622114233219381" postFractionAlong="0.8160923529142614"/>
    </projection>
    <projection id="NCXLS_M2R_MCR" presynapticPopulation="M2R" postsynapticPopulation="MCR" synapse="Acetylcholine">
      <connection id="104" preCellId="../M2R/0/M2R" postCellId="../MCR/0/MCR" preSegmentId="8" postSegmentId="5" preFractionAlong="0.6929202292247886" postFractionAlong="0.9873684723122"/>
    </projection>
    <projection id="NCXLS_M2R_NSMR" presynapticPopulation="M2R" postsynapticPopulation="NSMR" synapse="Acetylcholine">
      <connection id="105" preCellId="../M2R/0/M2R" postCellId="../NSMR/0/NSMR" preSegmentId="9" postSegmentId="9" preFractionAlong="0.6623179135395824" postFractionAlong="0.6096819082757774"/>
    </projection>
    <projection id="NCXLS_NSMR_I1R" presynapticPopulation="NSMR" postsynapticPopulation="I1R" synapse="Serotonin_Glutamate">
      <connection id="106" preCellId="../NSMR/0/NSMR" postCellId="../I1R/0/I1R" preSegmentId="8" postSegmentId="1" preFractionAlong="0.3967893254145842" postFractionAlong="0.4312104848643289"/>
    </projection>
    <projection id="NCXLS_NSMR_I3" presynapticPopulation="NSMR" postsynapticPopulation="I3" synapse="Serotonin_Glutamate">
      <connection id="107" preCellId="../NSMR/0/NSMR" postCellId="../I3/0/I3" preSegmentId="3" postSegmentId="3" preFractionAlong="0.2607087741328522" postFractionAlong="0.5182797206887111"/>
    </projection>
    <projection id="NCXLS_NSMR_I2R" presynapticPopulation="NSMR" postsynapticPopulation="I2R" synapse="Serotonin_Glutamate">
      <connection id="108" preCellId="../NSMR/0/NSMR" postCellId="../I2R/0/I2R" preSegmentId="7" postSegmentId="5" preFractionAlong="0.569304984412202" postFractionAlong="0.631722418326584"/>
    </projection>
    <projection id="NC_I1L_RMDDL" presynapticPopulation="I1L" postsynapticPopulation="RMDDL" synapse="Acetylcholine">
      <connection id="109" preCellId="../I1L/0/I1L" postCellId="../RMDDL/0/RMDDL" preSegmentId="2" postSegmentId="3" preFractionAlong="0.051165506445475906" postFractionAlong="0.23285855687609425"/>
    </projection>
    <projection id="NC_I1L_RMDVL" presynapticPopulation="I1L" postsynapticPopulation="RMDVL" synapse="Acetylcholine">
      <connection id="110" preCellId="../I1L/0/I1L" postCellId="../RMDVL/0/RMDVL" preSegmentId="7" postSegmentId="2" preFractionAlong="0.9296496077013283" postFractionAlong="0.12461338567832736"/>
    </projection>
    <projection id="NC_I1R_RMDDR" presynapticPopulation="I1R" postsynapticPopulation="RMDDR" synapse="Acetylcholine">
      <connection id="111" preCellId="../I1R/0/I1R" postCellId="../RMDDR/0/RMDDR" preSegmentId="4" postSegmentId="9" preFractionAlong="0.05271976633450115" postFractionAlong="0.4461704378126965"/>
    </projection>
    <projection id="NC_I1R_RMDVR" presynapticPopulation="I1R" postsynapticPopulation="RMDVR" synapse="Acetylcholine">
      <connection id="112" preCellId="../I1R/0/I1R" postCellId="../RMDVR/0/RMDVR" preSegmentId="7" postSegmentId="7" preFractionAlong="0.9277457330754073" postFractionAlong="0.867702097919239"/>
    </projection>
    <projection id="NC_I2L_URXL" presynapticPopulation="I2L" postsynapticPopulation="URXL" synapse="Glutamate">
      <connection id="113" preCellId="../I2L/0/I2L" postCellId="../URXL/0/URXL" preSegmentId="7" postSegmentId="6" preFractionAlong="0.3018000558611551" postFractionAlong="0.8997430784088717"/>
    </projection>
    <projection id="NC_I2R_URXR" presynapticPopulation="I2R" postsynapticPopulation="URXR" synapse="Glutamate">
      <connection id="114" preCellId="../I2R/0/I2R" postCellId="../URXR/0/URXR" preSegmentId="4" postSegmentId="9" preFractionAlong="0.4386490184359845" postFractionAlong="0.03875693555418247"/>
    </projection>
    <projection id="NC_AVKL_I1L" presynapticPopulation="AVKL" postsynapticPopulation="I1L" synapse="Acetylcholine">
      <connection id="115" preCellId="../AVKL/0/AVKL" postCellId="../I1L/0/I1L" preSegmentId="8" postSegmentId="5" preFractionAlong="0.7647762421250892" postFractionAlong="0.26555759801241363"/>
    </projection>
    <projection id="NC_AVKR_I1R" presynapticPopulation="AVKR" postsynapticPopulation="I1R" synapse="Acetylcholine">
      <connection id="116" preCellId="../AVKR/0/AVKR" postCellId="../I1R/0/I1R" preSegmentId="2" postSegmentId="5" preFractionAlong="0.034376858351725215" postFractionAlong="0.6389630219732846"/>
    </projection>
    <projection id="NC_RIS_I1L" presynapticPopulation="RIS" postsynapticPopulation="I1L" synapse="Glutamate">
      <connection id="117" preCellId="../RIS/0/RIS" postCellId="../I1L/0/I1L" preSegmentId="5" postSegmentId="5" preFractionAlong="0.4350145943402234" postFractionAlong="0.2926550976674078"/>
    </projection>
    <projection id="NC_RIS_I1R" presynapticPopulation="RIS" postsynapticPopulation="I1R" synapse="Glutamate">
      <connection id="118" preCellId="../RIS/0/RIS" postCellId="../I1R/0/I1R" preSegmentId="2" postSegmentId="7" preFractionAlong="0.1633544497431565" postFractionAlong="0.10431308735188216"/>
    </projection>
    <projection id="NC_AVAL_I2L" presynapticPopulation="AVAL" postsynapticPopulation="I2L" synapse="Acetylcholine">
      <connection id="119" preCellId="../AVAL/0/AVAL" postCellId="../I2L/0/I2L" preSegmentId="3" postSegmentId="2" preFractionAlong="0.8771275618985017" postFractionAlong="0.5281892617563562"/>
    </projection>
    <projection id="NC_AVAR_I2R" presynapticPopulation="AVAR" postsynapticPopulation="I2R" synapse="Acetylcholine">
      <connection id="120" preCellId="../AVAR/0/AVAR" postCellId="../I2R/0/I2R" preSegmentId="9" postSegmentId="5" preFractionAlong="0.6495560067569618" postFractionAlong="0.8679995918950899"/>
    </projection>
    <projection id="NC_SMBVL_I4" presynapticPopulation="SMBVL" postsynapticPopulation="I4" synapse="Acetylcholine">
      <connection id="121" preCellId="../SMBVL/0/SMBVL" postCellId="../I4/0/I4" preSegmentId="4" postSegmentId="8" preFractionAlong="0.6431043526178503" postFractionAlong="0.3157434024840371"/>
    </projection>
    <projection id="NC_SMBVR_I4" presynapticPopulation="SMBVR" postsynapticPopulation="I4" synapse="Acetylcholine">
      <connection id="122" preCellId="../SMBVR/0/SMBVR" postCellId="../I4/0/I4" preSegmentId="7" postSegmentId="5" preFractionAlong="0.13353423316074942" postFractionAlong="0.386696449987462"/>
    </projection>
    <projection id="NCNMJ_M1_pm3L" presynapticPopulation="M1" postsynapticPopulation="pm3L" synapse="Acetylcholine">
      <connection id="123" preCellId="../M1/0/M1" postCellId="../pm3L/0/pm3L" preSegmentId="2" postSegmentId="5" preFractionAlong="0.8349737856829623" postFractionAlong="0.7103515007123322"/>
    </projection>
    <projection id="NCNMJ_M1_pm3R" presynapticPopulation="M1" postsynapticPopulation="pm3R" synapse="Acetylcholine">
      <connection id="124" preCellId="../M1/0/M1" postCellId="../pm3R/0/pm3R" preSegmentId="3" postSegmentId="9" preFractionAlong="0.9323481416337108" postFractionAlong="0.8582067909770298"/>
    </projection>
    <projection id="NCNMJ_M1_pm4L" presynapticPopulation="M1" postsynapticPopulation="pm4L" synapse="Acetylcholine">
      <connection id="125" preCellId="../M1/0/M1" postCellId="../pm4L/0/pm4L" preSegmentId="3" postSegmentId="7" preFractionAlong="0.9976722632646592" postFractionAlong="0.2635514794967778"/>
    </projection>
    <projection id="NCNMJ_M1_pm4R" presynapticPopulation="M1" postsynapticPopulation="pm4R" synapse="Acetylcholine">
      <connection id="126" preCellId="../M1/0/M1" postCellId="../pm4R/0/pm4R" preSegmentId="4" postSegmentId="1" preFractionAlong="0.9981999076656176" postFractionAlong="0.07496004347001306"/>
    </projection>
    <projection id="NCNMJ_M2L_pm4L" presynapticPopulation="M2L" postsynapticPopulation="pm4L" synapse="Acetylcholine">
      <connection id="127" preCellId="../M2L/0/M2L" postCellId="../pm4L/0/pm4L" preSegmentId="1" postSegmentId="5" preFractionAlong="0.40789593737154684" postFractionAlong="0.3477824030488872"/>
    </projection>
    <projection id="NCNMJ_M2L_pm5L" presynapticPopulation="M2L" postsynapticPopulation="pm5L" synapse="Acetylcholine">
      <connection id="128" preCellId="../M2L/0/M2L" postCellId="../pm5L/0/pm5L" preSegmentId="2" postSegmentId="4" preFractionAlong="0.8218393227529025" postFractionAlong="0.6463099336573813"/>
    </projection>
    <projection id="NCNMJ_M2R_pm4R" presynapticPopulation="M2R" postsynapticPopulation="pm4R" synapse="Acetylcholine">
      <connection id="129" preCellId="../M2R/0/M2R" postCellId="../pm4R/0/pm4R" preSegmentId="1" postSegmentId="3" preFractionAlong="0.539191079513633" postFractionAlong="0.2550934328323794"/>
    </projection>
    <projection id="NCNMJ_M2R_pm5R" presynapticPopulation="M2R" postsynapticPopulation="pm5R" synapse="Acetylcholine">
      <connection id="130" preCellId="../M2R/0/M2R" postCellId="../pm5R/0/pm5R" preSegmentId="1" postSegmentId="9" preFractionAlong="0.7517945873672564" postFractionAlong="0.5883656892176566"/>
    </projection>
    <projection id="NCNMJ_M3L_pm6L" presynapticPopulation="M3L" postsynapticPopulation="pm6L" synapse="Glutamate">
      <connection id="131" preCellId="../M3L/0/M3L" postCellId="../pm6L/0/pm6L" preSegmentId="3" postSegmentId="2" preFractionAlong="0.8263903116005552" postFractionAlong="0.701499101465166"/>
    </projection>
    <projection id="NCNMJ_M3R_pm6R" presynapticPopulation="M3R" postsynapticPopulation="pm6R" synapse="Glutamate">
      <connection id="132" preCellId="../M3R/0/M3R" postCellId="../pm6R/0/pm6R" preSegmentId="5" postSegmentId="9" preFractionAlong="0.4268947278233026" postFractionAlong="0.4690249397178835"/>
    </projection>
    <projection id="NCNMJ_M4_pm5L" presynapticPopulation="M4" postsynapticPopulation="pm5L" synapse="Acetylcholine">
      <connection id="133" preCellId="../M4/0/M4" postCellId="../pm5L/0/pm5L" preSegmentId="2" postSegmentId="4" preFractionAlong="0.5253182644507214" postFractionAlong="0.06605530782216007"/>
    </projection>
    <projection id="NCNMJ_M4_pm5R" presynapticPopulation="M4" postsynapticPopulation="pm5R" synapse="Acetylcholine">
      <connection id="134" preCellId="../M4/0/M4" postCellId="../pm5R/0/pm5R" preSegmentId="6" postSegmentId="1" preFractionAlong="0.9810448622544657" postFractionAlong="0.6618107285744247"/>
    </projection>
    <projection id="NCNMJ_M5_pm5L" presynapticPopulation="M5" postsynapticPopulation="pm5L" synapse="Acetylcholine">
      <connection id="135" preCellId="../M5/0/M5" postCellId="../pm5L/0/pm5L" preSegmentId="5" postSegmentId="6" preFractionAlong="0.30693107298123257" postFractionAlong="0.057094337907943715"/>
    </projection>
    <projection id="NCNMJ_M5_pm5R" presynapticPopulation="M5" postsynapticPopulation="pm5R" synapse="Acetylcholine">
      <connection id="136" preCellId="../M5/0/M5" postCellId="../pm5R/0/pm5R" preSegmentId="5" postSegmentId="1" preFractionAlong="0.011917982978242092" postFractionAlong="0.13969237260293865"/>
    </projection>
    <projection id="NCNMJ_M5_pm6L" presynapticPopulation="M5" postsynapticPopulation="pm6L" synapse="Acetylcholine">
      <connection id="137" preCellId="../M5/0/M5" postCellId="../pm6L/0/pm6L" preSegmentId="8" postSegmentId="7" preFractionAlong="0.4939791491401879" postFractionAlong="0.8693523009923474"/>
    </projection>
    <projection id="NCNMJ_M5_pm6R" presynapticPopulation="M5" postsynapticPopulation="pm6R" synapse="Acetylcholine">
      <connection id="138" preCellId="../M5/0/M5" postCellId="../pm6R/0/pm6R" preSegmentId="6" postSegmentId="6" preFractionAlong="0.8388393367652703" postFractionAlong="0.877120467662288"/>
    </projection>
    <projection id="NCNMJ_M5_pm7L" presynapticPopulation="M5" postsynapticPopulation="pm7L" synapse="Acetylcholine">
      <connection id="139" preCellId="../M5/0/M5" postCellId="../pm7L/0/pm7L" preSegmentId="8" postSegmentId="1" preFractionAlong="0.5505706345413642" postFractionAlong="0.19249315063582706"/>
    </projection>
    <projection id="NCNMJ_M5_pm7R" presynapticPopulation="M5" postsynapticPopulation="pm7R" synapse="Acetylcholine">
      <connection id="140" preCellId="../M5/0/M5" postCellId="../pm7R/0/pm7R" preSegmentId="5" postSegmentId="8" preFractionAlong="0.9111205013919575" postFractionAlong="0.8205075042321092"/>
    </projection>
    <projection id="NCNMJ_M5_pm8" presynapticPopulation="M5" postsynapticPopulation="pm8" synapse="Acetylcholine">
      <connection id="141" preCellId="../M5/0/M5" postCellId="../pm8/0/pm8" preSegmentId="8" postSegmentId="4" preFractionAlong="0.5140233698765098" postFractionAlong="0.6057537305209344"/>
    </projection>
    <electricalProjection id="NCXLS_M1_M4_GJ" presynapticPopulation="M1" postsynapticPopulation="M4">
      <electricalConnection id="142" preCell="0" postCell="0" synapse="Generic_GJ" preSegment="2" postSegment="9" preFractionAlong="0.5270501564925637" postFractionAlong="0.582533777440736"/>
    </electricalProjection>
    <electricalProjection id="NCXLS_M1_M3L_GJ" presynapticPopulation="M1" postsynapticPopulation="M3L">
      <electricalConnection id="143" preCell="0" postCell="0" synapse="Generic_GJ" preSegment="6" postSegment="4" preFractionAlong="0.1882321997690456" postFractionAlong="0.18424865157267423"/>
    </electricalProjection>
    <electricalProjection id="NCXLS_M1_M3R_GJ" presynapticPopulation="M1" postsynapticPopulation="M3R">
      <electricalConnection id="144" preCell="0" postCell="0" synapse="Generic_GJ" preSegment="6" postSegment="7" preFractionAlong="0.5877984493716848" postFractionAlong="0.8403481775885081"/>
    </electricalProjection>
    <electricalProjection id="NCXLS_M4_M3L_GJ" presynapticPopulation="M4" postsynapticPopulation="M3L">
      <electricalConnection id="145" preCell="0" postCell="0" synapse="Generic_GJ" preSegment="6" postSegment="6" preFractionAlong="0.2028532387278652" postFractionAlong="0.9983187565709567"/>
    </electricalProjection>
    <electricalProjection id="NCXLS_M4_M2R_GJ" presynapticPopulation="M4" postsynapticPopulation="M2R">
      <electricalConnection id="146" preCell="0" postCell="0" synapse="Generic_GJ" preSegment="9" postSegment="9" preFractionAlong="0.284058389040429" postFractionAlong="0.9947749545739061"/>
    </electricalProjection>
    <electricalProjection id="NCXLS_M5_M4_GJ" presynapticPopulation="M5" postsynapticPopulation="M4">
      <electricalConnection id="147" preCell="0" postCell="0" synapse="Generic_GJ" preSegment="3" postSegment="1" preFractionAlong="0.6256499129414531" postFractionAlong="0.5807559990556591"/>
    </electricalProjection>
    <electricalProjection id="NCXLS_M3L_M2R_GJ" presynapticPopulation="M3L" postsynapticPopulation="M2R">
      <electricalConnection id="148" preCell="0" postCell="0" synapse="Generic_GJ" preSegment="7" postSegment="5" preFractionAlong="0.8931137413224726" postFractionAlong="0.6894171338713246"/>
    </electricalProjection>
    <electricalProjection id="NCXLS_I2L_I1L_GJ" presynapticPopulation="I2L" postsynapticPopulation="I1L">
      <electricalConnection id="149" preCell="0" postCell="0" synapse="Generic_GJ" preSegment="9" postSegment="2" preFractionAlong="0.6761957463565392" postFractionAlong="0.8586001069824982"/>
    </electricalProjection>
    <electricalProjection id="NCXLS_M2L_M5_GJ" presynapticPopulation="M2L" postsynapticPopulation="M5">
      <electricalConnection id="150" preCell="0" postCell="0" synapse="Generic_GJ" preSegment="1" postSegment="7" preFractionAlong="0.6283471175494444" postFractionAlong="0.18410132336095697"/>
    </electricalProjection>
    <electricalProjection id="NCXLS_M3R_M4_GJ" presynapticPopulation="M3R" postsynapticPopulation="M4">
      <electricalConnection id="151" preCell="0" postCell="0" synapse="Generic_GJ" preSegment="6" postSegment="3" preFractionAlong="0.6022563023772572" postFractionAlong="0.3223248244694249"/>
    </electricalProjection>
    <electricalProjection id="NCXLS_M2R_M4_GJ" presynapticPopulation="M2R" postsynapticPopulation="M4">
      <electricalConnection id="152" preCell="0" postCell="0" synapse="Generic_GJ" preSegment="5" postSegment="2" preFractionAlong="0.07079143601117444" postFractionAlong="0.6603882523958254"/>
    </electricalProjection>
    <electricalProjection id="MuscleGJ_pm3L_pm3R" presynapticPopulation="pm3L" postsynapticPopulation="pm3R">
      <electricalConnection id="153" preCell="0" postCell="0" synapse="Generic_GJ" preSegment="2" postSegment="6" preFractionAlong="0.7475206367465048" postFractionAlong="0.8508527573220954"/>
    </electricalProjection>
    <electricalProjection id="MuscleGJ_pm4L_pm4R" presynapticPopulation="pm4L" postsynapticPopulation="pm4R">
      <electricalConnection id="154" preCell="0" postCell="0" synapse="Generic_GJ" preSegment="4" postSegment="1" preFractionAlong="0.019167887524977778" postFractionAlong="0.43198937146344085"/>
    </electricalProjection>
    <electricalProjection id="MuscleGJ_pm5L_pm5R" presynapticPopulation="pm5L" postsynapticPopulation="pm5R">
      <electricalConnection id="155" preCell="0" postCell="0" synapse="Generic_GJ" preSegment="5" postSegment="4" preFractionAlong="0.9539367525264087" postFractionAlong="0.2099180457480515"/>
    </electricalProjection>
    <electricalProjection id="MuscleGJ_pm6L_pm6R" presynapticPopulation="pm6L" postsynapticPopulation="pm6R">
      <electricalConnection id="156" preCell="0" postCell="0" synapse="Generic_GJ" preSegment="3" postSegment="7" preFractionAlong="0.17589028341866209" postFractionAlong="0.23538326189835757"/>
    </electricalProjection>
    <electricalProjection id="MuscleGJ_pm7L_pm7R" presynapticPopulation="pm7L" postsynapticPopulation="pm7R">
      <electricalConnection id="157" preCell="0" postCell="0" synapse="Generic_GJ" preSegment="1" postSegment="8" preFractionAlong="0.14424002111810352" postFractionAlong="0.7589768318540306"/>
    </electricalProjection>
    <electricalProjection id="MuscleGJ_pm4L_pm5L" presynapticPopulation="pm4L" postsynapticPopulation="pm5L">
      <electricalConnection id="158" preCell="0" postCell="0" synapse="Generic_GJ" preSegment="4" postSegment="8" preFractionAlong="0.14661455715984228" postFractionAlong="0.6459278930230393"/>
    </electricalProjection>
    <electricalProjection id="MuscleGJ_pm4R_pm5R" presynapticPopulation="pm4R" postsynapticPopulation="pm5R">
      <electricalConnection id="159" preCell="0" postCell="0" synapse="Generic_GJ" preSegment="6" postSegment="9" preFractionAlong="0.3507776230103121" postFractionAlong="0.8326937463494201"/>
    </electricalProjection>
    <electricalProjection id="MuscleGJ_pm5L_pm6L" presynapticPopulation="pm5L" postsynapticPopulation="pm6L">
      <electricalConnection id="160" preCell="0" postCell="0" synapse="Generic_GJ" preSegment="3" postSegment="4" preFractionAlong="0.44797165638218994" postFractionAlong="0.4054716763304185"/>
    </electricalProjection>
    <electricalProjection id="MuscleGJ_pm5R_pm6R" presynapticPopulation="pm5R" postsynapticPopulation="pm6R">
      <electricalConnection id="161" preCell="0" postCell="0" synapse="Generic_GJ" preSegment="2" postSegment="2" preFractionAlong="0.2948172383467669" postFractionAlong="0.3545482088286074"/>
    </electricalProjection>
    <electricalProjection id="MuscleGJ_pm6L_pm7L" presynapticPopulation="pm6L" postsynapticPopulation="pm7L">
      <electricalConnection id="162" preCell="0" postCell="0" synapse="Generic_GJ" preSegment="7" postSegment="7" preFractionAlong="0.25232274426374524" postFractionAlong="0.9152899403792739"/>
    </electricalProjection>
    <electricalProjection id="MuscleGJ_pm6R_pm7R" presynapticPopulation="pm6R" postsynapticPopulation="pm7R">
      <electricalConnection id="163" preCell="0" postCell="0" synapse="Generic_GJ" preSegment="7" postSegment="1" preFractionAlong="0.8958157315601947" postFractionAlong="0.10347506364658465"/>
    </electricalProjection>
  </network>
</neuroml>
