<?xml version='1.0' encoding='UTF-8'?>
<neuroml xmlns="http://www.neuroml.org/schema/neuroml2" xmlns:xsi="http://www.w3.org/2001/XMLSchema-instance" xsi:schemaLocation="http://www.neuroml.org/schema/neuroml2 https://raw.githubusercontent.com/NeuroML/NeuroML2/development/Schemas/NeuroML2/NeuroML_v2beta4.xsd" id="gvft_network_bio_prior_lamW_0_144_DF_0_019_t60_net">
  <notes>NeuroML2 network generated from GVFT simulation on 2025-05-04 14:45:36
</notes>
  <include href="AVAL.cell.nml"/>
  <include href="AVAR.cell.nml"/>
  <include href="AVKL.cell.nml"/>
  <include href="AVKR.cell.nml"/>
  <include href="RIS.cell.nml"/>
  <include href="RMDDL.cell.nml"/>
  <include href="RMDDR.cell.nml"/>
  <include href="RMDVL.cell.nml"/>
  <include href="RMDVR.cell.nml"/>
  <include href="SMBVL.cell.nml"/>
  <include href="SMBVR.cell.nml"/>
  <include href="URXL.cell.nml"/>
  <include href="URXR.cell.nml"/>
  <include href="I4.cell.nml"/>
  <include href="I1L.cell.nml"/>
  <include href="I1R.cell.nml"/>
  <include href="M2R.cell.nml"/>
  <include href="M4.cell.nml"/>
  <include href="I6.cell.nml"/>
  <include href="I2R.cell.nml"/>
  <include href="M3R.cell.nml"/>
  <include href="I5.cell.nml"/>
  <include href="MCR.cell.nml"/>
  <include href="M3L.cell.nml"/>
  <include href="MI.cell.nml"/>
  <include href="M1.cell.nml"/>
  <include href="MCL.cell.nml"/>
  <include href="I2L.cell.nml"/>
  <include href="M5.cell.nml"/>
  <include href="NSMR.cell.nml"/>
  <include href="M2L.cell.nml"/>
  <include href="NSML.cell.nml"/>
  <include href="I3.cell.nml"/>
  <include href="Generic_GJ.synapse.nml"/>
  <include href="Glutamate.synapse.nml"/>
  <include href="Acetylcholine.synapse.nml"/>
  <include href="Serotonin_Glutamate.synapse.nml"/>
  <network id="gvft_network_bio_prior_lamW_0_144_DF_0_019_t60_net" type="networkWithTemperature" temperature="20.0 degC">
    <population id="M1" component="M1" type="populationList" size="1">
      <instance id="0">
        <location x="-0.08542714" y="0.20603016" z="0.0"/>
      </instance>
    </population>
    <population id="M2L" component="M2L" type="populationList" size="1">
      <instance id="0">
        <location x="-0.9396985" y="-0.55778897" z="0.0"/>
      </instance>
    </population>
    <population id="M2R" component="M2R" type="populationList" size="1">
      <instance id="0">
        <location x="0.03517589" y="-0.80904526" z="0.0"/>
      </instance>
    </population>
    <population id="M3L" component="M3L" type="populationList" size="1">
      <instance id="0">
        <location x="-0.51758796" y="0.2964824" z="0.0"/>
      </instance>
    </population>
    <population id="M3R" component="M3R" type="populationList" size="1">
      <instance id="0">
        <location x="-0.18592966" y="-0.18592966" z="0.0"/>
      </instance>
    </population>
    <population id="M4" component="M4" type="populationList" size="1">
      <instance id="0">
        <location x="-0.14572865" y="-0.28643218" z="0.0"/>
      </instance>
    </population>
    <population id="M5" component="M5" type="populationList" size="1">
      <instance id="0">
        <location x="0.26633167" y="0.065326646" z="0.0"/>
      </instance>
    </population>
    <population id="I1L" component="I1L" type="populationList" size="1">
      <instance id="0">
        <location x="-0.8994975" y="-0.0050251363" z="0.0"/>
      </instance>
    </population>
    <population id="I1R" component="I1R" type="populationList" size="1">
      <instance id="0">
        <location x="0.65829146" y="0.28643218" z="0.0"/>
      </instance>
    </population>
    <population id="I2L" component="I2L" type="populationList" size="1">
      <instance id="0">
        <location x="0.9296482" y="-0.79899496" z="0.0"/>
      </instance>
    </population>
    <population id="I2R" component="I2R" type="populationList" size="1">
      <instance id="0">
        <location x="-0.26633167" y="-0.30653268" z="0.0"/>
      </instance>
    </population>
    <population id="I3" component="I3" type="populationList" size="1">
      <instance id="0">
        <location x="0.055276394" y="-0.72864324" z="0.0"/>
      </instance>
    </population>
    <population id="I4" component="I4" type="populationList" size="1">
      <instance id="0">
        <location x="-0.28643218" y="-0.65829146" z="0.0"/>
      </instance>
    </population>
    <population id="I5" component="I5" type="populationList" size="1">
      <instance id="0">
        <location x="0.51758796" y="0.72864324" z="0.0"/>
      </instance>
    </population>
    <population id="I6" component="I6" type="populationList" size="1">
      <instance id="0">
        <location x="0.28643218" y="-0.0050251363" z="0.0"/>
      </instance>
    </population>
    <population id="MCL" component="MCL" type="populationList" size="1">
      <instance id="0">
        <location x="0.18592966" y="0.5879397" z="0.0"/>
      </instance>
    </population>
    <population id="MCR" component="MCR" type="populationList" size="1">
      <instance id="0">
        <location x="-0.14572865" y="0.7085427" z="0.0"/>
      </instance>
    </population>
    <population id="MI" component="MI" type="populationList" size="1">
      <instance id="0">
        <location x="0.24623117" y="-0.0050251363" z="0.0"/>
      </instance>
    </population>
    <population id="NSML" component="NSML" type="populationList" size="1">
      <instance id="0">
        <location x="-0.33668342" y="0.55778897" z="0.0"/>
      </instance>
    </population>
    <population id="NSMR" component="NSMR" type="populationList" size="1">
      <instance id="0">
        <location x="0.0050251363" y="-0.65829146" z="0.0"/>
      </instance>
    </population>
    <population id="AVAL" component="AVAL" type="populationList" size="1">
      <instance id="0">
        <location x="5.0" y="0.0" z="0.0"/>
      </instance>
    </population>
    <population id="AVAR" component="AVAR" type="populationList" size="1">
      <instance id="0">
        <location x="5.0" y="0.0" z="0.0"/>
      </instance>
    </population>
    <population id="AVKL" component="AVKL" type="populationList" size="1">
      <instance id="0">
        <location x="5.0" y="0.0" z="0.0"/>
      </instance>
    </population>
    <population id="AVKR" component="AVKR" type="populationList" size="1">
      <instance id="0">
        <location x="5.0" y="0.0" z="0.0"/>
      </instance>
    </population>
    <population id="RIS" component="RIS" type="populationList" size="1">
      <instance id="0">
        <location x="5.0" y="0.0" z="0.0"/>
      </instance>
    </population>
    <population id="RMDDL" component="RMDDL" type="populationList" size="1">
      <instance id="0">
        <location x="5.0" y="0.0" z="0.0"/>
      </instance>
    </population>
    <population id="RMDDR" component="RMDDR" type="populationList" size="1">
      <instance id="0">
        <location x="5.0" y="0.0" z="0.0"/>
      </instance>
    </population>
    <population id="RMDVL" component="RMDVL" type="populationList" size="1">
      <instance id="0">
        <location x="5.0" y="0.0" z="0.0"/>
      </instance>
    </population>
    <population id="RMDVR" component="RMDVR" type="populationList" size="1">
      <instance id="0">
        <location x="5.0" y="0.0" z="0.0"/>
      </instance>
    </population>
    <population id="SMBVL" component="SMBVL" type="populationList" size="1">
      <instance id="0">
        <location x="5.0" y="0.0" z="0.0"/>
      </instance>
    </population>
    <population id="SMBVR" component="SMBVR" type="populationList" size="1">
      <instance id="0">
        <location x="5.0" y="0.0" z="0.0"/>
      </instance>
    </population>
    <population id="URXL" component="URXL" type="populationList" size="1">
      <instance id="0">
        <location x="5.0" y="0.0" z="0.0"/>
      </instance>
    </population>
    <population id="URXR" component="URXR" type="populationList" size="1">
      <instance id="0">
        <location x="5.0" y="0.0" z="0.0"/>
      </instance>
    </population>
    <electricalProjection id="NCXLS_M2L_M3L_GJ" presynapticPopulation="M2L" postsynapticPopulation="M3L">
      <electricalConnection id="0" preCell="0" postCell="0" synapse="Generic_GJ" preSegment="8" postSegment="9" preFractionAlong="0.956614621083458" postFractionAlong="0.06895801635642118"/>
    </electricalProjection>
    <electricalProjection id="NCXLS_M2L_M5_GJ" presynapticPopulation="M2L" postsynapticPopulation="M5">
      <electricalConnection id="1" preCell="0" postCell="0" synapse="Generic_GJ" preSegment="6" postSegment="7" preFractionAlong="0.24697879907199982" postFractionAlong="0.9062545805210367"/>
    </electricalProjection>
    <electricalProjection id="NCXLS_M3L_M2R_GJ" presynapticPopulation="M3L" postsynapticPopulation="M2R">
      <electricalConnection id="2" preCell="0" postCell="0" synapse="Generic_GJ" preSegment="8" postSegment="6" preFractionAlong="0.4288868788610386" postFractionAlong="0.8447894362860214"/>
    </electricalProjection>
    <electricalProjection id="NCXLS_M3R_M2L_GJ" presynapticPopulation="M3R" postsynapticPopulation="M2L">
      <electricalConnection id="3" preCell="0" postCell="0" synapse="Generic_GJ" preSegment="6" postSegment="9" preFractionAlong="0.4875711936733843" postFractionAlong="0.03361360018328263"/>
    </electricalProjection>
    <electricalProjection id="NCXLS_M3R_M3L_GJ" presynapticPopulation="M3R" postsynapticPopulation="M3L">
      <electricalConnection id="4" preCell="0" postCell="0" synapse="Generic_GJ" preSegment="4" postSegment="2" preFractionAlong="0.906437453344411" postFractionAlong="0.13924537111759516"/>
    </electricalProjection>
    <electricalProjection id="NCXLS_M5_M2R_GJ" presynapticPopulation="M5" postsynapticPopulation="M2R">
      <electricalConnection id="5" preCell="0" postCell="0" synapse="Generic_GJ" preSegment="4" postSegment="2" preFractionAlong="0.41109560260070654" postFractionAlong="0.3473433262588427"/>
    </electricalProjection>
    <electricalProjection id="NCXLS_M4_M2R_GJ" presynapticPopulation="M4" postsynapticPopulation="M2R">
      <electricalConnection id="6" preCell="0" postCell="0" synapse="Generic_GJ" preSegment="2" postSegment="8" preFractionAlong="0.5483205837264242" postFractionAlong="0.1279882085335864"/>
    </electricalProjection>
    <projection id="NCXLS_M2L_I1R" presynapticPopulation="M2L" postsynapticPopulation="I1R" synapse="Acetylcholine">
      <connection id="7" preCellId="../M2L/0/M2L" postCellId="../I1R/0/I1R" preSegmentId="7" postSegmentId="5" preFractionAlong="0.05225787928602377" postFractionAlong="0.4187933190741614"/>
    </projection>
    <projection id="NCXLS_M2L_MCL" presynapticPopulation="M2L" postsynapticPopulation="MCL" synapse="Acetylcholine">
      <connection id="8" preCellId="../M2L/0/M2L" postCellId="../MCL/0/MCL" preSegmentId="9" postSegmentId="5" preFractionAlong="0.9812970904972467" postFractionAlong="0.2565300624442478"/>
    </projection>
    <projection id="NCXLS_M2L_MI" presynapticPopulation="M2L" postsynapticPopulation="MI" synapse="Acetylcholine">
      <connection id="9" preCellId="../M2L/0/M2L" postCellId="../MI/0/MI" preSegmentId="3" postSegmentId="7" preFractionAlong="0.19809763275974013" postFractionAlong="0.5653302545716099"/>
    </projection>
    <projection id="NCXLS_M2L_M3R" presynapticPopulation="M2L" postsynapticPopulation="M3R" synapse="Glutamate">
      <connection id="10" preCellId="../M2L/0/M2L" postCellId="../M3R/0/M3R" preSegmentId="3" postSegmentId="3" preFractionAlong="0.9720053296315371" postFractionAlong="0.6085272726964666"/>
    </projection>
    <projection id="NCXLS_M2L_I2R" presynapticPopulation="M2L" postsynapticPopulation="I2R" synapse="Acetylcholine">
      <connection id="11" preCellId="../M2L/0/M2L" postCellId="../I2R/0/I2R" preSegmentId="9" postSegmentId="9" preFractionAlong="0.022035160297504186" postFractionAlong="0.7200080396631131"/>
    </projection>
    <projection id="NCXLS_M2L_I5" presynapticPopulation="M2L" postsynapticPopulation="I5" synapse="Acetylcholine">
      <connection id="12" preCellId="../M2L/0/M2L" postCellId="../I5/0/I5" preSegmentId="9" postSegmentId="7" preFractionAlong="0.6837541055770425" postFractionAlong="0.5451055282606997"/>
    </projection>
    <projection id="NCXLS_M2L_NSML" presynapticPopulation="M2L" postsynapticPopulation="NSML" synapse="Acetylcholine">
      <connection id="13" preCellId="../M2L/0/M2L" postCellId="../NSML/0/NSML" preSegmentId="8" postSegmentId="2" preFractionAlong="0.40397787632654825" postFractionAlong="0.5425458033954229"/>
    </projection>
    <projection id="NCXLS_M2L_I6" presynapticPopulation="M2L" postsynapticPopulation="I6" synapse="Acetylcholine">
      <connection id="14" preCellId="../M2L/0/M2L" postCellId="../I6/0/I6" preSegmentId="7" postSegmentId="6" preFractionAlong="0.5488386567200587" postFractionAlong="0.6129001608619492"/>
    </projection>
    <projection id="NCXLS_M2L_I1L" presynapticPopulation="M2L" postsynapticPopulation="I1L" synapse="Acetylcholine">
      <connection id="15" preCellId="../M2L/0/M2L" postCellId="../I1L/0/I1L" preSegmentId="6" postSegmentId="2" preFractionAlong="0.484696287130047" postFractionAlong="0.16577454016327575"/>
    </projection>
    <projection id="NCXLS_M2L_MCR" presynapticPopulation="M2L" postsynapticPopulation="MCR" synapse="Acetylcholine">
      <connection id="16" preCellId="../M2L/0/M2L" postCellId="../MCR/0/MCR" preSegmentId="2" postSegmentId="6" preFractionAlong="0.8499753714806619" postFractionAlong="0.6690223373291083"/>
    </projection>
    <projection id="NCXLS_M2L_M4" presynapticPopulation="M2L" postsynapticPopulation="M4" synapse="Acetylcholine">
      <connection id="17" preCellId="../M2L/0/M2L" postCellId="../M4/0/M4" preSegmentId="2" postSegmentId="3" preFractionAlong="0.6509734671509542" postFractionAlong="0.5454318694069055"/>
    </projection>
    <projection id="NCXLS_M2L_M1" presynapticPopulation="M2L" postsynapticPopulation="M1" synapse="Acetylcholine">
      <connection id="18" preCellId="../M2L/0/M2L" postCellId="../M1/0/M1" preSegmentId="8" postSegmentId="8" preFractionAlong="0.11193592702153032" postFractionAlong="0.3559733737948527"/>
    </projection>
    <projection id="NCXLS_I1R_I2L" presynapticPopulation="I1R" postsynapticPopulation="I2L" synapse="Acetylcholine">
      <connection id="19" preCellId="../I1R/0/I1R" postCellId="../I2L/0/I2L" preSegmentId="3" postSegmentId="3" preFractionAlong="0.7862781993840331" postFractionAlong="0.2013637821359744"/>
    </projection>
    <projection id="NCXLS_MCL_I1R" presynapticPopulation="MCL" postsynapticPopulation="I1R" synapse="Acetylcholine">
      <connection id="20" preCellId="../MCL/0/MCL" postCellId="../I1R/0/I1R" preSegmentId="7" postSegmentId="5" preFractionAlong="0.1647063534322959" postFractionAlong="0.33021506487149754"/>
    </projection>
    <projection id="NCXLS_MCL_I5" presynapticPopulation="MCL" postsynapticPopulation="I5" synapse="Acetylcholine">
      <connection id="21" preCellId="../MCL/0/MCL" postCellId="../I5/0/I5" preSegmentId="4" postSegmentId="6" preFractionAlong="0.01794567856849183" postFractionAlong="0.12625378279261346"/>
    </projection>
    <projection id="NCXLS_MI_I1R" presynapticPopulation="MI" postsynapticPopulation="I1R" synapse="Glutamate">
      <connection id="22" preCellId="../MI/0/MI" postCellId="../I1R/0/I1R" preSegmentId="6" postSegmentId="4" preFractionAlong="0.8705784250460069" postFractionAlong="0.23879621138153928"/>
    </projection>
    <projection id="NCXLS_MI_I2L" presynapticPopulation="MI" postsynapticPopulation="I2L" synapse="Glutamate">
      <connection id="23" preCellId="../MI/0/MI" postCellId="../I2L/0/I2L" preSegmentId="9" postSegmentId="8" preFractionAlong="0.9849896561408751" postFractionAlong="0.7720124763099904"/>
    </projection>
    <projection id="NCXLS_MI_I5" presynapticPopulation="MI" postsynapticPopulation="I5" synapse="Acetylcholine">
      <connection id="24" preCellId="../MI/0/MI" postCellId="../I5/0/I5" preSegmentId="2" postSegmentId="9" preFractionAlong="0.0941519101256979" postFractionAlong="0.34366319260910305"/>
    </projection>
    <projection id="NCXLS_MI_I6" presynapticPopulation="MI" postsynapticPopulation="I6" synapse="Acetylcholine">
      <connection id="25" preCellId="../MI/0/MI" postCellId="../I6/0/I6" preSegmentId="1" postSegmentId="4" preFractionAlong="0.7983441882243283" postFractionAlong="0.37193266791686486"/>
    </projection>
    <projection id="NCXLS_MI_M5" presynapticPopulation="MI" postsynapticPopulation="M5" synapse="Serotonin_Glutamate">
      <connection id="26" preCellId="../MI/0/MI" postCellId="../M5/0/M5" preSegmentId="7" postSegmentId="9" preFractionAlong="0.3973813904853165" postFractionAlong="0.0934079719752956"/>
    </projection>
    <projection id="NCXLS_M3L_M2L" presynapticPopulation="M3L" postsynapticPopulation="M2L" synapse="Glutamate">
      <connection id="27" preCellId="../M3L/0/M3L" postCellId="../M2L/0/M2L" preSegmentId="5" postSegmentId="3" preFractionAlong="0.19560927304451503" postFractionAlong="0.18672329577304148"/>
    </projection>
    <projection id="NCXLS_M3L_I4" presynapticPopulation="M3L" postsynapticPopulation="I4" synapse="Acetylcholine">
      <connection id="28" preCellId="../M3L/0/M3L" postCellId="../I4/0/I4" preSegmentId="8" postSegmentId="8" preFractionAlong="0.35667097414176474" postFractionAlong="0.7574818847894174"/>
    </projection>
    <projection id="NCXLS_M3L_I3" presynapticPopulation="M3L" postsynapticPopulation="I3" synapse="Acetylcholine">
      <connection id="29" preCellId="../M3L/0/M3L" postCellId="../I3/0/I3" preSegmentId="5" postSegmentId="5" preFractionAlong="0.31234910188551357" postFractionAlong="0.6426746576724236"/>
    </projection>
    <projection id="NCXLS_M3L_I2R" presynapticPopulation="M3L" postsynapticPopulation="I2R" synapse="Acetylcholine">
      <connection id="30" preCellId="../M3L/0/M3L" postCellId="../I2R/0/I2R" preSegmentId="8" postSegmentId="2" preFractionAlong="0.157954822835348" postFractionAlong="0.6958991181688025"/>
    </projection>
    <projection id="NCXLS_M3L_I1L" presynapticPopulation="M3L" postsynapticPopulation="I1L" synapse="Acetylcholine">
      <connection id="31" preCellId="../M3L/0/M3L" postCellId="../I1L/0/I1L" preSegmentId="2" postSegmentId="7" preFractionAlong="0.6134731386391763" postFractionAlong="0.36310073663401043"/>
    </projection>
    <projection id="NCXLS_M3L_NSMR" presynapticPopulation="M3L" postsynapticPopulation="NSMR" synapse="Acetylcholine">
      <connection id="32" preCellId="../M3L/0/M3L" postCellId="../NSMR/0/NSMR" preSegmentId="2" postSegmentId="8" preFractionAlong="0.507051103865441" postFractionAlong="0.598112629369018"/>
    </projection>
    <projection id="NCXLS_M3L_M4" presynapticPopulation="M3L" postsynapticPopulation="M4" synapse="Glutamate">
      <connection id="33" preCellId="../M3L/0/M3L" postCellId="../M4/0/M4" preSegmentId="7" postSegmentId="8" preFractionAlong="0.8939897100078704" postFractionAlong="0.6542925523249619"/>
    </projection>
    <projection id="NCXLS_M3R_I4" presynapticPopulation="M3R" postsynapticPopulation="I4" synapse="Acetylcholine">
      <connection id="34" preCellId="../M3R/0/M3R" postCellId="../I4/0/I4" preSegmentId="5" postSegmentId="4" preFractionAlong="0.7985932723827512" postFractionAlong="0.9677558771033888"/>
    </projection>
    <projection id="NCXLS_M3R_I2R" presynapticPopulation="M3R" postsynapticPopulation="I2R" synapse="Acetylcholine">
      <connection id="35" preCellId="../M3R/0/M3R" postCellId="../I2R/0/I2R" preSegmentId="3" postSegmentId="9" preFractionAlong="0.8036035354415352" postFractionAlong="0.5052067735766382"/>
    </projection>
    <projection id="NCXLS_M3R_NSML" presynapticPopulation="M3R" postsynapticPopulation="NSML" synapse="Acetylcholine">
      <connection id="36" preCellId="../M3R/0/M3R" postCellId="../NSML/0/NSML" preSegmentId="1" postSegmentId="7" preFractionAlong="0.12243389835894103" postFractionAlong="0.7251855480273908"/>
    </projection>
    <projection id="NCXLS_M3R_I1L" presynapticPopulation="M3R" postsynapticPopulation="I1L" synapse="Acetylcholine">
      <connection id="37" preCellId="../M3R/0/M3R" postCellId="../I1L/0/I1L" preSegmentId="2" postSegmentId="4" preFractionAlong="0.9970781570816617" postFractionAlong="0.9797824578545219"/>
    </projection>
    <projection id="NCXLS_I1L_M2L" presynapticPopulation="I1L" postsynapticPopulation="M2L" synapse="Acetylcholine">
      <connection id="38" preCellId="../I1L/0/I1L" postCellId="../M2L/0/M2L" preSegmentId="7" postSegmentId="5" preFractionAlong="0.5597556836383826" postFractionAlong="0.5273996221226763"/>
    </projection>
    <projection id="NCXLS_M2R_I1R" presynapticPopulation="M2R" postsynapticPopulation="I1R" synapse="Acetylcholine">
      <connection id="39" preCellId="../M2R/0/M2R" postCellId="../I1R/0/I1R" preSegmentId="9" postSegmentId="4" preFractionAlong="0.8902580530178021" postFractionAlong="0.07940658464302952"/>
    </projection>
    <projection id="NCXLS_M2R_I2L" presynapticPopulation="M2R" postsynapticPopulation="I2L" synapse="Acetylcholine">
      <connection id="40" preCellId="../M2R/0/M2R" postCellId="../I2L/0/I2L" preSegmentId="5" postSegmentId="3" preFractionAlong="0.18741194409758222" postFractionAlong="0.858177053157164"/>
    </projection>
    <projection id="NCXLS_M2R_MCL" presynapticPopulation="M2R" postsynapticPopulation="MCL" synapse="Acetylcholine">
      <connection id="41" preCellId="../M2R/0/M2R" postCellId="../MCL/0/MCL" preSegmentId="4" postSegmentId="6" preFractionAlong="0.5407937549855444" postFractionAlong="0.7102427986233115"/>
    </projection>
    <projection id="NCXLS_M2R_MI" presynapticPopulation="M2R" postsynapticPopulation="MI" synapse="Acetylcholine">
      <connection id="42" preCellId="../M2R/0/M2R" postCellId="../MI/0/MI" preSegmentId="9" postSegmentId="2" preFractionAlong="0.8216368977104717" postFractionAlong="0.4592651971732139"/>
    </projection>
    <projection id="NCXLS_M2R_I3" presynapticPopulation="M2R" postsynapticPopulation="I3" synapse="Acetylcholine">
      <connection id="43" preCellId="../M2R/0/M2R" postCellId="../I3/0/I3" preSegmentId="5" postSegmentId="8" preFractionAlong="0.4942124472502999" postFractionAlong="0.8282492524372184"/>
    </projection>
    <projection id="NCXLS_M2R_I5" presynapticPopulation="M2R" postsynapticPopulation="I5" synapse="Acetylcholine">
      <connection id="44" preCellId="../M2R/0/M2R" postCellId="../I5/0/I5" preSegmentId="5" postSegmentId="8" preFractionAlong="0.08717946783183117" postFractionAlong="0.7190774473538556"/>
    </projection>
    <projection id="NCXLS_M2R_I6" presynapticPopulation="M2R" postsynapticPopulation="I6" synapse="Acetylcholine">
      <connection id="45" preCellId="../M2R/0/M2R" postCellId="../I6/0/I6" preSegmentId="3" postSegmentId="4" preFractionAlong="0.9053598742778703" postFractionAlong="0.7396713007267637"/>
    </projection>
    <projection id="NCXLS_M2R_MCR" presynapticPopulation="M2R" postsynapticPopulation="MCR" synapse="Acetylcholine">
      <connection id="46" preCellId="../M2R/0/M2R" postCellId="../MCR/0/MCR" preSegmentId="2" postSegmentId="9" preFractionAlong="0.43550545439815935" postFractionAlong="0.5772497307686131"/>
    </projection>
    <projection id="NCXLS_M2R_NSMR" presynapticPopulation="M2R" postsynapticPopulation="NSMR" synapse="Acetylcholine">
      <connection id="47" preCellId="../M2R/0/M2R" postCellId="../NSMR/0/NSMR" preSegmentId="1" postSegmentId="5" preFractionAlong="0.8061958810037908" postFractionAlong="0.8437373264067243"/>
    </projection>
    <projection id="NCXLS_M2R_M5" presynapticPopulation="M2R" postsynapticPopulation="M5" synapse="Glutamate">
      <connection id="48" preCellId="../M2R/0/M2R" postCellId="../M5/0/M5" preSegmentId="3" postSegmentId="1" preFractionAlong="0.12626474156450274" postFractionAlong="0.676177562075434"/>
    </projection>
    <projection id="NCXLS_M2R_M1" presynapticPopulation="M2R" postsynapticPopulation="M1" synapse="Glutamate">
      <connection id="49" preCellId="../M2R/0/M2R" postCellId="../M1/0/M1" preSegmentId="2" postSegmentId="3" preFractionAlong="0.6863271966860974" postFractionAlong="0.06964114816240574"/>
    </projection>
    <projection id="NCXLS_MCR_NSML" presynapticPopulation="MCR" postsynapticPopulation="NSML" synapse="Acetylcholine">
      <connection id="50" preCellId="../MCR/0/MCR" postCellId="../NSML/0/NSML" preSegmentId="7" postSegmentId="6" preFractionAlong="0.8557372589057863" postFractionAlong="0.2271795570235149"/>
    </projection>
    <projection id="NCXLS_MCR_I1L" presynapticPopulation="MCR" postsynapticPopulation="I1L" synapse="Acetylcholine">
      <connection id="51" preCellId="../MCR/0/MCR" postCellId="../I1L/0/I1L" preSegmentId="8" postSegmentId="7" preFractionAlong="0.27927608845441043" postFractionAlong="0.6428819100587077"/>
    </projection>
    <projection id="NCXLS_M5_I1R" presynapticPopulation="M5" postsynapticPopulation="I1R" synapse="Acetylcholine">
      <connection id="52" preCellId="../M5/0/M5" postCellId="../I1R/0/I1R" preSegmentId="4" postSegmentId="9" preFractionAlong="0.21552986879133185" postFractionAlong="0.36037781993034756"/>
    </projection>
    <projection id="NCXLS_M5_I2L" presynapticPopulation="M5" postsynapticPopulation="I2L" synapse="Acetylcholine">
      <connection id="53" preCellId="../M5/0/M5" postCellId="../I2L/0/I2L" preSegmentId="5" postSegmentId="3" preFractionAlong="0.7631552912588894" postFractionAlong="0.4083063427594511"/>
    </projection>
    <projection id="NCXLS_M5_MI" presynapticPopulation="M5" postsynapticPopulation="MI" synapse="Acetylcholine">
      <connection id="54" preCellId="../M5/0/M5" postCellId="../MI/0/MI" preSegmentId="4" postSegmentId="4" preFractionAlong="0.871204482263052" postFractionAlong="0.7660647765353026"/>
    </projection>
    <projection id="NCXLS_M5_I3" presynapticPopulation="M5" postsynapticPopulation="I3" synapse="Acetylcholine">
      <connection id="55" preCellId="../M5/0/M5" postCellId="../I3/0/I3" preSegmentId="3" postSegmentId="2" preFractionAlong="0.6507685475587474" postFractionAlong="0.8742267241383516"/>
    </projection>
    <projection id="NCXLS_M5_I6" presynapticPopulation="M5" postsynapticPopulation="I6" synapse="Acetylcholine">
      <connection id="56" preCellId="../M5/0/M5" postCellId="../I6/0/I6" preSegmentId="7" postSegmentId="2" preFractionAlong="0.4470555438064254" postFractionAlong="0.4603582712019263"/>
    </projection>
    <projection id="NCXLS_M4_M2L" presynapticPopulation="M4" postsynapticPopulation="M2L" synapse="Acetylcholine">
      <connection id="57" preCellId="../M4/0/M4" postCellId="../M2L/0/M2L" preSegmentId="4" postSegmentId="5" preFractionAlong="0.5466482201877885" postFractionAlong="0.38040054897040965"/>
    </projection>
    <projection id="NCXLS_M4_I4" presynapticPopulation="M4" postsynapticPopulation="I4" synapse="Acetylcholine">
      <connection id="58" preCellId="../M4/0/M4" postCellId="../I4/0/I4" preSegmentId="4" postSegmentId="1" preFractionAlong="0.04202467517140529" postFractionAlong="0.7399041207669304"/>
    </projection>
    <projection id="NCXLS_M4_I3" presynapticPopulation="M4" postsynapticPopulation="I3" synapse="Acetylcholine">
      <connection id="59" preCellId="../M4/0/M4" postCellId="../I3/0/I3" preSegmentId="6" postSegmentId="7" preFractionAlong="0.12745395942286897" postFractionAlong="0.7076883263306187"/>
    </projection>
    <projection id="NCXLS_M4_I2R" presynapticPopulation="M4" postsynapticPopulation="I2R" synapse="Acetylcholine">
      <connection id="60" preCellId="../M4/0/M4" postCellId="../I2R/0/I2R" preSegmentId="3" postSegmentId="3" preFractionAlong="0.7539619035967839" postFractionAlong="0.8049067768414386"/>
    </projection>
    <projection id="NCXLS_M4_I1L" presynapticPopulation="M4" postsynapticPopulation="I1L" synapse="Acetylcholine">
      <connection id="61" preCellId="../M4/0/M4" postCellId="../I1L/0/I1L" preSegmentId="4" postSegmentId="7" preFractionAlong="0.6213444972535296" postFractionAlong="0.5591848068293265"/>
    </projection>
    <projection id="NCXLS_M4_NSMR" presynapticPopulation="M4" postsynapticPopulation="NSMR" synapse="Acetylcholine">
      <connection id="62" preCellId="../M4/0/M4" postCellId="../NSMR/0/NSMR" preSegmentId="7" postSegmentId="9" preFractionAlong="0.28152119841492995" postFractionAlong="0.872753839566128"/>
    </projection>
    <projection id="NCXLS_M1_M2L" presynapticPopulation="M1" postsynapticPopulation="M2L" synapse="Glutamate">
      <connection id="63" preCellId="../M1/0/M1" postCellId="../M2L/0/M2L" preSegmentId="8" postSegmentId="6" preFractionAlong="0.12024722651167563" postFractionAlong="0.0683409355322604"/>
    </projection>
    <projection id="NCXLS_M1_I2L" presynapticPopulation="M1" postsynapticPopulation="I2L" synapse="Acetylcholine">
      <connection id="64" preCellId="../M1/0/M1" postCellId="../I2L/0/I2L" preSegmentId="1" postSegmentId="9" preFractionAlong="0.01240403627731479" postFractionAlong="0.46876796546450583"/>
    </projection>
    <projection id="NCXLS_M1_I4" presynapticPopulation="M1" postsynapticPopulation="I4" synapse="Acetylcholine">
      <connection id="65" preCellId="../M1/0/M1" postCellId="../I4/0/I4" preSegmentId="9" postSegmentId="5" preFractionAlong="0.2972378077086172" postFractionAlong="0.2999191115069847"/>
    </projection>
    <projection id="NCXLS_M1_MI" presynapticPopulation="M1" postsynapticPopulation="MI" synapse="Acetylcholine">
      <connection id="66" preCellId="../M1/0/M1" postCellId="../MI/0/MI" preSegmentId="9" postSegmentId="4" preFractionAlong="0.06449127124916754" postFractionAlong="0.8772394571622004"/>
    </projection>
    <projection id="NCXLS_M1_M3L" presynapticPopulation="M1" postsynapticPopulation="M3L" synapse="Acetylcholine">
      <connection id="67" preCellId="../M1/0/M1" postCellId="../M3L/0/M3L" preSegmentId="2" postSegmentId="9" preFractionAlong="0.33040800387577385" postFractionAlong="0.3404058433495647"/>
    </projection>
    <projection id="NCXLS_M1_I3" presynapticPopulation="M1" postsynapticPopulation="I3" synapse="Acetylcholine">
      <connection id="68" preCellId="../M1/0/M1" postCellId="../I3/0/I3" preSegmentId="8" postSegmentId="7" preFractionAlong="0.5313165205680591" postFractionAlong="0.8381521835519244"/>
    </projection>
    <projection id="NCXLS_M1_M3R" presynapticPopulation="M1" postsynapticPopulation="M3R" synapse="Acetylcholine">
      <connection id="69" preCellId="../M1/0/M1" postCellId="../M3R/0/M3R" preSegmentId="3" postSegmentId="2" preFractionAlong="0.573349345635218" postFractionAlong="0.6588250701400705"/>
    </projection>
    <projection id="NCXLS_M1_I2R" presynapticPopulation="M1" postsynapticPopulation="I2R" synapse="Acetylcholine">
      <connection id="70" preCellId="../M1/0/M1" postCellId="../I2R/0/I2R" preSegmentId="4" postSegmentId="5" preFractionAlong="0.5989785081772105" postFractionAlong="0.11493299705956683"/>
    </projection>
    <projection id="NCXLS_M1_I1L" presynapticPopulation="M1" postsynapticPopulation="I1L" synapse="Acetylcholine">
      <connection id="71" preCellId="../M1/0/M1" postCellId="../I1L/0/I1L" preSegmentId="9" postSegmentId="9" preFractionAlong="0.6692002629380784" postFractionAlong="0.8292867993167555"/>
    </projection>
    <projection id="NCXLS_M1_M2R" presynapticPopulation="M1" postsynapticPopulation="M2R" synapse="Glutamate">
      <connection id="72" preCellId="../M1/0/M1" postCellId="../M2R/0/M2R" preSegmentId="8" postSegmentId="1" preFractionAlong="0.025141958277272725" postFractionAlong="0.6944504561307088"/>
    </projection>
    <projection id="NCXLS_M1_NSMR" presynapticPopulation="M1" postsynapticPopulation="NSMR" synapse="Acetylcholine">
      <connection id="73" preCellId="../M1/0/M1" postCellId="../NSMR/0/NSMR" preSegmentId="8" postSegmentId="6" preFractionAlong="0.43459596085871177" postFractionAlong="0.7738796557301564"/>
    </projection>
    <projection id="NCXLS_M1_M4" presynapticPopulation="M1" postsynapticPopulation="M4" synapse="Glutamate">
      <connection id="74" preCellId="../M1/0/M1" postCellId="../M4/0/M4" preSegmentId="9" postSegmentId="3" preFractionAlong="0.8925232899548461" postFractionAlong="0.4433800143791877"/>
    </projection>
    <projection id="NC_I1L_RMDDL" presynapticPopulation="I1L" postsynapticPopulation="RMDDL" synapse="Acetylcholine">
      <connection id="75" preCellId="../I1L/0/I1L" postCellId="../RMDDL/0/RMDDL" preSegmentId="8" postSegmentId="5" preFractionAlong="0.6313075530919887" postFractionAlong="0.5916971623063255"/>
    </projection>
    <projection id="NC_I1L_RMDVL" presynapticPopulation="I1L" postsynapticPopulation="RMDVL" synapse="Acetylcholine">
      <connection id="76" preCellId="../I1L/0/I1L" postCellId="../RMDVL/0/RMDVL" preSegmentId="3" postSegmentId="4" preFractionAlong="0.6764263623383923" postFractionAlong="0.13169343847203852"/>
    </projection>
    <projection id="NC_I1R_RMDDR" presynapticPopulation="I1R" postsynapticPopulation="RMDDR" synapse="Acetylcholine">
      <connection id="77" preCellId="../I1R/0/I1R" postCellId="../RMDDR/0/RMDDR" preSegmentId="4" postSegmentId="6" preFractionAlong="0.7867503351544369" postFractionAlong="0.970766206474783"/>
    </projection>
    <projection id="NC_I1R_RMDVR" presynapticPopulation="I1R" postsynapticPopulation="RMDVR" synapse="Acetylcholine">
      <connection id="78" preCellId="../I1R/0/I1R" postCellId="../RMDVR/0/RMDVR" preSegmentId="2" postSegmentId="8" preFractionAlong="0.6006510665483559" postFractionAlong="0.7435939161765598"/>
    </projection>
    <projection id="NC_I2L_URXL" presynapticPopulation="I2L" postsynapticPopulation="URXL" synapse="Glutamate">
      <connection id="79" preCellId="../I2L/0/I2L" postCellId="../URXL/0/URXL" preSegmentId="1" postSegmentId="8" preFractionAlong="0.6341040313763313" postFractionAlong="0.07093221613377343"/>
    </projection>
    <projection id="NC_I2R_URXR" presynapticPopulation="I2R" postsynapticPopulation="URXR" synapse="Glutamate">
      <connection id="80" preCellId="../I2R/0/I2R" postCellId="../URXR/0/URXR" preSegmentId="9" postSegmentId="2" preFractionAlong="0.3618530932051387" postFractionAlong="0.47249335500651357"/>
    </projection>
    <projection id="NC_AVKL_I1L" presynapticPopulation="AVKL" postsynapticPopulation="I1L" synapse="Acetylcholine">
      <connection id="81" preCellId="../AVKL/0/AVKL" postCellId="../I1L/0/I1L" preSegmentId="8" postSegmentId="3" preFractionAlong="0.2768143077913058" postFractionAlong="0.9715326909010507"/>
    </projection>
    <projection id="NC_AVKR_I1R" presynapticPopulation="AVKR" postsynapticPopulation="I1R" synapse="Acetylcholine">
      <connection id="82" preCellId="../AVKR/0/AVKR" postCellId="../I1R/0/I1R" preSegmentId="1" postSegmentId="3" preFractionAlong="0.19609771273839294" postFractionAlong="0.6107800710757683"/>
    </projection>
    <projection id="NC_RIS_I1L" presynapticPopulation="RIS" postsynapticPopulation="I1L" synapse="Glutamate">
      <connection id="83" preCellId="../RIS/0/RIS" postCellId="../I1L/0/I1L" preSegmentId="4" postSegmentId="8" preFractionAlong="0.5908674412710415" postFractionAlong="0.5370074883513584"/>
    </projection>
    <projection id="NC_RIS_I1R" presynapticPopulation="RIS" postsynapticPopulation="I1R" synapse="Glutamate">
      <connection id="84" preCellId="../RIS/0/RIS" postCellId="../I1R/0/I1R" preSegmentId="1" postSegmentId="1" preFractionAlong="0.21906880910185778" postFractionAlong="0.03672136250082114"/>
    </projection>
    <projection id="NC_AVAL_I2L" presynapticPopulation="AVAL" postsynapticPopulation="I2L" synapse="Acetylcholine">
      <connection id="85" preCellId="../AVAL/0/AVAL" postCellId="../I2L/0/I2L" preSegmentId="1" postSegmentId="7" preFractionAlong="0.8025856795798129" postFractionAlong="0.5720486433693008"/>
    </projection>
    <projection id="NC_AVAR_I2R" presynapticPopulation="AVAR" postsynapticPopulation="I2R" synapse="Acetylcholine">
      <connection id="86" preCellId="../AVAR/0/AVAR" postCellId="../I2R/0/I2R" preSegmentId="6" postSegmentId="9" preFractionAlong="0.39701504123719167" postFractionAlong="0.08709276679577149"/>
    </projection>
    <projection id="NC_SMBVL_I4" presynapticPopulation="SMBVL" postsynapticPopulation="I4" synapse="Acetylcholine">
      <connection id="87" preCellId="../SMBVL/0/SMBVL" postCellId="../I4/0/I4" preSegmentId="9" postSegmentId="1" preFractionAlong="0.11383839347660141" postFractionAlong="0.3452231428016921"/>
    </projection>
    <projection id="NC_SMBVR_I4" presynapticPopulation="SMBVR" postsynapticPopulation="I4" synapse="Acetylcholine">
      <connection id="88" preCellId="../SMBVR/0/SMBVR" postCellId="../I4/0/I4" preSegmentId="7" postSegmentId="7" preFractionAlong="0.8742225246851758" postFractionAlong="0.49354658034011867"/>
    </projection>
  </network>
</neuroml>
