<?xml version='1.0' encoding='UTF-8'?>
<neuroml xmlns="http://www.neuroml.org/schema/neuroml2" xmlns:xsi="http://www.w3.org/2001/XMLSchema-instance" xsi:schemaLocation="http://www.neuroml.org/schema/neuroml2 https://raw.githubusercontent.com/NeuroML/NeuroML2/development/Schemas/NeuroML2/NeuroML_v2beta4.xsd" id="gvft_network_bio_prior_lamW_0_144_DF_0_033_t70_net">
  <notes>NeuroML2 network generated from GVFT simulation on 2025-05-04 14:46:44
</notes>
  <include href="AVAL.cell.nml"/>
  <include href="AVAR.cell.nml"/>
  <include href="AVKL.cell.nml"/>
  <include href="AVKR.cell.nml"/>
  <include href="RIS.cell.nml"/>
  <include href="RMDDL.cell.nml"/>
  <include href="RMDDR.cell.nml"/>
  <include href="RMDVL.cell.nml"/>
  <include href="RMDVR.cell.nml"/>
  <include href="SMBVL.cell.nml"/>
  <include href="SMBVR.cell.nml"/>
  <include href="URXL.cell.nml"/>
  <include href="URXR.cell.nml"/>
  <include href="I4.cell.nml"/>
  <include href="I1L.cell.nml"/>
  <include href="I1R.cell.nml"/>
  <include href="M2R.cell.nml"/>
  <include href="M4.cell.nml"/>
  <include href="I6.cell.nml"/>
  <include href="I2R.cell.nml"/>
  <include href="M3R.cell.nml"/>
  <include href="I5.cell.nml"/>
  <include href="MCR.cell.nml"/>
  <include href="M3L.cell.nml"/>
  <include href="MI.cell.nml"/>
  <include href="M1.cell.nml"/>
  <include href="MCL.cell.nml"/>
  <include href="I2L.cell.nml"/>
  <include href="M5.cell.nml"/>
  <include href="NSMR.cell.nml"/>
  <include href="M2L.cell.nml"/>
  <include href="NSML.cell.nml"/>
  <include href="I3.cell.nml"/>
  <include href="Generic_GJ.synapse.nml"/>
  <include href="Glutamate.synapse.nml"/>
  <include href="Acetylcholine.synapse.nml"/>
  <include href="Serotonin_Glutamate.synapse.nml"/>
  <network id="gvft_network_bio_prior_lamW_0_144_DF_0_033_t70_net" type="networkWithTemperature" temperature="20.0 degC">
    <population id="M1" component="M1" type="populationList" size="1">
      <instance id="0">
        <location x="0.45728645" y="-0.1356784" z="0.0"/>
      </instance>
    </population>
    <population id="M2L" component="M2L" type="populationList" size="1">
      <instance id="0">
        <location x="-0.7788945" y="-0.7085427" z="0.0"/>
      </instance>
    </population>
    <population id="M2R" component="M2R" type="populationList" size="1">
      <instance id="0">
        <location x="0.16582915" y="-0.41708544" z="0.0"/>
      </instance>
    </population>
    <population id="M3L" component="M3L" type="populationList" size="1">
      <instance id="0">
        <location x="-0.22613066" y="-0.8492462" z="0.0"/>
      </instance>
    </population>
    <population id="M3R" component="M3R" type="populationList" size="1">
      <instance id="0">
        <location x="-0.35678393" y="0.71859294" z="0.0"/>
      </instance>
    </population>
    <population id="M4" component="M4" type="populationList" size="1">
      <instance id="0">
        <location x="-0.31658292" y="-0.7889447" z="0.0"/>
      </instance>
    </population>
    <population id="M5" component="M5" type="populationList" size="1">
      <instance id="0">
        <location x="-0.41708544" y="0.37688443" z="0.0"/>
      </instance>
    </population>
    <population id="I1L" component="I1L" type="populationList" size="1">
      <instance id="0">
        <location x="-0.6281407" y="-0.919598" z="0.0"/>
      </instance>
    </population>
    <population id="I1R" component="I1R" type="populationList" size="1">
      <instance id="0">
        <location x="-0.2964824" y="-0.28643218" z="0.0"/>
      </instance>
    </population>
    <population id="I2L" component="I2L" type="populationList" size="1">
      <instance id="0">
        <location x="-0.8291457" y="0.43718594" z="0.0"/>
      </instance>
    </population>
    <population id="I2R" component="I2R" type="populationList" size="1">
      <instance id="0">
        <location x="-0.26633167" y="-0.94974875" z="0.0"/>
      </instance>
    </population>
    <population id="I3" component="I3" type="populationList" size="1">
      <instance id="0">
        <location x="0.7386935" y="0.5879397" z="0.0"/>
      </instance>
    </population>
    <population id="I4" component="I4" type="populationList" size="1">
      <instance id="0">
        <location x="0.55778897" y="0.7889447" z="0.0"/>
      </instance>
    </population>
    <population id="I5" component="I5" type="populationList" size="1">
      <instance id="0">
        <location x="0.67839193" y="0.6683417" z="0.0"/>
      </instance>
    </population>
    <population id="I6" component="I6" type="populationList" size="1">
      <instance id="0">
        <location x="0.2562814" y="0.879397" z="0.0"/>
      </instance>
    </population>
    <population id="MCL" component="MCL" type="populationList" size="1">
      <instance id="0">
        <location x="-0.26633167" y="-0.5276382" z="0.0"/>
      </instance>
    </population>
    <population id="MCR" component="MCR" type="populationList" size="1">
      <instance id="0">
        <location x="-0.79899496" y="0.04522614" z="0.0"/>
      </instance>
    </population>
    <population id="MI" component="MI" type="populationList" size="1">
      <instance id="0">
        <location x="-0.8291457" y="-0.095477395" z="0.0"/>
      </instance>
    </population>
    <population id="NSML" component="NSML" type="populationList" size="1">
      <instance id="0">
        <location x="0.59799" y="-0.9798995" z="0.0"/>
      </instance>
    </population>
    <population id="NSMR" component="NSMR" type="populationList" size="1">
      <instance id="0">
        <location x="0.4874372" y="0.69849247" z="0.0"/>
      </instance>
    </population>
    <population id="AVAL" component="AVAL" type="populationList" size="1">
      <instance id="0">
        <location x="5.0" y="0.0" z="0.0"/>
      </instance>
    </population>
    <population id="AVAR" component="AVAR" type="populationList" size="1">
      <instance id="0">
        <location x="5.0" y="0.0" z="0.0"/>
      </instance>
    </population>
    <population id="AVKL" component="AVKL" type="populationList" size="1">
      <instance id="0">
        <location x="5.0" y="0.0" z="0.0"/>
      </instance>
    </population>
    <population id="AVKR" component="AVKR" type="populationList" size="1">
      <instance id="0">
        <location x="5.0" y="0.0" z="0.0"/>
      </instance>
    </population>
    <population id="RIS" component="RIS" type="populationList" size="1">
      <instance id="0">
        <location x="5.0" y="0.0" z="0.0"/>
      </instance>
    </population>
    <population id="RMDDL" component="RMDDL" type="populationList" size="1">
      <instance id="0">
        <location x="5.0" y="0.0" z="0.0"/>
      </instance>
    </population>
    <population id="RMDDR" component="RMDDR" type="populationList" size="1">
      <instance id="0">
        <location x="5.0" y="0.0" z="0.0"/>
      </instance>
    </population>
    <population id="RMDVL" component="RMDVL" type="populationList" size="1">
      <instance id="0">
        <location x="5.0" y="0.0" z="0.0"/>
      </instance>
    </population>
    <population id="RMDVR" component="RMDVR" type="populationList" size="1">
      <instance id="0">
        <location x="5.0" y="0.0" z="0.0"/>
      </instance>
    </population>
    <population id="SMBVL" component="SMBVL" type="populationList" size="1">
      <instance id="0">
        <location x="5.0" y="0.0" z="0.0"/>
      </instance>
    </population>
    <population id="SMBVR" component="SMBVR" type="populationList" size="1">
      <instance id="0">
        <location x="5.0" y="0.0" z="0.0"/>
      </instance>
    </population>
    <population id="URXL" component="URXL" type="populationList" size="1">
      <instance id="0">
        <location x="5.0" y="0.0" z="0.0"/>
      </instance>
    </population>
    <population id="URXR" component="URXR" type="populationList" size="1">
      <instance id="0">
        <location x="5.0" y="0.0" z="0.0"/>
      </instance>
    </population>
    <electricalProjection id="NCXLS_M2L_M3R_GJ" presynapticPopulation="M2L" postsynapticPopulation="M3R">
      <electricalConnection id="0" preCell="0" postCell="0" synapse="Generic_GJ" preSegment="2" postSegment="1" preFractionAlong="0.33966062048144274" postFractionAlong="0.707947826701189"/>
    </electricalProjection>
    <electricalProjection id="NCXLS_M2L_M5_GJ" presynapticPopulation="M2L" postsynapticPopulation="M5">
      <electricalConnection id="1" preCell="0" postCell="0" synapse="Generic_GJ" preSegment="5" postSegment="9" preFractionAlong="0.25602117306151306" postFractionAlong="0.6508279504893281"/>
    </electricalProjection>
    <electricalProjection id="NCXLS_M3L_M2L_GJ" presynapticPopulation="M3L" postsynapticPopulation="M2L">
      <electricalConnection id="2" preCell="0" postCell="0" synapse="Generic_GJ" preSegment="5" postSegment="9" preFractionAlong="0.4586498980810759" postFractionAlong="0.6769767523110285"/>
    </electricalProjection>
    <electricalProjection id="NCXLS_M3L_M4_GJ" presynapticPopulation="M3L" postsynapticPopulation="M4">
      <electricalConnection id="3" preCell="0" postCell="0" synapse="Generic_GJ" preSegment="9" postSegment="7" preFractionAlong="0.6077627687434245" postFractionAlong="0.40470587432917016"/>
    </electricalProjection>
    <electricalProjection id="NCXLS_M3L_M5_GJ" presynapticPopulation="M3L" postsynapticPopulation="M5">
      <electricalConnection id="4" preCell="0" postCell="0" synapse="Generic_GJ" preSegment="6" postSegment="3" preFractionAlong="0.9962968042452258" postFractionAlong="0.8455511954968996"/>
    </electricalProjection>
    <electricalProjection id="NCXLS_M2R_M3R_GJ" presynapticPopulation="M2R" postsynapticPopulation="M3R">
      <electricalConnection id="5" preCell="0" postCell="0" synapse="Generic_GJ" preSegment="1" postSegment="9" preFractionAlong="0.04012462026100949" postFractionAlong="0.9014468295383795"/>
    </electricalProjection>
    <electricalProjection id="NCXLS_M2R_M5_GJ" presynapticPopulation="M2R" postsynapticPopulation="M5">
      <electricalConnection id="6" preCell="0" postCell="0" synapse="Generic_GJ" preSegment="1" postSegment="6" preFractionAlong="0.8366202103676581" postFractionAlong="0.6507883208469019"/>
    </electricalProjection>
    <electricalProjection id="NCXLS_MI_MCL_GJ" presynapticPopulation="MI" postsynapticPopulation="MCL">
      <electricalConnection id="7" preCell="0" postCell="0" synapse="Generic_GJ" preSegment="6" postSegment="7" preFractionAlong="0.3341430223838622" postFractionAlong="0.8179041768324394"/>
    </electricalProjection>
    <electricalProjection id="NCXLS_MCL_MCR_GJ" presynapticPopulation="MCL" postsynapticPopulation="MCR">
      <electricalConnection id="8" preCell="0" postCell="0" synapse="Generic_GJ" preSegment="6" postSegment="9" preFractionAlong="0.5825689092148112" postFractionAlong="0.6988336704460328"/>
    </electricalProjection>
    <electricalProjection id="NCXLS_M1_M3L_GJ" presynapticPopulation="M1" postsynapticPopulation="M3L">
      <electricalConnection id="9" preCell="0" postCell="0" synapse="Generic_GJ" preSegment="4" postSegment="8" preFractionAlong="0.01276542651789736" postFractionAlong="0.8715518564582477"/>
    </electricalProjection>
    <electricalProjection id="NCXLS_M3R_M2R_GJ" presynapticPopulation="M3R" postsynapticPopulation="M2R">
      <electricalConnection id="10" preCell="0" postCell="0" synapse="Generic_GJ" preSegment="3" postSegment="2" preFractionAlong="0.05421174420599306" postFractionAlong="0.7254780340154869"/>
    </electricalProjection>
    <electricalProjection id="NCXLS_M5_M2L_GJ" presynapticPopulation="M5" postsynapticPopulation="M2L">
      <electricalConnection id="11" preCell="0" postCell="0" synapse="Generic_GJ" preSegment="3" postSegment="7" preFractionAlong="0.71645298155879" postFractionAlong="0.24962470441058338"/>
    </electricalProjection>
    <electricalProjection id="NCXLS_M5_M2R_GJ" presynapticPopulation="M5" postsynapticPopulation="M2R">
      <electricalConnection id="12" preCell="0" postCell="0" synapse="Generic_GJ" preSegment="2" postSegment="1" preFractionAlong="0.8131499883638141" postFractionAlong="0.9578302174752765"/>
    </electricalProjection>
    <electricalProjection id="NCXLS_M5_M1_GJ" presynapticPopulation="M5" postsynapticPopulation="M1">
      <electricalConnection id="13" preCell="0" postCell="0" synapse="Generic_GJ" preSegment="7" postSegment="8" preFractionAlong="0.8587423965133077" postFractionAlong="0.6933819006148554"/>
    </electricalProjection>
    <electricalProjection id="NCXLS_M5_M4_GJ" presynapticPopulation="M5" postsynapticPopulation="M4">
      <electricalConnection id="14" preCell="0" postCell="0" synapse="Generic_GJ" preSegment="7" postSegment="2" preFractionAlong="0.2127269661302731" postFractionAlong="0.6035857876582056"/>
    </electricalProjection>
    <projection id="NCXLS_NSMR_I3" presynapticPopulation="NSMR" postsynapticPopulation="I3" synapse="Serotonin_Glutamate">
      <connection id="15" preCellId="../NSMR/0/NSMR" postCellId="../I3/0/I3" preSegmentId="1" postSegmentId="5" preFractionAlong="0.8670799971584237" postFractionAlong="0.9526728664990757"/>
    </projection>
    <projection id="NCXLS_NSMR_I4" presynapticPopulation="NSMR" postsynapticPopulation="I4" synapse="Serotonin_Glutamate">
      <connection id="16" preCellId="../NSMR/0/NSMR" postCellId="../I4/0/I4" preSegmentId="4" postSegmentId="4" preFractionAlong="0.8328935948872295" postFractionAlong="0.12508890983640353"/>
    </projection>
    <projection id="NCXLS_NSMR_I5" presynapticPopulation="NSMR" postsynapticPopulation="I5" synapse="Serotonin_Glutamate">
      <connection id="17" preCellId="../NSMR/0/NSMR" postCellId="../I5/0/I5" preSegmentId="5" postSegmentId="6" preFractionAlong="0.5568183602783076" postFractionAlong="0.9463786533583709"/>
    </projection>
    <projection id="NCXLS_M2L_I1L" presynapticPopulation="M2L" postsynapticPopulation="I1L" synapse="Acetylcholine">
      <connection id="18" preCellId="../M2L/0/M2L" postCellId="../I1L/0/I1L" preSegmentId="4" postSegmentId="7" preFractionAlong="0.32694210025469495" postFractionAlong="0.6066893231978858"/>
    </projection>
    <projection id="NCXLS_M2L_NSMR" presynapticPopulation="M2L" postsynapticPopulation="NSMR" synapse="Acetylcholine">
      <connection id="19" preCellId="../M2L/0/M2L" postCellId="../NSMR/0/NSMR" preSegmentId="1" postSegmentId="8" preFractionAlong="0.8369278328446237" postFractionAlong="0.9954836107332199"/>
    </projection>
    <projection id="NCXLS_M2L_I6" presynapticPopulation="M2L" postsynapticPopulation="I6" synapse="Acetylcholine">
      <connection id="20" preCellId="../M2L/0/M2L" postCellId="../I6/0/I6" preSegmentId="7" postSegmentId="8" preFractionAlong="0.11285814471276223" postFractionAlong="0.609467763366622"/>
    </projection>
    <projection id="NCXLS_M2L_M3L" presynapticPopulation="M2L" postsynapticPopulation="M3L" synapse="Acetylcholine">
      <connection id="21" preCellId="../M2L/0/M2L" postCellId="../M3L/0/M3L" preSegmentId="4" postSegmentId="1" preFractionAlong="0.7869757993812009" postFractionAlong="0.05638185385323158"/>
    </projection>
    <projection id="NCXLS_M2L_NSML" presynapticPopulation="M2L" postsynapticPopulation="NSML" synapse="Acetylcholine">
      <connection id="22" preCellId="../M2L/0/M2L" postCellId="../NSML/0/NSML" preSegmentId="3" postSegmentId="9" preFractionAlong="0.6577887800361861" postFractionAlong="0.9591122919962939"/>
    </projection>
    <projection id="NCXLS_M2L_I3" presynapticPopulation="M2L" postsynapticPopulation="I3" synapse="Acetylcholine">
      <connection id="23" preCellId="../M2L/0/M2L" postCellId="../I3/0/I3" preSegmentId="2" postSegmentId="3" preFractionAlong="0.7233946888549284" postFractionAlong="0.27404158970427583"/>
    </projection>
    <projection id="NCXLS_M2L_I4" presynapticPopulation="M2L" postsynapticPopulation="I4" synapse="Acetylcholine">
      <connection id="24" preCellId="../M2L/0/M2L" postCellId="../I4/0/I4" preSegmentId="9" postSegmentId="2" preFractionAlong="0.2594491710680763" postFractionAlong="0.08464875358462898"/>
    </projection>
    <projection id="NCXLS_M2L_M2R" presynapticPopulation="M2L" postsynapticPopulation="M2R" synapse="Acetylcholine">
      <connection id="25" preCellId="../M2L/0/M2L" postCellId="../M2R/0/M2R" preSegmentId="3" postSegmentId="9" preFractionAlong="0.22458238265390107" postFractionAlong="0.5001979355227852"/>
    </projection>
    <projection id="NCXLS_M2L_MCL" presynapticPopulation="M2L" postsynapticPopulation="MCL" synapse="Acetylcholine">
      <connection id="26" preCellId="../M2L/0/M2L" postCellId="../MCL/0/MCL" preSegmentId="5" postSegmentId="7" preFractionAlong="0.19574602954816533" postFractionAlong="0.8267424285758564"/>
    </projection>
    <projection id="NCXLS_M2L_M1" presynapticPopulation="M2L" postsynapticPopulation="M1" synapse="Glutamate">
      <connection id="27" preCellId="../M2L/0/M2L" postCellId="../M1/0/M1" preSegmentId="5" postSegmentId="9" preFractionAlong="0.292415083884248" postFractionAlong="0.8748972345979262"/>
    </projection>
    <projection id="NCXLS_M2L_I2R" presynapticPopulation="M2L" postsynapticPopulation="I2R" synapse="Acetylcholine">
      <connection id="28" preCellId="../M2L/0/M2L" postCellId="../I2R/0/I2R" preSegmentId="3" postSegmentId="4" preFractionAlong="0.9892166834205861" postFractionAlong="0.16682970495026284"/>
    </projection>
    <projection id="NCXLS_M2L_I5" presynapticPopulation="M2L" postsynapticPopulation="I5" synapse="Acetylcholine">
      <connection id="29" preCellId="../M2L/0/M2L" postCellId="../I5/0/I5" preSegmentId="6" postSegmentId="1" preFractionAlong="0.779531681823933" postFractionAlong="0.2525860066847242"/>
    </projection>
    <projection id="NCXLS_M2L_I1R" presynapticPopulation="M2L" postsynapticPopulation="I1R" synapse="Acetylcholine">
      <connection id="30" preCellId="../M2L/0/M2L" postCellId="../I1R/0/I1R" preSegmentId="4" postSegmentId="3" preFractionAlong="0.10526516248042528" postFractionAlong="0.5726828158566895"/>
    </projection>
    <projection id="NCXLS_M2L_M4" presynapticPopulation="M2L" postsynapticPopulation="M4" synapse="Acetylcholine">
      <connection id="31" preCellId="../M2L/0/M2L" postCellId="../M4/0/M4" preSegmentId="8" postSegmentId="4" preFractionAlong="0.8555888940755634" postFractionAlong="0.5306951897635214"/>
    </projection>
    <projection id="NCXLS_I6_M3R" presynapticPopulation="I6" postsynapticPopulation="M3R" synapse="Acetylcholine">
      <connection id="32" preCellId="../I6/0/I6" postCellId="../M3R/0/M3R" preSegmentId="5" postSegmentId="9" preFractionAlong="0.18863224642407483" postFractionAlong="0.5078974160033809"/>
    </projection>
    <projection id="NCXLS_M3L_I1L" presynapticPopulation="M3L" postsynapticPopulation="I1L" synapse="Acetylcholine">
      <connection id="33" preCellId="../M3L/0/M3L" postCellId="../I1L/0/I1L" preSegmentId="6" postSegmentId="8" preFractionAlong="0.028570917724010436" postFractionAlong="0.6308510386451117"/>
    </projection>
    <projection id="NCXLS_M3L_NSMR" presynapticPopulation="M3L" postsynapticPopulation="NSMR" synapse="Acetylcholine">
      <connection id="34" preCellId="../M3L/0/M3L" postCellId="../NSMR/0/NSMR" preSegmentId="7" postSegmentId="1" preFractionAlong="0.29267144575942416" postFractionAlong="0.39258775036111127"/>
    </projection>
    <projection id="NCXLS_M3L_I6" presynapticPopulation="M3L" postsynapticPopulation="I6" synapse="Acetylcholine">
      <connection id="35" preCellId="../M3L/0/M3L" postCellId="../I6/0/I6" preSegmentId="8" postSegmentId="8" preFractionAlong="0.05515659060178546" postFractionAlong="0.8206415603544788"/>
    </projection>
    <projection id="NCXLS_M3L_MCR" presynapticPopulation="M3L" postsynapticPopulation="MCR" synapse="Acetylcholine">
      <connection id="36" preCellId="../M3L/0/M3L" postCellId="../MCR/0/MCR" preSegmentId="6" postSegmentId="2" preFractionAlong="0.36716962569502265" postFractionAlong="0.5422999756210791"/>
    </projection>
    <projection id="NCXLS_M3L_I3" presynapticPopulation="M3L" postsynapticPopulation="I3" synapse="Acetylcholine">
      <connection id="37" preCellId="../M3L/0/M3L" postCellId="../I3/0/I3" preSegmentId="1" postSegmentId="4" preFractionAlong="0.5807968298534757" postFractionAlong="0.7143875620372924"/>
    </projection>
    <projection id="NCXLS_M3L_I4" presynapticPopulation="M3L" postsynapticPopulation="I4" synapse="Acetylcholine">
      <connection id="38" preCellId="../M3L/0/M3L" postCellId="../I4/0/I4" preSegmentId="4" postSegmentId="1" preFractionAlong="0.671779270254866" postFractionAlong="0.3943411463506643"/>
    </projection>
    <projection id="NCXLS_M3L_MI" presynapticPopulation="M3L" postsynapticPopulation="MI" synapse="Acetylcholine">
      <connection id="39" preCellId="../M3L/0/M3L" postCellId="../MI/0/MI" preSegmentId="9" postSegmentId="9" preFractionAlong="0.12015925873562194" postFractionAlong="0.5345545447560391"/>
    </projection>
    <projection id="NCXLS_M3L_I2L" presynapticPopulation="M3L" postsynapticPopulation="I2L" synapse="Acetylcholine">
      <connection id="40" preCellId="../M3L/0/M3L" postCellId="../I2L/0/I2L" preSegmentId="9" postSegmentId="8" preFractionAlong="0.22208218820898984" postFractionAlong="0.8246263528008929"/>
    </projection>
    <projection id="NCXLS_M3L_MCL" presynapticPopulation="M3L" postsynapticPopulation="MCL" synapse="Acetylcholine">
      <connection id="41" preCellId="../M3L/0/M3L" postCellId="../MCL/0/MCL" preSegmentId="1" postSegmentId="1" preFractionAlong="0.444352196097495" postFractionAlong="0.9439959067106114"/>
    </projection>
    <projection id="NCXLS_M3L_M3R" presynapticPopulation="M3L" postsynapticPopulation="M3R" synapse="Acetylcholine">
      <connection id="42" preCellId="../M3L/0/M3L" postCellId="../M3R/0/M3R" preSegmentId="5" postSegmentId="2" preFractionAlong="0.9975825929459724" postFractionAlong="0.8869421108828673"/>
    </projection>
    <projection id="NCXLS_M3L_I5" presynapticPopulation="M3L" postsynapticPopulation="I5" synapse="Acetylcholine">
      <connection id="43" preCellId="../M3L/0/M3L" postCellId="../I5/0/I5" preSegmentId="6" postSegmentId="8" preFractionAlong="0.01177987628664201" postFractionAlong="0.9974229390535542"/>
    </projection>
    <projection id="NCXLS_M3L_I1R" presynapticPopulation="M3L" postsynapticPopulation="I1R" synapse="Acetylcholine">
      <connection id="44" preCellId="../M3L/0/M3L" postCellId="../I1R/0/I1R" preSegmentId="5" postSegmentId="7" preFractionAlong="0.6680194525125599" postFractionAlong="0.1766823141763052"/>
    </projection>
    <projection id="NCXLS_MCR_NSMR" presynapticPopulation="MCR" postsynapticPopulation="NSMR" synapse="Acetylcholine">
      <connection id="45" preCellId="../MCR/0/MCR" postCellId="../NSMR/0/NSMR" preSegmentId="5" postSegmentId="1" preFractionAlong="0.9144417294873384" postFractionAlong="0.8406326448191253"/>
    </projection>
    <projection id="NCXLS_MCR_I6" presynapticPopulation="MCR" postsynapticPopulation="I6" synapse="Acetylcholine">
      <connection id="46" preCellId="../MCR/0/MCR" postCellId="../I6/0/I6" preSegmentId="7" postSegmentId="6" preFractionAlong="0.8057468921781201" postFractionAlong="0.6025113635747287"/>
    </projection>
    <projection id="NCXLS_MCR_I3" presynapticPopulation="MCR" postsynapticPopulation="I3" synapse="Acetylcholine">
      <connection id="47" preCellId="../MCR/0/MCR" postCellId="../I3/0/I3" preSegmentId="5" postSegmentId="9" preFractionAlong="0.8406036227731919" postFractionAlong="0.47287932221054507"/>
    </projection>
    <projection id="NCXLS_MCR_I4" presynapticPopulation="MCR" postsynapticPopulation="I4" synapse="Acetylcholine">
      <connection id="48" preCellId="../MCR/0/MCR" postCellId="../I4/0/I4" preSegmentId="4" postSegmentId="1" preFractionAlong="0.9262799618484072" postFractionAlong="0.961631256625307"/>
    </projection>
    <projection id="NCXLS_MCR_I2L" presynapticPopulation="MCR" postsynapticPopulation="I2L" synapse="Acetylcholine">
      <connection id="49" preCellId="../MCR/0/MCR" postCellId="../I2L/0/I2L" preSegmentId="8" postSegmentId="8" preFractionAlong="0.5658630735596195" postFractionAlong="0.15723566509423348"/>
    </projection>
    <projection id="NCXLS_MCR_M3R" presynapticPopulation="MCR" postsynapticPopulation="M3R" synapse="Acetylcholine">
      <connection id="50" preCellId="../MCR/0/MCR" postCellId="../M3R/0/M3R" preSegmentId="3" postSegmentId="1" preFractionAlong="0.5134344971258201" postFractionAlong="0.6506065232521034"/>
    </projection>
    <projection id="NCXLS_MCR_I5" presynapticPopulation="MCR" postsynapticPopulation="I5" synapse="Acetylcholine">
      <connection id="51" preCellId="../MCR/0/MCR" postCellId="../I5/0/I5" preSegmentId="9" postSegmentId="9" preFractionAlong="0.40610998050255787" postFractionAlong="0.11267352663479002"/>
    </projection>
    <projection id="NCXLS_MCR_M5" presynapticPopulation="MCR" postsynapticPopulation="M5" synapse="Acetylcholine">
      <connection id="52" preCellId="../MCR/0/MCR" postCellId="../M5/0/M5" preSegmentId="4" postSegmentId="1" preFractionAlong="0.5273196795998597" postFractionAlong="0.8863686470955409"/>
    </projection>
    <projection id="NCXLS_NSML_I1L" presynapticPopulation="NSML" postsynapticPopulation="I1L" synapse="Serotonin_Glutamate">
      <connection id="53" preCellId="../NSML/0/NSML" postCellId="../I1L/0/I1L" preSegmentId="5" postSegmentId="3" preFractionAlong="0.043846852496629896" postFractionAlong="0.32662190574800876"/>
    </projection>
    <projection id="NCXLS_NSML_M2L" presynapticPopulation="NSML" postsynapticPopulation="M2L" synapse="Serotonin_Glutamate">
      <connection id="54" preCellId="../NSML/0/NSML" postCellId="../M2L/0/M2L" preSegmentId="7" postSegmentId="6" preFractionAlong="0.8939726684244292" postFractionAlong="0.9743494565240307"/>
    </projection>
    <projection id="NCXLS_NSML_M3L" presynapticPopulation="NSML" postsynapticPopulation="M3L" synapse="Serotonin_Glutamate">
      <connection id="55" preCellId="../NSML/0/NSML" postCellId="../M3L/0/M3L" preSegmentId="9" postSegmentId="2" preFractionAlong="0.35577408420066015" postFractionAlong="0.21289425465999345"/>
    </projection>
    <projection id="NCXLS_NSML_I2R" presynapticPopulation="NSML" postsynapticPopulation="I2R" synapse="Serotonin_Glutamate">
      <connection id="56" preCellId="../NSML/0/NSML" postCellId="../I2R/0/I2R" preSegmentId="6" postSegmentId="1" preFractionAlong="0.5145711162678005" postFractionAlong="0.20015421124936683"/>
    </projection>
    <projection id="NCXLS_M2R_NSMR" presynapticPopulation="M2R" postsynapticPopulation="NSMR" synapse="Acetylcholine">
      <connection id="57" preCellId="../M2R/0/M2R" postCellId="../NSMR/0/NSMR" preSegmentId="9" postSegmentId="4" preFractionAlong="0.5918079076633259" postFractionAlong="0.07222934827247784"/>
    </projection>
    <projection id="NCXLS_M2R_I6" presynapticPopulation="M2R" postsynapticPopulation="I6" synapse="Acetylcholine">
      <connection id="58" preCellId="../M2R/0/M2R" postCellId="../I6/0/I6" preSegmentId="5" postSegmentId="6" preFractionAlong="0.5692813829505244" postFractionAlong="0.8119091149599047"/>
    </projection>
    <projection id="NCXLS_M2R_MCR" presynapticPopulation="M2R" postsynapticPopulation="MCR" synapse="Acetylcholine">
      <connection id="59" preCellId="../M2R/0/M2R" postCellId="../MCR/0/MCR" preSegmentId="1" postSegmentId="1" preFractionAlong="0.18985266027096914" postFractionAlong="0.1101721202536331"/>
    </projection>
    <projection id="NCXLS_M2R_I3" presynapticPopulation="M2R" postsynapticPopulation="I3" synapse="Acetylcholine">
      <connection id="60" preCellId="../M2R/0/M2R" postCellId="../I3/0/I3" preSegmentId="9" postSegmentId="7" preFractionAlong="0.7261894838621051" postFractionAlong="0.8418253643652626"/>
    </projection>
    <projection id="NCXLS_M2R_I4" presynapticPopulation="M2R" postsynapticPopulation="I4" synapse="Acetylcholine">
      <connection id="61" preCellId="../M2R/0/M2R" postCellId="../I4/0/I4" preSegmentId="5" postSegmentId="1" preFractionAlong="0.31659806041056904" postFractionAlong="0.6712215563463176"/>
    </projection>
    <projection id="NCXLS_M2R_MI" presynapticPopulation="M2R" postsynapticPopulation="MI" synapse="Acetylcholine">
      <connection id="62" preCellId="../M2R/0/M2R" postCellId="../MI/0/MI" preSegmentId="3" postSegmentId="5" preFractionAlong="0.6928011986299087" postFractionAlong="0.8709675998625426"/>
    </projection>
    <projection id="NCXLS_M2R_I2L" presynapticPopulation="M2R" postsynapticPopulation="I2L" synapse="Acetylcholine">
      <connection id="63" preCellId="../M2R/0/M2R" postCellId="../I2L/0/I2L" preSegmentId="8" postSegmentId="2" preFractionAlong="0.5176298283979672" postFractionAlong="0.5778770814409091"/>
    </projection>
    <projection id="NCXLS_M2R_MCL" presynapticPopulation="M2R" postsynapticPopulation="MCL" synapse="Acetylcholine">
      <connection id="64" preCellId="../M2R/0/M2R" postCellId="../MCL/0/MCL" preSegmentId="1" postSegmentId="5" preFractionAlong="0.07356335421576565" postFractionAlong="0.05343460239101716"/>
    </projection>
    <projection id="NCXLS_M2R_M1" presynapticPopulation="M2R" postsynapticPopulation="M1" synapse="Acetylcholine">
      <connection id="65" preCellId="../M2R/0/M2R" postCellId="../M1/0/M1" preSegmentId="3" postSegmentId="3" preFractionAlong="0.5298756255182061" postFractionAlong="0.6149030145669361"/>
    </projection>
    <projection id="NCXLS_M2R_I5" presynapticPopulation="M2R" postsynapticPopulation="I5" synapse="Acetylcholine">
      <connection id="66" preCellId="../M2R/0/M2R" postCellId="../I5/0/I5" preSegmentId="8" postSegmentId="3" preFractionAlong="0.09365745260747449" postFractionAlong="0.7680893784186665"/>
    </projection>
    <projection id="NCXLS_M2R_I1R" presynapticPopulation="M2R" postsynapticPopulation="I1R" synapse="Acetylcholine">
      <connection id="67" preCellId="../M2R/0/M2R" postCellId="../I1R/0/I1R" preSegmentId="1" postSegmentId="6" preFractionAlong="0.7189907568532331" postFractionAlong="0.5695212786820326"/>
    </projection>
    <projection id="NCXLS_MI_I1L" presynapticPopulation="MI" postsynapticPopulation="I1L" synapse="Acetylcholine">
      <connection id="68" preCellId="../MI/0/MI" postCellId="../I1L/0/I1L" preSegmentId="9" postSegmentId="3" preFractionAlong="0.8824701949431355" postFractionAlong="0.5823955084085031"/>
    </projection>
    <projection id="NCXLS_MI_M2L" presynapticPopulation="MI" postsynapticPopulation="M2L" synapse="Glutamate">
      <connection id="69" preCellId="../MI/0/MI" postCellId="../M2L/0/M2L" preSegmentId="1" postSegmentId="9" preFractionAlong="0.461925204205735" postFractionAlong="0.8447917378659114"/>
    </projection>
    <projection id="NCXLS_MI_M3L" presynapticPopulation="MI" postsynapticPopulation="M3L" synapse="Acetylcholine">
      <connection id="70" preCellId="../MI/0/MI" postCellId="../M3L/0/M3L" preSegmentId="4" postSegmentId="1" preFractionAlong="0.27725841634918613" postFractionAlong="0.9966832779346797"/>
    </projection>
    <projection id="NCXLS_MI_NSML" presynapticPopulation="MI" postsynapticPopulation="NSML" synapse="Serotonin_Glutamate">
      <connection id="71" preCellId="../MI/0/MI" postCellId="../NSML/0/NSML" preSegmentId="5" postSegmentId="7" preFractionAlong="0.3552896432193188" postFractionAlong="0.04916082915504816"/>
    </projection>
    <projection id="NCXLS_MI_M2R" presynapticPopulation="MI" postsynapticPopulation="M2R" synapse="Acetylcholine">
      <connection id="72" preCellId="../MI/0/MI" postCellId="../M2R/0/M2R" preSegmentId="4" postSegmentId="3" preFractionAlong="0.5541812554487988" postFractionAlong="0.7620327210390511"/>
    </projection>
    <projection id="NCXLS_MI_I2R" presynapticPopulation="MI" postsynapticPopulation="I2R" synapse="Serotonin_Glutamate">
      <connection id="73" preCellId="../MI/0/MI" postCellId="../I2R/0/I2R" preSegmentId="3" postSegmentId="9" preFractionAlong="0.03342653309322163" postFractionAlong="0.3667520764259401"/>
    </projection>
    <projection id="NCXLS_MI_I1R" presynapticPopulation="MI" postsynapticPopulation="I1R" synapse="Glutamate">
      <connection id="74" preCellId="../MI/0/MI" postCellId="../I1R/0/I1R" preSegmentId="6" postSegmentId="5" preFractionAlong="0.1445797102395847" postFractionAlong="0.6952584007554335"/>
    </projection>
    <projection id="NCXLS_MI_M4" presynapticPopulation="MI" postsynapticPopulation="M4" synapse="Acetylcholine">
      <connection id="75" preCellId="../MI/0/MI" postCellId="../M4/0/M4" preSegmentId="2" postSegmentId="3" preFractionAlong="0.5540583834602107" postFractionAlong="0.9308328641758075"/>
    </projection>
    <projection id="NCXLS_MCL_I1L" presynapticPopulation="MCL" postsynapticPopulation="I1L" synapse="Acetylcholine">
      <connection id="76" preCellId="../MCL/0/MCL" postCellId="../I1L/0/I1L" preSegmentId="8" postSegmentId="6" preFractionAlong="0.5670327835012275" postFractionAlong="0.9283357720056218"/>
    </projection>
    <projection id="NCXLS_MCL_M2L" presynapticPopulation="MCL" postsynapticPopulation="M2L" synapse="Acetylcholine">
      <connection id="77" preCellId="../MCL/0/MCL" postCellId="../M2L/0/M2L" preSegmentId="6" postSegmentId="7" preFractionAlong="0.4245726071859556" postFractionAlong="0.9336789061329351"/>
    </projection>
    <projection id="NCXLS_MCL_M3L" presynapticPopulation="MCL" postsynapticPopulation="M3L" synapse="Acetylcholine">
      <connection id="78" preCellId="../MCL/0/MCL" postCellId="../M3L/0/M3L" preSegmentId="8" postSegmentId="6" preFractionAlong="0.14112611829932187" postFractionAlong="0.0007895110932187865"/>
    </projection>
    <projection id="NCXLS_MCL_MI" presynapticPopulation="MCL" postsynapticPopulation="MI" synapse="Acetylcholine">
      <connection id="79" preCellId="../MCL/0/MCL" postCellId="../MI/0/MI" preSegmentId="2" postSegmentId="6" preFractionAlong="0.5638670318917666" postFractionAlong="0.5164443419028215"/>
    </projection>
    <projection id="NCXLS_MCL_I2L" presynapticPopulation="MCL" postsynapticPopulation="I2L" synapse="Acetylcholine">
      <connection id="80" preCellId="../MCL/0/MCL" postCellId="../I2L/0/I2L" preSegmentId="3" postSegmentId="8" preFractionAlong="0.07869857670750946" postFractionAlong="0.603755143837613"/>
    </projection>
    <projection id="NCXLS_MCL_I2R" presynapticPopulation="MCL" postsynapticPopulation="I2R" synapse="Acetylcholine">
      <connection id="81" preCellId="../MCL/0/MCL" postCellId="../I2R/0/I2R" preSegmentId="5" postSegmentId="8" preFractionAlong="0.735953560515178" postFractionAlong="0.3012312947939082"/>
    </projection>
    <projection id="NCXLS_MCL_M4" presynapticPopulation="MCL" postsynapticPopulation="M4" synapse="Acetylcholine">
      <connection id="82" preCellId="../MCL/0/MCL" postCellId="../M4/0/M4" preSegmentId="2" postSegmentId="9" preFractionAlong="0.44475589820201256" postFractionAlong="0.04643365548281231"/>
    </projection>
    <projection id="NCXLS_M1_I1L" presynapticPopulation="M1" postsynapticPopulation="I1L" synapse="Acetylcholine">
      <connection id="83" preCellId="../M1/0/M1" postCellId="../I1L/0/I1L" preSegmentId="2" postSegmentId="1" preFractionAlong="0.12862406043919206" postFractionAlong="0.44577874755947033"/>
    </projection>
    <projection id="NCXLS_M1_M2L" presynapticPopulation="M1" postsynapticPopulation="M2L" synapse="Acetylcholine">
      <connection id="84" preCellId="../M1/0/M1" postCellId="../M2L/0/M2L" preSegmentId="4" postSegmentId="9" preFractionAlong="0.8893187599283195" postFractionAlong="0.5193976852834676"/>
    </projection>
    <projection id="NCXLS_M1_MCR" presynapticPopulation="M1" postsynapticPopulation="MCR" synapse="Acetylcholine">
      <connection id="85" preCellId="../M1/0/M1" postCellId="../MCR/0/MCR" preSegmentId="6" postSegmentId="9" preFractionAlong="0.8817173063953962" postFractionAlong="0.8918202114066128"/>
    </projection>
    <projection id="NCXLS_M1_NSML" presynapticPopulation="M1" postsynapticPopulation="NSML" synapse="Acetylcholine">
      <connection id="86" preCellId="../M1/0/M1" postCellId="../NSML/0/NSML" preSegmentId="4" postSegmentId="8" preFractionAlong="0.5771716266239962" postFractionAlong="0.9362403878072032"/>
    </projection>
    <projection id="NCXLS_M1_M2R" presynapticPopulation="M1" postsynapticPopulation="M2R" synapse="Acetylcholine">
      <connection id="87" preCellId="../M1/0/M1" postCellId="../M2R/0/M2R" preSegmentId="9" postSegmentId="7" preFractionAlong="0.624700669406608" postFractionAlong="0.2825408636624436"/>
    </projection>
    <projection id="NCXLS_M1_MI" presynapticPopulation="M1" postsynapticPopulation="MI" synapse="Acetylcholine">
      <connection id="88" preCellId="../M1/0/M1" postCellId="../MI/0/MI" preSegmentId="7" postSegmentId="3" preFractionAlong="0.10294614470028618" postFractionAlong="0.719022820433601"/>
    </projection>
    <projection id="NCXLS_M1_I2L" presynapticPopulation="M1" postsynapticPopulation="I2L" synapse="Acetylcholine">
      <connection id="89" preCellId="../M1/0/M1" postCellId="../I2L/0/I2L" preSegmentId="6" postSegmentId="6" preFractionAlong="0.24894352479687276" postFractionAlong="0.3244382286350662"/>
    </projection>
    <projection id="NCXLS_M1_MCL" presynapticPopulation="M1" postsynapticPopulation="MCL" synapse="Acetylcholine">
      <connection id="90" preCellId="../M1/0/M1" postCellId="../MCL/0/MCL" preSegmentId="3" postSegmentId="7" preFractionAlong="0.7495164151567807" postFractionAlong="0.6305592343457384"/>
    </projection>
    <projection id="NCXLS_M1_I2R" presynapticPopulation="M1" postsynapticPopulation="I2R" synapse="Acetylcholine">
      <connection id="91" preCellId="../M1/0/M1" postCellId="../I2R/0/I2R" preSegmentId="3" postSegmentId="2" preFractionAlong="0.6324722024114774" postFractionAlong="0.2882958045542563"/>
    </projection>
    <projection id="NCXLS_M1_I1R" presynapticPopulation="M1" postsynapticPopulation="I1R" synapse="Acetylcholine">
      <connection id="92" preCellId="../M1/0/M1" postCellId="../I1R/0/I1R" preSegmentId="8" postSegmentId="7" preFractionAlong="0.48921624868809066" postFractionAlong="0.3419344935747266"/>
    </projection>
    <projection id="NCXLS_M1_M4" presynapticPopulation="M1" postsynapticPopulation="M4" synapse="Glutamate">
      <connection id="93" preCellId="../M1/0/M1" postCellId="../M4/0/M4" preSegmentId="6" postSegmentId="5" preFractionAlong="0.5814248948690871" postFractionAlong="0.5489325244993376"/>
    </projection>
    <projection id="NCXLS_M1_M5" presynapticPopulation="M1" postsynapticPopulation="M5" synapse="Acetylcholine">
      <connection id="94" preCellId="../M1/0/M1" postCellId="../M5/0/M5" preSegmentId="1" postSegmentId="4" preFractionAlong="0.6035812471230626" postFractionAlong="0.9339513385827183"/>
    </projection>
    <projection id="NCXLS_M3R_I1L" presynapticPopulation="M3R" postsynapticPopulation="I1L" synapse="Acetylcholine">
      <connection id="95" preCellId="../M3R/0/M3R" postCellId="../I1L/0/I1L" preSegmentId="9" postSegmentId="3" preFractionAlong="0.14689416391293275" postFractionAlong="0.8558229071239036"/>
    </projection>
    <projection id="NCXLS_M3R_M2L" presynapticPopulation="M3R" postsynapticPopulation="M2L" synapse="Glutamate">
      <connection id="96" preCellId="../M3R/0/M3R" postCellId="../M2L/0/M2L" preSegmentId="9" postSegmentId="7" preFractionAlong="0.26347344569384823" postFractionAlong="0.03782013655203531"/>
    </projection>
    <projection id="NCXLS_M3R_M3L" presynapticPopulation="M3R" postsynapticPopulation="M3L" synapse="Acetylcholine">
      <connection id="97" preCellId="../M3R/0/M3R" postCellId="../M3L/0/M3L" preSegmentId="8" postSegmentId="5" preFractionAlong="0.986349922944162" postFractionAlong="0.31521673737728606"/>
    </projection>
    <projection id="NCXLS_M3R_MCR" presynapticPopulation="M3R" postsynapticPopulation="MCR" synapse="Acetylcholine">
      <connection id="98" preCellId="../M3R/0/M3R" postCellId="../MCR/0/MCR" preSegmentId="5" postSegmentId="5" preFractionAlong="0.990712558623105" postFractionAlong="0.24761708717471853"/>
    </projection>
    <projection id="NCXLS_M3R_NSML" presynapticPopulation="M3R" postsynapticPopulation="NSML" synapse="Acetylcholine">
      <connection id="99" preCellId="../M3R/0/M3R" postCellId="../NSML/0/NSML" preSegmentId="2" postSegmentId="3" preFractionAlong="0.23922321366585797" postFractionAlong="0.4152137566843307"/>
    </projection>
    <projection id="NCXLS_M3R_MI" presynapticPopulation="M3R" postsynapticPopulation="MI" synapse="Acetylcholine">
      <connection id="100" preCellId="../M3R/0/M3R" postCellId="../MI/0/MI" preSegmentId="3" postSegmentId="2" preFractionAlong="0.43150811984764237" postFractionAlong="0.22991837086163258"/>
    </projection>
    <projection id="NCXLS_M3R_I2L" presynapticPopulation="M3R" postsynapticPopulation="I2L" synapse="Acetylcholine">
      <connection id="101" preCellId="../M3R/0/M3R" postCellId="../I2L/0/I2L" preSegmentId="5" postSegmentId="2" preFractionAlong="0.9405373011029476" postFractionAlong="0.9059439679262645"/>
    </projection>
    <projection id="NCXLS_M3R_MCL" presynapticPopulation="M3R" postsynapticPopulation="MCL" synapse="Acetylcholine">
      <connection id="102" preCellId="../M3R/0/M3R" postCellId="../MCL/0/MCL" preSegmentId="2" postSegmentId="1" preFractionAlong="0.5409862355280837" postFractionAlong="0.7152670825092443"/>
    </projection>
    <projection id="NCXLS_M3R_I2R" presynapticPopulation="M3R" postsynapticPopulation="I2R" synapse="Acetylcholine">
      <connection id="103" preCellId="../M3R/0/M3R" postCellId="../I2R/0/I2R" preSegmentId="6" postSegmentId="5" preFractionAlong="0.8547406185919787" postFractionAlong="0.9295830945975689"/>
    </projection>
    <projection id="NCXLS_M3R_I1R" presynapticPopulation="M3R" postsynapticPopulation="I1R" synapse="Acetylcholine">
      <connection id="104" preCellId="../M3R/0/M3R" postCellId="../I1R/0/I1R" preSegmentId="9" postSegmentId="4" preFractionAlong="0.09505653683256443" postFractionAlong="0.200469047766359"/>
    </projection>
    <projection id="NCXLS_M3R_M4" presynapticPopulation="M3R" postsynapticPopulation="M4" synapse="Glutamate">
      <connection id="105" preCellId="../M3R/0/M3R" postCellId="../M4/0/M4" preSegmentId="2" postSegmentId="4" preFractionAlong="0.03576624301493525" postFractionAlong="0.5282266077271569"/>
    </projection>
    <projection id="NCXLS_M3R_M5" presynapticPopulation="M3R" postsynapticPopulation="M5" synapse="Glutamate">
      <connection id="106" preCellId="../M3R/0/M3R" postCellId="../M5/0/M5" preSegmentId="1" postSegmentId="3" preFractionAlong="0.6056992404598757" postFractionAlong="0.6918639081608444"/>
    </projection>
    <projection id="NCXLS_M4_NSMR" presynapticPopulation="M4" postsynapticPopulation="NSMR" synapse="Acetylcholine">
      <connection id="107" preCellId="../M4/0/M4" postCellId="../NSMR/0/NSMR" preSegmentId="1" postSegmentId="9" preFractionAlong="0.5683191510779255" postFractionAlong="0.4395077804475518"/>
    </projection>
    <projection id="NCXLS_M4_I6" presynapticPopulation="M4" postsynapticPopulation="I6" synapse="Acetylcholine">
      <connection id="108" preCellId="../M4/0/M4" postCellId="../I6/0/I6" preSegmentId="3" postSegmentId="2" preFractionAlong="0.680237753843783" postFractionAlong="0.8424569861184136"/>
    </projection>
    <projection id="NCXLS_M4_M3L" presynapticPopulation="M4" postsynapticPopulation="M3L" synapse="Glutamate">
      <connection id="109" preCellId="../M4/0/M4" postCellId="../M3L/0/M3L" preSegmentId="3" postSegmentId="6" preFractionAlong="0.4940116705993056" postFractionAlong="0.11846170509448184"/>
    </projection>
    <projection id="NCXLS_M4_NSML" presynapticPopulation="M4" postsynapticPopulation="NSML" synapse="Acetylcholine">
      <connection id="110" preCellId="../M4/0/M4" postCellId="../NSML/0/NSML" preSegmentId="4" postSegmentId="9" preFractionAlong="0.3032195467185912" postFractionAlong="0.6979904714977925"/>
    </projection>
    <projection id="NCXLS_M4_I3" presynapticPopulation="M4" postsynapticPopulation="I3" synapse="Acetylcholine">
      <connection id="111" preCellId="../M4/0/M4" postCellId="../I3/0/I3" preSegmentId="8" postSegmentId="3" preFractionAlong="0.4956539208832471" postFractionAlong="0.4211189044340816"/>
    </projection>
    <projection id="NCXLS_M4_I4" presynapticPopulation="M4" postsynapticPopulation="I4" synapse="Acetylcholine">
      <connection id="112" preCellId="../M4/0/M4" postCellId="../I4/0/I4" preSegmentId="7" postSegmentId="8" preFractionAlong="0.13637110502945837" postFractionAlong="0.19668855823121312"/>
    </projection>
    <projection id="NCXLS_M4_M2R" presynapticPopulation="M4" postsynapticPopulation="M2R" synapse="Acetylcholine">
      <connection id="113" preCellId="../M4/0/M4" postCellId="../M2R/0/M2R" preSegmentId="8" postSegmentId="9" preFractionAlong="0.3163754073876829" postFractionAlong="0.9731447114269086"/>
    </projection>
    <projection id="NCXLS_M4_MCL" presynapticPopulation="M4" postsynapticPopulation="MCL" synapse="Acetylcholine">
      <connection id="114" preCellId="../M4/0/M4" postCellId="../MCL/0/MCL" preSegmentId="2" postSegmentId="2" preFractionAlong="0.9844419535833683" postFractionAlong="0.29775415367224434"/>
    </projection>
    <projection id="NCXLS_M4_M1" presynapticPopulation="M4" postsynapticPopulation="M1" synapse="Glutamate">
      <connection id="115" preCellId="../M4/0/M4" postCellId="../M1/0/M1" preSegmentId="2" postSegmentId="8" preFractionAlong="0.7764868813156668" postFractionAlong="0.7491578231765317"/>
    </projection>
    <projection id="NCXLS_M4_M3R" presynapticPopulation="M4" postsynapticPopulation="M3R" synapse="Acetylcholine">
      <connection id="116" preCellId="../M4/0/M4" postCellId="../M3R/0/M3R" preSegmentId="8" postSegmentId="3" preFractionAlong="0.6108600835168504" postFractionAlong="0.8712646852701572"/>
    </projection>
    <projection id="NCXLS_M4_I5" presynapticPopulation="M4" postsynapticPopulation="I5" synapse="Acetylcholine">
      <connection id="117" preCellId="../M4/0/M4" postCellId="../I5/0/I5" preSegmentId="2" postSegmentId="4" preFractionAlong="0.22427341824190528" postFractionAlong="0.38863229039883895"/>
    </projection>
    <projection id="NCXLS_M4_I1R" presynapticPopulation="M4" postsynapticPopulation="I1R" synapse="Acetylcholine">
      <connection id="118" preCellId="../M4/0/M4" postCellId="../I1R/0/I1R" preSegmentId="6" postSegmentId="6" preFractionAlong="0.746670964786637" postFractionAlong="0.09382187239544315"/>
    </projection>
    <projection id="NCXLS_M4_M5" presynapticPopulation="M4" postsynapticPopulation="M5" synapse="Glutamate">
      <connection id="119" preCellId="../M4/0/M4" postCellId="../M5/0/M5" preSegmentId="8" postSegmentId="3" preFractionAlong="0.10466063390789626" postFractionAlong="0.8226479271938894"/>
    </projection>
    <projection id="NCXLS_M5_I1L" presynapticPopulation="M5" postsynapticPopulation="I1L" synapse="Acetylcholine">
      <connection id="120" preCellId="../M5/0/M5" postCellId="../I1L/0/I1L" preSegmentId="2" postSegmentId="5" preFractionAlong="0.400155272865399" postFractionAlong="0.15049549807258555"/>
    </projection>
    <projection id="NCXLS_M5_M3L" presynapticPopulation="M5" postsynapticPopulation="M3L" synapse="Glutamate">
      <connection id="121" preCellId="../M5/0/M5" postCellId="../M3L/0/M3L" preSegmentId="9" postSegmentId="7" preFractionAlong="0.07520202876280246" postFractionAlong="0.7077839783624825"/>
    </projection>
    <projection id="NCXLS_M5_MCR" presynapticPopulation="M5" postsynapticPopulation="MCR" synapse="Acetylcholine">
      <connection id="122" preCellId="../M5/0/M5" postCellId="../MCR/0/MCR" preSegmentId="3" postSegmentId="7" preFractionAlong="0.7060581146380308" postFractionAlong="0.4904544085197847"/>
    </projection>
    <projection id="NCXLS_M5_NSML" presynapticPopulation="M5" postsynapticPopulation="NSML" synapse="Acetylcholine">
      <connection id="123" preCellId="../M5/0/M5" postCellId="../NSML/0/NSML" preSegmentId="5" postSegmentId="4" preFractionAlong="0.40796260220572644" postFractionAlong="0.32455410973092613"/>
    </projection>
    <projection id="NCXLS_M5_MI" presynapticPopulation="M5" postsynapticPopulation="MI" synapse="Acetylcholine">
      <connection id="124" preCellId="../M5/0/M5" postCellId="../MI/0/MI" preSegmentId="3" postSegmentId="7" preFractionAlong="0.7589957624907276" postFractionAlong="0.47864487055052485"/>
    </projection>
    <projection id="NCXLS_M5_I2L" presynapticPopulation="M5" postsynapticPopulation="I2L" synapse="Acetylcholine">
      <connection id="125" preCellId="../M5/0/M5" postCellId="../I2L/0/I2L" preSegmentId="1" postSegmentId="3" preFractionAlong="0.3095593015130734" postFractionAlong="0.2923030465548375"/>
    </projection>
    <projection id="NCXLS_M5_MCL" presynapticPopulation="M5" postsynapticPopulation="MCL" synapse="Acetylcholine">
      <connection id="126" preCellId="../M5/0/M5" postCellId="../MCL/0/MCL" preSegmentId="7" postSegmentId="7" preFractionAlong="0.08757557341617472" postFractionAlong="0.8056753790427041"/>
    </projection>
    <projection id="NCXLS_M5_I2R" presynapticPopulation="M5" postsynapticPopulation="I2R" synapse="Acetylcholine">
      <connection id="127" preCellId="../M5/0/M5" postCellId="../I2R/0/I2R" preSegmentId="8" postSegmentId="6" preFractionAlong="0.7324414591304492" postFractionAlong="0.4322131875850235"/>
    </projection>
    <projection id="NCXLS_M5_I1R" presynapticPopulation="M5" postsynapticPopulation="I1R" synapse="Acetylcholine">
      <connection id="128" preCellId="../M5/0/M5" postCellId="../I1R/0/I1R" preSegmentId="7" postSegmentId="1" preFractionAlong="0.6090289447069158" postFractionAlong="0.7689801952286295"/>
    </projection>
    <projection id="NC_I1L_RMDDL" presynapticPopulation="I1L" postsynapticPopulation="RMDDL" synapse="Acetylcholine">
      <connection id="129" preCellId="../I1L/0/I1L" postCellId="../RMDDL/0/RMDDL" preSegmentId="7" postSegmentId="4" preFractionAlong="0.1080774936663883" postFractionAlong="0.4362444483643173"/>
    </projection>
    <projection id="NC_I1L_RMDVL" presynapticPopulation="I1L" postsynapticPopulation="RMDVL" synapse="Acetylcholine">
      <connection id="130" preCellId="../I1L/0/I1L" postCellId="../RMDVL/0/RMDVL" preSegmentId="6" postSegmentId="4" preFractionAlong="0.3160047228663938" postFractionAlong="0.31410981908937075"/>
    </projection>
    <projection id="NC_I1R_RMDDR" presynapticPopulation="I1R" postsynapticPopulation="RMDDR" synapse="Acetylcholine">
      <connection id="131" preCellId="../I1R/0/I1R" postCellId="../RMDDR/0/RMDDR" preSegmentId="3" postSegmentId="1" preFractionAlong="0.1058003594241399" postFractionAlong="0.6285440308788611"/>
    </projection>
    <projection id="NC_I1R_RMDVR" presynapticPopulation="I1R" postsynapticPopulation="RMDVR" synapse="Acetylcholine">
      <connection id="132" preCellId="../I1R/0/I1R" postCellId="../RMDVR/0/RMDVR" preSegmentId="8" postSegmentId="1" preFractionAlong="0.09495364741833101" postFractionAlong="0.7281833571884823"/>
    </projection>
    <projection id="NC_I2L_URXL" presynapticPopulation="I2L" postsynapticPopulation="URXL" synapse="Glutamate">
      <connection id="133" preCellId="../I2L/0/I2L" postCellId="../URXL/0/URXL" preSegmentId="7" postSegmentId="8" preFractionAlong="0.03735293643555493" postFractionAlong="0.4451066637179941"/>
    </projection>
    <projection id="NC_I2R_URXR" presynapticPopulation="I2R" postsynapticPopulation="URXR" synapse="Glutamate">
      <connection id="134" preCellId="../I2R/0/I2R" postCellId="../URXR/0/URXR" preSegmentId="3" postSegmentId="6" preFractionAlong="0.8888425117385318" postFractionAlong="0.048324408855396905"/>
    </projection>
    <projection id="NC_AVKL_I1L" presynapticPopulation="AVKL" postsynapticPopulation="I1L" synapse="Acetylcholine">
      <connection id="135" preCellId="../AVKL/0/AVKL" postCellId="../I1L/0/I1L" preSegmentId="6" postSegmentId="9" preFractionAlong="0.20953462395012568" postFractionAlong="0.14510557339645025"/>
    </projection>
    <projection id="NC_AVKR_I1R" presynapticPopulation="AVKR" postsynapticPopulation="I1R" synapse="Acetylcholine">
      <connection id="136" preCellId="../AVKR/0/AVKR" postCellId="../I1R/0/I1R" preSegmentId="8" postSegmentId="7" preFractionAlong="0.6635020694052571" postFractionAlong="0.3457302521929979"/>
    </projection>
    <projection id="NC_RIS_I1L" presynapticPopulation="RIS" postsynapticPopulation="I1L" synapse="Glutamate">
      <connection id="137" preCellId="../RIS/0/RIS" postCellId="../I1L/0/I1L" preSegmentId="3" postSegmentId="7" preFractionAlong="0.0789805993662317" postFractionAlong="0.693297468551492"/>
    </projection>
    <projection id="NC_RIS_I1R" presynapticPopulation="RIS" postsynapticPopulation="I1R" synapse="Glutamate">
      <connection id="138" preCellId="../RIS/0/RIS" postCellId="../I1R/0/I1R" preSegmentId="6" postSegmentId="3" preFractionAlong="0.82645365245498" postFractionAlong="0.9137650033037986"/>
    </projection>
    <projection id="NC_AVAL_I2L" presynapticPopulation="AVAL" postsynapticPopulation="I2L" synapse="Acetylcholine">
      <connection id="139" preCellId="../AVAL/0/AVAL" postCellId="../I2L/0/I2L" preSegmentId="7" postSegmentId="7" preFractionAlong="0.5864595123747977" postFractionAlong="0.2612451324535824"/>
    </projection>
    <projection id="NC_AVAR_I2R" presynapticPopulation="AVAR" postsynapticPopulation="I2R" synapse="Acetylcholine">
      <connection id="140" preCellId="../AVAR/0/AVAR" postCellId="../I2R/0/I2R" preSegmentId="7" postSegmentId="4" preFractionAlong="0.8978981047742521" postFractionAlong="0.12851566844411644"/>
    </projection>
    <projection id="NC_SMBVL_I4" presynapticPopulation="SMBVL" postsynapticPopulation="I4" synapse="Acetylcholine">
      <connection id="141" preCellId="../SMBVL/0/SMBVL" postCellId="../I4/0/I4" preSegmentId="7" postSegmentId="3" preFractionAlong="0.8951000290662443" postFractionAlong="0.9826524114935692"/>
    </projection>
    <projection id="NC_SMBVR_I4" presynapticPopulation="SMBVR" postsynapticPopulation="I4" synapse="Acetylcholine">
      <connection id="142" preCellId="../SMBVR/0/SMBVR" postCellId="../I4/0/I4" preSegmentId="3" postSegmentId="5" preFractionAlong="0.1616376937845918" postFractionAlong="0.9058493899993058"/>
    </projection>
  </network>
</neuroml>
