<?xml version='1.0' encoding='UTF-8'?>
<neuroml xmlns="http://www.neuroml.org/schema/neuroml2" xmlns:xsi="http://www.w3.org/2001/XMLSchema-instance" xsi:schemaLocation="http://www.neuroml.org/schema/neuroml2 https://raw.githubusercontent.com/NeuroML/NeuroML2/development/Schemas/NeuroML2/NeuroML_v2beta4.xsd" id="gvft_network_bio_prior_lamW_0_144_DF_0_033_t80_net">
  <notes>NeuroML2 network generated from GVFT simulation on 2025-05-04 14:46:48
</notes>
  <include href="AVAL.cell.nml"/>
  <include href="AVAR.cell.nml"/>
  <include href="AVKL.cell.nml"/>
  <include href="AVKR.cell.nml"/>
  <include href="RIS.cell.nml"/>
  <include href="RMDDL.cell.nml"/>
  <include href="RMDDR.cell.nml"/>
  <include href="RMDVL.cell.nml"/>
  <include href="RMDVR.cell.nml"/>
  <include href="SMBVL.cell.nml"/>
  <include href="SMBVR.cell.nml"/>
  <include href="URXL.cell.nml"/>
  <include href="URXR.cell.nml"/>
  <include href="I4.cell.nml"/>
  <include href="I1L.cell.nml"/>
  <include href="I1R.cell.nml"/>
  <include href="M2R.cell.nml"/>
  <include href="M4.cell.nml"/>
  <include href="I6.cell.nml"/>
  <include href="I2R.cell.nml"/>
  <include href="M3R.cell.nml"/>
  <include href="I5.cell.nml"/>
  <include href="MCR.cell.nml"/>
  <include href="M3L.cell.nml"/>
  <include href="MI.cell.nml"/>
  <include href="M1.cell.nml"/>
  <include href="MCL.cell.nml"/>
  <include href="I2L.cell.nml"/>
  <include href="M5.cell.nml"/>
  <include href="NSMR.cell.nml"/>
  <include href="M2L.cell.nml"/>
  <include href="NSML.cell.nml"/>
  <include href="I3.cell.nml"/>
  <include href="Generic_GJ.synapse.nml"/>
  <include href="Glutamate.synapse.nml"/>
  <include href="Acetylcholine.synapse.nml"/>
  <include href="Serotonin_Glutamate.synapse.nml"/>
  <network id="gvft_network_bio_prior_lamW_0_144_DF_0_033_t80_net" type="networkWithTemperature" temperature="20.0 degC">
    <population id="M1" component="M1" type="populationList" size="1">
      <instance id="0">
        <location x="0.1557789" y="-0.1356784" z="0.0"/>
      </instance>
    </population>
    <population id="M2L" component="M2L" type="populationList" size="1">
      <instance id="0">
        <location x="-0.9698492" y="0.6281407" z="0.0"/>
      </instance>
    </population>
    <population id="M2R" component="M2R" type="populationList" size="1">
      <instance id="0">
        <location x="0.7788945" y="-0.0753769" z="0.0"/>
      </instance>
    </population>
    <population id="M3L" component="M3L" type="populationList" size="1">
      <instance id="0">
        <location x="0.30653268" y="-0.41708544" z="0.0"/>
      </instance>
    </population>
    <population id="M3R" component="M3R" type="populationList" size="1">
      <instance id="0">
        <location x="0.45728645" y="-0.22613066" z="0.0"/>
      </instance>
    </population>
    <population id="M4" component="M4" type="populationList" size="1">
      <instance id="0">
        <location x="0.42713568" y="-0.68844223" z="0.0"/>
      </instance>
    </population>
    <population id="M5" component="M5" type="populationList" size="1">
      <instance id="0">
        <location x="-0.14572865" y="-0.7889447" z="0.0"/>
      </instance>
    </population>
    <population id="I1L" component="I1L" type="populationList" size="1">
      <instance id="0">
        <location x="-0.49748746" y="-0.44723618" z="0.0"/>
      </instance>
    </population>
    <population id="I1R" component="I1R" type="populationList" size="1">
      <instance id="0">
        <location x="-0.19597991" y="-0.67839193" z="0.0"/>
      </instance>
    </population>
    <population id="I2L" component="I2L" type="populationList" size="1">
      <instance id="0">
        <location x="-0.8492462" y="-0.1356784" z="0.0"/>
      </instance>
    </population>
    <population id="I2R" component="I2R" type="populationList" size="1">
      <instance id="0">
        <location x="-1.0" y="0.7487437" z="0.0"/>
      </instance>
    </population>
    <population id="I3" component="I3" type="populationList" size="1">
      <instance id="0">
        <location x="0.095477395" y="0.8894472" z="0.0"/>
      </instance>
    </population>
    <population id="I4" component="I4" type="populationList" size="1">
      <instance id="0">
        <location x="0.61809045" y="1.0" z="0.0"/>
      </instance>
    </population>
    <population id="I5" component="I5" type="populationList" size="1">
      <instance id="0">
        <location x="-0.04522614" y="0.919598" z="0.0"/>
      </instance>
    </population>
    <population id="I6" component="I6" type="populationList" size="1">
      <instance id="0">
        <location x="-0.37688443" y="-0.38693467" z="0.0"/>
      </instance>
    </population>
    <population id="MCL" component="MCL" type="populationList" size="1">
      <instance id="0">
        <location x="-0.8190955" y="0.0050251363" z="0.0"/>
      </instance>
    </population>
    <population id="MCR" component="MCR" type="populationList" size="1">
      <instance id="0">
        <location x="-0.47738695" y="-0.26633167" z="0.0"/>
      </instance>
    </population>
    <population id="MI" component="MI" type="populationList" size="1">
      <instance id="0">
        <location x="0.5276382" y="-0.42713568" z="0.0"/>
      </instance>
    </population>
    <population id="NSML" component="NSML" type="populationList" size="1">
      <instance id="0">
        <location x="0.8492462" y="-0.6080402" z="0.0"/>
      </instance>
    </population>
    <population id="NSMR" component="NSMR" type="populationList" size="1">
      <instance id="0">
        <location x="0.57788944" y="-0.45728645" z="0.0"/>
      </instance>
    </population>
    <population id="AVAL" component="AVAL" type="populationList" size="1">
      <instance id="0">
        <location x="5.0" y="0.0" z="0.0"/>
      </instance>
    </population>
    <population id="AVAR" component="AVAR" type="populationList" size="1">
      <instance id="0">
        <location x="5.0" y="0.0" z="0.0"/>
      </instance>
    </population>
    <population id="AVKL" component="AVKL" type="populationList" size="1">
      <instance id="0">
        <location x="5.0" y="0.0" z="0.0"/>
      </instance>
    </population>
    <population id="AVKR" component="AVKR" type="populationList" size="1">
      <instance id="0">
        <location x="5.0" y="0.0" z="0.0"/>
      </instance>
    </population>
    <population id="RIS" component="RIS" type="populationList" size="1">
      <instance id="0">
        <location x="5.0" y="0.0" z="0.0"/>
      </instance>
    </population>
    <population id="RMDDL" component="RMDDL" type="populationList" size="1">
      <instance id="0">
        <location x="5.0" y="0.0" z="0.0"/>
      </instance>
    </population>
    <population id="RMDDR" component="RMDDR" type="populationList" size="1">
      <instance id="0">
        <location x="5.0" y="0.0" z="0.0"/>
      </instance>
    </population>
    <population id="RMDVL" component="RMDVL" type="populationList" size="1">
      <instance id="0">
        <location x="5.0" y="0.0" z="0.0"/>
      </instance>
    </population>
    <population id="RMDVR" component="RMDVR" type="populationList" size="1">
      <instance id="0">
        <location x="5.0" y="0.0" z="0.0"/>
      </instance>
    </population>
    <population id="SMBVL" component="SMBVL" type="populationList" size="1">
      <instance id="0">
        <location x="5.0" y="0.0" z="0.0"/>
      </instance>
    </population>
    <population id="SMBVR" component="SMBVR" type="populationList" size="1">
      <instance id="0">
        <location x="5.0" y="0.0" z="0.0"/>
      </instance>
    </population>
    <population id="URXL" component="URXL" type="populationList" size="1">
      <instance id="0">
        <location x="5.0" y="0.0" z="0.0"/>
      </instance>
    </population>
    <population id="URXR" component="URXR" type="populationList" size="1">
      <instance id="0">
        <location x="5.0" y="0.0" z="0.0"/>
      </instance>
    </population>
    <electricalProjection id="NCXLS_M3R_M2L_GJ" presynapticPopulation="M3R" postsynapticPopulation="M2L">
      <electricalConnection id="0" preCell="0" postCell="0" synapse="Generic_GJ" preSegment="3" postSegment="4" preFractionAlong="0.5891563773937882" postFractionAlong="0.4544223191595411"/>
    </electricalProjection>
    <electricalProjection id="NCXLS_M3L_M5_GJ" presynapticPopulation="M3L" postsynapticPopulation="M5">
      <electricalConnection id="1" preCell="0" postCell="0" synapse="Generic_GJ" preSegment="3" postSegment="2" preFractionAlong="0.8262173757752201" postFractionAlong="0.22763253581939236"/>
    </electricalProjection>
    <electricalProjection id="NCXLS_M1_M4_GJ" presynapticPopulation="M1" postsynapticPopulation="M4">
      <electricalConnection id="2" preCell="0" postCell="0" synapse="Generic_GJ" preSegment="8" postSegment="7" preFractionAlong="0.8060967479607475" postFractionAlong="0.3534774751283788"/>
    </electricalProjection>
    <electricalProjection id="NCXLS_I6_I2L_GJ" presynapticPopulation="I6" postsynapticPopulation="I2L">
      <electricalConnection id="3" preCell="0" postCell="0" synapse="Generic_GJ" preSegment="2" postSegment="3" preFractionAlong="0.24563157404881453" postFractionAlong="0.10927944536815992"/>
    </electricalProjection>
    <electricalProjection id="NCXLS_I6_I2R_GJ" presynapticPopulation="I6" postsynapticPopulation="I2R">
      <electricalConnection id="4" preCell="0" postCell="0" synapse="Generic_GJ" preSegment="5" postSegment="3" preFractionAlong="0.2713813950795846" postFractionAlong="0.8551094219974401"/>
    </electricalProjection>
    <electricalProjection id="NCXLS_M4_M5_GJ" presynapticPopulation="M4" postsynapticPopulation="M5">
      <electricalConnection id="5" preCell="0" postCell="0" synapse="Generic_GJ" preSegment="7" postSegment="1" preFractionAlong="0.45693884989824896" postFractionAlong="0.9421579170299933"/>
    </electricalProjection>
    <electricalProjection id="NCXLS_M2L_M3R_GJ" presynapticPopulation="M2L" postsynapticPopulation="M3R">
      <electricalConnection id="6" preCell="0" postCell="0" synapse="Generic_GJ" preSegment="3" postSegment="1" preFractionAlong="0.10075284395957629" postFractionAlong="0.7075228189780428"/>
    </electricalProjection>
    <projection id="NCXLS_M3R_I3" presynapticPopulation="M3R" postsynapticPopulation="I3" synapse="Acetylcholine">
      <connection id="7" preCellId="../M3R/0/M3R" postCellId="../I3/0/I3" preSegmentId="3" postSegmentId="1" preFractionAlong="0.8701966904922421" postFractionAlong="0.13865252911330372"/>
    </projection>
    <projection id="NCXLS_M3R_I4" presynapticPopulation="M3R" postsynapticPopulation="I4" synapse="Acetylcholine">
      <connection id="8" preCellId="../M3R/0/M3R" postCellId="../I4/0/I4" preSegmentId="9" postSegmentId="3" preFractionAlong="0.17567229796858452" postFractionAlong="0.9602663584920665"/>
    </projection>
    <projection id="NCXLS_M3R_I5" presynapticPopulation="M3R" postsynapticPopulation="I5" synapse="Acetylcholine">
      <connection id="9" preCellId="../M3R/0/M3R" postCellId="../I5/0/I5" preSegmentId="1" postSegmentId="3" preFractionAlong="0.33631272750495556" postFractionAlong="0.23448400678316994"/>
    </projection>
    <projection id="NCXLS_M3R_M2R" presynapticPopulation="M3R" postsynapticPopulation="M2R" synapse="Acetylcholine">
      <connection id="10" preCellId="../M3R/0/M3R" postCellId="../M2R/0/M2R" preSegmentId="9" postSegmentId="6" preFractionAlong="0.5518287335341685" postFractionAlong="0.6317748436527554"/>
    </projection>
    <projection id="NCXLS_M3R_I2R" presynapticPopulation="M3R" postsynapticPopulation="I2R" synapse="Acetylcholine">
      <connection id="11" preCellId="../M3R/0/M3R" postCellId="../I2R/0/I2R" preSegmentId="4" postSegmentId="4" preFractionAlong="0.9486540809029906" postFractionAlong="0.16975849820713584"/>
    </projection>
    <projection id="NCXLS_M3L_I1L" presynapticPopulation="M3L" postsynapticPopulation="I1L" synapse="Acetylcholine">
      <connection id="12" preCellId="../M3L/0/M3L" postCellId="../I1L/0/I1L" preSegmentId="5" postSegmentId="8" preFractionAlong="0.014856122507503788" postFractionAlong="0.4811256918168456"/>
    </projection>
    <projection id="NCXLS_M3L_I6" presynapticPopulation="M3L" postsynapticPopulation="I6" synapse="Acetylcholine">
      <connection id="13" preCellId="../M3L/0/M3L" postCellId="../I6/0/I6" preSegmentId="1" postSegmentId="1" preFractionAlong="0.20932181604701705" postFractionAlong="0.2408780637054827"/>
    </projection>
    <projection id="NCXLS_M3L_I1R" presynapticPopulation="M3L" postsynapticPopulation="I1R" synapse="Acetylcholine">
      <connection id="14" preCellId="../M3L/0/M3L" postCellId="../I1R/0/I1R" preSegmentId="2" postSegmentId="1" preFractionAlong="0.7327234154133065" postFractionAlong="0.6858762750864646"/>
    </projection>
    <projection id="NCXLS_M3L_M4" presynapticPopulation="M3L" postsynapticPopulation="M4" synapse="Acetylcholine">
      <connection id="15" preCellId="../M3L/0/M3L" postCellId="../M4/0/M4" preSegmentId="7" postSegmentId="9" preFractionAlong="0.24995898123949556" postFractionAlong="0.6095285097540636"/>
    </projection>
    <projection id="NCXLS_M3L_MCL" presynapticPopulation="M3L" postsynapticPopulation="MCL" synapse="Acetylcholine">
      <connection id="16" preCellId="../M3L/0/M3L" postCellId="../MCL/0/MCL" preSegmentId="9" postSegmentId="7" preFractionAlong="0.3614653284985154" postFractionAlong="0.7776803762748927"/>
    </projection>
    <projection id="NCXLS_M3L_I2L" presynapticPopulation="M3L" postsynapticPopulation="I2L" synapse="Acetylcholine">
      <connection id="17" preCellId="../M3L/0/M3L" postCellId="../I2L/0/I2L" preSegmentId="2" postSegmentId="4" preFractionAlong="0.8929645917048273" postFractionAlong="0.4479436402077033"/>
    </projection>
    <projection id="NCXLS_M3L_MCR" presynapticPopulation="M3L" postsynapticPopulation="MCR" synapse="Acetylcholine">
      <connection id="18" preCellId="../M3L/0/M3L" postCellId="../MCR/0/MCR" preSegmentId="3" postSegmentId="1" preFractionAlong="0.415774313581574" postFractionAlong="0.8503769192997056"/>
    </projection>
    <projection id="NCXLS_M1_I1L" presynapticPopulation="M1" postsynapticPopulation="I1L" synapse="Acetylcholine">
      <connection id="19" preCellId="../M1/0/M1" postCellId="../I1L/0/I1L" preSegmentId="4" postSegmentId="6" preFractionAlong="0.8626751629457258" postFractionAlong="0.4433203207726987"/>
    </projection>
    <projection id="NCXLS_M1_I6" presynapticPopulation="M1" postsynapticPopulation="I6" synapse="Acetylcholine">
      <connection id="20" preCellId="../M1/0/M1" postCellId="../I6/0/I6" preSegmentId="6" postSegmentId="8" preFractionAlong="0.9053218283760898" postFractionAlong="0.08303875781018644"/>
    </projection>
    <projection id="NCXLS_M1_I1R" presynapticPopulation="M1" postsynapticPopulation="I1R" synapse="Acetylcholine">
      <connection id="21" preCellId="../M1/0/M1" postCellId="../I1R/0/I1R" preSegmentId="1" postSegmentId="4" preFractionAlong="0.8162278518628002" postFractionAlong="0.9882621151431868"/>
    </projection>
    <projection id="NCXLS_M1_MCL" presynapticPopulation="M1" postsynapticPopulation="MCL" synapse="Acetylcholine">
      <connection id="22" preCellId="../M1/0/M1" postCellId="../MCL/0/MCL" preSegmentId="9" postSegmentId="8" preFractionAlong="0.9543969020334743" postFractionAlong="0.9106430158345454"/>
    </projection>
    <projection id="NCXLS_M1_I2L" presynapticPopulation="M1" postsynapticPopulation="I2L" synapse="Acetylcholine">
      <connection id="23" preCellId="../M1/0/M1" postCellId="../I2L/0/I2L" preSegmentId="3" postSegmentId="9" preFractionAlong="0.49482845662142017" postFractionAlong="0.7423102455337244"/>
    </projection>
    <projection id="NCXLS_M1_M5" presynapticPopulation="M1" postsynapticPopulation="M5" synapse="Acetylcholine">
      <connection id="24" preCellId="../M1/0/M1" postCellId="../M5/0/M5" preSegmentId="5" postSegmentId="2" preFractionAlong="0.499618411998762" postFractionAlong="0.30521453012885913"/>
    </projection>
    <projection id="NCXLS_M1_M2L" presynapticPopulation="M1" postsynapticPopulation="M2L" synapse="Acetylcholine">
      <connection id="25" preCellId="../M1/0/M1" postCellId="../M2L/0/M2L" preSegmentId="1" postSegmentId="6" preFractionAlong="0.3310162594948949" postFractionAlong="0.7403030598990841"/>
    </projection>
    <projection id="NCXLS_M1_MCR" presynapticPopulation="M1" postsynapticPopulation="MCR" synapse="Acetylcholine">
      <connection id="26" preCellId="../M1/0/M1" postCellId="../MCR/0/MCR" preSegmentId="9" postSegmentId="3" preFractionAlong="0.17170998897368817" postFractionAlong="0.5298338889620703"/>
    </projection>
    <projection id="NCXLS_M1_I2R" presynapticPopulation="M1" postsynapticPopulation="I2R" synapse="Acetylcholine">
      <connection id="27" preCellId="../M1/0/M1" postCellId="../I2R/0/I2R" preSegmentId="2" postSegmentId="7" preFractionAlong="0.628905144923615" postFractionAlong="0.11793867487423348"/>
    </projection>
    <projection id="NCXLS_I6_I1L" presynapticPopulation="I6" postsynapticPopulation="I1L" synapse="Glutamate">
      <connection id="28" preCellId="../I6/0/I6" postCellId="../I1L/0/I1L" preSegmentId="9" postSegmentId="4" preFractionAlong="0.2832965279977022" postFractionAlong="0.00024293443451273156"/>
    </projection>
    <projection id="NCXLS_I6_MCL" presynapticPopulation="I6" postsynapticPopulation="MCL" synapse="Acetylcholine">
      <connection id="29" preCellId="../I6/0/I6" postCellId="../MCL/0/MCL" preSegmentId="9" postSegmentId="4" preFractionAlong="0.23360903203623684" postFractionAlong="0.7783719045454912"/>
    </projection>
    <projection id="NCXLS_I6_M2L" presynapticPopulation="I6" postsynapticPopulation="M2L" synapse="Acetylcholine">
      <connection id="30" preCellId="../I6/0/I6" postCellId="../M2L/0/M2L" preSegmentId="2" postSegmentId="6" preFractionAlong="0.9709047114498695" postFractionAlong="0.3736056595340591"/>
    </projection>
    <projection id="NCXLS_I6_MCR" presynapticPopulation="I6" postsynapticPopulation="MCR" synapse="Acetylcholine">
      <connection id="31" preCellId="../I6/0/I6" postCellId="../MCR/0/MCR" preSegmentId="6" postSegmentId="5" preFractionAlong="0.3105770155507873" postFractionAlong="0.6157260534451727"/>
    </projection>
    <projection id="NCXLS_M4_I1L" presynapticPopulation="M4" postsynapticPopulation="I1L" synapse="Acetylcholine">
      <connection id="32" preCellId="../M4/0/M4" postCellId="../I1L/0/I1L" preSegmentId="6" postSegmentId="3" preFractionAlong="0.036207261487384956" postFractionAlong="0.5511413361947338"/>
    </projection>
    <projection id="NCXLS_M4_I6" presynapticPopulation="M4" postsynapticPopulation="I6" synapse="Acetylcholine">
      <connection id="33" preCellId="../M4/0/M4" postCellId="../I6/0/I6" preSegmentId="5" postSegmentId="6" preFractionAlong="0.3037238516318258" postFractionAlong="0.9210694862995814"/>
    </projection>
    <projection id="NCXLS_M4_I1R" presynapticPopulation="M4" postsynapticPopulation="I1R" synapse="Acetylcholine">
      <connection id="34" preCellId="../M4/0/M4" postCellId="../I1R/0/I1R" preSegmentId="9" postSegmentId="3" preFractionAlong="0.6722006635651122" postFractionAlong="0.19675877767165562"/>
    </projection>
    <projection id="NCXLS_M4_MCL" presynapticPopulation="M4" postsynapticPopulation="MCL" synapse="Acetylcholine">
      <connection id="35" preCellId="../M4/0/M4" postCellId="../MCL/0/MCL" preSegmentId="8" postSegmentId="3" preFractionAlong="0.18125025555155194" postFractionAlong="0.7120079611981627"/>
    </projection>
    <projection id="NCXLS_M4_I2L" presynapticPopulation="M4" postsynapticPopulation="I2L" synapse="Acetylcholine">
      <connection id="36" preCellId="../M4/0/M4" postCellId="../I2L/0/I2L" preSegmentId="4" postSegmentId="6" preFractionAlong="0.4022946780763187" postFractionAlong="0.7832900924388664"/>
    </projection>
    <projection id="NCXLS_M4_M2L" presynapticPopulation="M4" postsynapticPopulation="M2L" synapse="Acetylcholine">
      <connection id="37" preCellId="../M4/0/M4" postCellId="../M2L/0/M2L" preSegmentId="5" postSegmentId="3" preFractionAlong="0.12665587284719393" postFractionAlong="0.4206302368788194"/>
    </projection>
    <projection id="NCXLS_M4_MCR" presynapticPopulation="M4" postsynapticPopulation="MCR" synapse="Acetylcholine">
      <connection id="38" preCellId="../M4/0/M4" postCellId="../MCR/0/MCR" preSegmentId="9" postSegmentId="1" preFractionAlong="0.3763118169549976" postFractionAlong="0.363189123716225"/>
    </projection>
    <projection id="NCXLS_M4_I2R" presynapticPopulation="M4" postsynapticPopulation="I2R" synapse="Acetylcholine">
      <connection id="39" preCellId="../M4/0/M4" postCellId="../I2R/0/I2R" preSegmentId="7" postSegmentId="3" preFractionAlong="0.10816938755075933" postFractionAlong="0.9866967960804238"/>
    </projection>
    <projection id="NCXLS_MCL_I3" presynapticPopulation="MCL" postsynapticPopulation="I3" synapse="Acetylcholine">
      <connection id="40" preCellId="../MCL/0/MCL" postCellId="../I3/0/I3" preSegmentId="1" postSegmentId="4" preFractionAlong="0.6508663952541407" postFractionAlong="0.1988917029380174"/>
    </projection>
    <projection id="NCXLS_MCL_I4" presynapticPopulation="MCL" postsynapticPopulation="I4" synapse="Acetylcholine">
      <connection id="41" preCellId="../MCL/0/MCL" postCellId="../I4/0/I4" preSegmentId="3" postSegmentId="7" preFractionAlong="0.6593503030992501" postFractionAlong="0.909726837934197"/>
    </projection>
    <projection id="NCXLS_MCL_I5" presynapticPopulation="MCL" postsynapticPopulation="I5" synapse="Acetylcholine">
      <connection id="42" preCellId="../MCL/0/MCL" postCellId="../I5/0/I5" preSegmentId="1" postSegmentId="8" preFractionAlong="0.19803094663109366" postFractionAlong="0.13411962270979016"/>
    </projection>
    <projection id="NCXLS_MCL_M2L" presynapticPopulation="MCL" postsynapticPopulation="M2L" synapse="Acetylcholine">
      <connection id="43" preCellId="../MCL/0/MCL" postCellId="../M2L/0/M2L" preSegmentId="8" postSegmentId="9" preFractionAlong="0.8682970181613279" postFractionAlong="0.29471484685646876"/>
    </projection>
    <projection id="NCXLS_MCL_I2R" presynapticPopulation="MCL" postsynapticPopulation="I2R" synapse="Acetylcholine">
      <connection id="44" preCellId="../MCL/0/MCL" postCellId="../I2R/0/I2R" preSegmentId="3" postSegmentId="5" preFractionAlong="0.3404410800994184" postFractionAlong="0.9909861694966853"/>
    </projection>
    <projection id="NCXLS_M5_I1L" presynapticPopulation="M5" postsynapticPopulation="I1L" synapse="Acetylcholine">
      <connection id="45" preCellId="../M5/0/M5" postCellId="../I1L/0/I1L" preSegmentId="8" postSegmentId="7" preFractionAlong="0.2047139475951013" postFractionAlong="0.33481834471345107"/>
    </projection>
    <projection id="NCXLS_M5_I6" presynapticPopulation="M5" postsynapticPopulation="I6" synapse="Acetylcholine">
      <connection id="46" preCellId="../M5/0/M5" postCellId="../I6/0/I6" preSegmentId="6" postSegmentId="1" preFractionAlong="0.6951964597032112" postFractionAlong="0.12025098657073463"/>
    </projection>
    <projection id="NCXLS_M5_I1R" presynapticPopulation="M5" postsynapticPopulation="I1R" synapse="Acetylcholine">
      <connection id="47" preCellId="../M5/0/M5" postCellId="../I1R/0/I1R" preSegmentId="1" postSegmentId="6" preFractionAlong="0.316684356016926" postFractionAlong="0.677303959298141"/>
    </projection>
    <projection id="NCXLS_M5_MCL" presynapticPopulation="M5" postsynapticPopulation="MCL" synapse="Acetylcholine">
      <connection id="48" preCellId="../M5/0/M5" postCellId="../MCL/0/MCL" preSegmentId="8" postSegmentId="6" preFractionAlong="0.0028421536639724465" postFractionAlong="0.9308981443714295"/>
    </projection>
    <projection id="NCXLS_M5_I2L" presynapticPopulation="M5" postsynapticPopulation="I2L" synapse="Acetylcholine">
      <connection id="49" preCellId="../M5/0/M5" postCellId="../I2L/0/I2L" preSegmentId="5" postSegmentId="5" preFractionAlong="0.7710383702448548" postFractionAlong="0.4352307180094239"/>
    </projection>
    <projection id="NCXLS_M5_M2L" presynapticPopulation="M5" postsynapticPopulation="M2L" synapse="Glutamate">
      <connection id="50" preCellId="../M5/0/M5" postCellId="../M2L/0/M2L" preSegmentId="1" postSegmentId="9" preFractionAlong="0.30541349854275135" postFractionAlong="0.15766102679690797"/>
    </projection>
    <projection id="NCXLS_M5_MCR" presynapticPopulation="M5" postsynapticPopulation="MCR" synapse="Acetylcholine">
      <connection id="51" preCellId="../M5/0/M5" postCellId="../MCR/0/MCR" preSegmentId="4" postSegmentId="7" preFractionAlong="0.76075930838695" postFractionAlong="0.015838070944874216"/>
    </projection>
    <projection id="NCXLS_M5_I2R" presynapticPopulation="M5" postsynapticPopulation="I2R" synapse="Acetylcholine">
      <connection id="52" preCellId="../M5/0/M5" postCellId="../I2R/0/I2R" preSegmentId="1" postSegmentId="4" preFractionAlong="0.10612541856490243" postFractionAlong="0.68864505226439"/>
    </projection>
    <projection id="NCXLS_M2L_M3L" presynapticPopulation="M2L" postsynapticPopulation="M3L" synapse="Acetylcholine">
      <connection id="53" preCellId="../M2L/0/M2L" postCellId="../M3L/0/M3L" preSegmentId="5" postSegmentId="6" preFractionAlong="0.16311467511667876" postFractionAlong="0.2492037705912873"/>
    </projection>
    <projection id="NCXLS_M2L_I1L" presynapticPopulation="M2L" postsynapticPopulation="I1L" synapse="Acetylcholine">
      <connection id="54" preCellId="../M2L/0/M2L" postCellId="../I1L/0/I1L" preSegmentId="1" postSegmentId="3" preFractionAlong="0.5816513326730067" postFractionAlong="0.9754505241349513"/>
    </projection>
    <projection id="NCXLS_M2L_M1" presynapticPopulation="M2L" postsynapticPopulation="M1" synapse="Glutamate">
      <connection id="55" preCellId="../M2L/0/M2L" postCellId="../M1/0/M1" preSegmentId="6" postSegmentId="6" preFractionAlong="0.004504480980288661" postFractionAlong="0.3132760111381787"/>
    </projection>
    <projection id="NCXLS_M2L_I6" presynapticPopulation="M2L" postsynapticPopulation="I6" synapse="Acetylcholine">
      <connection id="56" preCellId="../M2L/0/M2L" postCellId="../I6/0/I6" preSegmentId="7" postSegmentId="9" preFractionAlong="0.3242508738519706" postFractionAlong="0.11103492302385953"/>
    </projection>
    <projection id="NCXLS_M2L_I1R" presynapticPopulation="M2L" postsynapticPopulation="I1R" synapse="Acetylcholine">
      <connection id="57" preCellId="../M2L/0/M2L" postCellId="../I1R/0/I1R" preSegmentId="5" postSegmentId="5" preFractionAlong="0.10175452850101574" postFractionAlong="0.04915262872471038"/>
    </projection>
    <projection id="NCXLS_M2L_M4" presynapticPopulation="M2L" postsynapticPopulation="M4" synapse="Glutamate">
      <connection id="58" preCellId="../M2L/0/M2L" postCellId="../M4/0/M4" preSegmentId="3" postSegmentId="1" preFractionAlong="0.32806968448565776" postFractionAlong="0.6603868382008886"/>
    </projection>
    <projection id="NCXLS_M2L_MCL" presynapticPopulation="M2L" postsynapticPopulation="MCL" synapse="Acetylcholine">
      <connection id="59" preCellId="../M2L/0/M2L" postCellId="../MCL/0/MCL" preSegmentId="2" postSegmentId="6" preFractionAlong="0.6843286504552667" postFractionAlong="0.35991403621536344"/>
    </projection>
    <projection id="NCXLS_M2L_I3" presynapticPopulation="M2L" postsynapticPopulation="I3" synapse="Acetylcholine">
      <connection id="60" preCellId="../M2L/0/M2L" postCellId="../I3/0/I3" preSegmentId="5" postSegmentId="5" preFractionAlong="0.040595985302373405" postFractionAlong="0.39075298456700414"/>
    </projection>
    <projection id="NCXLS_M2L_I2L" presynapticPopulation="M2L" postsynapticPopulation="I2L" synapse="Acetylcholine">
      <connection id="61" preCellId="../M2L/0/M2L" postCellId="../I2L/0/I2L" preSegmentId="7" postSegmentId="2" preFractionAlong="0.20423862056986442" postFractionAlong="0.24720511893063324"/>
    </projection>
    <projection id="NCXLS_M2L_MI" presynapticPopulation="M2L" postsynapticPopulation="MI" synapse="Acetylcholine">
      <connection id="62" preCellId="../M2L/0/M2L" postCellId="../MI/0/MI" preSegmentId="8" postSegmentId="1" preFractionAlong="0.9810294891150761" postFractionAlong="0.6137079695437473"/>
    </projection>
    <projection id="NCXLS_M2L_M5" presynapticPopulation="M2L" postsynapticPopulation="M5" synapse="Glutamate">
      <connection id="63" preCellId="../M2L/0/M2L" postCellId="../M5/0/M5" preSegmentId="5" postSegmentId="8" preFractionAlong="0.4976879595477721" postFractionAlong="0.4760207068801199"/>
    </projection>
    <projection id="NCXLS_M2L_NSML" presynapticPopulation="M2L" postsynapticPopulation="NSML" synapse="Acetylcholine">
      <connection id="64" preCellId="../M2L/0/M2L" postCellId="../NSML/0/NSML" preSegmentId="3" postSegmentId="7" preFractionAlong="0.6048017618439638" postFractionAlong="0.4801262290142092"/>
    </projection>
    <projection id="NCXLS_M2L_I4" presynapticPopulation="M2L" postsynapticPopulation="I4" synapse="Acetylcholine">
      <connection id="65" preCellId="../M2L/0/M2L" postCellId="../I4/0/I4" preSegmentId="9" postSegmentId="7" preFractionAlong="0.0627221714144588" postFractionAlong="0.8154877655801359"/>
    </projection>
    <projection id="NCXLS_M2L_I5" presynapticPopulation="M2L" postsynapticPopulation="I5" synapse="Acetylcholine">
      <connection id="66" preCellId="../M2L/0/M2L" postCellId="../I5/0/I5" preSegmentId="7" postSegmentId="9" preFractionAlong="0.6492287795409635" postFractionAlong="0.16354568682413928"/>
    </projection>
    <projection id="NCXLS_M2L_M2R" presynapticPopulation="M2L" postsynapticPopulation="M2R" synapse="Acetylcholine">
      <connection id="67" preCellId="../M2L/0/M2L" postCellId="../M2R/0/M2R" preSegmentId="8" postSegmentId="1" preFractionAlong="0.39808717823623085" postFractionAlong="0.026446902597667465"/>
    </projection>
    <projection id="NCXLS_M2L_NSMR" presynapticPopulation="M2L" postsynapticPopulation="NSMR" synapse="Acetylcholine">
      <connection id="68" preCellId="../M2L/0/M2L" postCellId="../NSMR/0/NSMR" preSegmentId="8" postSegmentId="9" preFractionAlong="0.02513972575631418" postFractionAlong="0.7229306722386036"/>
    </projection>
    <projection id="NCXLS_M2L_MCR" presynapticPopulation="M2L" postsynapticPopulation="MCR" synapse="Acetylcholine">
      <connection id="69" preCellId="../M2L/0/M2L" postCellId="../MCR/0/MCR" preSegmentId="6" postSegmentId="2" preFractionAlong="0.7968481767721232" postFractionAlong="0.12756815136428423"/>
    </projection>
    <projection id="NCXLS_M2R_M3R" presynapticPopulation="M2R" postsynapticPopulation="M3R" synapse="Glutamate">
      <connection id="70" preCellId="../M2R/0/M2R" postCellId="../M3R/0/M3R" preSegmentId="5" postSegmentId="4" preFractionAlong="0.6932095422188678" postFractionAlong="0.07091619143856953"/>
    </projection>
    <projection id="NCXLS_M2R_M3L" presynapticPopulation="M2R" postsynapticPopulation="M3L" synapse="Acetylcholine">
      <connection id="71" preCellId="../M2R/0/M2R" postCellId="../M3L/0/M3L" preSegmentId="5" postSegmentId="5" preFractionAlong="0.77132314321685" postFractionAlong="0.8414397599562448"/>
    </projection>
    <projection id="NCXLS_M2R_I1L" presynapticPopulation="M2R" postsynapticPopulation="I1L" synapse="Acetylcholine">
      <connection id="72" preCellId="../M2R/0/M2R" postCellId="../I1L/0/I1L" preSegmentId="3" postSegmentId="8" preFractionAlong="0.6982725935305465" postFractionAlong="0.20777062943972835"/>
    </projection>
    <projection id="NCXLS_M2R_I6" presynapticPopulation="M2R" postsynapticPopulation="I6" synapse="Acetylcholine">
      <connection id="73" preCellId="../M2R/0/M2R" postCellId="../I6/0/I6" preSegmentId="7" postSegmentId="9" preFractionAlong="0.5137038656225555" postFractionAlong="0.24026258449893145"/>
    </projection>
    <projection id="NCXLS_M2R_I1R" presynapticPopulation="M2R" postsynapticPopulation="I1R" synapse="Acetylcholine">
      <connection id="74" preCellId="../M2R/0/M2R" postCellId="../I1R/0/I1R" preSegmentId="5" postSegmentId="1" preFractionAlong="0.20113654259037728" postFractionAlong="0.1786288767542995"/>
    </projection>
    <projection id="NCXLS_M2R_M4" presynapticPopulation="M2R" postsynapticPopulation="M4" synapse="Acetylcholine">
      <connection id="75" preCellId="../M2R/0/M2R" postCellId="../M4/0/M4" preSegmentId="3" postSegmentId="3" preFractionAlong="0.5085388914977079" postFractionAlong="0.47675387550832815"/>
    </projection>
    <projection id="NCXLS_M2R_MI" presynapticPopulation="M2R" postsynapticPopulation="MI" synapse="Acetylcholine">
      <connection id="76" preCellId="../M2R/0/M2R" postCellId="../MI/0/MI" preSegmentId="2" postSegmentId="2" preFractionAlong="0.9457846462409557" postFractionAlong="0.929858500500561"/>
    </projection>
    <projection id="NCXLS_M2R_M5" presynapticPopulation="M2R" postsynapticPopulation="M5" synapse="Acetylcholine">
      <connection id="77" preCellId="../M2R/0/M2R" postCellId="../M5/0/M5" preSegmentId="3" postSegmentId="7" preFractionAlong="0.07866205831425865" postFractionAlong="0.17187370253924683"/>
    </projection>
    <projection id="NCXLS_M2R_NSML" presynapticPopulation="M2R" postsynapticPopulation="NSML" synapse="Acetylcholine">
      <connection id="78" preCellId="../M2R/0/M2R" postCellId="../NSML/0/NSML" preSegmentId="4" postSegmentId="7" preFractionAlong="0.18465124589369764" postFractionAlong="0.34109431658740175"/>
    </projection>
    <projection id="NCXLS_M2R_NSMR" presynapticPopulation="M2R" postsynapticPopulation="NSMR" synapse="Acetylcholine">
      <connection id="79" preCellId="../M2R/0/M2R" postCellId="../NSMR/0/NSMR" preSegmentId="9" postSegmentId="5" preFractionAlong="0.0650007889488885" postFractionAlong="0.8253084024229824"/>
    </projection>
    <projection id="NCXLS_MCR_I1L" presynapticPopulation="MCR" postsynapticPopulation="I1L" synapse="Acetylcholine">
      <connection id="80" preCellId="../MCR/0/MCR" postCellId="../I1L/0/I1L" preSegmentId="8" postSegmentId="5" preFractionAlong="0.8642306022615571" postFractionAlong="0.46458276443924607"/>
    </projection>
    <projection id="NCXLS_MCR_I6" presynapticPopulation="MCR" postsynapticPopulation="I6" synapse="Acetylcholine">
      <connection id="81" preCellId="../MCR/0/MCR" postCellId="../I6/0/I6" preSegmentId="6" postSegmentId="5" preFractionAlong="0.8030756423377449" postFractionAlong="0.43180510078591205"/>
    </projection>
    <projection id="NCXLS_MCR_I1R" presynapticPopulation="MCR" postsynapticPopulation="I1R" synapse="Acetylcholine">
      <connection id="82" preCellId="../MCR/0/MCR" postCellId="../I1R/0/I1R" preSegmentId="2" postSegmentId="4" preFractionAlong="0.9409657878427938" postFractionAlong="0.4863721008251476"/>
    </projection>
    <projection id="NCXLS_MCR_M4" presynapticPopulation="MCR" postsynapticPopulation="M4" synapse="Acetylcholine">
      <connection id="83" preCellId="../MCR/0/MCR" postCellId="../M4/0/M4" preSegmentId="2" postSegmentId="5" preFractionAlong="0.7850718615635127" postFractionAlong="0.821577691760838"/>
    </projection>
    <projection id="NCXLS_MCR_M5" presynapticPopulation="MCR" postsynapticPopulation="M5" synapse="Acetylcholine">
      <connection id="84" preCellId="../MCR/0/MCR" postCellId="../M5/0/M5" preSegmentId="7" postSegmentId="5" preFractionAlong="0.8798104357196852" postFractionAlong="0.04508885600538992"/>
    </projection>
    <projection id="NC_I1L_RMDDL" presynapticPopulation="I1L" postsynapticPopulation="RMDDL" synapse="Acetylcholine">
      <connection id="85" preCellId="../I1L/0/I1L" postCellId="../RMDDL/0/RMDDL" preSegmentId="6" postSegmentId="8" preFractionAlong="0.4678594626341599" postFractionAlong="0.6466211336575554"/>
    </projection>
    <projection id="NC_I1L_RMDVL" presynapticPopulation="I1L" postsynapticPopulation="RMDVL" synapse="Acetylcholine">
      <connection id="86" preCellId="../I1L/0/I1L" postCellId="../RMDVL/0/RMDVL" preSegmentId="4" postSegmentId="9" preFractionAlong="0.48970403185785505" postFractionAlong="0.7625711127915529"/>
    </projection>
    <projection id="NC_I1R_RMDDR" presynapticPopulation="I1R" postsynapticPopulation="RMDDR" synapse="Acetylcholine">
      <connection id="87" preCellId="../I1R/0/I1R" postCellId="../RMDDR/0/RMDDR" preSegmentId="6" postSegmentId="3" preFractionAlong="0.28192955175156076" postFractionAlong="0.5308590342884758"/>
    </projection>
    <projection id="NC_I1R_RMDVR" presynapticPopulation="I1R" postsynapticPopulation="RMDVR" synapse="Acetylcholine">
      <connection id="88" preCellId="../I1R/0/I1R" postCellId="../RMDVR/0/RMDVR" preSegmentId="6" postSegmentId="9" preFractionAlong="0.999707637821831" postFractionAlong="0.8433029661521613"/>
    </projection>
    <projection id="NC_I2L_URXL" presynapticPopulation="I2L" postsynapticPopulation="URXL" synapse="Glutamate">
      <connection id="89" preCellId="../I2L/0/I2L" postCellId="../URXL/0/URXL" preSegmentId="4" postSegmentId="6" preFractionAlong="0.6261740737938947" postFractionAlong="0.7039134261281078"/>
    </projection>
    <projection id="NC_I2R_URXR" presynapticPopulation="I2R" postsynapticPopulation="URXR" synapse="Glutamate">
      <connection id="90" preCellId="../I2R/0/I2R" postCellId="../URXR/0/URXR" preSegmentId="6" postSegmentId="9" preFractionAlong="0.7898646210355388" postFractionAlong="0.6183463070454575"/>
    </projection>
    <projection id="NC_AVKL_I1L" presynapticPopulation="AVKL" postsynapticPopulation="I1L" synapse="Acetylcholine">
      <connection id="91" preCellId="../AVKL/0/AVKL" postCellId="../I1L/0/I1L" preSegmentId="6" postSegmentId="3" preFractionAlong="0.15633143839283858" postFractionAlong="0.4370337254497708"/>
    </projection>
    <projection id="NC_AVKR_I1R" presynapticPopulation="AVKR" postsynapticPopulation="I1R" synapse="Acetylcholine">
      <connection id="92" preCellId="../AVKR/0/AVKR" postCellId="../I1R/0/I1R" preSegmentId="9" postSegmentId="2" preFractionAlong="0.5807371397973519" postFractionAlong="0.3881330810022493"/>
    </projection>
    <projection id="NC_RIS_I1L" presynapticPopulation="RIS" postsynapticPopulation="I1L" synapse="Glutamate">
      <connection id="93" preCellId="../RIS/0/RIS" postCellId="../I1L/0/I1L" preSegmentId="8" postSegmentId="3" preFractionAlong="0.160603146429649" postFractionAlong="0.3406854235748016"/>
    </projection>
    <projection id="NC_RIS_I1R" presynapticPopulation="RIS" postsynapticPopulation="I1R" synapse="Glutamate">
      <connection id="94" preCellId="../RIS/0/RIS" postCellId="../I1R/0/I1R" preSegmentId="8" postSegmentId="3" preFractionAlong="0.06668230036302458" postFractionAlong="0.8296686802650951"/>
    </projection>
    <projection id="NC_AVAL_I2L" presynapticPopulation="AVAL" postsynapticPopulation="I2L" synapse="Acetylcholine">
      <connection id="95" preCellId="../AVAL/0/AVAL" postCellId="../I2L/0/I2L" preSegmentId="6" postSegmentId="9" preFractionAlong="0.4703715673848665" postFractionAlong="0.9562459558696672"/>
    </projection>
    <projection id="NC_AVAR_I2R" presynapticPopulation="AVAR" postsynapticPopulation="I2R" synapse="Acetylcholine">
      <connection id="96" preCellId="../AVAR/0/AVAR" postCellId="../I2R/0/I2R" preSegmentId="6" postSegmentId="8" preFractionAlong="0.959235435323822" postFractionAlong="0.7156626520723114"/>
    </projection>
    <projection id="NC_SMBVL_I4" presynapticPopulation="SMBVL" postsynapticPopulation="I4" synapse="Acetylcholine">
      <connection id="97" preCellId="../SMBVL/0/SMBVL" postCellId="../I4/0/I4" preSegmentId="9" postSegmentId="4" preFractionAlong="0.5897290360764658" postFractionAlong="0.44991278108550536"/>
    </projection>
    <projection id="NC_SMBVR_I4" presynapticPopulation="SMBVR" postsynapticPopulation="I4" synapse="Acetylcholine">
      <connection id="98" preCellId="../SMBVR/0/SMBVR" postCellId="../I4/0/I4" preSegmentId="8" postSegmentId="5" preFractionAlong="0.4990361729040813" postFractionAlong="0.931535049155262"/>
    </projection>
  </network>
</neuroml>
