<?xml version='1.0' encoding='UTF-8'?>
<neuroml xmlns="http://www.neuroml.org/schema/neuroml2" xmlns:xsi="http://www.w3.org/2001/XMLSchema-instance" xsi:schemaLocation="http://www.neuroml.org/schema/neuroml2 https://raw.githubusercontent.com/NeuroML/NeuroML2/development/Schemas/NeuroML2/NeuroML_v2beta4.xsd" id="gvft_network_bio_prior_lamW_0_144_DF_0_037_t100_net">
  <notes>NeuroML2 network generated from GVFT simulation on 2025-05-04 22:10:16
</notes>
  <include href="AVAL.cell.nml"/>
  <include href="AVAR.cell.nml"/>
  <include href="AVKL.cell.nml"/>
  <include href="AVKR.cell.nml"/>
  <include href="RIS.cell.nml"/>
  <include href="RMDDL.cell.nml"/>
  <include href="RMDDR.cell.nml"/>
  <include href="RMDVL.cell.nml"/>
  <include href="RMDVR.cell.nml"/>
  <include href="SMBVL.cell.nml"/>
  <include href="SMBVR.cell.nml"/>
  <include href="URXL.cell.nml"/>
  <include href="URXR.cell.nml"/>
  <include href="M3R.cell.nml"/>
  <include href="I3.cell.nml"/>
  <include href="I4.cell.nml"/>
  <include href="M2R.cell.nml"/>
  <include href="NSMR.cell.nml"/>
  <include href="M1.cell.nml"/>
  <include href="MI.cell.nml"/>
  <include href="MCL.cell.nml"/>
  <include href="I6.cell.nml"/>
  <include href="I2R.cell.nml"/>
  <include href="I5.cell.nml"/>
  <include href="MCR.cell.nml"/>
  <include href="I2L.cell.nml"/>
  <include href="M2L.cell.nml"/>
  <include href="M5.cell.nml"/>
  <include href="M4.cell.nml"/>
  <include href="I1L.cell.nml"/>
  <include href="I1R.cell.nml"/>
  <include href="M3L.cell.nml"/>
  <include href="NSML.cell.nml"/>
  <include href="pm1.cell.nml"/>
  <include href="pm2L.cell.nml"/>
  <include href="pm2R.cell.nml"/>
  <include href="pm3L.cell.nml"/>
  <include href="pm3R.cell.nml"/>
  <include href="pm4L.cell.nml"/>
  <include href="pm4R.cell.nml"/>
  <include href="pm5L.cell.nml"/>
  <include href="pm5R.cell.nml"/>
  <include href="pm6L.cell.nml"/>
  <include href="pm6R.cell.nml"/>
  <include href="pm7L.cell.nml"/>
  <include href="pm7R.cell.nml"/>
  <include href="pm8.cell.nml"/>
  <include href="Serotonin_Glutamate.synapse.nml"/>
  <include href="Generic_GJ.nml"/>
  <include href="Acetylcholine.synapse.nml"/>
  <include href="Glutamate.synapse.nml"/>
  <network id="gvft_network_bio_prior_lamW_0_144_DF_0_037_t100_net" type="networkWithTemperature" temperature="20.0 degC">
    <population id="M1" component="M1" type="populationList" size="1">
      <instance id="0">
        <location x="0.47738695" y="1.0" z="0.0"/>
      </instance>
    </population>
    <population id="M2L" component="M2L" type="populationList" size="1">
      <instance id="0">
        <location x="0.94974875" y="0.41708544" z="0.0"/>
      </instance>
    </population>
    <population id="M2R" component="M2R" type="populationList" size="1">
      <instance id="0">
        <location x="-0.6683417" y="0.53768843" z="0.0"/>
      </instance>
    </population>
    <population id="M3L" component="M3L" type="populationList" size="1">
      <instance id="0">
        <location x="-0.5879397" y="-0.55778897" z="0.0"/>
      </instance>
    </population>
    <population id="M3R" component="M3R" type="populationList" size="1">
      <instance id="0">
        <location x="0.919598" y="-0.67839193" z="0.0"/>
      </instance>
    </population>
    <population id="M4" component="M4" type="populationList" size="1">
      <instance id="0">
        <location x="-0.095477395" y="0.1557789" z="0.0"/>
      </instance>
    </population>
    <population id="M5" component="M5" type="populationList" size="1">
      <instance id="0">
        <location x="0.51758796" y="0.16582915" z="0.0"/>
      </instance>
    </population>
    <population id="I1L" component="I1L" type="populationList" size="1">
      <instance id="0">
        <location x="0.6482412" y="-0.959799" z="0.0"/>
      </instance>
    </population>
    <population id="I1R" component="I1R" type="populationList" size="1">
      <instance id="0">
        <location x="-0.68844223" y="0.5276382" z="0.0"/>
      </instance>
    </population>
    <population id="I2L" component="I2L" type="populationList" size="1">
      <instance id="0">
        <location x="-1.0" y="-0.31658292" z="0.0"/>
      </instance>
    </population>
    <population id="I2R" component="I2R" type="populationList" size="1">
      <instance id="0">
        <location x="0.5477387" y="-0.6482412" z="0.0"/>
      </instance>
    </population>
    <population id="I3" component="I3" type="populationList" size="1">
      <instance id="0">
        <location x="0.79899496" y="0.7889447" z="0.0"/>
      </instance>
    </population>
    <population id="I4" component="I4" type="populationList" size="1">
      <instance id="0">
        <location x="0.8592965" y="0.30653268" z="0.0"/>
      </instance>
    </population>
    <population id="I5" component="I5" type="populationList" size="1">
      <instance id="0">
        <location x="-0.015075387" y="-0.8994975" z="0.0"/>
      </instance>
    </population>
    <population id="I6" component="I6" type="populationList" size="1">
      <instance id="0">
        <location x="-0.40703517" y="-0.45728645" z="0.0"/>
      </instance>
    </population>
    <population id="MCL" component="MCL" type="populationList" size="1">
      <instance id="0">
        <location x="0.36683416" y="-0.65829146" z="0.0"/>
      </instance>
    </population>
    <population id="MCR" component="MCR" type="populationList" size="1">
      <instance id="0">
        <location x="0.919598" y="0.065326646" z="0.0"/>
      </instance>
    </population>
    <population id="MI" component="MI" type="populationList" size="1">
      <instance id="0">
        <location x="0.6683417" y="-0.3266332" z="0.0"/>
      </instance>
    </population>
    <population id="NSML" component="NSML" type="populationList" size="1">
      <instance id="0">
        <location x="0.6683417" y="0.959799" z="0.0"/>
      </instance>
    </population>
    <population id="NSMR" component="NSMR" type="populationList" size="1">
      <instance id="0">
        <location x="0.3266332" y="-0.45728645" z="0.0"/>
      </instance>
    </population>
    <population id="AVAL" component="AVAL" type="populationList" size="1">
      <instance id="0">
        <location x="5.0" y="0.0" z="0.0"/>
      </instance>
    </population>
    <population id="AVAR" component="AVAR" type="populationList" size="1">
      <instance id="0">
        <location x="5.0" y="0.0" z="0.0"/>
      </instance>
    </population>
    <population id="AVKL" component="AVKL" type="populationList" size="1">
      <instance id="0">
        <location x="5.0" y="0.0" z="0.0"/>
      </instance>
    </population>
    <population id="AVKR" component="AVKR" type="populationList" size="1">
      <instance id="0">
        <location x="5.0" y="0.0" z="0.0"/>
      </instance>
    </population>
    <population id="RIS" component="RIS" type="populationList" size="1">
      <instance id="0">
        <location x="5.0" y="0.0" z="0.0"/>
      </instance>
    </population>
    <population id="RMDDL" component="RMDDL" type="populationList" size="1">
      <instance id="0">
        <location x="5.0" y="0.0" z="0.0"/>
      </instance>
    </population>
    <population id="RMDDR" component="RMDDR" type="populationList" size="1">
      <instance id="0">
        <location x="5.0" y="0.0" z="0.0"/>
      </instance>
    </population>
    <population id="RMDVL" component="RMDVL" type="populationList" size="1">
      <instance id="0">
        <location x="5.0" y="0.0" z="0.0"/>
      </instance>
    </population>
    <population id="RMDVR" component="RMDVR" type="populationList" size="1">
      <instance id="0">
        <location x="5.0" y="0.0" z="0.0"/>
      </instance>
    </population>
    <population id="SMBVL" component="SMBVL" type="populationList" size="1">
      <instance id="0">
        <location x="5.0" y="0.0" z="0.0"/>
      </instance>
    </population>
    <population id="SMBVR" component="SMBVR" type="populationList" size="1">
      <instance id="0">
        <location x="5.0" y="0.0" z="0.0"/>
      </instance>
    </population>
    <population id="URXL" component="URXL" type="populationList" size="1">
      <instance id="0">
        <location x="5.0" y="0.0" z="0.0"/>
      </instance>
    </population>
    <population id="URXR" component="URXR" type="populationList" size="1">
      <instance id="0">
        <location x="5.0" y="0.0" z="0.0"/>
      </instance>
    </population>
    <population id="pm1" component="pm1" type="populationList" size="1">
      <instance id="0">
        <location x="1.5" y="0.0" z="0.0"/>
      </instance>
    </population>
    <population id="pm2L" component="pm2L" type="populationList" size="1">
      <instance id="0">
        <location x="1.3514533018536288" y="0.6508256086763372" z="0.0"/>
      </instance>
    </population>
    <population id="pm2R" component="pm2R" type="populationList" size="1">
      <instance id="0">
        <location x="0.9352347027881004" y="1.1727472237020446" z="0.0"/>
      </instance>
    </population>
    <population id="pm3L" component="pm3L" type="populationList" size="1">
      <instance id="0">
        <location x="0.3337814009344717" y="1.4623918682727355" z="0.0"/>
      </instance>
    </population>
    <population id="pm3R" component="pm3R" type="populationList" size="1">
      <instance id="0">
        <location x="-0.3337814009344715" y="1.4623918682727355" z="0.0"/>
      </instance>
    </population>
    <population id="pm4L" component="pm4L" type="populationList" size="1">
      <instance id="0">
        <location x="-0.9352347027881003" y="1.1727472237020449" z="0.0"/>
      </instance>
    </population>
    <population id="pm4R" component="pm4R" type="populationList" size="1">
      <instance id="0">
        <location x="-1.3514533018536286" y="0.6508256086763373" z="0.0"/>
      </instance>
    </population>
    <population id="pm5L" component="pm5L" type="populationList" size="1">
      <instance id="0">
        <location x="-1.5" y="1.8369701987210297e-16" z="0.0"/>
      </instance>
    </population>
    <population id="pm5R" component="pm5R" type="populationList" size="1">
      <instance id="0">
        <location x="-1.3514533018536288" y="-0.650825608676337" z="0.0"/>
      </instance>
    </population>
    <population id="pm6L" component="pm6L" type="populationList" size="1">
      <instance id="0">
        <location x="-0.9352347027881005" y="-1.1727472237020446" z="0.0"/>
      </instance>
    </population>
    <population id="pm6R" component="pm6R" type="populationList" size="1">
      <instance id="0">
        <location x="-0.3337814009344719" y="-1.4623918682727355" z="0.0"/>
      </instance>
    </population>
    <population id="pm7L" component="pm7L" type="populationList" size="1">
      <instance id="0">
        <location x="0.33378140093447" y="-1.4623918682727357" z="0.0"/>
      </instance>
    </population>
    <population id="pm7R" component="pm7R" type="populationList" size="1">
      <instance id="0">
        <location x="0.9352347027881001" y="-1.1727472237020449" z="0.0"/>
      </instance>
    </population>
    <population id="pm8" component="pm8" type="populationList" size="1">
      <instance id="0">
        <location x="1.351453301853629" y="-0.6508256086763362" z="0.0"/>
      </instance>
    </population>
    <projection id="NCXLS_MI_I6" presynapticPopulation="MI" postsynapticPopulation="I6" synapse="Acetylcholine">
      <connection id="0" preCellId="../MI/0/MI" postCellId="../I6/0/I6" preSegmentId="4" postSegmentId="7" preFractionAlong="0.3052643016074359" postFractionAlong="0.2223182092142263"/>
    </projection>
    <projection id="NCXLS_MI_NSMR" presynapticPopulation="MI" postsynapticPopulation="NSMR" synapse="Glutamate">
      <connection id="1" preCellId="../MI/0/MI" postCellId="../NSMR/0/NSMR" preSegmentId="3" postSegmentId="8" preFractionAlong="0.1966320424660023" postFractionAlong="0.2681467309657759"/>
    </projection>
    <projection id="NCXLS_MI_M3L" presynapticPopulation="MI" postsynapticPopulation="M3L" synapse="Acetylcholine">
      <connection id="2" preCellId="../MI/0/MI" postCellId="../M3L/0/M3L" preSegmentId="3" postSegmentId="3" preFractionAlong="0.4745464264481737" postFractionAlong="0.06935167101859663"/>
    </projection>
    <projection id="NCXLS_MI_I5" presynapticPopulation="MI" postsynapticPopulation="I5" synapse="Glutamate">
      <connection id="3" preCellId="../MI/0/MI" postCellId="../I5/0/I5" preSegmentId="1" postSegmentId="4" preFractionAlong="0.4572608045918206" postFractionAlong="0.14862413046990497"/>
    </projection>
    <projection id="NCXLS_MI_M3R" presynapticPopulation="MI" postsynapticPopulation="M3R" synapse="Serotonin_Glutamate">
      <connection id="4" preCellId="../MI/0/MI" postCellId="../M3R/0/M3R" preSegmentId="6" postSegmentId="4" preFractionAlong="0.09793836538285594" postFractionAlong="0.7905083811731562"/>
    </projection>
    <projection id="NCXLS_MI_MCL" presynapticPopulation="MI" postsynapticPopulation="MCL" synapse="Acetylcholine">
      <connection id="5" preCellId="../MI/0/MI" postCellId="../MCL/0/MCL" preSegmentId="2" postSegmentId="2" preFractionAlong="0.41851638665268387" postFractionAlong="0.3814912932422273"/>
    </projection>
    <projection id="NCXLS_MI_I2R" presynapticPopulation="MI" postsynapticPopulation="I2R" synapse="Serotonin_Glutamate">
      <connection id="6" preCellId="../MI/0/MI" postCellId="../I2R/0/I2R" preSegmentId="3" postSegmentId="6" preFractionAlong="0.5238556070428226" postFractionAlong="0.514502164857092"/>
    </projection>
    <projection id="NCXLS_MI_I2L" presynapticPopulation="MI" postsynapticPopulation="I2L" synapse="Glutamate">
      <connection id="7" preCellId="../MI/0/MI" postCellId="../I2L/0/I2L" preSegmentId="5" postSegmentId="1" preFractionAlong="0.7405183646824492" postFractionAlong="0.8325044000323545"/>
    </projection>
    <projection id="NCXLS_MI_I1L" presynapticPopulation="MI" postsynapticPopulation="I1L" synapse="Acetylcholine">
      <connection id="8" preCellId="../MI/0/MI" postCellId="../I1L/0/I1L" preSegmentId="1" postSegmentId="7" preFractionAlong="0.7515530563490262" postFractionAlong="0.23842370049535555"/>
    </projection>
    <projection id="NCXLS_I6_M3L" presynapticPopulation="I6" postsynapticPopulation="M3L" synapse="Acetylcholine">
      <connection id="9" preCellId="../I6/0/I6" postCellId="../M3L/0/M3L" preSegmentId="2" postSegmentId="4" preFractionAlong="0.4437888384909059" postFractionAlong="0.2388598796332252"/>
    </projection>
    <projection id="NCXLS_I6_I5" presynapticPopulation="I6" postsynapticPopulation="I5" synapse="Acetylcholine">
      <connection id="10" preCellId="../I6/0/I6" postCellId="../I5/0/I5" preSegmentId="7" postSegmentId="1" preFractionAlong="0.194556161189272" postFractionAlong="0.8412262245742964"/>
    </projection>
    <projection id="NCXLS_I6_MCL" presynapticPopulation="I6" postsynapticPopulation="MCL" synapse="Acetylcholine">
      <connection id="11" preCellId="../I6/0/I6" postCellId="../MCL/0/MCL" preSegmentId="8" postSegmentId="5" preFractionAlong="0.13645111827045853" postFractionAlong="0.5683051045948369"/>
    </projection>
    <projection id="NCXLS_I6_I2R" presynapticPopulation="I6" postsynapticPopulation="I2R" synapse="Glutamate">
      <connection id="12" preCellId="../I6/0/I6" postCellId="../I2R/0/I2R" preSegmentId="2" postSegmentId="5" preFractionAlong="0.3978777794754952" postFractionAlong="0.8106720567624114"/>
    </projection>
    <projection id="NCXLS_M2R_MI" presynapticPopulation="M2R" postsynapticPopulation="MI" synapse="Acetylcholine">
      <connection id="13" preCellId="../M2R/0/M2R" postCellId="../MI/0/MI" preSegmentId="1" postSegmentId="1" preFractionAlong="0.7707726882106072" postFractionAlong="0.663444393638966"/>
    </projection>
    <projection id="NCXLS_M2R_I6" presynapticPopulation="M2R" postsynapticPopulation="I6" synapse="Acetylcholine">
      <connection id="14" preCellId="../M2R/0/M2R" postCellId="../I6/0/I6" preSegmentId="7" postSegmentId="6" preFractionAlong="0.40423575583947935" postFractionAlong="0.7761299726143986"/>
    </projection>
    <projection id="NCXLS_M2R_M4" presynapticPopulation="M2R" postsynapticPopulation="M4" synapse="Acetylcholine">
      <connection id="15" preCellId="../M2R/0/M2R" postCellId="../M4/0/M4" preSegmentId="2" postSegmentId="1" preFractionAlong="0.25286730032814053" postFractionAlong="0.15460753673704164"/>
    </projection>
    <projection id="NCXLS_M2R_NSMR" presynapticPopulation="M2R" postsynapticPopulation="NSMR" synapse="Acetylcholine">
      <connection id="16" preCellId="../M2R/0/M2R" postCellId="../NSMR/0/NSMR" preSegmentId="7" postSegmentId="3" preFractionAlong="0.6060893405565367" postFractionAlong="0.009772231419481248"/>
    </projection>
    <projection id="NCXLS_M2R_M3L" presynapticPopulation="M2R" postsynapticPopulation="M3L" synapse="Acetylcholine">
      <connection id="17" preCellId="../M2R/0/M2R" postCellId="../M3L/0/M3L" preSegmentId="5" postSegmentId="3" preFractionAlong="0.885440848510793" postFractionAlong="0.2329145608890334"/>
    </projection>
    <projection id="NCXLS_M2R_I5" presynapticPopulation="M2R" postsynapticPopulation="I5" synapse="Acetylcholine">
      <connection id="18" preCellId="../M2R/0/M2R" postCellId="../I5/0/I5" preSegmentId="6" postSegmentId="6" preFractionAlong="0.4266253734763945" postFractionAlong="0.33482785155535066"/>
    </projection>
    <projection id="NCXLS_M2R_M2L" presynapticPopulation="M2R" postsynapticPopulation="M2L" synapse="Acetylcholine">
      <connection id="19" preCellId="../M2R/0/M2R" postCellId="../M2L/0/M2L" preSegmentId="2" postSegmentId="5" preFractionAlong="0.023052783445210112" postFractionAlong="0.9694001125661867"/>
    </projection>
    <projection id="NCXLS_M2R_M5" presynapticPopulation="M2R" postsynapticPopulation="M5" synapse="Acetylcholine">
      <connection id="20" preCellId="../M2R/0/M2R" postCellId="../M5/0/M5" preSegmentId="2" postSegmentId="1" preFractionAlong="0.8361348687787407" postFractionAlong="0.49908330106452514"/>
    </projection>
    <projection id="NCXLS_M2R_MCR" presynapticPopulation="M2R" postsynapticPopulation="MCR" synapse="Acetylcholine">
      <connection id="21" preCellId="../M2R/0/M2R" postCellId="../MCR/0/MCR" preSegmentId="2" postSegmentId="7" preFractionAlong="0.8036119429560182" postFractionAlong="0.6381394884910242"/>
    </projection>
    <projection id="NCXLS_M2R_I1R" presynapticPopulation="M2R" postsynapticPopulation="I1R" synapse="Acetylcholine">
      <connection id="22" preCellId="../M2R/0/M2R" postCellId="../I1R/0/I1R" preSegmentId="7" postSegmentId="1" preFractionAlong="0.34217298268684015" postFractionAlong="0.98931618350921"/>
    </projection>
    <projection id="NCXLS_M2R_M3R" presynapticPopulation="M2R" postsynapticPopulation="M3R" synapse="Acetylcholine">
      <connection id="23" preCellId="../M2R/0/M2R" postCellId="../M3R/0/M3R" preSegmentId="8" postSegmentId="3" preFractionAlong="0.8429406398772615" postFractionAlong="0.586558560747354"/>
    </projection>
    <projection id="NCXLS_M2R_MCL" presynapticPopulation="M2R" postsynapticPopulation="MCL" synapse="Acetylcholine">
      <connection id="24" preCellId="../M2R/0/M2R" postCellId="../MCL/0/MCL" preSegmentId="2" postSegmentId="7" preFractionAlong="0.08022856271770573" postFractionAlong="0.36166490253609496"/>
    </projection>
    <projection id="NCXLS_M2R_I2R" presynapticPopulation="M2R" postsynapticPopulation="I2R" synapse="Acetylcholine">
      <connection id="25" preCellId="../M2R/0/M2R" postCellId="../I2R/0/I2R" preSegmentId="7" postSegmentId="9" preFractionAlong="0.22160918823915088" postFractionAlong="0.3796540158686732"/>
    </projection>
    <projection id="NCXLS_M2R_I2L" presynapticPopulation="M2R" postsynapticPopulation="I2L" synapse="Acetylcholine">
      <connection id="26" preCellId="../M2R/0/M2R" postCellId="../I2L/0/I2L" preSegmentId="8" postSegmentId="9" preFractionAlong="0.39174808760521174" postFractionAlong="0.7935212646403246"/>
    </projection>
    <projection id="NCXLS_M2R_I1L" presynapticPopulation="M2R" postsynapticPopulation="I1L" synapse="Acetylcholine">
      <connection id="27" preCellId="../M2R/0/M2R" postCellId="../I1L/0/I1L" preSegmentId="4" postSegmentId="6" preFractionAlong="0.46097978669335715" postFractionAlong="0.4334082173718403"/>
    </projection>
    <projection id="NCXLS_M2R_I3" presynapticPopulation="M2R" postsynapticPopulation="I3" synapse="Acetylcholine">
      <connection id="28" preCellId="../M2R/0/M2R" postCellId="../I3/0/I3" preSegmentId="7" postSegmentId="8" preFractionAlong="0.987023081981475" postFractionAlong="0.29835363065288334"/>
    </projection>
    <projection id="NCXLS_M2R_I4" presynapticPopulation="M2R" postsynapticPopulation="I4" synapse="Acetylcholine">
      <connection id="29" preCellId="../M2R/0/M2R" postCellId="../I4/0/I4" preSegmentId="2" postSegmentId="2" preFractionAlong="0.46660626592618204" postFractionAlong="0.2000492331463749"/>
    </projection>
    <projection id="NCXLS_M4_MI" presynapticPopulation="M4" postsynapticPopulation="MI" synapse="Acetylcholine">
      <connection id="30" preCellId="../M4/0/M4" postCellId="../MI/0/MI" preSegmentId="4" postSegmentId="5" preFractionAlong="0.8750589641689428" postFractionAlong="0.817582687849336"/>
    </projection>
    <projection id="NCXLS_M4_I6" presynapticPopulation="M4" postsynapticPopulation="I6" synapse="Acetylcholine">
      <connection id="31" preCellId="../M4/0/M4" postCellId="../I6/0/I6" preSegmentId="1" postSegmentId="1" preFractionAlong="0.43331949023289684" postFractionAlong="0.5473777534997463"/>
    </projection>
    <projection id="NCXLS_M4_NSMR" presynapticPopulation="M4" postsynapticPopulation="NSMR" synapse="Acetylcholine">
      <connection id="32" preCellId="../M4/0/M4" postCellId="../NSMR/0/NSMR" preSegmentId="3" postSegmentId="6" preFractionAlong="0.7958326589504415" postFractionAlong="0.001145950628256287"/>
    </projection>
    <projection id="NCXLS_M4_I5" presynapticPopulation="M4" postsynapticPopulation="I5" synapse="Acetylcholine">
      <connection id="33" preCellId="../M4/0/M4" postCellId="../I5/0/I5" preSegmentId="1" postSegmentId="6" preFractionAlong="0.5840386578266218" postFractionAlong="0.5954499314692966"/>
    </projection>
    <projection id="NCXLS_M4_M3R" presynapticPopulation="M4" postsynapticPopulation="M3R" synapse="Glutamate">
      <connection id="34" preCellId="../M4/0/M4" postCellId="../M3R/0/M3R" preSegmentId="7" postSegmentId="2" preFractionAlong="0.5094018695309703" postFractionAlong="0.7253105755407004"/>
    </projection>
    <projection id="NCXLS_M4_MCL" presynapticPopulation="M4" postsynapticPopulation="MCL" synapse="Acetylcholine">
      <connection id="35" preCellId="../M4/0/M4" postCellId="../MCL/0/MCL" preSegmentId="9" postSegmentId="2" preFractionAlong="0.6084910865636168" postFractionAlong="0.897774068255051"/>
    </projection>
    <projection id="NCXLS_M4_I2R" presynapticPopulation="M4" postsynapticPopulation="I2R" synapse="Acetylcholine">
      <connection id="36" preCellId="../M4/0/M4" postCellId="../I2R/0/I2R" preSegmentId="3" postSegmentId="5" preFractionAlong="0.02977190740713198" postFractionAlong="0.5041484897283163"/>
    </projection>
    <projection id="NCXLS_M4_I2L" presynapticPopulation="M4" postsynapticPopulation="I2L" synapse="Acetylcholine">
      <connection id="37" preCellId="../M4/0/M4" postCellId="../I2L/0/I2L" preSegmentId="8" postSegmentId="7" preFractionAlong="0.5499210705196631" postFractionAlong="0.269636165216676"/>
    </projection>
    <projection id="NCXLS_M4_I1L" presynapticPopulation="M4" postsynapticPopulation="I1L" synapse="Acetylcholine">
      <connection id="38" preCellId="../M4/0/M4" postCellId="../I1L/0/I1L" preSegmentId="8" postSegmentId="2" preFractionAlong="0.4909250939863308" postFractionAlong="0.1903522283603135"/>
    </projection>
    <projection id="NCXLS_NSMR_I5" presynapticPopulation="NSMR" postsynapticPopulation="I5" synapse="Serotonin_Glutamate">
      <connection id="39" preCellId="../NSMR/0/NSMR" postCellId="../I5/0/I5" preSegmentId="7" postSegmentId="5" preFractionAlong="0.9051338748441857" postFractionAlong="0.2006436829571957"/>
    </projection>
    <projection id="NCXLS_NSMR_M3R" presynapticPopulation="NSMR" postsynapticPopulation="M3R" synapse="Serotonin_Glutamate">
      <connection id="40" preCellId="../NSMR/0/NSMR" postCellId="../M3R/0/M3R" preSegmentId="6" postSegmentId="5" preFractionAlong="0.26348337714290304" postFractionAlong="0.19986029727419885"/>
    </projection>
    <projection id="NCXLS_NSMR_I2R" presynapticPopulation="NSMR" postsynapticPopulation="I2R" synapse="Serotonin_Glutamate">
      <connection id="41" preCellId="../NSMR/0/NSMR" postCellId="../I2R/0/I2R" preSegmentId="9" postSegmentId="5" preFractionAlong="0.6934258020995963" postFractionAlong="0.7923509643549305"/>
    </projection>
    <projection id="NCXLS_NSMR_I1L" presynapticPopulation="NSMR" postsynapticPopulation="I1L" synapse="Serotonin_Glutamate">
      <connection id="42" preCellId="../NSMR/0/NSMR" postCellId="../I1L/0/I1L" preSegmentId="1" postSegmentId="2" preFractionAlong="0.44433516708296994" postFractionAlong="0.6591135216215475"/>
    </projection>
    <projection id="NCXLS_M3L_MI" presynapticPopulation="M3L" postsynapticPopulation="MI" synapse="Acetylcholine">
      <connection id="43" preCellId="../M3L/0/M3L" postCellId="../MI/0/MI" preSegmentId="4" postSegmentId="9" preFractionAlong="0.5679205032734082" postFractionAlong="0.4932921760875567"/>
    </projection>
    <projection id="NCXLS_M3L_I6" presynapticPopulation="M3L" postsynapticPopulation="I6" synapse="Acetylcholine">
      <connection id="44" preCellId="../M3L/0/M3L" postCellId="../I6/0/I6" preSegmentId="7" postSegmentId="4" preFractionAlong="0.5407099549161969" postFractionAlong="0.4502794828645408"/>
    </projection>
    <projection id="NCXLS_M3L_M2R" presynapticPopulation="M3L" postsynapticPopulation="M2R" synapse="Glutamate">
      <connection id="45" preCellId="../M3L/0/M3L" postCellId="../M2R/0/M2R" preSegmentId="3" postSegmentId="1" preFractionAlong="0.4693820505825953" postFractionAlong="0.8814719638223172"/>
    </projection>
    <projection id="NCXLS_M3L_M4" presynapticPopulation="M3L" postsynapticPopulation="M4" synapse="Glutamate">
      <connection id="46" preCellId="../M3L/0/M3L" postCellId="../M4/0/M4" preSegmentId="5" postSegmentId="1" preFractionAlong="0.042802636068106636" postFractionAlong="0.7439917193796687"/>
    </projection>
    <projection id="NCXLS_M3L_NSMR" presynapticPopulation="M3L" postsynapticPopulation="NSMR" synapse="Acetylcholine">
      <connection id="47" preCellId="../M3L/0/M3L" postCellId="../NSMR/0/NSMR" preSegmentId="1" postSegmentId="5" preFractionAlong="0.19118303909731627" postFractionAlong="0.7949509328246771"/>
    </projection>
    <projection id="NCXLS_M3L_NSML" presynapticPopulation="M3L" postsynapticPopulation="NSML" synapse="Acetylcholine">
      <connection id="48" preCellId="../M3L/0/M3L" postCellId="../NSML/0/NSML" preSegmentId="2" postSegmentId="1" preFractionAlong="0.030143794797741652" postFractionAlong="0.732642242442521"/>
    </projection>
    <projection id="NCXLS_M3L_M2L" presynapticPopulation="M3L" postsynapticPopulation="M2L" synapse="Acetylcholine">
      <connection id="49" preCellId="../M3L/0/M3L" postCellId="../M2L/0/M2L" preSegmentId="1" postSegmentId="1" preFractionAlong="0.8227162138158829" postFractionAlong="0.11465749652459067"/>
    </projection>
    <projection id="NCXLS_M3L_M5" presynapticPopulation="M3L" postsynapticPopulation="M5" synapse="Glutamate">
      <connection id="50" preCellId="../M3L/0/M3L" postCellId="../M5/0/M5" preSegmentId="2" postSegmentId="2" preFractionAlong="0.34202951460460307" postFractionAlong="0.11780721306768427"/>
    </projection>
    <projection id="NCXLS_M3L_MCR" presynapticPopulation="M3L" postsynapticPopulation="MCR" synapse="Acetylcholine">
      <connection id="51" preCellId="../M3L/0/M3L" postCellId="../MCR/0/MCR" preSegmentId="6" postSegmentId="2" preFractionAlong="0.2421721230472771" postFractionAlong="0.7212540974297396"/>
    </projection>
    <projection id="NCXLS_M3L_I1R" presynapticPopulation="M3L" postsynapticPopulation="I1R" synapse="Acetylcholine">
      <connection id="52" preCellId="../M3L/0/M3L" postCellId="../I1R/0/I1R" preSegmentId="6" postSegmentId="8" preFractionAlong="0.22099815752363516" postFractionAlong="0.5009968366121956"/>
    </projection>
    <projection id="NCXLS_M3L_M3R" presynapticPopulation="M3L" postsynapticPopulation="M3R" synapse="Acetylcholine">
      <connection id="53" preCellId="../M3L/0/M3L" postCellId="../M3R/0/M3R" preSegmentId="7" postSegmentId="5" preFractionAlong="0.7719062434000892" postFractionAlong="0.6224833190290374"/>
    </projection>
    <projection id="NCXLS_M3L_MCL" presynapticPopulation="M3L" postsynapticPopulation="MCL" synapse="Acetylcholine">
      <connection id="54" preCellId="../M3L/0/M3L" postCellId="../MCL/0/MCL" preSegmentId="2" postSegmentId="7" preFractionAlong="0.7793632650477182" postFractionAlong="0.23515557000841703"/>
    </projection>
    <projection id="NCXLS_M3L_I2R" presynapticPopulation="M3L" postsynapticPopulation="I2R" synapse="Acetylcholine">
      <connection id="55" preCellId="../M3L/0/M3L" postCellId="../I2R/0/I2R" preSegmentId="9" postSegmentId="2" preFractionAlong="0.8786215968075725" postFractionAlong="0.7836735930196038"/>
    </projection>
    <projection id="NCXLS_M3L_I1L" presynapticPopulation="M3L" postsynapticPopulation="I1L" synapse="Acetylcholine">
      <connection id="56" preCellId="../M3L/0/M3L" postCellId="../I1L/0/I1L" preSegmentId="5" postSegmentId="6" preFractionAlong="0.1413591308861497" postFractionAlong="0.43708912013937085"/>
    </projection>
    <projection id="NCXLS_M3L_I3" presynapticPopulation="M3L" postsynapticPopulation="I3" synapse="Acetylcholine">
      <connection id="57" preCellId="../M3L/0/M3L" postCellId="../I3/0/I3" preSegmentId="8" postSegmentId="8" preFractionAlong="0.21995151773429578" postFractionAlong="0.5950789355038547"/>
    </projection>
    <projection id="NCXLS_M3L_I4" presynapticPopulation="M3L" postsynapticPopulation="I4" synapse="Acetylcholine">
      <connection id="58" preCellId="../M3L/0/M3L" postCellId="../I4/0/I4" preSegmentId="7" postSegmentId="2" preFractionAlong="0.06577670341114461" postFractionAlong="0.7634178142206718"/>
    </projection>
    <projection id="NCXLS_I5_MI" presynapticPopulation="I5" postsynapticPopulation="MI" synapse="Acetylcholine">
      <connection id="59" preCellId="../I5/0/I5" postCellId="../MI/0/MI" preSegmentId="8" postSegmentId="9" preFractionAlong="0.29190961379034364" postFractionAlong="0.4896900421608815"/>
    </projection>
    <projection id="NCXLS_I5_M3R" presynapticPopulation="I5" postsynapticPopulation="M3R" synapse="Acetylcholine">
      <connection id="60" preCellId="../I5/0/I5" postCellId="../M3R/0/M3R" preSegmentId="8" postSegmentId="5" preFractionAlong="0.3788823795512348" postFractionAlong="0.3878165426109311"/>
    </projection>
    <projection id="NCXLS_I5_MCL" presynapticPopulation="I5" postsynapticPopulation="MCL" synapse="Acetylcholine">
      <connection id="61" preCellId="../I5/0/I5" postCellId="../MCL/0/MCL" preSegmentId="7" postSegmentId="9" preFractionAlong="0.14114180147574362" postFractionAlong="0.38725904025443403"/>
    </projection>
    <projection id="NCXLS_I5_I2R" presynapticPopulation="I5" postsynapticPopulation="I2R" synapse="Acetylcholine">
      <connection id="62" preCellId="../I5/0/I5" postCellId="../I2R/0/I2R" preSegmentId="5" postSegmentId="7" preFractionAlong="0.9851262236761242" postFractionAlong="0.3514547692857177"/>
    </projection>
    <projection id="NCXLS_I5_I1L" presynapticPopulation="I5" postsynapticPopulation="I1L" synapse="Glutamate">
      <connection id="63" preCellId="../I5/0/I5" postCellId="../I1L/0/I1L" preSegmentId="4" postSegmentId="2" preFractionAlong="0.17869295228631332" postFractionAlong="0.2955524986352176"/>
    </projection>
    <projection id="NCXLS_NSML_M2R" presynapticPopulation="NSML" postsynapticPopulation="M2R" synapse="Serotonin_Glutamate">
      <connection id="64" preCellId="../NSML/0/NSML" postCellId="../M2R/0/M2R" preSegmentId="3" postSegmentId="8" preFractionAlong="0.3711929866485244" postFractionAlong="0.022561650757327634"/>
    </projection>
    <projection id="NCXLS_NSML_I1R" presynapticPopulation="NSML" postsynapticPopulation="I1R" synapse="Serotonin_Glutamate">
      <connection id="65" preCellId="../NSML/0/NSML" postCellId="../I1R/0/I1R" preSegmentId="2" postSegmentId="9" preFractionAlong="0.7071602939808602" postFractionAlong="0.07033059208743897"/>
    </projection>
    <projection id="NCXLS_NSML_M1" presynapticPopulation="NSML" postsynapticPopulation="M1" synapse="Serotonin_Glutamate">
      <connection id="66" preCellId="../NSML/0/NSML" postCellId="../M1/0/M1" preSegmentId="3" postSegmentId="7" preFractionAlong="0.5468365102699866" postFractionAlong="0.27885053008676475"/>
    </projection>
    <projection id="NCXLS_M2L_MI" presynapticPopulation="M2L" postsynapticPopulation="MI" synapse="Acetylcholine">
      <connection id="67" preCellId="../M2L/0/M2L" postCellId="../MI/0/MI" preSegmentId="4" postSegmentId="6" preFractionAlong="0.40617201291148597" postFractionAlong="0.6061773057817677"/>
    </projection>
    <projection id="NCXLS_M2L_I6" presynapticPopulation="M2L" postsynapticPopulation="I6" synapse="Acetylcholine">
      <connection id="68" preCellId="../M2L/0/M2L" postCellId="../I6/0/I6" preSegmentId="3" postSegmentId="8" preFractionAlong="0.48661709230199235" postFractionAlong="0.6741680405566547"/>
    </projection>
    <projection id="NCXLS_M2L_NSMR" presynapticPopulation="M2L" postsynapticPopulation="NSMR" synapse="Acetylcholine">
      <connection id="69" preCellId="../M2L/0/M2L" postCellId="../NSMR/0/NSMR" preSegmentId="8" postSegmentId="2" preFractionAlong="0.4795364450430264" postFractionAlong="0.4814312028120059"/>
    </projection>
    <projection id="NCXLS_M2L_M3L" presynapticPopulation="M2L" postsynapticPopulation="M3L" synapse="Acetylcholine">
      <connection id="70" preCellId="../M2L/0/M2L" postCellId="../M3L/0/M3L" preSegmentId="2" postSegmentId="4" preFractionAlong="0.45113989950104993" postFractionAlong="0.4193366573987367"/>
    </projection>
    <projection id="NCXLS_M2L_I5" presynapticPopulation="M2L" postsynapticPopulation="I5" synapse="Acetylcholine">
      <connection id="71" preCellId="../M2L/0/M2L" postCellId="../I5/0/I5" preSegmentId="8" postSegmentId="7" preFractionAlong="0.1567043477959481" postFractionAlong="0.5408120707980756"/>
    </projection>
    <projection id="NCXLS_M2L_M5" presynapticPopulation="M2L" postsynapticPopulation="M5" synapse="Acetylcholine">
      <connection id="72" preCellId="../M2L/0/M2L" postCellId="../M5/0/M5" preSegmentId="8" postSegmentId="7" preFractionAlong="0.5426540563071215" postFractionAlong="0.9367060433822255"/>
    </projection>
    <projection id="NCXLS_M2L_MCR" presynapticPopulation="M2L" postsynapticPopulation="MCR" synapse="Acetylcholine">
      <connection id="73" preCellId="../M2L/0/M2L" postCellId="../MCR/0/MCR" preSegmentId="9" postSegmentId="5" preFractionAlong="0.06490669621466982" postFractionAlong="0.38816144796031693"/>
    </projection>
    <projection id="NCXLS_M2L_M3R" presynapticPopulation="M2L" postsynapticPopulation="M3R" synapse="Acetylcholine">
      <connection id="74" preCellId="../M2L/0/M2L" postCellId="../M3R/0/M3R" preSegmentId="3" postSegmentId="9" preFractionAlong="0.3595764012492494" postFractionAlong="0.1393091832654466"/>
    </projection>
    <projection id="NCXLS_M2L_MCL" presynapticPopulation="M2L" postsynapticPopulation="MCL" synapse="Acetylcholine">
      <connection id="75" preCellId="../M2L/0/M2L" postCellId="../MCL/0/MCL" preSegmentId="4" postSegmentId="8" preFractionAlong="0.37764138297631134" postFractionAlong="0.9612979741329427"/>
    </projection>
    <projection id="NCXLS_M2L_I2R" presynapticPopulation="M2L" postsynapticPopulation="I2R" synapse="Acetylcholine">
      <connection id="76" preCellId="../M2L/0/M2L" postCellId="../I2R/0/I2R" preSegmentId="3" postSegmentId="6" preFractionAlong="0.7785771869332669" postFractionAlong="0.32564649218745323"/>
    </projection>
    <projection id="NCXLS_M2L_I2L" presynapticPopulation="M2L" postsynapticPopulation="I2L" synapse="Acetylcholine">
      <connection id="77" preCellId="../M2L/0/M2L" postCellId="../I2L/0/I2L" preSegmentId="9" postSegmentId="3" preFractionAlong="0.021851377207778744" postFractionAlong="0.3600209378545035"/>
    </projection>
    <projection id="NCXLS_M2L_I1L" presynapticPopulation="M2L" postsynapticPopulation="I1L" synapse="Acetylcholine">
      <connection id="78" preCellId="../M2L/0/M2L" postCellId="../I1L/0/I1L" preSegmentId="5" postSegmentId="4" preFractionAlong="0.3323789398776207" postFractionAlong="0.7470540820893272"/>
    </projection>
    <projection id="NCXLS_M2L_I4" presynapticPopulation="M2L" postsynapticPopulation="I4" synapse="Acetylcholine">
      <connection id="79" preCellId="../M2L/0/M2L" postCellId="../I4/0/I4" preSegmentId="3" postSegmentId="1" preFractionAlong="0.8738237373533401" postFractionAlong="0.5009618263593643"/>
    </projection>
    <projection id="NCXLS_M5_I6" presynapticPopulation="M5" postsynapticPopulation="I6" synapse="Acetylcholine">
      <connection id="80" preCellId="../M5/0/M5" postCellId="../I6/0/I6" preSegmentId="2" postSegmentId="1" preFractionAlong="0.9962715678032041" postFractionAlong="0.35563332180735574"/>
    </projection>
    <projection id="NCXLS_M5_M2R" presynapticPopulation="M5" postsynapticPopulation="M2R" synapse="Acetylcholine">
      <connection id="81" preCellId="../M5/0/M5" postCellId="../M2R/0/M2R" preSegmentId="6" postSegmentId="1" preFractionAlong="0.8505066043781953" postFractionAlong="0.9316074951476611"/>
    </projection>
    <projection id="NCXLS_M5_M4" presynapticPopulation="M5" postsynapticPopulation="M4" synapse="Acetylcholine">
      <connection id="82" preCellId="../M5/0/M5" postCellId="../M4/0/M4" preSegmentId="4" postSegmentId="2" preFractionAlong="0.00795418127854064" postFractionAlong="0.9218884855854572"/>
    </projection>
    <projection id="NCXLS_M5_M3L" presynapticPopulation="M5" postsynapticPopulation="M3L" synapse="Glutamate">
      <connection id="83" preCellId="../M5/0/M5" postCellId="../M3L/0/M3L" preSegmentId="4" postSegmentId="3" preFractionAlong="0.380287889502852" postFractionAlong="0.8091638049477762"/>
    </projection>
    <projection id="NCXLS_M5_I5" presynapticPopulation="M5" postsynapticPopulation="I5" synapse="Acetylcholine">
      <connection id="84" preCellId="../M5/0/M5" postCellId="../I5/0/I5" preSegmentId="1" postSegmentId="2" preFractionAlong="0.6349140441376434" postFractionAlong="0.5192492375848865"/>
    </projection>
    <projection id="NCXLS_M5_NSML" presynapticPopulation="M5" postsynapticPopulation="NSML" synapse="Acetylcholine">
      <connection id="85" preCellId="../M5/0/M5" postCellId="../NSML/0/NSML" preSegmentId="1" postSegmentId="2" preFractionAlong="0.8497407281453753" postFractionAlong="0.812132105803039"/>
    </projection>
    <projection id="NCXLS_M5_I1R" presynapticPopulation="M5" postsynapticPopulation="I1R" synapse="Acetylcholine">
      <connection id="86" preCellId="../M5/0/M5" postCellId="../I1R/0/I1R" preSegmentId="9" postSegmentId="7" preFractionAlong="0.5938762253652211" postFractionAlong="0.5821631960983702"/>
    </projection>
    <projection id="NCXLS_M5_M1" presynapticPopulation="M5" postsynapticPopulation="M1" synapse="Glutamate">
      <connection id="87" preCellId="../M5/0/M5" postCellId="../M1/0/M1" preSegmentId="8" postSegmentId="9" preFractionAlong="0.10216323390622195" postFractionAlong="0.9022815704406234"/>
    </projection>
    <projection id="NCXLS_M5_I2L" presynapticPopulation="M5" postsynapticPopulation="I2L" synapse="Acetylcholine">
      <connection id="88" preCellId="../M5/0/M5" postCellId="../I2L/0/I2L" preSegmentId="5" postSegmentId="5" preFractionAlong="0.27930038921345623" postFractionAlong="0.6101948316486301"/>
    </projection>
    <projection id="NCXLS_MCR_NSML" presynapticPopulation="MCR" postsynapticPopulation="NSML" synapse="Acetylcholine">
      <connection id="89" preCellId="../MCR/0/MCR" postCellId="../NSML/0/NSML" preSegmentId="2" postSegmentId="5" preFractionAlong="0.4413241709850946" postFractionAlong="0.06064999053341902"/>
    </projection>
    <projection id="NCXLS_MCR_M2L" presynapticPopulation="MCR" postsynapticPopulation="M2L" synapse="Acetylcholine">
      <connection id="90" preCellId="../MCR/0/MCR" postCellId="../M2L/0/M2L" preSegmentId="9" postSegmentId="2" preFractionAlong="0.3933504265636626" postFractionAlong="0.6996864199347684"/>
    </projection>
    <projection id="NCXLS_MCR_M1" presynapticPopulation="MCR" postsynapticPopulation="M1" synapse="Acetylcholine">
      <connection id="91" preCellId="../MCR/0/MCR" postCellId="../M1/0/M1" preSegmentId="2" postSegmentId="4" preFractionAlong="0.8384826905658241" postFractionAlong="0.18517593884505912"/>
    </projection>
    <projection id="NCXLS_MCR_I3" presynapticPopulation="MCR" postsynapticPopulation="I3" synapse="Acetylcholine">
      <connection id="92" preCellId="../MCR/0/MCR" postCellId="../I3/0/I3" preSegmentId="1" postSegmentId="2" preFractionAlong="0.9554116940790295" postFractionAlong="0.9068121500964483"/>
    </projection>
    <projection id="NCXLS_MCR_I4" presynapticPopulation="MCR" postsynapticPopulation="I4" synapse="Acetylcholine">
      <connection id="93" preCellId="../MCR/0/MCR" postCellId="../I4/0/I4" preSegmentId="9" postSegmentId="4" preFractionAlong="0.7123266860413382" postFractionAlong="0.23513830801977031"/>
    </projection>
    <projection id="NCXLS_I1R_I2L" presynapticPopulation="I1R" postsynapticPopulation="I2L" synapse="Glutamate">
      <connection id="94" preCellId="../I1R/0/I1R" postCellId="../I2L/0/I2L" preSegmentId="1" postSegmentId="1" preFractionAlong="0.6432739938102959" postFractionAlong="0.4068213320926879"/>
    </projection>
    <projection id="NCXLS_M3R_MI" presynapticPopulation="M3R" postsynapticPopulation="MI" synapse="Acetylcholine">
      <connection id="95" preCellId="../M3R/0/M3R" postCellId="../MI/0/MI" preSegmentId="8" postSegmentId="7" preFractionAlong="0.6940284881747067" postFractionAlong="0.9521015357104221"/>
    </projection>
    <projection id="NCXLS_M3R_I6" presynapticPopulation="M3R" postsynapticPopulation="I6" synapse="Acetylcholine">
      <connection id="96" preCellId="../M3R/0/M3R" postCellId="../I6/0/I6" preSegmentId="9" postSegmentId="5" preFractionAlong="0.5186462894216692" postFractionAlong="0.7790952558129959"/>
    </projection>
    <projection id="NCXLS_M3R_M2R" presynapticPopulation="M3R" postsynapticPopulation="M2R" synapse="Acetylcholine">
      <connection id="97" preCellId="../M3R/0/M3R" postCellId="../M2R/0/M2R" preSegmentId="6" postSegmentId="6" preFractionAlong="0.7139427112073776" postFractionAlong="0.7925911401965442"/>
    </projection>
    <projection id="NCXLS_M3R_M4" presynapticPopulation="M3R" postsynapticPopulation="M4" synapse="Acetylcholine">
      <connection id="98" preCellId="../M3R/0/M3R" postCellId="../M4/0/M4" preSegmentId="1" postSegmentId="1" preFractionAlong="0.3353742848795249" postFractionAlong="0.36859869518615895"/>
    </projection>
    <projection id="NCXLS_M3R_NSMR" presynapticPopulation="M3R" postsynapticPopulation="NSMR" synapse="Acetylcholine">
      <connection id="99" preCellId="../M3R/0/M3R" postCellId="../NSMR/0/NSMR" preSegmentId="2" postSegmentId="6" preFractionAlong="0.3821084703053269" postFractionAlong="0.45067625434165004"/>
    </projection>
    <projection id="NCXLS_M3R_I5" presynapticPopulation="M3R" postsynapticPopulation="I5" synapse="Acetylcholine">
      <connection id="100" preCellId="../M3R/0/M3R" postCellId="../I5/0/I5" preSegmentId="5" postSegmentId="4" preFractionAlong="0.77052527930763" postFractionAlong="0.041004688694782465"/>
    </projection>
    <projection id="NCXLS_M3R_I1R" presynapticPopulation="M3R" postsynapticPopulation="I1R" synapse="Acetylcholine">
      <connection id="101" preCellId="../M3R/0/M3R" postCellId="../I1R/0/I1R" preSegmentId="8" postSegmentId="8" preFractionAlong="0.5409965214147301" postFractionAlong="0.527819191224517"/>
    </projection>
    <projection id="NCXLS_M3R_MCL" presynapticPopulation="M3R" postsynapticPopulation="MCL" synapse="Acetylcholine">
      <connection id="102" preCellId="../M3R/0/M3R" postCellId="../MCL/0/MCL" preSegmentId="9" postSegmentId="5" preFractionAlong="0.9426461464796643" postFractionAlong="0.5433698872439848"/>
    </projection>
    <projection id="NCXLS_M3R_I2R" presynapticPopulation="M3R" postsynapticPopulation="I2R" synapse="Acetylcholine">
      <connection id="103" preCellId="../M3R/0/M3R" postCellId="../I2R/0/I2R" preSegmentId="4" postSegmentId="8" preFractionAlong="0.661476768856287" postFractionAlong="0.8988110930274216"/>
    </projection>
    <projection id="NCXLS_M3R_I2L" presynapticPopulation="M3R" postsynapticPopulation="I2L" synapse="Acetylcholine">
      <connection id="104" preCellId="../M3R/0/M3R" postCellId="../I2L/0/I2L" preSegmentId="7" postSegmentId="9" preFractionAlong="0.7809152521545261" postFractionAlong="0.9271837688793476"/>
    </projection>
    <projection id="NCXLS_M3R_I1L" presynapticPopulation="M3R" postsynapticPopulation="I1L" synapse="Acetylcholine">
      <connection id="105" preCellId="../M3R/0/M3R" postCellId="../I1L/0/I1L" preSegmentId="4" postSegmentId="9" preFractionAlong="0.5812827319610596" postFractionAlong="0.10888161603116575"/>
    </projection>
    <projection id="NCXLS_MCL_I6" presynapticPopulation="MCL" postsynapticPopulation="I6" synapse="Acetylcholine">
      <connection id="106" preCellId="../MCL/0/MCL" postCellId="../I6/0/I6" preSegmentId="3" postSegmentId="2" preFractionAlong="0.02772532476184919" postFractionAlong="0.05688743835614907"/>
    </projection>
    <projection id="NCXLS_MCL_M2R" presynapticPopulation="MCL" postsynapticPopulation="M2R" synapse="Acetylcholine">
      <connection id="107" preCellId="../MCL/0/MCL" postCellId="../M2R/0/M2R" preSegmentId="8" postSegmentId="1" preFractionAlong="0.7310357583283108" postFractionAlong="0.5011666285631721"/>
    </projection>
    <projection id="NCXLS_MCL_M4" presynapticPopulation="MCL" postsynapticPopulation="M4" synapse="Acetylcholine">
      <connection id="108" preCellId="../MCL/0/MCL" postCellId="../M4/0/M4" preSegmentId="3" postSegmentId="2" preFractionAlong="0.10561704526173599" postFractionAlong="0.7322402502058891"/>
    </projection>
    <projection id="NCXLS_MCL_NSMR" presynapticPopulation="MCL" postsynapticPopulation="NSMR" synapse="Acetylcholine">
      <connection id="109" preCellId="../MCL/0/MCL" postCellId="../NSMR/0/NSMR" preSegmentId="5" postSegmentId="6" preFractionAlong="0.6523192015535509" postFractionAlong="0.5590108925968418"/>
    </projection>
    <projection id="NCXLS_MCL_M3L" presynapticPopulation="MCL" postsynapticPopulation="M3L" synapse="Acetylcholine">
      <connection id="110" preCellId="../MCL/0/MCL" postCellId="../M3L/0/M3L" preSegmentId="9" postSegmentId="6" preFractionAlong="0.8719923739971334" postFractionAlong="0.2506620347114671"/>
    </projection>
    <projection id="NCXLS_MCL_I5" presynapticPopulation="MCL" postsynapticPopulation="I5" synapse="Acetylcholine">
      <connection id="111" preCellId="../MCL/0/MCL" postCellId="../I5/0/I5" preSegmentId="9" postSegmentId="5" preFractionAlong="0.7824394094988749" postFractionAlong="0.7078920306979332"/>
    </projection>
    <projection id="NCXLS_MCL_NSML" presynapticPopulation="MCL" postsynapticPopulation="NSML" synapse="Acetylcholine">
      <connection id="112" preCellId="../MCL/0/MCL" postCellId="../NSML/0/NSML" preSegmentId="4" postSegmentId="5" preFractionAlong="0.8383990884866921" postFractionAlong="0.776598482196688"/>
    </projection>
    <projection id="NCXLS_MCL_M5" presynapticPopulation="MCL" postsynapticPopulation="M5" synapse="Acetylcholine">
      <connection id="113" preCellId="../MCL/0/MCL" postCellId="../M5/0/M5" preSegmentId="7" postSegmentId="3" preFractionAlong="0.6581974082133667" postFractionAlong="0.1241601865478108"/>
    </projection>
    <projection id="NCXLS_MCL_I1R" presynapticPopulation="MCL" postsynapticPopulation="I1R" synapse="Acetylcholine">
      <connection id="114" preCellId="../MCL/0/MCL" postCellId="../I1R/0/I1R" preSegmentId="2" postSegmentId="2" preFractionAlong="0.018730292060419873" postFractionAlong="0.39160188092155546"/>
    </projection>
    <projection id="NCXLS_MCL_M1" presynapticPopulation="MCL" postsynapticPopulation="M1" synapse="Acetylcholine">
      <connection id="115" preCellId="../MCL/0/MCL" postCellId="../M1/0/M1" preSegmentId="9" postSegmentId="1" preFractionAlong="0.4751471801568825" postFractionAlong="0.42168164685289433"/>
    </projection>
    <projection id="NCXLS_MCL_I2L" presynapticPopulation="MCL" postsynapticPopulation="I2L" synapse="Acetylcholine">
      <connection id="116" preCellId="../MCL/0/MCL" postCellId="../I2L/0/I2L" preSegmentId="3" postSegmentId="9" preFractionAlong="0.3616163412818324" postFractionAlong="0.7564838490999165"/>
    </projection>
    <projection id="NCXLS_MCL_I3" presynapticPopulation="MCL" postsynapticPopulation="I3" synapse="Acetylcholine">
      <connection id="117" preCellId="../MCL/0/MCL" postCellId="../I3/0/I3" preSegmentId="1" postSegmentId="3" preFractionAlong="0.8304595904293615" postFractionAlong="0.23680177006045067"/>
    </projection>
    <projection id="NCXLS_I2R_M3L" presynapticPopulation="I2R" postsynapticPopulation="M3L" synapse="Acetylcholine">
      <connection id="118" preCellId="../I2R/0/I2R" postCellId="../M3L/0/M3L" preSegmentId="4" postSegmentId="2" preFractionAlong="0.03291376866117368" postFractionAlong="0.6079571838100452"/>
    </projection>
    <projection id="NCXLS_I2R_I5" presynapticPopulation="I2R" postsynapticPopulation="I5" synapse="Glutamate">
      <connection id="119" preCellId="../I2R/0/I2R" postCellId="../I5/0/I5" preSegmentId="5" postSegmentId="6" preFractionAlong="0.4841642473920018" postFractionAlong="0.46808162108509843"/>
    </projection>
    <projection id="NCXLS_I2R_MCL" presynapticPopulation="I2R" postsynapticPopulation="MCL" synapse="Acetylcholine">
      <connection id="120" preCellId="../I2R/0/I2R" postCellId="../MCL/0/MCL" preSegmentId="7" postSegmentId="4" preFractionAlong="0.444900049820538" postFractionAlong="0.1690013464265031"/>
    </projection>
    <projection id="NCXLS_I2R_I1L" presynapticPopulation="I2R" postsynapticPopulation="I1L" synapse="Glutamate">
      <connection id="121" preCellId="../I2R/0/I2R" postCellId="../I1L/0/I1L" preSegmentId="6" postSegmentId="9" preFractionAlong="0.639601748513116" postFractionAlong="0.4557062844202975"/>
    </projection>
    <projection id="NCXLS_M1_MI" presynapticPopulation="M1" postsynapticPopulation="MI" synapse="Acetylcholine">
      <connection id="122" preCellId="../M1/0/M1" postCellId="../MI/0/MI" preSegmentId="2" postSegmentId="3" preFractionAlong="0.016305901786504817" postFractionAlong="0.17406413740730842"/>
    </projection>
    <projection id="NCXLS_M1_I6" presynapticPopulation="M1" postsynapticPopulation="I6" synapse="Acetylcholine">
      <connection id="123" preCellId="../M1/0/M1" postCellId="../I6/0/I6" preSegmentId="2" postSegmentId="3" preFractionAlong="0.27872700672712414" postFractionAlong="0.522643433131149"/>
    </projection>
    <projection id="NCXLS_M1_M2R" presynapticPopulation="M1" postsynapticPopulation="M2R" synapse="Acetylcholine">
      <connection id="124" preCellId="../M1/0/M1" postCellId="../M2R/0/M2R" preSegmentId="5" postSegmentId="2" preFractionAlong="0.14367643635477023" postFractionAlong="0.04596229701111032"/>
    </projection>
    <projection id="NCXLS_M1_M4" presynapticPopulation="M1" postsynapticPopulation="M4" synapse="Glutamate">
      <connection id="125" preCellId="../M1/0/M1" postCellId="../M4/0/M4" preSegmentId="7" postSegmentId="5" preFractionAlong="0.28200833677305603" postFractionAlong="0.7228203011146973"/>
    </projection>
    <projection id="NCXLS_M1_NSMR" presynapticPopulation="M1" postsynapticPopulation="NSMR" synapse="Acetylcholine">
      <connection id="126" preCellId="../M1/0/M1" postCellId="../NSMR/0/NSMR" preSegmentId="6" postSegmentId="2" preFractionAlong="0.23728174859671936" postFractionAlong="0.5727765165969935"/>
    </projection>
    <projection id="NCXLS_M1_I5" presynapticPopulation="M1" postsynapticPopulation="I5" synapse="Acetylcholine">
      <connection id="127" preCellId="../M1/0/M1" postCellId="../I5/0/I5" preSegmentId="9" postSegmentId="6" preFractionAlong="0.9189347431104973" postFractionAlong="0.08107491614729878"/>
    </projection>
    <projection id="NCXLS_M1_NSML" presynapticPopulation="M1" postsynapticPopulation="NSML" synapse="Acetylcholine">
      <connection id="128" preCellId="../M1/0/M1" postCellId="../NSML/0/NSML" preSegmentId="2" postSegmentId="3" preFractionAlong="0.9074710268385046" postFractionAlong="0.09646010378976966"/>
    </projection>
    <projection id="NCXLS_M1_M5" presynapticPopulation="M1" postsynapticPopulation="M5" synapse="Acetylcholine">
      <connection id="129" preCellId="../M1/0/M1" postCellId="../M5/0/M5" preSegmentId="9" postSegmentId="1" preFractionAlong="0.17780323811008125" postFractionAlong="0.8617848465377039"/>
    </projection>
    <projection id="NCXLS_M1_MCR" presynapticPopulation="M1" postsynapticPopulation="MCR" synapse="Acetylcholine">
      <connection id="130" preCellId="../M1/0/M1" postCellId="../MCR/0/MCR" preSegmentId="5" postSegmentId="4" preFractionAlong="0.8782066742268435" postFractionAlong="0.15170364465152042"/>
    </projection>
    <projection id="NCXLS_M1_I1R" presynapticPopulation="M1" postsynapticPopulation="I1R" synapse="Acetylcholine">
      <connection id="131" preCellId="../M1/0/M1" postCellId="../I1R/0/I1R" preSegmentId="9" postSegmentId="4" preFractionAlong="0.6806985960805767" postFractionAlong="0.5429333873929625"/>
    </projection>
    <projection id="NCXLS_M1_M3R" presynapticPopulation="M1" postsynapticPopulation="M3R" synapse="Glutamate">
      <connection id="132" preCellId="../M1/0/M1" postCellId="../M3R/0/M3R" preSegmentId="1" postSegmentId="5" preFractionAlong="0.11546977517788792" postFractionAlong="0.5702394424458007"/>
    </projection>
    <projection id="NCXLS_M1_MCL" presynapticPopulation="M1" postsynapticPopulation="MCL" synapse="Acetylcholine">
      <connection id="133" preCellId="../M1/0/M1" postCellId="../MCL/0/MCL" preSegmentId="5" postSegmentId="3" preFractionAlong="0.21481406410413462" postFractionAlong="0.48574135661685425"/>
    </projection>
    <projection id="NCXLS_M1_I2R" presynapticPopulation="M1" postsynapticPopulation="I2R" synapse="Acetylcholine">
      <connection id="134" preCellId="../M1/0/M1" postCellId="../I2R/0/I2R" preSegmentId="3" postSegmentId="1" preFractionAlong="0.7733235527040767" postFractionAlong="0.7056459363630133"/>
    </projection>
    <projection id="NCXLS_M1_I2L" presynapticPopulation="M1" postsynapticPopulation="I2L" synapse="Acetylcholine">
      <connection id="135" preCellId="../M1/0/M1" postCellId="../I2L/0/I2L" preSegmentId="2" postSegmentId="4" preFractionAlong="0.9501076426861392" postFractionAlong="0.6989423919685712"/>
    </projection>
    <projection id="NCXLS_M1_I1L" presynapticPopulation="M1" postsynapticPopulation="I1L" synapse="Acetylcholine">
      <connection id="136" preCellId="../M1/0/M1" postCellId="../I1L/0/I1L" preSegmentId="1" postSegmentId="8" preFractionAlong="0.7740033129097597" postFractionAlong="0.28195832714264546"/>
    </projection>
    <projection id="NCXLS_M1_I3" presynapticPopulation="M1" postsynapticPopulation="I3" synapse="Acetylcholine">
      <connection id="137" preCellId="../M1/0/M1" postCellId="../I3/0/I3" preSegmentId="9" postSegmentId="6" preFractionAlong="0.06301539069281048" postFractionAlong="0.60059670357945"/>
    </projection>
    <projection id="NCXLS_M1_I4" presynapticPopulation="M1" postsynapticPopulation="I4" synapse="Acetylcholine">
      <connection id="138" preCellId="../M1/0/M1" postCellId="../I4/0/I4" preSegmentId="7" postSegmentId="6" preFractionAlong="0.7965962414079082" postFractionAlong="0.6417464425010574"/>
    </projection>
    <projection id="NCXLS_I2L_M2R" presynapticPopulation="I2L" postsynapticPopulation="M2R" synapse="Glutamate">
      <connection id="139" preCellId="../I2L/0/I2L" postCellId="../M2R/0/M2R" preSegmentId="8" postSegmentId="9" preFractionAlong="0.15774367288552726" postFractionAlong="0.398451304246189"/>
    </projection>
    <projection id="NCXLS_I2L_I1R" presynapticPopulation="I2L" postsynapticPopulation="I1R" synapse="Glutamate">
      <connection id="140" preCellId="../I2L/0/I2L" postCellId="../I1R/0/I1R" preSegmentId="5" postSegmentId="8" preFractionAlong="0.15278727364346711" postFractionAlong="0.5823966042362146"/>
    </projection>
    <projection id="NC_I1L_RMDDL" presynapticPopulation="I1L" postsynapticPopulation="RMDDL" synapse="Acetylcholine">
      <connection id="141" preCellId="../I1L/0/I1L" postCellId="../RMDDL/0/RMDDL" preSegmentId="5" postSegmentId="1" preFractionAlong="0.19380424246791583" postFractionAlong="0.19658658758196024"/>
    </projection>
    <projection id="NC_I1L_RMDVL" presynapticPopulation="I1L" postsynapticPopulation="RMDVL" synapse="Acetylcholine">
      <connection id="142" preCellId="../I1L/0/I1L" postCellId="../RMDVL/0/RMDVL" preSegmentId="7" postSegmentId="9" preFractionAlong="0.8381920347835841" postFractionAlong="0.4703238255459795"/>
    </projection>
    <projection id="NC_I1R_RMDDR" presynapticPopulation="I1R" postsynapticPopulation="RMDDR" synapse="Acetylcholine">
      <connection id="143" preCellId="../I1R/0/I1R" postCellId="../RMDDR/0/RMDDR" preSegmentId="4" postSegmentId="4" preFractionAlong="0.2949624161637524" postFractionAlong="0.7738257968923308"/>
    </projection>
    <projection id="NC_I1R_RMDVR" presynapticPopulation="I1R" postsynapticPopulation="RMDVR" synapse="Acetylcholine">
      <connection id="144" preCellId="../I1R/0/I1R" postCellId="../RMDVR/0/RMDVR" preSegmentId="8" postSegmentId="2" preFractionAlong="0.9004053185650672" postFractionAlong="0.30708241308334117"/>
    </projection>
    <projection id="NC_I2L_URXL" presynapticPopulation="I2L" postsynapticPopulation="URXL" synapse="Glutamate">
      <connection id="145" preCellId="../I2L/0/I2L" postCellId="../URXL/0/URXL" preSegmentId="2" postSegmentId="7" preFractionAlong="0.13191465841072292" postFractionAlong="0.34028820641962454"/>
    </projection>
    <projection id="NC_I2R_URXR" presynapticPopulation="I2R" postsynapticPopulation="URXR" synapse="Glutamate">
      <connection id="146" preCellId="../I2R/0/I2R" postCellId="../URXR/0/URXR" preSegmentId="5" postSegmentId="6" preFractionAlong="0.14425131411659153" postFractionAlong="0.5414293943049967"/>
    </projection>
    <projection id="NC_AVKL_I1L" presynapticPopulation="AVKL" postsynapticPopulation="I1L" synapse="Acetylcholine">
      <connection id="147" preCellId="../AVKL/0/AVKL" postCellId="../I1L/0/I1L" preSegmentId="1" postSegmentId="5" preFractionAlong="0.5989666363238755" postFractionAlong="0.18037976887507134"/>
    </projection>
    <projection id="NC_AVKR_I1R" presynapticPopulation="AVKR" postsynapticPopulation="I1R" synapse="Acetylcholine">
      <connection id="148" preCellId="../AVKR/0/AVKR" postCellId="../I1R/0/I1R" preSegmentId="9" postSegmentId="7" preFractionAlong="0.5091083323914358" postFractionAlong="0.7089568037628478"/>
    </projection>
    <projection id="NC_RIS_I1L" presynapticPopulation="RIS" postsynapticPopulation="I1L" synapse="Glutamate">
      <connection id="149" preCellId="../RIS/0/RIS" postCellId="../I1L/0/I1L" preSegmentId="6" postSegmentId="4" preFractionAlong="0.8024027817219871" postFractionAlong="0.6293625638701175"/>
    </projection>
    <projection id="NC_RIS_I1R" presynapticPopulation="RIS" postsynapticPopulation="I1R" synapse="Glutamate">
      <connection id="150" preCellId="../RIS/0/RIS" postCellId="../I1R/0/I1R" preSegmentId="1" postSegmentId="2" preFractionAlong="0.6685251384461137" postFractionAlong="0.8451056409802619"/>
    </projection>
    <projection id="NC_AVAL_I2L" presynapticPopulation="AVAL" postsynapticPopulation="I2L" synapse="Acetylcholine">
      <connection id="151" preCellId="../AVAL/0/AVAL" postCellId="../I2L/0/I2L" preSegmentId="1" postSegmentId="9" preFractionAlong="0.046033136141718556" postFractionAlong="0.9867755973855576"/>
    </projection>
    <projection id="NC_AVAR_I2R" presynapticPopulation="AVAR" postsynapticPopulation="I2R" synapse="Acetylcholine">
      <connection id="152" preCellId="../AVAR/0/AVAR" postCellId="../I2R/0/I2R" preSegmentId="1" postSegmentId="8" preFractionAlong="0.2701470804941095" postFractionAlong="0.5424417088818329"/>
    </projection>
    <projection id="NC_SMBVL_I4" presynapticPopulation="SMBVL" postsynapticPopulation="I4" synapse="Acetylcholine">
      <connection id="153" preCellId="../SMBVL/0/SMBVL" postCellId="../I4/0/I4" preSegmentId="5" postSegmentId="5" preFractionAlong="0.30439435255199665" postFractionAlong="0.3010458656978904"/>
    </projection>
    <projection id="NC_SMBVR_I4" presynapticPopulation="SMBVR" postsynapticPopulation="I4" synapse="Acetylcholine">
      <connection id="154" preCellId="../SMBVR/0/SMBVR" postCellId="../I4/0/I4" preSegmentId="5" postSegmentId="1" preFractionAlong="0.4045986661677845" postFractionAlong="0.37115304628017465"/>
    </projection>
    <projection id="NCNMJ_M1_pm3L" presynapticPopulation="M1" postsynapticPopulation="pm3L" synapse="Acetylcholine">
      <connection id="155" preCellId="../M1/0/M1" postCellId="../pm3L/0/pm3L" preSegmentId="9" postSegmentId="4" preFractionAlong="0.6407333593074455" postFractionAlong="0.8134154143208688"/>
    </projection>
    <projection id="NCNMJ_M1_pm3R" presynapticPopulation="M1" postsynapticPopulation="pm3R" synapse="Acetylcholine">
      <connection id="156" preCellId="../M1/0/M1" postCellId="../pm3R/0/pm3R" preSegmentId="4" postSegmentId="8" preFractionAlong="0.31137633690532385" postFractionAlong="0.0202702056730526"/>
    </projection>
    <projection id="NCNMJ_M1_pm4L" presynapticPopulation="M1" postsynapticPopulation="pm4L" synapse="Acetylcholine">
      <connection id="157" preCellId="../M1/0/M1" postCellId="../pm4L/0/pm4L" preSegmentId="7" postSegmentId="5" preFractionAlong="0.10272337368685203" postFractionAlong="0.4391044474069674"/>
    </projection>
    <projection id="NCNMJ_M1_pm4R" presynapticPopulation="M1" postsynapticPopulation="pm4R" synapse="Acetylcholine">
      <connection id="158" preCellId="../M1/0/M1" postCellId="../pm4R/0/pm4R" preSegmentId="4" postSegmentId="5" preFractionAlong="0.5557962411442978" postFractionAlong="0.8078933569345047"/>
    </projection>
    <projection id="NCNMJ_M2L_pm4L" presynapticPopulation="M2L" postsynapticPopulation="pm4L" synapse="Acetylcholine">
      <connection id="159" preCellId="../M2L/0/M2L" postCellId="../pm4L/0/pm4L" preSegmentId="6" postSegmentId="9" preFractionAlong="0.580322245914203" postFractionAlong="0.3393125961930803"/>
    </projection>
    <projection id="NCNMJ_M2L_pm5L" presynapticPopulation="M2L" postsynapticPopulation="pm5L" synapse="Acetylcholine">
      <connection id="160" preCellId="../M2L/0/M2L" postCellId="../pm5L/0/pm5L" preSegmentId="9" postSegmentId="1" preFractionAlong="0.3504225718160924" postFractionAlong="0.994482882452134"/>
    </projection>
    <projection id="NCNMJ_M2R_pm4R" presynapticPopulation="M2R" postsynapticPopulation="pm4R" synapse="Acetylcholine">
      <connection id="161" preCellId="../M2R/0/M2R" postCellId="../pm4R/0/pm4R" preSegmentId="3" postSegmentId="5" preFractionAlong="0.8244615590929387" postFractionAlong="0.7251352229107911"/>
    </projection>
    <projection id="NCNMJ_M2R_pm5R" presynapticPopulation="M2R" postsynapticPopulation="pm5R" synapse="Acetylcholine">
      <connection id="162" preCellId="../M2R/0/M2R" postCellId="../pm5R/0/pm5R" preSegmentId="8" postSegmentId="4" preFractionAlong="0.22255370972767097" postFractionAlong="0.4874111778902902"/>
    </projection>
    <projection id="NCNMJ_M3L_pm6L" presynapticPopulation="M3L" postsynapticPopulation="pm6L" synapse="Glutamate">
      <connection id="163" preCellId="../M3L/0/M3L" postCellId="../pm6L/0/pm6L" preSegmentId="7" postSegmentId="6" preFractionAlong="0.39212814696927234" postFractionAlong="0.7238710383147172"/>
    </projection>
    <projection id="NCNMJ_M3R_pm6R" presynapticPopulation="M3R" postsynapticPopulation="pm6R" synapse="Glutamate">
      <connection id="164" preCellId="../M3R/0/M3R" postCellId="../pm6R/0/pm6R" preSegmentId="6" postSegmentId="3" preFractionAlong="0.025036336237443835" postFractionAlong="0.4482388465553965"/>
    </projection>
    <projection id="NCNMJ_M4_pm5L" presynapticPopulation="M4" postsynapticPopulation="pm5L" synapse="Acetylcholine">
      <connection id="165" preCellId="../M4/0/M4" postCellId="../pm5L/0/pm5L" preSegmentId="5" postSegmentId="2" preFractionAlong="0.25511138716643833" postFractionAlong="0.5530368534585615"/>
    </projection>
    <projection id="NCNMJ_M4_pm5R" presynapticPopulation="M4" postsynapticPopulation="pm5R" synapse="Acetylcholine">
      <connection id="166" preCellId="../M4/0/M4" postCellId="../pm5R/0/pm5R" preSegmentId="2" postSegmentId="6" preFractionAlong="0.12324633617951175" postFractionAlong="0.49131076751269787"/>
    </projection>
    <projection id="NCNMJ_M5_pm5L" presynapticPopulation="M5" postsynapticPopulation="pm5L" synapse="Acetylcholine">
      <connection id="167" preCellId="../M5/0/M5" postCellId="../pm5L/0/pm5L" preSegmentId="1" postSegmentId="8" preFractionAlong="0.5791279167555102" postFractionAlong="0.1400004827007425"/>
    </projection>
    <projection id="NCNMJ_M5_pm5R" presynapticPopulation="M5" postsynapticPopulation="pm5R" synapse="Acetylcholine">
      <connection id="168" preCellId="../M5/0/M5" postCellId="../pm5R/0/pm5R" preSegmentId="1" postSegmentId="6" preFractionAlong="0.8792490430777847" postFractionAlong="0.16247915337690344"/>
    </projection>
    <projection id="NCNMJ_M5_pm6L" presynapticPopulation="M5" postsynapticPopulation="pm6L" synapse="Acetylcholine">
      <connection id="169" preCellId="../M5/0/M5" postCellId="../pm6L/0/pm6L" preSegmentId="8" postSegmentId="5" preFractionAlong="0.4082518041651354" postFractionAlong="0.3311657542220343"/>
    </projection>
    <projection id="NCNMJ_M5_pm6R" presynapticPopulation="M5" postsynapticPopulation="pm6R" synapse="Acetylcholine">
      <connection id="170" preCellId="../M5/0/M5" postCellId="../pm6R/0/pm6R" preSegmentId="1" postSegmentId="1" preFractionAlong="0.6273371104253198" postFractionAlong="0.8487369925931739"/>
    </projection>
    <projection id="NCNMJ_M5_pm7L" presynapticPopulation="M5" postsynapticPopulation="pm7L" synapse="Acetylcholine">
      <connection id="171" preCellId="../M5/0/M5" postCellId="../pm7L/0/pm7L" preSegmentId="9" postSegmentId="1" preFractionAlong="0.5135912763692905" postFractionAlong="0.6620095646140466"/>
    </projection>
    <projection id="NCNMJ_M5_pm7R" presynapticPopulation="M5" postsynapticPopulation="pm7R" synapse="Acetylcholine">
      <connection id="172" preCellId="../M5/0/M5" postCellId="../pm7R/0/pm7R" preSegmentId="4" postSegmentId="2" preFractionAlong="0.27402071740240774" postFractionAlong="0.7962824382950623"/>
    </projection>
    <projection id="NCNMJ_M5_pm8" presynapticPopulation="M5" postsynapticPopulation="pm8" synapse="Acetylcholine">
      <connection id="173" preCellId="../M5/0/M5" postCellId="../pm8/0/pm8" preSegmentId="3" postSegmentId="6" preFractionAlong="0.904979833786364" postFractionAlong="0.9525967490548113"/>
    </projection>
    <electricalProjection id="NCXLS_I6_I1L_GJ" presynapticPopulation="I6" postsynapticPopulation="I1L">
      <electricalConnection id="174" preCell="0" postCell="0" synapse="Generic_GJ" preSegment="5" postSegment="8" preFractionAlong="0.7432782589171941" postFractionAlong="0.45628859855200066"/>
    </electricalProjection>
    <electricalProjection id="NCXLS_M4_M3L_GJ" presynapticPopulation="M4" postsynapticPopulation="M3L">
      <electricalConnection id="175" preCell="0" postCell="0" synapse="Generic_GJ" preSegment="6" postSegment="7" preFractionAlong="0.5556640731487861" postFractionAlong="0.21890616259131657"/>
    </electricalProjection>
    <electricalProjection id="NCXLS_NSMR_MCL_GJ" presynapticPopulation="NSMR" postsynapticPopulation="MCL">
      <electricalConnection id="176" preCell="0" postCell="0" synapse="Generic_GJ" preSegment="2" postSegment="2" preFractionAlong="0.5729932782532223" postFractionAlong="0.9968254368112404"/>
    </electricalProjection>
    <electricalProjection id="NCXLS_M3L_M1_GJ" presynapticPopulation="M3L" postsynapticPopulation="M1">
      <electricalConnection id="177" preCell="0" postCell="0" synapse="Generic_GJ" preSegment="3" postSegment="8" preFractionAlong="0.25261946060177465" postFractionAlong="0.4715363875782448"/>
    </electricalProjection>
    <electricalProjection id="NCXLS_M3R_M3L_GJ" presynapticPopulation="M3R" postsynapticPopulation="M3L">
      <electricalConnection id="178" preCell="0" postCell="0" synapse="Generic_GJ" preSegment="4" postSegment="9" preFractionAlong="0.3557607149943026" postFractionAlong="0.8422820987482158"/>
    </electricalProjection>
    <electricalProjection id="NCXLS_M1_M3L_GJ" presynapticPopulation="M1" postsynapticPopulation="M3L">
      <electricalConnection id="179" preCell="0" postCell="0" synapse="Generic_GJ" preSegment="1" postSegment="4" preFractionAlong="0.46851622770365087" postFractionAlong="0.8089854006711885"/>
    </electricalProjection>
    <electricalProjection id="NCXLS_M1_M2L_GJ" presynapticPopulation="M1" postsynapticPopulation="M2L">
      <electricalConnection id="180" preCell="0" postCell="0" synapse="Generic_GJ" preSegment="4" postSegment="8" preFractionAlong="0.9965614195138568" postFractionAlong="0.5515306529322829"/>
    </electricalProjection>
    <electricalProjection id="MuscleGJ_pm3L_pm3R" presynapticPopulation="pm3L" postsynapticPopulation="pm3R">
      <electricalConnection id="181" preCell="0" postCell="0" synapse="Generic_GJ" preSegment="9" postSegment="6" preFractionAlong="0.5477157081792359" postFractionAlong="0.9425777318928872"/>
    </electricalProjection>
    <electricalProjection id="MuscleGJ_pm4L_pm4R" presynapticPopulation="pm4L" postsynapticPopulation="pm4R">
      <electricalConnection id="182" preCell="0" postCell="0" synapse="Generic_GJ" preSegment="3" postSegment="3" preFractionAlong="0.6941434149596486" postFractionAlong="0.8869862935068581"/>
    </electricalProjection>
    <electricalProjection id="MuscleGJ_pm5L_pm5R" presynapticPopulation="pm5L" postsynapticPopulation="pm5R">
      <electricalConnection id="183" preCell="0" postCell="0" synapse="Generic_GJ" preSegment="5" postSegment="3" preFractionAlong="0.4076710895171374" postFractionAlong="0.674760833716514"/>
    </electricalProjection>
    <electricalProjection id="MuscleGJ_pm6L_pm6R" presynapticPopulation="pm6L" postsynapticPopulation="pm6R">
      <electricalConnection id="184" preCell="0" postCell="0" synapse="Generic_GJ" preSegment="7" postSegment="9" preFractionAlong="0.47661963815144837" postFractionAlong="0.10291174262282488"/>
    </electricalProjection>
    <electricalProjection id="MuscleGJ_pm7L_pm7R" presynapticPopulation="pm7L" postsynapticPopulation="pm7R">
      <electricalConnection id="185" preCell="0" postCell="0" synapse="Generic_GJ" preSegment="6" postSegment="3" preFractionAlong="0.1925216409376017" postFractionAlong="0.45660381959506535"/>
    </electricalProjection>
    <electricalProjection id="MuscleGJ_pm4L_pm5L" presynapticPopulation="pm4L" postsynapticPopulation="pm5L">
      <electricalConnection id="186" preCell="0" postCell="0" synapse="Generic_GJ" preSegment="4" postSegment="5" preFractionAlong="0.1559366391542325" postFractionAlong="0.7814446038844386"/>
    </electricalProjection>
    <electricalProjection id="MuscleGJ_pm4R_pm5R" presynapticPopulation="pm4R" postsynapticPopulation="pm5R">
      <electricalConnection id="187" preCell="0" postCell="0" synapse="Generic_GJ" preSegment="8" postSegment="6" preFractionAlong="0.4814629176373849" postFractionAlong="0.6548480623891278"/>
    </electricalProjection>
    <electricalProjection id="MuscleGJ_pm5L_pm6L" presynapticPopulation="pm5L" postsynapticPopulation="pm6L">
      <electricalConnection id="188" preCell="0" postCell="0" synapse="Generic_GJ" preSegment="6" postSegment="7" preFractionAlong="0.7689132100912617" postFractionAlong="0.3542206780342759"/>
    </electricalProjection>
    <electricalProjection id="MuscleGJ_pm5R_pm6R" presynapticPopulation="pm5R" postsynapticPopulation="pm6R">
      <electricalConnection id="189" preCell="0" postCell="0" synapse="Generic_GJ" preSegment="8" postSegment="7" preFractionAlong="0.9418033596009769" postFractionAlong="0.5726172453143344"/>
    </electricalProjection>
    <electricalProjection id="MuscleGJ_pm6L_pm7L" presynapticPopulation="pm6L" postsynapticPopulation="pm7L">
      <electricalConnection id="190" preCell="0" postCell="0" synapse="Generic_GJ" preSegment="6" postSegment="2" preFractionAlong="0.6333513372887707" postFractionAlong="0.8938899739469642"/>
    </electricalProjection>
    <electricalProjection id="MuscleGJ_pm6R_pm7R" presynapticPopulation="pm6R" postsynapticPopulation="pm7R">
      <electricalConnection id="191" preCell="0" postCell="0" synapse="Generic_GJ" preSegment="3" postSegment="6" preFractionAlong="0.6148986770271042" postFractionAlong="0.7163079820812245"/>
    </electricalProjection>
  </network>
</neuroml>
