<?xml version='1.0' encoding='UTF-8'?>
<neuroml xmlns="http://www.neuroml.org/schema/neuroml2" xmlns:xsi="http://www.w3.org/2001/XMLSchema-instance" xsi:schemaLocation="http://www.neuroml.org/schema/neuroml2 https://raw.githubusercontent.com/NeuroML/NeuroML2/development/Schemas/NeuroML2/NeuroML_v2beta4.xsd" id="gvft_network_bio_prior_lamW_0.144_DF_0.037_t20.net">
  <notes>NeuroML2 network generated from GVFT simulation on 2025-05-04 00:14:20
</notes>
  <include href="M3R.cell.nml"/>
  <include href="M1.cell.nml"/>
  <include href="I2L.cell.nml"/>
  <include href="MCL.cell.nml"/>
  <include href="I6.cell.nml"/>
  <include href="I5.cell.nml"/>
  <include href="M4.cell.nml"/>
  <include href="I1R.cell.nml"/>
  <include href="MCR.cell.nml"/>
  <include href="I3.cell.nml"/>
  <include href="M3L.cell.nml"/>
  <include href="NSML.cell.nml"/>
  <include href="M2L.cell.nml"/>
  <include href="M5.cell.nml"/>
  <include href="I4.cell.nml"/>
  <include href="MI.cell.nml"/>
  <include href="NSMR.cell.nml"/>
  <include href="I2R.cell.nml"/>
  <include href="M2R.cell.nml"/>
  <include href="I1L.cell.nml"/>
  <include href="Serotonin_Glutamate.synapse.nml"/>
  <include href="Acetylcholine.synapse.nml"/>
  <include href="Generic_GJ.synapse.nml"/>
  <include href="Glutamate.synapse.nml"/>
  <network id="gvft_network_bio_prior_lamW_0.144_DF_0.037_t20.net" type="networkWithTemperature" temperature="20.0 degC">
    <population id="M1" component="M1" type="populationList" size="1">
      <instance id="0">
        <location x="-0.35678393" y="-0.8190955" z="0.0"/>
      </instance>
    </population>
    <population id="M2L" component="M2L" type="populationList" size="1">
      <instance id="0">
        <location x="-0.23618092" y="-0.37688443" z="0.0"/>
      </instance>
    </population>
    <population id="M2R" component="M2R" type="populationList" size="1">
      <instance id="0">
        <location x="-0.8592965" y="0.44723618" z="0.0"/>
      </instance>
    </population>
    <population id="M3L" component="M3L" type="populationList" size="1">
      <instance id="0">
        <location x="0.6683417" y="-0.5276382" z="0.0"/>
      </instance>
    </population>
    <population id="M3R" component="M3R" type="populationList" size="1">
      <instance id="0">
        <location x="0.40703517" y="-0.39698493" z="0.0"/>
      </instance>
    </population>
    <population id="M4" component="M4" type="populationList" size="1">
      <instance id="0">
        <location x="0.5879397" y="-0.6683417" z="0.0"/>
      </instance>
    </population>
    <population id="M5" component="M5" type="populationList" size="1">
      <instance id="0">
        <location x="-0.49748746" y="0.45728645" z="0.0"/>
      </instance>
    </population>
    <population id="I1L" component="I1L" type="populationList" size="1">
      <instance id="0">
        <location x="0.9798995" y="-0.4874372" z="0.0"/>
      </instance>
    </population>
    <population id="I1R" component="I1R" type="populationList" size="1">
      <instance id="0">
        <location x="-0.919598" y="1.0" z="0.0"/>
      </instance>
    </population>
    <population id="I2L" component="I2L" type="populationList" size="1">
      <instance id="0">
        <location x="-0.638191" y="0.39698493" z="0.0"/>
      </instance>
    </population>
    <population id="I2R" component="I2R" type="populationList" size="1">
      <instance id="0">
        <location x="0.7386935" y="-0.5276382" z="0.0"/>
      </instance>
    </population>
    <population id="I3" component="I3" type="populationList" size="1">
      <instance id="0">
        <location x="0.9798995" y="-0.10552765" z="0.0"/>
      </instance>
    </population>
    <population id="I4" component="I4" type="populationList" size="1">
      <instance id="0">
        <location x="0.8190955" y="0.9296482" z="0.0"/>
      </instance>
    </population>
    <population id="I5" component="I5" type="populationList" size="1">
      <instance id="0">
        <location x="0.6482412" y="0.879397" z="0.0"/>
      </instance>
    </population>
    <population id="I6" component="I6" type="populationList" size="1">
      <instance id="0">
        <location x="0.83919597" y="-0.959799" z="0.0"/>
      </instance>
    </population>
    <population id="MCL" component="MCL" type="populationList" size="1">
      <instance id="0">
        <location x="-0.61809045" y="-0.8994975" z="0.0"/>
      </instance>
    </population>
    <population id="MCR" component="MCR" type="populationList" size="1">
      <instance id="0">
        <location x="-0.7386935" y="-0.7788945" z="0.0"/>
      </instance>
    </population>
    <population id="MI" component="MI" type="populationList" size="1">
      <instance id="0">
        <location x="-0.8894472" y="-0.8592965" z="0.0"/>
      </instance>
    </population>
    <population id="NSML" component="NSML" type="populationList" size="1">
      <instance id="0">
        <location x="0.2562814" y="-0.8994975" z="0.0"/>
      </instance>
    </population>
    <population id="NSMR" component="NSMR" type="populationList" size="1">
      <instance id="0">
        <location x="0.28643218" y="0.47738695" z="0.0"/>
      </instance>
    </population>
    <projection id="NCXLS_M3R_I2R" presynapticPopulation="M3R" postsynapticPopulation="I2R" synapse="Acetylcholine">
      <connection id="0" preCellId="../M3R/0/M3R" postCellId="../I2R/0/I2R" preSegmentId="3" postSegmentId="5" preFractionAlong="0.9826524114935692" postFractionAlong="0.6370475535036275"/>
    </projection>
    <electricalProjection id="NCXLS_M3R_M1_GJ" presynapticPopulation="M3R" postsynapticPopulation="M1">
      <electricalConnection id="1" preCell="0" postCell="0" synapse="Generic_GJ" preSegment="3" postSegment="7" preFractionAlong="0.1537493121029181" postFractionAlong="0.9217266694516614"/>
    </electricalProjection>
    <projection id="NCXLS_M3R_MCL" presynapticPopulation="M3R" postsynapticPopulation="MCL" synapse="Acetylcholine">
      <connection id="2" preCellId="../M3R/0/M3R" postCellId="../MCL/0/MCL" preSegmentId="5" postSegmentId="9" preFractionAlong="0.7317052727231516" postFractionAlong="0.7091807037944047"/>
    </projection>
    <projection id="NCXLS_M3R_M3L" presynapticPopulation="M3R" postsynapticPopulation="M3L" synapse="Glutamate">
      <connection id="3" preCellId="../M3R/0/M3R" postCellId="../M3L/0/M3L" preSegmentId="5" postSegmentId="3" preFractionAlong="0.688292998427255" postFractionAlong="0.21972275011039688"/>
    </projection>
    <electricalProjection id="NCXLS_M3R_M4_GJ" presynapticPopulation="M3R" postsynapticPopulation="M4">
      <electricalConnection id="4" preCell="0" postCell="0" synapse="Generic_GJ" preSegment="4" postSegment="3" preFractionAlong="0.2976737155928457" postFractionAlong="0.6597636404530838"/>
    </electricalProjection>
    <projection id="NCXLS_M3R_I1L" presynapticPopulation="M3R" postsynapticPopulation="I1L" synapse="Acetylcholine">
      <connection id="5" preCellId="../M3R/0/M3R" postCellId="../I1L/0/I1L" preSegmentId="9" postSegmentId="6" preFractionAlong="0.9132997116000338" postFractionAlong="0.6085831546399083"/>
    </projection>
    <projection id="NCXLS_M3R_I6" presynapticPopulation="M3R" postsynapticPopulation="I6" synapse="Acetylcholine">
      <connection id="6" preCellId="../M3R/0/M3R" postCellId="../I6/0/I6" preSegmentId="2" postSegmentId="9" preFractionAlong="0.9611182680216402" postFractionAlong="0.6273965553158464"/>
    </projection>
    <projection id="NCXLS_M3R_NSML" presynapticPopulation="M3R" postsynapticPopulation="NSML" synapse="Acetylcholine">
      <connection id="7" preCellId="../M3R/0/M3R" postCellId="../NSML/0/NSML" preSegmentId="3" postSegmentId="4" preFractionAlong="0.2923910238477404" postFractionAlong="0.7053066425359272"/>
    </projection>
    <projection id="NCXLS_M2L_I2L" presynapticPopulation="M2L" postsynapticPopulation="I2L" synapse="Acetylcholine">
      <connection id="8" preCellId="../M2L/0/M2L" postCellId="../I2L/0/I2L" preSegmentId="9" postSegmentId="2" preFractionAlong="0.6872830044131277" postFractionAlong="0.09575419866335766"/>
    </projection>
    <electricalProjection id="NCXLS_M2L_M3R_GJ" presynapticPopulation="M2L" postsynapticPopulation="M3R">
      <electricalConnection id="9" preCell="0" postCell="0" synapse="Generic_GJ" preSegment="8" postSegment="9" preFractionAlong="0.4046450284400993" postFractionAlong="0.062447531197507455"/>
    </electricalProjection>
    <projection id="NCXLS_M2L_I2R" presynapticPopulation="M2L" postsynapticPopulation="I2R" synapse="Acetylcholine">
      <connection id="10" preCellId="../M2L/0/M2L" postCellId="../I2R/0/I2R" preSegmentId="4" postSegmentId="2" preFractionAlong="0.6935098370463204" postFractionAlong="0.03971120757224722"/>
    </projection>
    <projection id="NCXLS_M2L_M5" presynapticPopulation="M2L" postsynapticPopulation="M5" synapse="Glutamate">
      <connection id="11" preCellId="../M2L/0/M2L" postCellId="../M5/0/M5" preSegmentId="9" postSegmentId="4" preFractionAlong="0.8430369469277033" postFractionAlong="0.39882152692405737"/>
    </projection>
    <projection id="NCXLS_M2L_I3" presynapticPopulation="M2L" postsynapticPopulation="I3" synapse="Acetylcholine">
      <connection id="12" preCellId="../M2L/0/M2L" postCellId="../I3/0/I3" preSegmentId="6" postSegmentId="7" preFractionAlong="0.3004887586326389" postFractionAlong="0.8032634006271282"/>
    </projection>
    <projection id="NCXLS_M2L_I4" presynapticPopulation="M2L" postsynapticPopulation="I4" synapse="Acetylcholine">
      <connection id="13" preCellId="../M2L/0/M2L" postCellId="../I4/0/I4" preSegmentId="6" postSegmentId="5" preFractionAlong="0.20619707925520225" postFractionAlong="0.24985379607832958"/>
    </projection>
    <projection id="NCXLS_M2L_M3L" presynapticPopulation="M2L" postsynapticPopulation="M3L" synapse="Glutamate">
      <connection id="14" preCellId="../M2L/0/M2L" postCellId="../M3L/0/M3L" preSegmentId="4" postSegmentId="9" preFractionAlong="0.23008449185747504" postFractionAlong="0.406082132559771"/>
    </projection>
    <projection id="NCXLS_M2L_M4" presynapticPopulation="M2L" postsynapticPopulation="M4" synapse="Glutamate">
      <connection id="15" preCellId="../M2L/0/M2L" postCellId="../M4/0/M4" preSegmentId="5" postSegmentId="4" preFractionAlong="0.22763253581939236" postFractionAlong="0.5244363458577493"/>
    </projection>
    <projection id="NCXLS_M2L_I1L" presynapticPopulation="M2L" postsynapticPopulation="I1L" synapse="Acetylcholine">
      <connection id="16" preCellId="../M2L/0/M2L" postCellId="../I1L/0/I1L" preSegmentId="6" postSegmentId="2" preFractionAlong="0.37820678387307793" postFractionAlong="0.7938956551945168"/>
    </projection>
    <projection id="NCXLS_M2L_M2R" presynapticPopulation="M2L" postsynapticPopulation="M2R" synapse="Glutamate">
      <connection id="17" preCellId="../M2L/0/M2L" postCellId="../M2R/0/M2R" preSegmentId="9" postSegmentId="5" preFractionAlong="0.09896862340870682" postFractionAlong="0.2713813950795846"/>
    </projection>
    <projection id="NCXLS_M2L_I1R" presynapticPopulation="M2L" postsynapticPopulation="I1R" synapse="Acetylcholine">
      <connection id="18" preCellId="../M2L/0/M2L" postCellId="../I1R/0/I1R" preSegmentId="6" postSegmentId="7" preFractionAlong="0.9797343347738597" postFractionAlong="0.2682760204535567"/>
    </projection>
    <projection id="NCXLS_M2L_I5" presynapticPopulation="M2L" postsynapticPopulation="I5" synapse="Acetylcholine">
      <connection id="19" preCellId="../M2L/0/M2L" postCellId="../I5/0/I5" preSegmentId="2" postSegmentId="3" preFractionAlong="0.4509865026483437" postFractionAlong="0.10075284395957629"/>
    </projection>
    <projection id="NCXLS_M2L_NSMR" presynapticPopulation="M2L" postsynapticPopulation="NSMR" synapse="Acetylcholine">
      <connection id="20" preCellId="../M2L/0/M2L" postCellId="../NSMR/0/NSMR" preSegmentId="3" postSegmentId="1" preFractionAlong="0.8701966904922421" postFractionAlong="0.13865252911330372"/>
    </projection>
    <projection id="NCXLS_M1_I2L" presynapticPopulation="M1" postsynapticPopulation="I2L" synapse="Acetylcholine">
      <connection id="21" preCellId="../M1/0/M1" postCellId="../I2L/0/I2L" preSegmentId="9" postSegmentId="3" preFractionAlong="0.17567229796858452" postFractionAlong="0.9602663584920665"/>
    </projection>
    <projection id="NCXLS_M1_M3R" presynapticPopulation="M1" postsynapticPopulation="M3R" synapse="Acetylcholine">
      <connection id="22" preCellId="../M1/0/M1" postCellId="../M3R/0/M3R" preSegmentId="1" postSegmentId="3" preFractionAlong="0.33631272750495556" postFractionAlong="0.23448400678316994"/>
    </projection>
    <projection id="NCXLS_M1_I2R" presynapticPopulation="M1" postsynapticPopulation="I2R" synapse="Acetylcholine">
      <connection id="23" preCellId="../M1/0/M1" postCellId="../I2R/0/I2R" preSegmentId="9" postSegmentId="6" preFractionAlong="0.5518287335341685" postFractionAlong="0.6317748436527554"/>
    </projection>
    <projection id="NCXLS_M1_M2L" presynapticPopulation="M1" postsynapticPopulation="M2L" synapse="Glutamate">
      <connection id="24" preCellId="../M1/0/M1" postCellId="../M2L/0/M2L" preSegmentId="4" postSegmentId="4" preFractionAlong="0.9486540809029906" postFractionAlong="0.16975849820713584"/>
    </projection>
    <electricalProjection id="NCXLS_M1_M5_GJ" presynapticPopulation="M1" postsynapticPopulation="M5">
      <electricalConnection id="25" preCell="0" postCell="0" synapse="Generic_GJ" preSegment="5" postSegment="8" preFractionAlong="0.014856122507503788" postFractionAlong="0.4811256918168456"/>
    </electricalProjection>
    <projection id="NCXLS_M1_I3" presynapticPopulation="M1" postsynapticPopulation="I3" synapse="Acetylcholine">
      <connection id="26" preCellId="../M1/0/M1" postCellId="../I3/0/I3" preSegmentId="1" postSegmentId="1" preFractionAlong="0.20932181604701705" postFractionAlong="0.2408780637054827"/>
    </projection>
    <projection id="NCXLS_M1_I4" presynapticPopulation="M1" postsynapticPopulation="I4" synapse="Acetylcholine">
      <connection id="27" preCellId="../M1/0/M1" postCellId="../I4/0/I4" preSegmentId="2" postSegmentId="1" preFractionAlong="0.7327234154133065" postFractionAlong="0.6858762750864646"/>
    </projection>
    <projection id="NCXLS_M1_M3L" presynapticPopulation="M1" postsynapticPopulation="M3L" synapse="Glutamate">
      <connection id="28" preCellId="../M1/0/M1" postCellId="../M3L/0/M3L" preSegmentId="7" postSegmentId="9" preFractionAlong="0.24995898123949556" postFractionAlong="0.6095285097540636"/>
    </projection>
    <projection id="NCXLS_M1_M4" presynapticPopulation="M1" postsynapticPopulation="M4" synapse="Acetylcholine">
      <connection id="29" preCellId="../M1/0/M1" postCellId="../M4/0/M4" preSegmentId="9" postSegmentId="7" preFractionAlong="0.3614653284985154" postFractionAlong="0.7776803762748927"/>
    </projection>
    <projection id="NCXLS_M1_I1L" presynapticPopulation="M1" postsynapticPopulation="I1L" synapse="Acetylcholine">
      <connection id="30" preCellId="../M1/0/M1" postCellId="../I1L/0/I1L" preSegmentId="2" postSegmentId="4" preFractionAlong="0.8929645917048273" postFractionAlong="0.4479436402077033"/>
    </projection>
    <projection id="NCXLS_M1_M2R" presynapticPopulation="M1" postsynapticPopulation="M2R" synapse="Acetylcholine">
      <connection id="31" preCellId="../M1/0/M1" postCellId="../M2R/0/M2R" preSegmentId="3" postSegmentId="1" preFractionAlong="0.415774313581574" postFractionAlong="0.8503769192997056"/>
    </projection>
    <projection id="NCXLS_M1_I1R" presynapticPopulation="M1" postsynapticPopulation="I1R" synapse="Acetylcholine">
      <connection id="32" preCellId="../M1/0/M1" postCellId="../I1R/0/I1R" preSegmentId="4" postSegmentId="6" preFractionAlong="0.8626751629457258" postFractionAlong="0.4433203207726987"/>
    </projection>
    <projection id="NCXLS_M1_I5" presynapticPopulation="M1" postsynapticPopulation="I5" synapse="Acetylcholine">
      <connection id="33" preCellId="../M1/0/M1" postCellId="../I5/0/I5" preSegmentId="6" postSegmentId="8" preFractionAlong="0.9053218283760898" postFractionAlong="0.08303875781018644"/>
    </projection>
    <projection id="NCXLS_M1_I6" presynapticPopulation="M1" postsynapticPopulation="I6" synapse="Acetylcholine">
      <connection id="34" preCellId="../M1/0/M1" postCellId="../I6/0/I6" preSegmentId="1" postSegmentId="4" preFractionAlong="0.8162278518628002" postFractionAlong="0.9882621151431868"/>
    </projection>
    <projection id="NCXLS_M1_NSML" presynapticPopulation="M1" postsynapticPopulation="NSML" synapse="Acetylcholine">
      <connection id="35" preCellId="../M1/0/M1" postCellId="../NSML/0/NSML" preSegmentId="9" postSegmentId="8" preFractionAlong="0.9543969020334743" postFractionAlong="0.9106430158345454"/>
    </projection>
    <projection id="NCXLS_M1_NSMR" presynapticPopulation="M1" postsynapticPopulation="NSMR" synapse="Acetylcholine">
      <connection id="36" preCellId="../M1/0/M1" postCellId="../NSMR/0/NSMR" preSegmentId="3" postSegmentId="9" preFractionAlong="0.49482845662142017" postFractionAlong="0.7423102455337244"/>
    </projection>
    <electricalProjection id="NCXLS_M5_M2R_GJ" presynapticPopulation="M5" postsynapticPopulation="M2R">
      <electricalConnection id="37" preCell="0" postCell="0" synapse="Generic_GJ" preSegment="5" postSegment="2" preFractionAlong="0.499618411998762" postFractionAlong="0.30521453012885913"/>
    </electricalProjection>
    <projection id="NCXLS_M5_I1R" presynapticPopulation="M5" postsynapticPopulation="I1R" synapse="Acetylcholine">
      <connection id="38" preCellId="../M5/0/M5" postCellId="../I1R/0/I1R" preSegmentId="1" postSegmentId="6" preFractionAlong="0.3310162594948949" postFractionAlong="0.7403030598990841"/>
    </projection>
    <projection id="NCXLS_M3L_I2L" presynapticPopulation="M3L" postsynapticPopulation="I2L" synapse="Acetylcholine">
      <connection id="39" preCellId="../M3L/0/M3L" postCellId="../I2L/0/I2L" preSegmentId="9" postSegmentId="3" preFractionAlong="0.17170998897368817" postFractionAlong="0.5298338889620703"/>
    </projection>
    <projection id="NCXLS_M3L_M3R" presynapticPopulation="M3L" postsynapticPopulation="M3R" synapse="Glutamate">
      <connection id="40" preCellId="../M3L/0/M3L" postCellId="../M3R/0/M3R" preSegmentId="2" postSegmentId="7" preFractionAlong="0.628905144923615" postFractionAlong="0.11793867487423348"/>
    </projection>
    <projection id="NCXLS_M3L_M5" presynapticPopulation="M3L" postsynapticPopulation="M5" synapse="Acetylcholine">
      <connection id="41" preCellId="../M3L/0/M3L" postCellId="../M5/0/M5" preSegmentId="9" postSegmentId="4" preFractionAlong="0.2832965279977022" postFractionAlong="0.00024293443451273156"/>
    </projection>
    <projection id="NCXLS_M3L_I3" presynapticPopulation="M3L" postsynapticPopulation="I3" synapse="Acetylcholine">
      <connection id="42" preCellId="../M3L/0/M3L" postCellId="../I3/0/I3" preSegmentId="9" postSegmentId="4" preFractionAlong="0.23360903203623684" postFractionAlong="0.7783719045454912"/>
    </projection>
    <projection id="NCXLS_M3L_I4" presynapticPopulation="M3L" postsynapticPopulation="I4" synapse="Acetylcholine">
      <connection id="43" preCellId="../M3L/0/M3L" postCellId="../I4/0/I4" preSegmentId="2" postSegmentId="6" preFractionAlong="0.9709047114498695" postFractionAlong="0.3736056595340591"/>
    </projection>
    <projection id="NCXLS_M3L_I1L" presynapticPopulation="M3L" postsynapticPopulation="I1L" synapse="Acetylcholine">
      <connection id="44" preCellId="../M3L/0/M3L" postCellId="../I1L/0/I1L" preSegmentId="6" postSegmentId="5" preFractionAlong="0.3105770155507873" postFractionAlong="0.6157260534451727"/>
    </projection>
    <projection id="NCXLS_M3L_M2R" presynapticPopulation="M3L" postsynapticPopulation="M2R" synapse="Acetylcholine">
      <connection id="45" preCellId="../M3L/0/M3L" postCellId="../M2R/0/M2R" preSegmentId="6" postSegmentId="3" preFractionAlong="0.036207261487384956" postFractionAlong="0.5511413361947338"/>
    </projection>
    <projection id="NCXLS_M3L_I1R" presynapticPopulation="M3L" postsynapticPopulation="I1R" synapse="Acetylcholine">
      <connection id="46" preCellId="../M3L/0/M3L" postCellId="../I1R/0/I1R" preSegmentId="5" postSegmentId="6" preFractionAlong="0.3037238516318258" postFractionAlong="0.9210694862995814"/>
    </projection>
    <projection id="NCXLS_M3L_I5" presynapticPopulation="M3L" postsynapticPopulation="I5" synapse="Acetylcholine">
      <connection id="47" preCellId="../M3L/0/M3L" postCellId="../I5/0/I5" preSegmentId="9" postSegmentId="3" preFractionAlong="0.6722006635651122" postFractionAlong="0.19675877767165562"/>
    </projection>
    <projection id="NCXLS_M3L_NSMR" presynapticPopulation="M3L" postsynapticPopulation="NSMR" synapse="Acetylcholine">
      <connection id="48" preCellId="../M3L/0/M3L" postCellId="../NSMR/0/NSMR" preSegmentId="8" postSegmentId="3" preFractionAlong="0.18125025555155194" postFractionAlong="0.7120079611981627"/>
    </projection>
    <projection id="NCXLS_M4_I6" presynapticPopulation="M4" postsynapticPopulation="I6" synapse="Acetylcholine">
      <connection id="49" preCellId="../M4/0/M4" postCellId="../I6/0/I6" preSegmentId="4" postSegmentId="6" preFractionAlong="0.4022946780763187" postFractionAlong="0.7832900924388664"/>
    </projection>
    <projection id="NCXLS_M4_NSML" presynapticPopulation="M4" postsynapticPopulation="NSML" synapse="Acetylcholine">
      <connection id="50" preCellId="../M4/0/M4" postCellId="../NSML/0/NSML" preSegmentId="5" postSegmentId="3" preFractionAlong="0.12665587284719393" postFractionAlong="0.4206302368788194"/>
    </projection>
    <projection id="NCXLS_M2R_I2L" presynapticPopulation="M2R" postsynapticPopulation="I2L" synapse="Acetylcholine">
      <connection id="51" preCellId="../M2R/0/M2R" postCellId="../I2L/0/I2L" preSegmentId="9" postSegmentId="1" preFractionAlong="0.3763118169549976" postFractionAlong="0.363189123716225"/>
    </projection>
    <electricalProjection id="NCXLS_M2R_M3R_GJ" presynapticPopulation="M2R" postsynapticPopulation="M3R">
      <electricalConnection id="52" preCell="0" postCell="0" synapse="Generic_GJ" preSegment="7" postSegment="3" preFractionAlong="0.10816938755075933" postFractionAlong="0.9866967960804238"/>
    </electricalProjection>
    <projection id="NCXLS_M2R_I2R" presynapticPopulation="M2R" postsynapticPopulation="I2R" synapse="Acetylcholine">
      <connection id="53" preCellId="../M2R/0/M2R" postCellId="../I2R/0/I2R" preSegmentId="1" postSegmentId="4" preFractionAlong="0.6508663952541407" postFractionAlong="0.1988917029380174"/>
    </projection>
    <projection id="NCXLS_M2R_M2L" presynapticPopulation="M2R" postsynapticPopulation="M2L" synapse="Acetylcholine">
      <connection id="54" preCellId="../M2R/0/M2R" postCellId="../M2L/0/M2L" preSegmentId="3" postSegmentId="7" preFractionAlong="0.6593503030992501" postFractionAlong="0.909726837934197"/>
    </projection>
    <projection id="NCXLS_M2R_M5" presynapticPopulation="M2R" postsynapticPopulation="M5" synapse="Glutamate">
      <connection id="55" preCellId="../M2R/0/M2R" postCellId="../M5/0/M5" preSegmentId="1" postSegmentId="8" preFractionAlong="0.19803094663109366" postFractionAlong="0.13411962270979016"/>
    </projection>
    <projection id="NCXLS_M2R_I3" presynapticPopulation="M2R" postsynapticPopulation="I3" synapse="Acetylcholine">
      <connection id="56" preCellId="../M2R/0/M2R" postCellId="../I3/0/I3" preSegmentId="8" postSegmentId="9" preFractionAlong="0.8682970181613279" postFractionAlong="0.29471484685646876"/>
    </projection>
    <projection id="NCXLS_M2R_I4" presynapticPopulation="M2R" postsynapticPopulation="I4" synapse="Acetylcholine">
      <connection id="57" preCellId="../M2R/0/M2R" postCellId="../I4/0/I4" preSegmentId="3" postSegmentId="5" preFractionAlong="0.3404410800994184" postFractionAlong="0.9909861694966853"/>
    </projection>
    <electricalProjection id="NCXLS_M2R_M3L_GJ" presynapticPopulation="M2R" postsynapticPopulation="M3L">
      <electricalConnection id="58" preCell="0" postCell="0" synapse="Generic_GJ" preSegment="8" postSegment="7" preFractionAlong="0.2047139475951013" postFractionAlong="0.33481834471345107"/>
    </electricalProjection>
    <projection id="NCXLS_M2R_M4" presynapticPopulation="M2R" postsynapticPopulation="M4" synapse="Glutamate">
      <connection id="59" preCellId="../M2R/0/M2R" postCellId="../M4/0/M4" preSegmentId="6" postSegmentId="1" preFractionAlong="0.6951964597032112" postFractionAlong="0.12025098657073463"/>
    </projection>
    <projection id="NCXLS_M2R_I1L" presynapticPopulation="M2R" postsynapticPopulation="I1L" synapse="Acetylcholine">
      <connection id="60" preCellId="../M2R/0/M2R" postCellId="../I1L/0/I1L" preSegmentId="1" postSegmentId="6" preFractionAlong="0.316684356016926" postFractionAlong="0.677303959298141"/>
    </projection>
    <projection id="NCXLS_M2R_I1R" presynapticPopulation="M2R" postsynapticPopulation="I1R" synapse="Acetylcholine">
      <connection id="61" preCellId="../M2R/0/M2R" postCellId="../I1R/0/I1R" preSegmentId="8" postSegmentId="6" preFractionAlong="0.0028421536639724465" postFractionAlong="0.9308981443714295"/>
    </projection>
    <projection id="NCXLS_M2R_I5" presynapticPopulation="M2R" postsynapticPopulation="I5" synapse="Acetylcholine">
      <connection id="62" preCellId="../M2R/0/M2R" postCellId="../I5/0/I5" preSegmentId="5" postSegmentId="5" preFractionAlong="0.7710383702448548" postFractionAlong="0.4352307180094239"/>
    </projection>
    <projection id="NCXLS_M2R_I6" presynapticPopulation="M2R" postsynapticPopulation="I6" synapse="Acetylcholine">
      <connection id="63" preCellId="../M2R/0/M2R" postCellId="../I6/0/I6" preSegmentId="1" postSegmentId="9" preFractionAlong="0.30541349854275135" postFractionAlong="0.15766102679690797"/>
    </projection>
    <projection id="NCXLS_M2R_NSML" presynapticPopulation="M2R" postsynapticPopulation="NSML" synapse="Acetylcholine">
      <connection id="64" preCellId="../M2R/0/M2R" postCellId="../NSML/0/NSML" preSegmentId="4" postSegmentId="7" preFractionAlong="0.76075930838695" postFractionAlong="0.015838070944874216"/>
    </projection>
    <projection id="NCXLS_M2R_NSMR" presynapticPopulation="M2R" postsynapticPopulation="NSMR" synapse="Acetylcholine">
      <connection id="65" preCellId="../M2R/0/M2R" postCellId="../NSMR/0/NSMR" preSegmentId="1" postSegmentId="4" preFractionAlong="0.10612541856490243" postFractionAlong="0.68864505226439"/>
    </projection>
  </network>
</neuroml>
