<?xml version='1.0' encoding='UTF-8'?>
<neuroml xmlns="http://www.neuroml.org/schema/neuroml2" xmlns:xsi="http://www.w3.org/2001/XMLSchema-instance" xsi:schemaLocation="http://www.neuroml.org/schema/neuroml2 https://raw.githubusercontent.com/NeuroML/NeuroML2/development/Schemas/NeuroML2/NeuroML_v2beta4.xsd" id="gvft_network_bio_prior_lamW_0_144_DF_0_040_t40_net">
  <notes>NeuroML2 network generated from GVFT simulation on 2025-05-04 14:47:18
</notes>
  <include href="AVAL.cell.nml"/>
  <include href="AVAR.cell.nml"/>
  <include href="AVKL.cell.nml"/>
  <include href="AVKR.cell.nml"/>
  <include href="RIS.cell.nml"/>
  <include href="RMDDL.cell.nml"/>
  <include href="RMDDR.cell.nml"/>
  <include href="RMDVL.cell.nml"/>
  <include href="RMDVR.cell.nml"/>
  <include href="SMBVL.cell.nml"/>
  <include href="SMBVR.cell.nml"/>
  <include href="URXL.cell.nml"/>
  <include href="URXR.cell.nml"/>
  <include href="I4.cell.nml"/>
  <include href="I1L.cell.nml"/>
  <include href="I1R.cell.nml"/>
  <include href="M2R.cell.nml"/>
  <include href="M4.cell.nml"/>
  <include href="I6.cell.nml"/>
  <include href="I2R.cell.nml"/>
  <include href="M3R.cell.nml"/>
  <include href="I5.cell.nml"/>
  <include href="MCR.cell.nml"/>
  <include href="M3L.cell.nml"/>
  <include href="MI.cell.nml"/>
  <include href="M1.cell.nml"/>
  <include href="MCL.cell.nml"/>
  <include href="I2L.cell.nml"/>
  <include href="M5.cell.nml"/>
  <include href="NSMR.cell.nml"/>
  <include href="M2L.cell.nml"/>
  <include href="NSML.cell.nml"/>
  <include href="I3.cell.nml"/>
  <include href="Generic_GJ.synapse.nml"/>
  <include href="Glutamate.synapse.nml"/>
  <include href="Acetylcholine.synapse.nml"/>
  <include href="Serotonin_Glutamate.synapse.nml"/>
  <network id="gvft_network_bio_prior_lamW_0_144_DF_0_040_t40_net" type="networkWithTemperature" temperature="20.0 degC">
    <population id="M1" component="M1" type="populationList" size="1">
      <instance id="0">
        <location x="-0.1356784" y="-0.51758796" z="0.0"/>
      </instance>
    </population>
    <population id="M2L" component="M2L" type="populationList" size="1">
      <instance id="0">
        <location x="0.53768843" y="0.1758794" z="0.0"/>
      </instance>
    </population>
    <population id="M2R" component="M2R" type="populationList" size="1">
      <instance id="0">
        <location x="-0.30653268" y="-0.03517589" z="0.0"/>
      </instance>
    </population>
    <population id="M3L" component="M3L" type="populationList" size="1">
      <instance id="0">
        <location x="-0.2562814" y="-0.57788944" z="0.0"/>
      </instance>
    </population>
    <population id="M3R" component="M3R" type="populationList" size="1">
      <instance id="0">
        <location x="-0.43718594" y="-0.8592965" z="0.0"/>
      </instance>
    </population>
    <population id="M4" component="M4" type="populationList" size="1">
      <instance id="0">
        <location x="-0.94974875" y="0.67839193" z="0.0"/>
      </instance>
    </population>
    <population id="M5" component="M5" type="populationList" size="1">
      <instance id="0">
        <location x="-0.35678393" y="0.7788945" z="0.0"/>
      </instance>
    </population>
    <population id="I1L" component="I1L" type="populationList" size="1">
      <instance id="0">
        <location x="-0.5276382" y="0.8190955" z="0.0"/>
      </instance>
    </population>
    <population id="I1R" component="I1R" type="populationList" size="1">
      <instance id="0">
        <location x="0.6482412" y="0.61809045" z="0.0"/>
      </instance>
    </population>
    <population id="I2L" component="I2L" type="populationList" size="1">
      <instance id="0">
        <location x="-0.8492462" y="-0.025125638" z="0.0"/>
      </instance>
    </population>
    <population id="I2R" component="I2R" type="populationList" size="1">
      <instance id="0">
        <location x="-0.98994976" y="-0.6482412" z="0.0"/>
      </instance>
    </population>
    <population id="I3" component="I3" type="populationList" size="1">
      <instance id="0">
        <location x="-0.5477387" y="-0.919598" z="0.0"/>
      </instance>
    </population>
    <population id="I4" component="I4" type="populationList" size="1">
      <instance id="0">
        <location x="0.53768843" y="0.72864324" z="0.0"/>
      </instance>
    </population>
    <population id="I5" component="I5" type="populationList" size="1">
      <instance id="0">
        <location x="0.9698492" y="0.39698493" z="0.0"/>
      </instance>
    </population>
    <population id="I6" component="I6" type="populationList" size="1">
      <instance id="0">
        <location x="-0.1155779" y="0.9396985" z="0.0"/>
      </instance>
    </population>
    <population id="MCL" component="MCL" type="populationList" size="1">
      <instance id="0">
        <location x="-0.2964824" y="0.80904526" z="0.0"/>
      </instance>
    </population>
    <population id="MCR" component="MCR" type="populationList" size="1">
      <instance id="0">
        <location x="0.8492462" y="0.015075387" z="0.0"/>
      </instance>
    </population>
    <population id="MI" component="MI" type="populationList" size="1">
      <instance id="0">
        <location x="0.7889447" y="0.1557789" z="0.0"/>
      </instance>
    </population>
    <population id="NSML" component="NSML" type="populationList" size="1">
      <instance id="0">
        <location x="0.37688443" y="-0.5075377" z="0.0"/>
      </instance>
    </population>
    <population id="NSMR" component="NSMR" type="populationList" size="1">
      <instance id="0">
        <location x="-0.23618092" y="-0.72864324" z="0.0"/>
      </instance>
    </population>
    <population id="AVAL" component="AVAL" type="populationList" size="1">
      <instance id="0">
        <location x="5.0" y="0.0" z="0.0"/>
      </instance>
    </population>
    <population id="AVAR" component="AVAR" type="populationList" size="1">
      <instance id="0">
        <location x="5.0" y="0.0" z="0.0"/>
      </instance>
    </population>
    <population id="AVKL" component="AVKL" type="populationList" size="1">
      <instance id="0">
        <location x="5.0" y="0.0" z="0.0"/>
      </instance>
    </population>
    <population id="AVKR" component="AVKR" type="populationList" size="1">
      <instance id="0">
        <location x="5.0" y="0.0" z="0.0"/>
      </instance>
    </population>
    <population id="RIS" component="RIS" type="populationList" size="1">
      <instance id="0">
        <location x="5.0" y="0.0" z="0.0"/>
      </instance>
    </population>
    <population id="RMDDL" component="RMDDL" type="populationList" size="1">
      <instance id="0">
        <location x="5.0" y="0.0" z="0.0"/>
      </instance>
    </population>
    <population id="RMDDR" component="RMDDR" type="populationList" size="1">
      <instance id="0">
        <location x="5.0" y="0.0" z="0.0"/>
      </instance>
    </population>
    <population id="RMDVL" component="RMDVL" type="populationList" size="1">
      <instance id="0">
        <location x="5.0" y="0.0" z="0.0"/>
      </instance>
    </population>
    <population id="RMDVR" component="RMDVR" type="populationList" size="1">
      <instance id="0">
        <location x="5.0" y="0.0" z="0.0"/>
      </instance>
    </population>
    <population id="SMBVL" component="SMBVL" type="populationList" size="1">
      <instance id="0">
        <location x="5.0" y="0.0" z="0.0"/>
      </instance>
    </population>
    <population id="SMBVR" component="SMBVR" type="populationList" size="1">
      <instance id="0">
        <location x="5.0" y="0.0" z="0.0"/>
      </instance>
    </population>
    <population id="URXL" component="URXL" type="populationList" size="1">
      <instance id="0">
        <location x="5.0" y="0.0" z="0.0"/>
      </instance>
    </population>
    <population id="URXR" component="URXR" type="populationList" size="1">
      <instance id="0">
        <location x="5.0" y="0.0" z="0.0"/>
      </instance>
    </population>
    <electricalProjection id="NCXLS_M3L_M3R_GJ" presynapticPopulation="M3L" postsynapticPopulation="M3R">
      <electricalConnection id="0" preCell="0" postCell="0" synapse="Generic_GJ" preSegment="4" postSegment="4" preFractionAlong="0.07167937967533466" postFractionAlong="0.7062129859650655"/>
    </electricalProjection>
    <electricalProjection id="NCXLS_M3L_M5_GJ" presynapticPopulation="M3L" postsynapticPopulation="M5">
      <electricalConnection id="1" preCell="0" postCell="0" synapse="Generic_GJ" preSegment="5" postSegment="2" preFractionAlong="0.8424577277107875" postFractionAlong="0.46594395092998475"/>
    </electricalProjection>
    <electricalProjection id="NCXLS_MCR_MI_GJ" presynapticPopulation="MCR" postsynapticPopulation="MI">
      <electricalConnection id="2" preCell="0" postCell="0" synapse="Generic_GJ" preSegment="1" postSegment="6" preFractionAlong="0.7068194450101439" postFractionAlong="0.4892901575037625"/>
    </electricalProjection>
    <electricalProjection id="NCXLS_M5_M1_GJ" presynapticPopulation="M5" postsynapticPopulation="M1">
      <electricalConnection id="3" preCell="0" postCell="0" synapse="Generic_GJ" preSegment="1" postSegment="7" preFractionAlong="0.015672373888725777" postFractionAlong="0.41799825972553717"/>
    </electricalProjection>
    <electricalProjection id="NCXLS_M5_M3L_GJ" presynapticPopulation="M5" postsynapticPopulation="M3L">
      <electricalConnection id="4" preCell="0" postCell="0" synapse="Generic_GJ" preSegment="6" postSegment="6" preFractionAlong="0.6304582972424243" postFractionAlong="0.5299106085609492"/>
    </electricalProjection>
    <electricalProjection id="NCXLS_M5_M3R_GJ" presynapticPopulation="M5" postsynapticPopulation="M3R">
      <electricalConnection id="5" preCell="0" postCell="0" synapse="Generic_GJ" preSegment="6" postSegment="4" preFractionAlong="0.25922548714515825" postFractionAlong="0.12233857596214126"/>
    </electricalProjection>
    <electricalProjection id="NCXLS_M2L_M4_GJ" presynapticPopulation="M2L" postsynapticPopulation="M4">
      <electricalConnection id="6" preCell="0" postCell="0" synapse="Generic_GJ" preSegment="9" postSegment="2" preFractionAlong="0.4611417778806999" postFractionAlong="0.3111669647714358"/>
    </electricalProjection>
    <electricalProjection id="NCXLS_M2R_M3L_GJ" presynapticPopulation="M2R" postsynapticPopulation="M3L">
      <electricalConnection id="7" preCell="0" postCell="0" synapse="Generic_GJ" preSegment="5" postSegment="1" preFractionAlong="0.7727441445464122" postFractionAlong="0.1683852983030545"/>
    </electricalProjection>
    <electricalProjection id="NCXLS_M2R_M3R_GJ" presynapticPopulation="M2R" postsynapticPopulation="M3R">
      <electricalConnection id="8" preCell="0" postCell="0" synapse="Generic_GJ" preSegment="1" postSegment="2" preFractionAlong="0.7494467879338654" postFractionAlong="0.5393482048408798"/>
    </electricalProjection>
    <electricalProjection id="NCXLS_M2R_M2L_GJ" presynapticPopulation="M2R" postsynapticPopulation="M2L">
      <electricalConnection id="9" preCell="0" postCell="0" synapse="Generic_GJ" preSegment="5" postSegment="2" preFractionAlong="0.13214337816986055" postFractionAlong="0.5954790066656731"/>
    </electricalProjection>
    <projection id="NCXLS_I2L_I2R" presynapticPopulation="I2L" postsynapticPopulation="I2R" synapse="Glutamate">
      <connection id="10" preCellId="../I2L/0/I2L" postCellId="../I2R/0/I2R" preSegmentId="4" postSegmentId="1" preFractionAlong="0.9371449668151219" postFractionAlong="0.16704178133815262"/>
    </projection>
    <projection id="NCXLS_M1_I1R" presynapticPopulation="M1" postsynapticPopulation="I1R" synapse="Acetylcholine">
      <connection id="11" preCellId="../M1/0/M1" postCellId="../I1R/0/I1R" preSegmentId="8" postSegmentId="1" preFractionAlong="0.7549787331491632" postFractionAlong="0.08897553586933837"/>
    </projection>
    <projection id="NCXLS_M1_I2L" presynapticPopulation="M1" postsynapticPopulation="I2L" synapse="Acetylcholine">
      <connection id="12" preCellId="../M1/0/M1" postCellId="../I2L/0/I2L" preSegmentId="6" postSegmentId="6" preFractionAlong="0.048550427208863156" postFractionAlong="0.6511923081508607"/>
    </projection>
    <projection id="NCXLS_M1_MCL" presynapticPopulation="M1" postsynapticPopulation="MCL" synapse="Acetylcholine">
      <connection id="13" preCellId="../M1/0/M1" postCellId="../MCL/0/MCL" preSegmentId="2" postSegmentId="9" preFractionAlong="0.08186150591629393" postFractionAlong="0.3008061610854341"/>
    </projection>
    <projection id="NCXLS_M1_MCR" presynapticPopulation="M1" postsynapticPopulation="MCR" synapse="Acetylcholine">
      <connection id="14" preCellId="../M1/0/M1" postCellId="../MCR/0/MCR" preSegmentId="2" postSegmentId="1" preFractionAlong="0.26766675976944265" postFractionAlong="0.9115968865602742"/>
    </projection>
    <projection id="NCXLS_M1_I4" presynapticPopulation="M1" postsynapticPopulation="I4" synapse="Acetylcholine">
      <connection id="15" preCellId="../M1/0/M1" postCellId="../I4/0/I4" preSegmentId="3" postSegmentId="2" preFractionAlong="0.0455501559653525" postFractionAlong="0.30022711154138637"/>
    </projection>
    <projection id="NCXLS_M1_M5" presynapticPopulation="M1" postsynapticPopulation="M5" synapse="Acetylcholine">
      <connection id="16" preCellId="../M1/0/M1" postCellId="../M5/0/M5" preSegmentId="4" postSegmentId="2" preFractionAlong="0.40822182258823203" postFractionAlong="0.27384251909925916"/>
    </projection>
    <projection id="NCXLS_M1_MI" presynapticPopulation="M1" postsynapticPopulation="MI" synapse="Acetylcholine">
      <connection id="17" preCellId="../M1/0/M1" postCellId="../MI/0/MI" preSegmentId="3" postSegmentId="8" preFractionAlong="0.618037524676957" postFractionAlong="0.7184414747355413"/>
    </projection>
    <projection id="NCXLS_M1_I5" presynapticPopulation="M1" postsynapticPopulation="I5" synapse="Acetylcholine">
      <connection id="18" preCellId="../M1/0/M1" postCellId="../I5/0/I5" preSegmentId="4" postSegmentId="5" preFractionAlong="0.9049295169818152" postFractionAlong="0.5600039892289184"/>
    </projection>
    <projection id="NCXLS_M1_I6" presynapticPopulation="M1" postsynapticPopulation="I6" synapse="Acetylcholine">
      <connection id="19" preCellId="../M1/0/M1" postCellId="../I6/0/I6" preSegmentId="7" postSegmentId="8" preFractionAlong="0.6886273022949981" postFractionAlong="0.7416608094763181"/>
    </projection>
    <projection id="NCXLS_M1_I1L" presynapticPopulation="M1" postsynapticPopulation="I1L" synapse="Acetylcholine">
      <connection id="20" preCellId="../M1/0/M1" postCellId="../I1L/0/I1L" preSegmentId="3" postSegmentId="3" preFractionAlong="0.9579820536090996" postFractionAlong="0.5885256813933637"/>
    </projection>
    <projection id="NCXLS_M1_NSML" presynapticPopulation="M1" postsynapticPopulation="NSML" synapse="Acetylcholine">
      <connection id="21" preCellId="../M1/0/M1" postCellId="../NSML/0/NSML" preSegmentId="5" postSegmentId="3" preFractionAlong="0.9893332868282753" postFractionAlong="0.2725476478930291"/>
    </projection>
    <projection id="NCXLS_M1_M4" presynapticPopulation="M1" postsynapticPopulation="M4" synapse="Glutamate">
      <connection id="22" preCellId="../M1/0/M1" postCellId="../M4/0/M4" preSegmentId="4" postSegmentId="8" preFractionAlong="0.7666226651744862" postFractionAlong="0.3621787575581461"/>
    </projection>
    <projection id="NCXLS_M1_M2L" presynapticPopulation="M1" postsynapticPopulation="M2L" synapse="Glutamate">
      <connection id="23" preCellId="../M1/0/M1" postCellId="../M2L/0/M2L" preSegmentId="6" postSegmentId="3" preFractionAlong="0.10407595641824696" postFractionAlong="0.7893334823405523"/>
    </projection>
    <projection id="NCXLS_M1_M2R" presynapticPopulation="M1" postsynapticPopulation="M2R" synapse="Glutamate">
      <connection id="24" preCellId="../M1/0/M1" postCellId="../M2R/0/M2R" preSegmentId="3" postSegmentId="2" preFractionAlong="0.6557773017841801" postFractionAlong="0.641619998714409"/>
    </projection>
    <projection id="NCXLS_M3L_I2L" presynapticPopulation="M3L" postsynapticPopulation="I2L" synapse="Acetylcholine">
      <connection id="25" preCellId="../M3L/0/M3L" postCellId="../I2L/0/I2L" preSegmentId="1" postSegmentId="4" preFractionAlong="0.9530765893580212" postFractionAlong="0.42342523164683477"/>
    </projection>
    <projection id="NCXLS_M3L_MCL" presynapticPopulation="M3L" postsynapticPopulation="MCL" synapse="Acetylcholine">
      <connection id="26" preCellId="../M3L/0/M3L" postCellId="../MCL/0/MCL" preSegmentId="8" postSegmentId="9" preFractionAlong="0.5288052181567664" postFractionAlong="0.7538034837685449"/>
    </projection>
    <projection id="NCXLS_M3L_I2R" presynapticPopulation="M3L" postsynapticPopulation="I2R" synapse="Acetylcholine">
      <connection id="27" preCellId="../M3L/0/M3L" postCellId="../I2R/0/I2R" preSegmentId="5" postSegmentId="8" preFractionAlong="0.746082156572893" postFractionAlong="0.20480152493916692"/>
    </projection>
    <projection id="NCXLS_M3L_I3" presynapticPopulation="M3L" postsynapticPopulation="I3" synapse="Acetylcholine">
      <connection id="28" preCellId="../M3L/0/M3L" postCellId="../I3/0/I3" preSegmentId="3" postSegmentId="5" preFractionAlong="0.6342279988136148" postFractionAlong="0.01815796560707883"/>
    </projection>
    <projection id="NCXLS_M3L_I1L" presynapticPopulation="M3L" postsynapticPopulation="I1L" synapse="Acetylcholine">
      <connection id="29" preCellId="../M3L/0/M3L" postCellId="../I1L/0/I1L" preSegmentId="5" postSegmentId="6" preFractionAlong="0.6435544669564192" postFractionAlong="0.9021761599774838"/>
    </projection>
    <projection id="NCXLS_M3L_M4" presynapticPopulation="M3L" postsynapticPopulation="M4" synapse="Acetylcholine">
      <connection id="30" preCellId="../M3L/0/M3L" postCellId="../M4/0/M4" preSegmentId="6" postSegmentId="1" preFractionAlong="0.7756546353260334" postFractionAlong="0.288149489033375"/>
    </projection>
    <projection id="NCXLS_M3L_M2R" presynapticPopulation="M3L" postsynapticPopulation="M2R" synapse="Glutamate">
      <connection id="31" preCellId="../M3L/0/M3L" postCellId="../M2R/0/M2R" preSegmentId="3" postSegmentId="6" preFractionAlong="0.5631980924481612" postFractionAlong="0.16222957109649694"/>
    </projection>
    <projection id="NCXLS_MCL_I1R" presynapticPopulation="MCL" postsynapticPopulation="I1R" synapse="Acetylcholine">
      <connection id="32" preCellId="../MCL/0/MCL" postCellId="../I1R/0/I1R" preSegmentId="2" postSegmentId="8" preFractionAlong="0.36454197008888656" postFractionAlong="0.7861006466076711"/>
    </projection>
    <projection id="NCXLS_MCL_I4" presynapticPopulation="MCL" postsynapticPopulation="I4" synapse="Acetylcholine">
      <connection id="33" preCellId="../MCL/0/MCL" postCellId="../I4/0/I4" preSegmentId="6" postSegmentId="7" preFractionAlong="0.11640285116574589" postFractionAlong="0.2044553814193969"/>
    </projection>
    <projection id="NCXLS_MCL_I5" presynapticPopulation="MCL" postsynapticPopulation="I5" synapse="Acetylcholine">
      <connection id="34" preCellId="../MCL/0/MCL" postCellId="../I5/0/I5" preSegmentId="5" postSegmentId="7" preFractionAlong="0.6707600217115339" postFractionAlong="0.46928227812024137"/>
    </projection>
    <projection id="NCXLS_MCL_I6" presynapticPopulation="MCL" postsynapticPopulation="I6" synapse="Acetylcholine">
      <connection id="35" preCellId="../MCL/0/MCL" postCellId="../I6/0/I6" preSegmentId="3" postSegmentId="6" preFractionAlong="0.7820900146236098" postFractionAlong="0.812296055423481"/>
    </projection>
    <projection id="NCXLS_MCR_I1R" presynapticPopulation="MCR" postsynapticPopulation="I1R" synapse="Acetylcholine">
      <connection id="36" preCellId="../MCR/0/MCR" postCellId="../I1R/0/I1R" preSegmentId="4" postSegmentId="2" preFractionAlong="0.23959488296539133" postFractionAlong="0.6213846080738289"/>
    </projection>
    <projection id="NCXLS_MCR_I4" presynapticPopulation="MCR" postsynapticPopulation="I4" synapse="Acetylcholine">
      <connection id="37" preCellId="../MCR/0/MCR" postCellId="../I4/0/I4" preSegmentId="5" postSegmentId="2" preFractionAlong="0.6627224233681778" postFractionAlong="0.6721050670137647"/>
    </projection>
    <projection id="NCXLS_MCR_I5" presynapticPopulation="MCR" postsynapticPopulation="I5" synapse="Acetylcholine">
      <connection id="38" preCellId="../MCR/0/MCR" postCellId="../I5/0/I5" preSegmentId="7" postSegmentId="3" preFractionAlong="0.7618052549549524" postFractionAlong="0.32909588031475956"/>
    </projection>
    <projection id="NCXLS_M3R_I2L" presynapticPopulation="M3R" postsynapticPopulation="I2L" synapse="Acetylcholine">
      <connection id="39" preCellId="../M3R/0/M3R" postCellId="../I2L/0/I2L" preSegmentId="6" postSegmentId="1" preFractionAlong="0.20874588239862923" postFractionAlong="0.4858205588603991"/>
    </projection>
    <projection id="NCXLS_M3R_MCL" presynapticPopulation="M3R" postsynapticPopulation="MCL" synapse="Acetylcholine">
      <connection id="40" preCellId="../M3R/0/M3R" postCellId="../MCL/0/MCL" preSegmentId="1" postSegmentId="8" preFractionAlong="0.21053914683784292" postFractionAlong="0.33874126295348184"/>
    </projection>
    <projection id="NCXLS_M3R_I2R" presynapticPopulation="M3R" postsynapticPopulation="I2R" synapse="Acetylcholine">
      <connection id="41" preCellId="../M3R/0/M3R" postCellId="../I2R/0/I2R" preSegmentId="4" postSegmentId="6" preFractionAlong="0.27370062948859586" postFractionAlong="0.17469935142089843"/>
    </projection>
    <projection id="NCXLS_M3R_I3" presynapticPopulation="M3R" postsynapticPopulation="I3" synapse="Acetylcholine">
      <connection id="42" preCellId="../M3R/0/M3R" postCellId="../I3/0/I3" preSegmentId="3" postSegmentId="9" preFractionAlong="0.6338154062299448" postFractionAlong="0.5690669982420896"/>
    </projection>
    <projection id="NCXLS_M3R_M5" presynapticPopulation="M3R" postsynapticPopulation="M5" synapse="Acetylcholine">
      <connection id="43" preCellId="../M3R/0/M3R" postCellId="../M5/0/M5" preSegmentId="8" postSegmentId="8" preFractionAlong="0.9901917892516717" postFractionAlong="0.09066208850933832"/>
    </projection>
    <projection id="NCXLS_M3R_I6" presynapticPopulation="M3R" postsynapticPopulation="I6" synapse="Acetylcholine">
      <connection id="44" preCellId="../M3R/0/M3R" postCellId="../I6/0/I6" preSegmentId="6" postSegmentId="7" preFractionAlong="0.6400903965861701" postFractionAlong="0.6076235758839388"/>
    </projection>
    <projection id="NCXLS_M3R_I1L" presynapticPopulation="M3R" postsynapticPopulation="I1L" synapse="Acetylcholine">
      <connection id="45" preCellId="../M3R/0/M3R" postCellId="../I1L/0/I1L" preSegmentId="4" postSegmentId="5" preFractionAlong="0.6225588033216443" postFractionAlong="0.18867229122803264"/>
    </projection>
    <projection id="NCXLS_M3R_M4" presynapticPopulation="M3R" postsynapticPopulation="M4" synapse="Glutamate">
      <connection id="46" preCellId="../M3R/0/M3R" postCellId="../M4/0/M4" preSegmentId="4" postSegmentId="5" preFractionAlong="0.3270915060016386" postFractionAlong="0.4880601562696629"/>
    </projection>
    <projection id="NCXLS_M3R_M2R" presynapticPopulation="M3R" postsynapticPopulation="M2R" synapse="Acetylcholine">
      <connection id="47" preCellId="../M3R/0/M3R" postCellId="../M2R/0/M2R" preSegmentId="2" postSegmentId="4" preFractionAlong="0.6209650962771923" postFractionAlong="0.8194807217006219"/>
    </projection>
    <projection id="NCXLS_I2R_M4" presynapticPopulation="I2R" postsynapticPopulation="M4" synapse="Acetylcholine">
      <connection id="48" preCellId="../I2R/0/I2R" postCellId="../M4/0/M4" preSegmentId="1" postSegmentId="6" preFractionAlong="0.9879753209773703" postFractionAlong="0.008084676530010881"/>
    </projection>
    <projection id="NCXLS_M5_I2L" presynapticPopulation="M5" postsynapticPopulation="I2L" synapse="Acetylcholine">
      <connection id="49" preCellId="../M5/0/M5" postCellId="../I2L/0/I2L" preSegmentId="6" postSegmentId="8" preFractionAlong="0.22833083659331044" postFractionAlong="0.024809330042565803"/>
    </projection>
    <projection id="NCXLS_M5_I2R" presynapticPopulation="M5" postsynapticPopulation="I2R" synapse="Acetylcholine">
      <connection id="50" preCellId="../M5/0/M5" postCellId="../I2R/0/I2R" preSegmentId="6" postSegmentId="5" preFractionAlong="0.18059620790472364" postFractionAlong="0.0384333928013636"/>
    </projection>
    <projection id="NCXLS_M5_I3" presynapticPopulation="M5" postsynapticPopulation="I3" synapse="Acetylcholine">
      <connection id="51" preCellId="../M5/0/M5" postCellId="../I3/0/I3" preSegmentId="7" postSegmentId="5" preFractionAlong="0.8348619180663956" postFractionAlong="0.29389008319931675"/>
    </projection>
    <projection id="NCXLS_M5_I1L" presynapticPopulation="M5" postsynapticPopulation="I1L" synapse="Acetylcholine">
      <connection id="52" preCellId="../M5/0/M5" postCellId="../I1L/0/I1L" preSegmentId="1" postSegmentId="1" preFractionAlong="0.0524921839530299" postFractionAlong="0.4274228023694364"/>
    </projection>
    <projection id="NCXLS_M5_M4" presynapticPopulation="M5" postsynapticPopulation="M4" synapse="Acetylcholine">
      <connection id="53" preCellId="../M5/0/M5" postCellId="../M4/0/M4" preSegmentId="3" postSegmentId="1" preFractionAlong="0.42715768070104376" postFractionAlong="0.10193380538260854"/>
    </projection>
    <projection id="NCXLS_M5_NSMR" presynapticPopulation="M5" postsynapticPopulation="NSMR" synapse="Acetylcholine">
      <connection id="54" preCellId="../M5/0/M5" postCellId="../NSMR/0/NSMR" preSegmentId="7" postSegmentId="6" preFractionAlong="0.696547064285704" postFractionAlong="0.2711503611772196"/>
    </projection>
    <projection id="NCXLS_M5_M2R" presynapticPopulation="M5" postsynapticPopulation="M2R" synapse="Acetylcholine">
      <connection id="55" preCellId="../M5/0/M5" postCellId="../M2R/0/M2R" preSegmentId="8" postSegmentId="3" preFractionAlong="0.010363722347177085" postFractionAlong="0.636470708550097"/>
    </projection>
    <projection id="NCXLS_M4_I1R" presynapticPopulation="M4" postsynapticPopulation="I1R" synapse="Acetylcholine">
      <connection id="56" preCellId="../M4/0/M4" postCellId="../I1R/0/I1R" preSegmentId="1" postSegmentId="1" preFractionAlong="0.11058634396395473" postFractionAlong="0.6277327355622657"/>
    </projection>
    <projection id="NCXLS_M4_MCL" presynapticPopulation="M4" postsynapticPopulation="MCL" synapse="Acetylcholine">
      <connection id="57" preCellId="../M4/0/M4" postCellId="../MCL/0/MCL" preSegmentId="3" postSegmentId="3" preFractionAlong="0.5102159340784042" postFractionAlong="0.5291032676604385"/>
    </projection>
    <projection id="NCXLS_M4_MCR" presynapticPopulation="M4" postsynapticPopulation="MCR" synapse="Acetylcholine">
      <connection id="58" preCellId="../M4/0/M4" postCellId="../MCR/0/MCR" preSegmentId="6" postSegmentId="2" preFractionAlong="0.6709589010435523" postFractionAlong="0.019318403534340445"/>
    </projection>
    <projection id="NCXLS_M4_I4" presynapticPopulation="M4" postsynapticPopulation="I4" synapse="Acetylcholine">
      <connection id="59" preCellId="../M4/0/M4" postCellId="../I4/0/I4" preSegmentId="5" postSegmentId="9" preFractionAlong="0.1710108544182284" postFractionAlong="0.42586856088314373"/>
    </projection>
    <projection id="NCXLS_M4_M5" presynapticPopulation="M4" postsynapticPopulation="M5" synapse="Acetylcholine">
      <connection id="60" preCellId="../M4/0/M4" postCellId="../M5/0/M5" preSegmentId="6" postSegmentId="5" preFractionAlong="0.35114369055681205" postFractionAlong="0.3610996406264668"/>
    </projection>
    <projection id="NCXLS_M4_MI" presynapticPopulation="M4" postsynapticPopulation="MI" synapse="Acetylcholine">
      <connection id="61" preCellId="../M4/0/M4" postCellId="../MI/0/MI" preSegmentId="6" postSegmentId="6" preFractionAlong="0.5537739542944381" postFractionAlong="0.7178678511312636"/>
    </projection>
    <projection id="NCXLS_M4_I5" presynapticPopulation="M4" postsynapticPopulation="I5" synapse="Acetylcholine">
      <connection id="62" preCellId="../M4/0/M4" postCellId="../I5/0/I5" preSegmentId="5" postSegmentId="1" preFractionAlong="0.901741676040642" postFractionAlong="0.32850905433786315"/>
    </projection>
    <projection id="NCXLS_M4_I6" presynapticPopulation="M4" postsynapticPopulation="I6" synapse="Acetylcholine">
      <connection id="63" preCellId="../M4/0/M4" postCellId="../I6/0/I6" preSegmentId="5" postSegmentId="1" preFractionAlong="0.36599640828993585" postFractionAlong="0.8291951410159383"/>
    </projection>
    <projection id="NCXLS_M4_I1L" presynapticPopulation="M4" postsynapticPopulation="I1L" synapse="Acetylcholine">
      <connection id="64" preCellId="../M4/0/M4" postCellId="../I1L/0/I1L" preSegmentId="8" postSegmentId="5" preFractionAlong="0.03404450620026467" postFractionAlong="0.8210722230570188"/>
    </projection>
    <projection id="NCXLS_M4_NSML" presynapticPopulation="M4" postsynapticPopulation="NSML" synapse="Acetylcholine">
      <connection id="65" preCellId="../M4/0/M4" postCellId="../NSML/0/NSML" preSegmentId="3" postSegmentId="7" preFractionAlong="0.2508923763538512" postFractionAlong="0.5937974594154256"/>
    </projection>
    <projection id="NCXLS_M4_M2L" presynapticPopulation="M4" postsynapticPopulation="M2L" synapse="Acetylcholine">
      <connection id="66" preCellId="../M4/0/M4" postCellId="../M2L/0/M2L" preSegmentId="5" postSegmentId="6" preFractionAlong="0.881544450405932" postFractionAlong="0.5328903283915988"/>
    </projection>
    <projection id="NCXLS_M2L_I2L" presynapticPopulation="M2L" postsynapticPopulation="I2L" synapse="Acetylcholine">
      <connection id="67" preCellId="../M2L/0/M2L" postCellId="../I2L/0/I2L" preSegmentId="7" postSegmentId="7" preFractionAlong="0.13877588411263075" postFractionAlong="0.30003048059549664"/>
    </projection>
    <projection id="NCXLS_M2L_M1" presynapticPopulation="M2L" postsynapticPopulation="M1" synapse="Acetylcholine">
      <connection id="68" preCellId="../M2L/0/M2L" postCellId="../M1/0/M1" preSegmentId="7" postSegmentId="3" preFractionAlong="0.6042395103321423" postFractionAlong="0.8167452794726815"/>
    </projection>
    <projection id="NCXLS_M2L_M3L" presynapticPopulation="M2L" postsynapticPopulation="M3L" synapse="Glutamate">
      <connection id="69" preCellId="../M2L/0/M2L" postCellId="../M3L/0/M3L" preSegmentId="2" postSegmentId="2" preFractionAlong="0.24531049798597993" postFractionAlong="0.9657915301069676"/>
    </projection>
    <projection id="NCXLS_M2L_MCL" presynapticPopulation="M2L" postsynapticPopulation="MCL" synapse="Acetylcholine">
      <connection id="70" preCellId="../M2L/0/M2L" postCellId="../MCL/0/MCL" preSegmentId="6" postSegmentId="8" preFractionAlong="0.2222910538295546" postFractionAlong="0.05341376324954861"/>
    </projection>
    <projection id="NCXLS_M2L_M3R" presynapticPopulation="M2L" postsynapticPopulation="M3R" synapse="Glutamate">
      <connection id="71" preCellId="../M2L/0/M2L" postCellId="../M3R/0/M3R" preSegmentId="4" postSegmentId="2" preFractionAlong="0.04739857793116398" postFractionAlong="0.612722051941757"/>
    </projection>
    <projection id="NCXLS_M2L_I2R" presynapticPopulation="M2L" postsynapticPopulation="I2R" synapse="Acetylcholine">
      <connection id="72" preCellId="../M2L/0/M2L" postCellId="../I2R/0/I2R" preSegmentId="3" postSegmentId="6" preFractionAlong="0.9046560624088297" postFractionAlong="0.47509266848736187"/>
    </projection>
    <projection id="NCXLS_M2L_I3" presynapticPopulation="M2L" postsynapticPopulation="I3" synapse="Acetylcholine">
      <connection id="73" preCellId="../M2L/0/M2L" postCellId="../I3/0/I3" preSegmentId="5" postSegmentId="2" preFractionAlong="0.042334945902492094" postFractionAlong="0.011199305255704117"/>
    </projection>
    <projection id="NCXLS_M2L_M5" presynapticPopulation="M2L" postsynapticPopulation="M5" synapse="Acetylcholine">
      <connection id="74" preCellId="../M2L/0/M2L" postCellId="../M5/0/M5" preSegmentId="9" postSegmentId="9" preFractionAlong="0.1318366178035142" postFractionAlong="0.6643442914647144"/>
    </projection>
    <projection id="NCXLS_M2L_I6" presynapticPopulation="M2L" postsynapticPopulation="I6" synapse="Acetylcholine">
      <connection id="75" preCellId="../M2L/0/M2L" postCellId="../I6/0/I6" preSegmentId="1" postSegmentId="2" preFractionAlong="0.43285110679567096" postFractionAlong="0.19767093687426895"/>
    </projection>
    <projection id="NCXLS_M2L_I1L" presynapticPopulation="M2L" postsynapticPopulation="I1L" synapse="Acetylcholine">
      <connection id="76" preCellId="../M2L/0/M2L" postCellId="../I1L/0/I1L" preSegmentId="2" postSegmentId="8" preFractionAlong="0.1160534593845689" postFractionAlong="0.02310685278748026"/>
    </projection>
    <projection id="NCXLS_M2L_NSML" presynapticPopulation="M2L" postsynapticPopulation="NSML" synapse="Acetylcholine">
      <connection id="77" preCellId="../M2L/0/M2L" postCellId="../NSML/0/NSML" preSegmentId="4" postSegmentId="9" preFractionAlong="0.9542584415153099" postFractionAlong="0.14228621861093582"/>
    </projection>
    <projection id="NCXLS_M2L_NSMR" presynapticPopulation="M2L" postsynapticPopulation="NSMR" synapse="Acetylcholine">
      <connection id="78" preCellId="../M2L/0/M2L" postCellId="../NSMR/0/NSMR" preSegmentId="5" postSegmentId="7" preFractionAlong="0.10816035223518217" postFractionAlong="0.5088762514093347"/>
    </projection>
    <projection id="NCXLS_M2L_M2R" presynapticPopulation="M2L" postsynapticPopulation="M2R" synapse="Acetylcholine">
      <connection id="79" preCellId="../M2L/0/M2L" postCellId="../M2R/0/M2R" preSegmentId="8" postSegmentId="8" preFractionAlong="0.8382941170007634" postFractionAlong="0.7312138199962811"/>
    </projection>
    <projection id="NCXLS_M2R_I1R" presynapticPopulation="M2R" postsynapticPopulation="I1R" synapse="Acetylcholine">
      <connection id="80" preCellId="../M2R/0/M2R" postCellId="../I1R/0/I1R" preSegmentId="4" postSegmentId="5" preFractionAlong="0.6399306874505247" postFractionAlong="0.7721523314931155"/>
    </projection>
    <projection id="NCXLS_M2R_M1" presynapticPopulation="M2R" postsynapticPopulation="M1" synapse="Acetylcholine">
      <connection id="81" preCellId="../M2R/0/M2R" postCellId="../M1/0/M1" preSegmentId="1" postSegmentId="2" preFractionAlong="0.013231279193618217" postFractionAlong="0.6844751018784777"/>
    </projection>
    <projection id="NCXLS_M2R_MCR" presynapticPopulation="M2R" postsynapticPopulation="MCR" synapse="Acetylcholine">
      <connection id="82" preCellId="../M2R/0/M2R" postCellId="../MCR/0/MCR" preSegmentId="9" postSegmentId="9" preFractionAlong="0.7068728455434385" postFractionAlong="0.6356213647320048"/>
    </projection>
    <projection id="NCXLS_M2R_I3" presynapticPopulation="M2R" postsynapticPopulation="I3" synapse="Acetylcholine">
      <connection id="83" preCellId="../M2R/0/M2R" postCellId="../I3/0/I3" preSegmentId="3" postSegmentId="1" preFractionAlong="0.836924329909292" postFractionAlong="0.027631832855930627"/>
    </projection>
    <projection id="NCXLS_M2R_I4" presynapticPopulation="M2R" postsynapticPopulation="I4" synapse="Acetylcholine">
      <connection id="84" preCellId="../M2R/0/M2R" postCellId="../I4/0/I4" preSegmentId="3" postSegmentId="1" preFractionAlong="0.1402850127879668" postFractionAlong="0.8865641126311521"/>
    </projection>
    <projection id="NCXLS_M2R_MI" presynapticPopulation="M2R" postsynapticPopulation="MI" synapse="Acetylcholine">
      <connection id="85" preCellId="../M2R/0/M2R" postCellId="../MI/0/MI" preSegmentId="1" postSegmentId="1" preFractionAlong="0.5028940779404192" postFractionAlong="0.46311803395045037"/>
    </projection>
    <projection id="NCXLS_M2R_I5" presynapticPopulation="M2R" postsynapticPopulation="I5" synapse="Acetylcholine">
      <connection id="86" preCellId="../M2R/0/M2R" postCellId="../I5/0/I5" preSegmentId="2" postSegmentId="2" preFractionAlong="0.8591821994111084" postFractionAlong="0.4035227665072294"/>
    </projection>
    <projection id="NCXLS_M2R_NSML" presynapticPopulation="M2R" postsynapticPopulation="NSML" synapse="Acetylcholine">
      <connection id="87" preCellId="../M2R/0/M2R" postCellId="../NSML/0/NSML" preSegmentId="8" postSegmentId="6" preFractionAlong="0.7190171545119348" postFractionAlong="0.8007834133738928"/>
    </projection>
    <projection id="NCXLS_M2R_NSMR" presynapticPopulation="M2R" postsynapticPopulation="NSMR" synapse="Acetylcholine">
      <connection id="88" preCellId="../M2R/0/M2R" postCellId="../NSMR/0/NSMR" preSegmentId="3" postSegmentId="1" preFractionAlong="0.11542756070426774" postFractionAlong="0.43793076384737084"/>
    </projection>
    <projection id="NC_I1L_RMDDL" presynapticPopulation="I1L" postsynapticPopulation="RMDDL" synapse="Acetylcholine">
      <connection id="89" preCellId="../I1L/0/I1L" postCellId="../RMDDL/0/RMDDL" preSegmentId="9" postSegmentId="5" preFractionAlong="0.596641405393735" postFractionAlong="0.724458377009339"/>
    </projection>
    <projection id="NC_I1L_RMDVL" presynapticPopulation="I1L" postsynapticPopulation="RMDVL" synapse="Acetylcholine">
      <connection id="90" preCellId="../I1L/0/I1L" postCellId="../RMDVL/0/RMDVL" preSegmentId="1" postSegmentId="4" preFractionAlong="0.273871819705371" postFractionAlong="0.59762899319556"/>
    </projection>
    <projection id="NC_I1R_RMDDR" presynapticPopulation="I1R" postsynapticPopulation="RMDDR" synapse="Acetylcholine">
      <connection id="91" preCellId="../I1R/0/I1R" postCellId="../RMDDR/0/RMDDR" preSegmentId="8" postSegmentId="7" preFractionAlong="0.11054136441673534" postFractionAlong="0.9220926535723316"/>
    </projection>
    <projection id="NC_I1R_RMDVR" presynapticPopulation="I1R" postsynapticPopulation="RMDVR" synapse="Acetylcholine">
      <connection id="92" preCellId="../I1R/0/I1R" postCellId="../RMDVR/0/RMDVR" preSegmentId="8" postSegmentId="7" preFractionAlong="0.36086660198013754" postFractionAlong="0.017468130279002625"/>
    </projection>
    <projection id="NC_I2L_URXL" presynapticPopulation="I2L" postsynapticPopulation="URXL" synapse="Glutamate">
      <connection id="93" preCellId="../I2L/0/I2L" postCellId="../URXL/0/URXL" preSegmentId="6" postSegmentId="3" preFractionAlong="0.24409457249260236" postFractionAlong="0.7290134212929686"/>
    </projection>
    <projection id="NC_I2R_URXR" presynapticPopulation="I2R" postsynapticPopulation="URXR" synapse="Glutamate">
      <connection id="94" preCellId="../I2R/0/I2R" postCellId="../URXR/0/URXR" preSegmentId="1" postSegmentId="1" preFractionAlong="0.349485182308101" postFractionAlong="0.9217274205310659"/>
    </projection>
    <projection id="NC_AVKL_I1L" presynapticPopulation="AVKL" postsynapticPopulation="I1L" synapse="Acetylcholine">
      <connection id="95" preCellId="../AVKL/0/AVKL" postCellId="../I1L/0/I1L" preSegmentId="2" postSegmentId="6" preFractionAlong="0.06513450144396105" postFractionAlong="0.4342185961684175"/>
    </projection>
    <projection id="NC_AVKR_I1R" presynapticPopulation="AVKR" postsynapticPopulation="I1R" synapse="Acetylcholine">
      <connection id="96" preCellId="../AVKR/0/AVKR" postCellId="../I1R/0/I1R" preSegmentId="4" postSegmentId="1" preFractionAlong="0.1907543297432639" postFractionAlong="0.8829754998308972"/>
    </projection>
    <projection id="NC_RIS_I1L" presynapticPopulation="RIS" postsynapticPopulation="I1L" synapse="Glutamate">
      <connection id="97" preCellId="../RIS/0/RIS" postCellId="../I1L/0/I1L" preSegmentId="4" postSegmentId="2" preFractionAlong="0.1993501289446863" postFractionAlong="0.42543119425634557"/>
    </projection>
    <projection id="NC_RIS_I1R" presynapticPopulation="RIS" postsynapticPopulation="I1R" synapse="Glutamate">
      <connection id="98" preCellId="../RIS/0/RIS" postCellId="../I1R/0/I1R" preSegmentId="1" postSegmentId="2" preFractionAlong="0.018548195724407468" postFractionAlong="0.7247042751485582"/>
    </projection>
    <projection id="NC_AVAL_I2L" presynapticPopulation="AVAL" postsynapticPopulation="I2L" synapse="Acetylcholine">
      <connection id="99" preCellId="../AVAL/0/AVAL" postCellId="../I2L/0/I2L" preSegmentId="1" postSegmentId="8" preFractionAlong="0.3133238035767917" postFractionAlong="0.5981410653705329"/>
    </projection>
    <projection id="NC_AVAR_I2R" presynapticPopulation="AVAR" postsynapticPopulation="I2R" synapse="Acetylcholine">
      <connection id="100" preCellId="../AVAR/0/AVAR" postCellId="../I2R/0/I2R" preSegmentId="2" postSegmentId="3" preFractionAlong="0.6138958422079134" postFractionAlong="0.31165110060965173"/>
    </projection>
    <projection id="NC_SMBVL_I4" presynapticPopulation="SMBVL" postsynapticPopulation="I4" synapse="Acetylcholine">
      <connection id="101" preCellId="../SMBVL/0/SMBVL" postCellId="../I4/0/I4" preSegmentId="6" postSegmentId="7" preFractionAlong="0.25388401096106816" postFractionAlong="0.763631915547134"/>
    </projection>
    <projection id="NC_SMBVR_I4" presynapticPopulation="SMBVR" postsynapticPopulation="I4" synapse="Acetylcholine">
      <connection id="102" preCellId="../SMBVR/0/SMBVR" postCellId="../I4/0/I4" preSegmentId="3" postSegmentId="7" preFractionAlong="0.3228144977138433" postFractionAlong="0.545488148056962"/>
    </projection>
  </network>
</neuroml>
