<?xml version='1.0' encoding='UTF-8'?>
<neuroml xmlns="http://www.neuroml.org/schema/neuroml2" xmlns:xsi="http://www.w3.org/2001/XMLSchema-instance" xsi:schemaLocation="http://www.neuroml.org/schema/neuroml2 https://raw.githubusercontent.com/NeuroML/NeuroML2/development/Schemas/NeuroML2/NeuroML_v2beta4.xsd" id="gvft_network_bio_prior_lamW_0_144_DF_0_040_t80_net">
  <notes>NeuroML2 network generated from GVFT simulation on 2025-05-04 14:47:29
</notes>
  <include href="AVAL.cell.nml"/>
  <include href="AVAR.cell.nml"/>
  <include href="AVKL.cell.nml"/>
  <include href="AVKR.cell.nml"/>
  <include href="RIS.cell.nml"/>
  <include href="RMDDL.cell.nml"/>
  <include href="RMDDR.cell.nml"/>
  <include href="RMDVL.cell.nml"/>
  <include href="RMDVR.cell.nml"/>
  <include href="SMBVL.cell.nml"/>
  <include href="SMBVR.cell.nml"/>
  <include href="URXL.cell.nml"/>
  <include href="URXR.cell.nml"/>
  <include href="I4.cell.nml"/>
  <include href="I1L.cell.nml"/>
  <include href="I1R.cell.nml"/>
  <include href="M2R.cell.nml"/>
  <include href="M4.cell.nml"/>
  <include href="I6.cell.nml"/>
  <include href="I2R.cell.nml"/>
  <include href="M3R.cell.nml"/>
  <include href="I5.cell.nml"/>
  <include href="MCR.cell.nml"/>
  <include href="M3L.cell.nml"/>
  <include href="MI.cell.nml"/>
  <include href="M1.cell.nml"/>
  <include href="MCL.cell.nml"/>
  <include href="I2L.cell.nml"/>
  <include href="M5.cell.nml"/>
  <include href="NSMR.cell.nml"/>
  <include href="M2L.cell.nml"/>
  <include href="NSML.cell.nml"/>
  <include href="I3.cell.nml"/>
  <include href="Generic_GJ.synapse.nml"/>
  <include href="Glutamate.synapse.nml"/>
  <include href="Acetylcholine.synapse.nml"/>
  <include href="Serotonin_Glutamate.synapse.nml"/>
  <network id="gvft_network_bio_prior_lamW_0_144_DF_0_040_t80_net" type="networkWithTemperature" temperature="20.0 degC">
    <population id="M1" component="M1" type="populationList" size="1">
      <instance id="0">
        <location x="0.7386935" y="-0.33668342" z="0.0"/>
      </instance>
    </population>
    <population id="M2L" component="M2L" type="populationList" size="1">
      <instance id="0">
        <location x="0.055276394" y="-0.7788945" z="0.0"/>
      </instance>
    </population>
    <population id="M2R" component="M2R" type="populationList" size="1">
      <instance id="0">
        <location x="-0.8894472" y="-0.6281407" z="0.0"/>
      </instance>
    </population>
    <population id="M3L" component="M3L" type="populationList" size="1">
      <instance id="0">
        <location x="0.43718594" y="-0.16582915" z="0.0"/>
      </instance>
    </population>
    <population id="M3R" component="M3R" type="populationList" size="1">
      <instance id="0">
        <location x="-0.76884425" y="-0.72864324" z="0.0"/>
      </instance>
    </population>
    <population id="M4" component="M4" type="populationList" size="1">
      <instance id="0">
        <location x="0.9798995" y="0.6080402" z="0.0"/>
      </instance>
    </population>
    <population id="M5" component="M5" type="populationList" size="1">
      <instance id="0">
        <location x="0.0050251363" y="-0.12562814" z="0.0"/>
      </instance>
    </population>
    <population id="I1L" component="I1L" type="populationList" size="1">
      <instance id="0">
        <location x="-0.5276382" y="0.9798995" z="0.0"/>
      </instance>
    </population>
    <population id="I1R" component="I1R" type="populationList" size="1">
      <instance id="0">
        <location x="-0.7889447" y="0.59799" z="0.0"/>
      </instance>
    </population>
    <population id="I2L" component="I2L" type="populationList" size="1">
      <instance id="0">
        <location x="-1.0" y="-0.6482412" z="0.0"/>
      </instance>
    </population>
    <population id="I2R" component="I2R" type="populationList" size="1">
      <instance id="0">
        <location x="-0.65829146" y="-0.75879395" z="0.0"/>
      </instance>
    </population>
    <population id="I3" component="I3" type="populationList" size="1">
      <instance id="0">
        <location x="-0.8492462" y="-0.41708544" z="0.0"/>
      </instance>
    </population>
    <population id="I4" component="I4" type="populationList" size="1">
      <instance id="0">
        <location x="0.26633167" y="0.9396985" z="0.0"/>
      </instance>
    </population>
    <population id="I5" component="I5" type="populationList" size="1">
      <instance id="0">
        <location x="-0.8291457" y="-0.7889447" z="0.0"/>
      </instance>
    </population>
    <population id="I6" component="I6" type="populationList" size="1">
      <instance id="0">
        <location x="0.8592965" y="0.638191" z="0.0"/>
      </instance>
    </population>
    <population id="MCL" component="MCL" type="populationList" size="1">
      <instance id="0">
        <location x="-0.025125638" y="0.26633167" z="0.0"/>
      </instance>
    </population>
    <population id="MCR" component="MCR" type="populationList" size="1">
      <instance id="0">
        <location x="-0.12562814" y="0.40703517" z="0.0"/>
      </instance>
    </population>
    <population id="MI" component="MI" type="populationList" size="1">
      <instance id="0">
        <location x="0.69849247" y="-0.065326646" z="0.0"/>
      </instance>
    </population>
    <population id="NSML" component="NSML" type="populationList" size="1">
      <instance id="0">
        <location x="0.72864324" y="-0.4874372" z="0.0"/>
      </instance>
    </population>
    <population id="NSMR" component="NSMR" type="populationList" size="1">
      <instance id="0">
        <location x="-0.6281407" y="0.16582915" z="0.0"/>
      </instance>
    </population>
    <population id="AVAL" component="AVAL" type="populationList" size="1">
      <instance id="0">
        <location x="5.0" y="0.0" z="0.0"/>
      </instance>
    </population>
    <population id="AVAR" component="AVAR" type="populationList" size="1">
      <instance id="0">
        <location x="5.0" y="0.0" z="0.0"/>
      </instance>
    </population>
    <population id="AVKL" component="AVKL" type="populationList" size="1">
      <instance id="0">
        <location x="5.0" y="0.0" z="0.0"/>
      </instance>
    </population>
    <population id="AVKR" component="AVKR" type="populationList" size="1">
      <instance id="0">
        <location x="5.0" y="0.0" z="0.0"/>
      </instance>
    </population>
    <population id="RIS" component="RIS" type="populationList" size="1">
      <instance id="0">
        <location x="5.0" y="0.0" z="0.0"/>
      </instance>
    </population>
    <population id="RMDDL" component="RMDDL" type="populationList" size="1">
      <instance id="0">
        <location x="5.0" y="0.0" z="0.0"/>
      </instance>
    </population>
    <population id="RMDDR" component="RMDDR" type="populationList" size="1">
      <instance id="0">
        <location x="5.0" y="0.0" z="0.0"/>
      </instance>
    </population>
    <population id="RMDVL" component="RMDVL" type="populationList" size="1">
      <instance id="0">
        <location x="5.0" y="0.0" z="0.0"/>
      </instance>
    </population>
    <population id="RMDVR" component="RMDVR" type="populationList" size="1">
      <instance id="0">
        <location x="5.0" y="0.0" z="0.0"/>
      </instance>
    </population>
    <population id="SMBVL" component="SMBVL" type="populationList" size="1">
      <instance id="0">
        <location x="5.0" y="0.0" z="0.0"/>
      </instance>
    </population>
    <population id="SMBVR" component="SMBVR" type="populationList" size="1">
      <instance id="0">
        <location x="5.0" y="0.0" z="0.0"/>
      </instance>
    </population>
    <population id="URXL" component="URXL" type="populationList" size="1">
      <instance id="0">
        <location x="5.0" y="0.0" z="0.0"/>
      </instance>
    </population>
    <population id="URXR" component="URXR" type="populationList" size="1">
      <instance id="0">
        <location x="5.0" y="0.0" z="0.0"/>
      </instance>
    </population>
    <electricalProjection id="NCXLS_M4_M1_GJ" presynapticPopulation="M4" postsynapticPopulation="M1">
      <electricalConnection id="0" preCell="0" postCell="0" synapse="Generic_GJ" preSegment="6" postSegment="8" preFractionAlong="0.6744410713668685" postFractionAlong="0.4037330041049302"/>
    </electricalProjection>
    <electricalProjection id="NCXLS_M4_M5_GJ" presynapticPopulation="M4" postsynapticPopulation="M5">
      <electricalConnection id="1" preCell="0" postCell="0" synapse="Generic_GJ" preSegment="9" postSegment="1" preFractionAlong="0.1810628991159644" postFractionAlong="0.5442367576104175"/>
    </electricalProjection>
    <electricalProjection id="NCXLS_M1_M2R_GJ" presynapticPopulation="M1" postsynapticPopulation="M2R">
      <electricalConnection id="2" preCell="0" postCell="0" synapse="Generic_GJ" preSegment="4" postSegment="2" preFractionAlong="0.2704184104022437" postFractionAlong="0.6927073511434411"/>
    </electricalProjection>
    <electricalProjection id="NCXLS_M2R_M1_GJ" presynapticPopulation="M2R" postsynapticPopulation="M1">
      <electricalConnection id="3" preCell="0" postCell="0" synapse="Generic_GJ" preSegment="8" postSegment="4" preFractionAlong="0.35636559332103823" postFractionAlong="0.19127898789689746"/>
    </electricalProjection>
    <electricalProjection id="NCXLS_M2R_M3L_GJ" presynapticPopulation="M2R" postsynapticPopulation="M3L">
      <electricalConnection id="4" preCell="0" postCell="0" synapse="Generic_GJ" preSegment="3" postSegment="2" preFractionAlong="0.9688593354677885" postFractionAlong="0.6949674606058467"/>
    </electricalProjection>
    <electricalProjection id="NCXLS_M2R_M5_GJ" presynapticPopulation="M2R" postsynapticPopulation="M5">
      <electricalConnection id="5" preCell="0" postCell="0" synapse="Generic_GJ" preSegment="1" postSegment="7" preFractionAlong="0.19257609734684034" postFractionAlong="0.356089673754747"/>
    </electricalProjection>
    <electricalProjection id="NCXLS_M3L_M2L_GJ" presynapticPopulation="M3L" postsynapticPopulation="M2L">
      <electricalConnection id="6" preCell="0" postCell="0" synapse="Generic_GJ" preSegment="3" postSegment="8" preFractionAlong="0.7551872742482605" postFractionAlong="0.21454022120328653"/>
    </electricalProjection>
    <electricalProjection id="NCXLS_M2L_M5_GJ" presynapticPopulation="M2L" postsynapticPopulation="M5">
      <electricalConnection id="7" preCell="0" postCell="0" synapse="Generic_GJ" preSegment="8" postSegment="3" preFractionAlong="0.3521384835602436" postFractionAlong="0.4286478407787152"/>
    </electricalProjection>
    <electricalProjection id="NCXLS_M3R_M4_GJ" presynapticPopulation="M3R" postsynapticPopulation="M4">
      <electricalConnection id="8" preCell="0" postCell="0" synapse="Generic_GJ" preSegment="4" postSegment="6" preFractionAlong="0.7662228180040461" postFractionAlong="0.3749921449465896"/>
    </electricalProjection>
    <electricalProjection id="NCXLS_M3R_M1_GJ" presynapticPopulation="M3R" postsynapticPopulation="M1">
      <electricalConnection id="9" preCell="0" postCell="0" synapse="Generic_GJ" preSegment="1" postSegment="6" preFractionAlong="0.909040941314236" postFractionAlong="0.96953254153502"/>
    </electricalProjection>
    <electricalProjection id="NCXLS_M3R_M5_GJ" presynapticPopulation="M3R" postsynapticPopulation="M5">
      <electricalConnection id="10" preCell="0" postCell="0" synapse="Generic_GJ" preSegment="1" postSegment="1" preFractionAlong="0.04558098707818259" postFractionAlong="0.3445140055660201"/>
    </electricalProjection>
    <projection id="NCXLS_M4_I2R" presynapticPopulation="M4" postsynapticPopulation="I2R" synapse="Acetylcholine">
      <connection id="11" preCellId="../M4/0/M4" postCellId="../I2R/0/I2R" preSegmentId="8" postSegmentId="1" preFractionAlong="0.5817912647777101" postFractionAlong="0.5220735711373331"/>
    </projection>
    <projection id="NCXLS_M4_M2R" presynapticPopulation="M4" postsynapticPopulation="M2R" synapse="Acetylcholine">
      <connection id="12" preCellId="../M4/0/M4" postCellId="../M2R/0/M2R" preSegmentId="9" postSegmentId="4" preFractionAlong="0.6548113000303577" postFractionAlong="0.6848544791789158"/>
    </projection>
    <projection id="NCXLS_M4_MI" presynapticPopulation="M4" postsynapticPopulation="MI" synapse="Acetylcholine">
      <connection id="13" preCellId="../M4/0/M4" postCellId="../MI/0/MI" preSegmentId="7" postSegmentId="7" preFractionAlong="0.04339669415605185" postFractionAlong="0.06641640448143493"/>
    </projection>
    <projection id="NCXLS_M4_M3L" presynapticPopulation="M4" postsynapticPopulation="M3L" synapse="Glutamate">
      <connection id="14" preCellId="../M4/0/M4" postCellId="../M3L/0/M3L" preSegmentId="9" postSegmentId="1" preFractionAlong="0.3617996798630564" postFractionAlong="0.17074949422115826"/>
    </projection>
    <projection id="NCXLS_M4_I3" presynapticPopulation="M4" postsynapticPopulation="I3" synapse="Acetylcholine">
      <connection id="15" preCellId="../M4/0/M4" postCellId="../I3/0/I3" preSegmentId="2" postSegmentId="8" preFractionAlong="0.7033409545189324" postFractionAlong="0.20247856414138"/>
    </projection>
    <projection id="NCXLS_M4_M2L" presynapticPopulation="M4" postsynapticPopulation="M2L" synapse="Acetylcholine">
      <connection id="16" preCellId="../M4/0/M4" postCellId="../M2L/0/M2L" preSegmentId="8" postSegmentId="2" preFractionAlong="0.41195967989579885" postFractionAlong="0.6537995093336167"/>
    </projection>
    <projection id="NCXLS_M4_NSML" presynapticPopulation="M4" postsynapticPopulation="NSML" synapse="Acetylcholine">
      <connection id="17" preCellId="../M4/0/M4" postCellId="../NSML/0/NSML" preSegmentId="6" postSegmentId="4" preFractionAlong="0.937816965232562" postFractionAlong="0.004281757836103628"/>
    </projection>
    <projection id="NCXLS_M4_I2L" presynapticPopulation="M4" postsynapticPopulation="I2L" synapse="Acetylcholine">
      <connection id="18" preCellId="../M4/0/M4" postCellId="../I2L/0/I2L" preSegmentId="8" postSegmentId="7" preFractionAlong="0.4725306353109008" postFractionAlong="0.3408167688700171"/>
    </projection>
    <projection id="NCXLS_M4_M3R" presynapticPopulation="M4" postsynapticPopulation="M3R" synapse="Acetylcholine">
      <connection id="19" preCellId="../M4/0/M4" postCellId="../M3R/0/M3R" preSegmentId="4" postSegmentId="2" preFractionAlong="0.9443322357482916" postFractionAlong="0.6107484949543095"/>
    </projection>
    <projection id="NCXLS_M4_I5" presynapticPopulation="M4" postsynapticPopulation="I5" synapse="Acetylcholine">
      <connection id="20" preCellId="../M4/0/M4" postCellId="../I5/0/I5" preSegmentId="7" postSegmentId="1" preFractionAlong="0.9245702196867337" postFractionAlong="0.8164640593918385"/>
    </projection>
    <projection id="NCXLS_M4_MCL" presynapticPopulation="M4" postsynapticPopulation="MCL" synapse="Acetylcholine">
      <connection id="21" preCellId="../M4/0/M4" postCellId="../MCL/0/MCL" preSegmentId="5" postSegmentId="1" preFractionAlong="0.35064928295401865" postFractionAlong="0.2414642281992161"/>
    </projection>
    <projection id="NCXLS_M1_I2R" presynapticPopulation="M1" postsynapticPopulation="I2R" synapse="Acetylcholine">
      <connection id="22" preCellId="../M1/0/M1" postCellId="../I2R/0/I2R" preSegmentId="2" postSegmentId="6" preFractionAlong="0.1244988982679478" postFractionAlong="0.9148783806173704"/>
    </projection>
    <projection id="NCXLS_M1_I1L" presynapticPopulation="M1" postsynapticPopulation="I1L" synapse="Acetylcholine">
      <connection id="23" preCellId="../M1/0/M1" postCellId="../I1L/0/I1L" preSegmentId="4" postSegmentId="9" preFractionAlong="0.5376484639876792" postFractionAlong="0.5931059551121646"/>
    </projection>
    <projection id="NCXLS_M1_M3L" presynapticPopulation="M1" postsynapticPopulation="M3L" synapse="Acetylcholine">
      <connection id="24" preCellId="../M1/0/M1" postCellId="../M3L/0/M3L" preSegmentId="7" postSegmentId="3" preFractionAlong="0.09905643421598798" postFractionAlong="0.3187983617505512"/>
    </projection>
    <projection id="NCXLS_M1_MCR" presynapticPopulation="M1" postsynapticPopulation="MCR" synapse="Acetylcholine">
      <connection id="25" preCellId="../M1/0/M1" postCellId="../MCR/0/MCR" preSegmentId="2" postSegmentId="2" preFractionAlong="0.5321198602047065" postFractionAlong="0.43423669661139574"/>
    </projection>
    <projection id="NCXLS_M1_I1R" presynapticPopulation="M1" postsynapticPopulation="I1R" synapse="Acetylcholine">
      <connection id="26" preCellId="../M1/0/M1" postCellId="../I1R/0/I1R" preSegmentId="3" postSegmentId="8" preFractionAlong="0.7902827353728418" postFractionAlong="0.2888167257176215"/>
    </projection>
    <projection id="NCXLS_M1_I3" presynapticPopulation="M1" postsynapticPopulation="I3" synapse="Acetylcholine">
      <connection id="27" preCellId="../M1/0/M1" postCellId="../I3/0/I3" preSegmentId="6" postSegmentId="5" preFractionAlong="0.6267769740462303" postFractionAlong="0.5534614719249352"/>
    </projection>
    <projection id="NCXLS_M1_M2L" presynapticPopulation="M1" postsynapticPopulation="M2L" synapse="Acetylcholine">
      <connection id="28" preCellId="../M1/0/M1" postCellId="../M2L/0/M2L" preSegmentId="5" postSegmentId="6" preFractionAlong="0.3512783724511417" postFractionAlong="0.5727552332848548"/>
    </projection>
    <projection id="NCXLS_M1_M5" presynapticPopulation="M1" postsynapticPopulation="M5" synapse="Acetylcholine">
      <connection id="29" preCellId="../M1/0/M1" postCellId="../M5/0/M5" preSegmentId="8" postSegmentId="5" preFractionAlong="0.8491366361611221" postFractionAlong="0.23564233199968698"/>
    </projection>
    <projection id="NCXLS_M1_NSML" presynapticPopulation="M1" postsynapticPopulation="NSML" synapse="Acetylcholine">
      <connection id="30" preCellId="../M1/0/M1" postCellId="../NSML/0/NSML" preSegmentId="3" postSegmentId="6" preFractionAlong="0.9864870679296895" postFractionAlong="0.4310612442907894"/>
    </projection>
    <projection id="NCXLS_M1_I2L" presynapticPopulation="M1" postsynapticPopulation="I2L" synapse="Acetylcholine">
      <connection id="31" preCellId="../M1/0/M1" postCellId="../I2L/0/I2L" preSegmentId="9" postSegmentId="6" preFractionAlong="0.07268391100262306" postFractionAlong="0.5688187317664949"/>
    </projection>
    <projection id="NCXLS_M1_M3R" presynapticPopulation="M1" postsynapticPopulation="M3R" synapse="Acetylcholine">
      <connection id="32" preCellId="../M1/0/M1" postCellId="../M3R/0/M3R" preSegmentId="6" postSegmentId="1" preFractionAlong="0.8499757671095955" postFractionAlong="0.9959910509461052"/>
    </projection>
    <projection id="NCXLS_M1_I5" presynapticPopulation="M1" postsynapticPopulation="I5" synapse="Acetylcholine">
      <connection id="33" preCellId="../M1/0/M1" postCellId="../I5/0/I5" preSegmentId="2" postSegmentId="1" preFractionAlong="0.34520403103978425" postFractionAlong="0.185901711556267"/>
    </projection>
    <projection id="NCXLS_M1_NSMR" presynapticPopulation="M1" postsynapticPopulation="NSMR" synapse="Acetylcholine">
      <connection id="34" preCellId="../M1/0/M1" postCellId="../NSMR/0/NSMR" preSegmentId="7" postSegmentId="1" preFractionAlong="0.09954803850888205" postFractionAlong="0.30641166735394654"/>
    </projection>
    <projection id="NCXLS_M1_MCL" presynapticPopulation="M1" postsynapticPopulation="MCL" synapse="Acetylcholine">
      <connection id="35" preCellId="../M1/0/M1" postCellId="../MCL/0/MCL" preSegmentId="7" postSegmentId="7" preFractionAlong="0.5418699430531522" postFractionAlong="0.21975931406271632"/>
    </projection>
    <projection id="NCXLS_M2R_I4" presynapticPopulation="M2R" postsynapticPopulation="I4" synapse="Acetylcholine">
      <connection id="36" preCellId="../M2R/0/M2R" postCellId="../I4/0/I4" preSegmentId="7" postSegmentId="4" preFractionAlong="0.6751438544438484" postFractionAlong="0.17023303243833054"/>
    </projection>
    <projection id="NCXLS_M2R_M4" presynapticPopulation="M2R" postsynapticPopulation="M4" synapse="Acetylcholine">
      <connection id="37" preCellId="../M2R/0/M2R" postCellId="../M4/0/M4" preSegmentId="9" postSegmentId="6" preFractionAlong="0.48635011510949533" postFractionAlong="0.20975851501133502"/>
    </projection>
    <projection id="NCXLS_M2R_I1L" presynapticPopulation="M2R" postsynapticPopulation="I1L" synapse="Acetylcholine">
      <connection id="38" preCellId="../M2R/0/M2R" postCellId="../I1L/0/I1L" preSegmentId="9" postSegmentId="3" preFractionAlong="0.9406453433605237" postFractionAlong="0.761541548076109"/>
    </projection>
    <projection id="NCXLS_M2R_MI" presynapticPopulation="M2R" postsynapticPopulation="MI" synapse="Acetylcholine">
      <connection id="39" preCellId="../M2R/0/M2R" postCellId="../MI/0/MI" preSegmentId="5" postSegmentId="8" preFractionAlong="0.11857343304095047" postFractionAlong="0.8708326212853501"/>
    </projection>
    <projection id="NCXLS_M2R_MCR" presynapticPopulation="M2R" postsynapticPopulation="MCR" synapse="Acetylcholine">
      <connection id="40" preCellId="../M2R/0/M2R" postCellId="../MCR/0/MCR" preSegmentId="9" postSegmentId="8" preFractionAlong="0.23407620398411522" postFractionAlong="0.4118634653864517"/>
    </projection>
    <projection id="NCXLS_M2R_I1R" presynapticPopulation="M2R" postsynapticPopulation="I1R" synapse="Acetylcholine">
      <connection id="41" preCellId="../M2R/0/M2R" postCellId="../I1R/0/I1R" preSegmentId="3" postSegmentId="2" preFractionAlong="0.27046910561650883" postFractionAlong="0.046635900461590385"/>
    </projection>
    <projection id="NCXLS_M2R_I6" presynapticPopulation="M2R" postsynapticPopulation="I6" synapse="Acetylcholine">
      <connection id="42" preCellId="../M2R/0/M2R" postCellId="../I6/0/I6" preSegmentId="2" postSegmentId="2" preFractionAlong="0.7264715434958315" postFractionAlong="0.2074592014798784"/>
    </projection>
    <projection id="NCXLS_M2R_I3" presynapticPopulation="M2R" postsynapticPopulation="I3" synapse="Acetylcholine">
      <connection id="43" preCellId="../M2R/0/M2R" postCellId="../I3/0/I3" preSegmentId="2" postSegmentId="8" preFractionAlong="0.6466072368392933" postFractionAlong="0.27192953745748727"/>
    </projection>
    <projection id="NCXLS_M2R_NSML" presynapticPopulation="M2R" postsynapticPopulation="NSML" synapse="Acetylcholine">
      <connection id="44" preCellId="../M2R/0/M2R" postCellId="../NSML/0/NSML" preSegmentId="4" postSegmentId="2" preFractionAlong="0.7341495973041509" postFractionAlong="0.9379109534243434"/>
    </projection>
    <projection id="NCXLS_M2R_NSMR" presynapticPopulation="M2R" postsynapticPopulation="NSMR" synapse="Acetylcholine">
      <connection id="45" preCellId="../M2R/0/M2R" postCellId="../NSMR/0/NSMR" preSegmentId="3" postSegmentId="1" preFractionAlong="0.39863433484553445" postFractionAlong="0.33917362000224405"/>
    </projection>
    <projection id="NCXLS_M2R_MCL" presynapticPopulation="M2R" postsynapticPopulation="MCL" synapse="Acetylcholine">
      <connection id="46" preCellId="../M2R/0/M2R" postCellId="../MCL/0/MCL" preSegmentId="7" postSegmentId="6" preFractionAlong="0.6326662538183997" postFractionAlong="0.12112802699775316"/>
    </projection>
    <projection id="NCXLS_M3L_I2R" presynapticPopulation="M3L" postsynapticPopulation="I2R" synapse="Acetylcholine">
      <connection id="47" preCellId="../M3L/0/M3L" postCellId="../I2R/0/I2R" preSegmentId="6" postSegmentId="7" preFractionAlong="0.7288341471223034" postFractionAlong="0.44136007868562144"/>
    </projection>
    <projection id="NCXLS_M3L_M2R" presynapticPopulation="M3L" postsynapticPopulation="M2R" synapse="Glutamate">
      <connection id="48" preCellId="../M3L/0/M3L" postCellId="../M2R/0/M2R" preSegmentId="2" postSegmentId="6" preFractionAlong="0.8965098356138644" postFractionAlong="0.8360069997223499"/>
    </projection>
    <projection id="NCXLS_M3L_I1L" presynapticPopulation="M3L" postsynapticPopulation="I1L" synapse="Acetylcholine">
      <connection id="49" preCellId="../M3L/0/M3L" postCellId="../I1L/0/I1L" preSegmentId="7" postSegmentId="6" preFractionAlong="0.9477467316133514" postFractionAlong="0.12874256213317692"/>
    </projection>
    <projection id="NCXLS_M3L_MCR" presynapticPopulation="M3L" postsynapticPopulation="MCR" synapse="Acetylcholine">
      <connection id="50" preCellId="../M3L/0/M3L" postCellId="../MCR/0/MCR" preSegmentId="9" postSegmentId="8" preFractionAlong="0.4143696079065575" postFractionAlong="0.19463403275785607"/>
    </projection>
    <projection id="NCXLS_M3L_I1R" presynapticPopulation="M3L" postsynapticPopulation="I1R" synapse="Acetylcholine">
      <connection id="51" preCellId="../M3L/0/M3L" postCellId="../I1R/0/I1R" preSegmentId="2" postSegmentId="9" preFractionAlong="0.2878196133761506" postFractionAlong="0.24840560524685484"/>
    </projection>
    <projection id="NCXLS_M3L_I3" presynapticPopulation="M3L" postsynapticPopulation="I3" synapse="Acetylcholine">
      <connection id="52" preCellId="../M3L/0/M3L" postCellId="../I3/0/I3" preSegmentId="3" postSegmentId="3" preFractionAlong="0.18677730663607006" postFractionAlong="0.5431183051972586"/>
    </projection>
    <projection id="NCXLS_M3L_M5" presynapticPopulation="M3L" postsynapticPopulation="M5" synapse="Glutamate">
      <connection id="53" preCellId="../M3L/0/M3L" postCellId="../M5/0/M5" preSegmentId="2" postSegmentId="8" preFractionAlong="0.9693716777298736" postFractionAlong="0.13763899804136426"/>
    </projection>
    <projection id="NCXLS_M3L_I2L" presynapticPopulation="M3L" postsynapticPopulation="I2L" synapse="Acetylcholine">
      <connection id="54" preCellId="../M3L/0/M3L" postCellId="../I2L/0/I2L" preSegmentId="3" postSegmentId="7" preFractionAlong="0.9323056827448798" postFractionAlong="0.6012360579589051"/>
    </projection>
    <projection id="NCXLS_M3L_M3R" presynapticPopulation="M3L" postsynapticPopulation="M3R" synapse="Acetylcholine">
      <connection id="55" preCellId="../M3L/0/M3L" postCellId="../M3R/0/M3R" preSegmentId="6" postSegmentId="5" preFractionAlong="0.06466554385057066" postFractionAlong="0.621125299090829"/>
    </projection>
    <projection id="NCXLS_M3L_I5" presynapticPopulation="M3L" postsynapticPopulation="I5" synapse="Acetylcholine">
      <connection id="56" preCellId="../M3L/0/M3L" postCellId="../I5/0/I5" preSegmentId="5" postSegmentId="4" preFractionAlong="0.5575182646672753" postFractionAlong="0.9568884426329662"/>
    </projection>
    <projection id="NCXLS_M3L_NSMR" presynapticPopulation="M3L" postsynapticPopulation="NSMR" synapse="Acetylcholine">
      <connection id="57" preCellId="../M3L/0/M3L" postCellId="../NSMR/0/NSMR" preSegmentId="8" postSegmentId="3" preFractionAlong="0.7474929558814" postFractionAlong="0.4446252400615428"/>
    </projection>
    <projection id="NCXLS_M3L_MCL" presynapticPopulation="M3L" postsynapticPopulation="MCL" synapse="Acetylcholine">
      <connection id="58" preCellId="../M3L/0/M3L" postCellId="../MCL/0/MCL" preSegmentId="3" postSegmentId="8" preFractionAlong="0.823810521880351" postFractionAlong="0.6381550654868308"/>
    </projection>
    <projection id="NCXLS_MCR_I4" presynapticPopulation="MCR" postsynapticPopulation="I4" synapse="Acetylcholine">
      <connection id="59" preCellId="../MCR/0/MCR" postCellId="../I4/0/I4" preSegmentId="9" postSegmentId="8" preFractionAlong="0.971218789960782" postFractionAlong="0.727242319569979"/>
    </projection>
    <projection id="NCXLS_MCR_I1L" presynapticPopulation="MCR" postsynapticPopulation="I1L" synapse="Acetylcholine">
      <connection id="60" preCellId="../MCR/0/MCR" postCellId="../I1L/0/I1L" preSegmentId="5" postSegmentId="9" preFractionAlong="0.6484244183707824" postFractionAlong="0.6779950375588949"/>
    </projection>
    <projection id="NCXLS_MCR_I1R" presynapticPopulation="MCR" postsynapticPopulation="I1R" synapse="Acetylcholine">
      <connection id="61" preCellId="../MCR/0/MCR" postCellId="../I1R/0/I1R" preSegmentId="1" postSegmentId="6" preFractionAlong="0.6337884195450022" postFractionAlong="0.5410302890628115"/>
    </projection>
    <projection id="NCXLS_I6_M4" presynapticPopulation="I6" postsynapticPopulation="M4" synapse="Acetylcholine">
      <connection id="62" preCellId="../I6/0/I6" postCellId="../M4/0/M4" preSegmentId="2" postSegmentId="4" preFractionAlong="0.1409793369901141" postFractionAlong="0.6788463850288614"/>
    </projection>
    <projection id="NCXLS_M2L_I4" presynapticPopulation="M2L" postsynapticPopulation="I4" synapse="Acetylcholine">
      <connection id="63" preCellId="../M2L/0/M2L" postCellId="../I4/0/I4" preSegmentId="5" postSegmentId="5" preFractionAlong="0.6363443153180893" postFractionAlong="0.5000923357822332"/>
    </projection>
    <projection id="NCXLS_M2L_M4" presynapticPopulation="M2L" postsynapticPopulation="M4" synapse="Acetylcholine">
      <connection id="64" preCellId="../M2L/0/M2L" postCellId="../M4/0/M4" preSegmentId="8" postSegmentId="3" preFractionAlong="0.19764778111961534" postFractionAlong="0.4796319561995268"/>
    </projection>
    <projection id="NCXLS_M2L_I2R" presynapticPopulation="M2L" postsynapticPopulation="I2R" synapse="Acetylcholine">
      <connection id="65" preCellId="../M2L/0/M2L" postCellId="../I2R/0/I2R" preSegmentId="2" postSegmentId="9" preFractionAlong="0.2804604868518452" postFractionAlong="0.6737625492469325"/>
    </projection>
    <projection id="NCXLS_M2L_M2R" presynapticPopulation="M2L" postsynapticPopulation="M2R" synapse="Acetylcholine">
      <connection id="66" preCellId="../M2L/0/M2L" postCellId="../M2R/0/M2R" preSegmentId="4" postSegmentId="3" preFractionAlong="0.5714386514820174" postFractionAlong="0.24550181102747182"/>
    </projection>
    <projection id="NCXLS_M2L_I1L" presynapticPopulation="M2L" postsynapticPopulation="I1L" synapse="Acetylcholine">
      <connection id="67" preCellId="../M2L/0/M2L" postCellId="../I1L/0/I1L" preSegmentId="3" postSegmentId="2" preFractionAlong="0.832261770672481" postFractionAlong="0.45931850509863204"/>
    </projection>
    <projection id="NCXLS_M2L_M3L" presynapticPopulation="M2L" postsynapticPopulation="M3L" synapse="Acetylcholine">
      <connection id="68" preCellId="../M2L/0/M2L" postCellId="../M3L/0/M3L" preSegmentId="7" postSegmentId="3" preFractionAlong="0.5098925757308718" postFractionAlong="0.8630269481496237"/>
    </projection>
    <projection id="NCXLS_M2L_MCR" presynapticPopulation="M2L" postsynapticPopulation="MCR" synapse="Acetylcholine">
      <connection id="69" preCellId="../M2L/0/M2L" postCellId="../MCR/0/MCR" preSegmentId="8" postSegmentId="9" preFractionAlong="0.39275018353870994" postFractionAlong="0.35655622368835627"/>
    </projection>
    <projection id="NCXLS_M2L_I1R" presynapticPopulation="M2L" postsynapticPopulation="I1R" synapse="Acetylcholine">
      <connection id="70" preCellId="../M2L/0/M2L" postCellId="../I1R/0/I1R" preSegmentId="9" postSegmentId="6" preFractionAlong="0.05534199855045285" postFractionAlong="0.8098716190413278"/>
    </projection>
    <projection id="NCXLS_M2L_I6" presynapticPopulation="M2L" postsynapticPopulation="I6" synapse="Acetylcholine">
      <connection id="71" preCellId="../M2L/0/M2L" postCellId="../I6/0/I6" preSegmentId="8" postSegmentId="3" preFractionAlong="0.5549753348525481" postFractionAlong="0.2952819704829498"/>
    </projection>
    <projection id="NCXLS_M2L_I3" presynapticPopulation="M2L" postsynapticPopulation="I3" synapse="Acetylcholine">
      <connection id="72" preCellId="../M2L/0/M2L" postCellId="../I3/0/I3" preSegmentId="1" postSegmentId="4" preFractionAlong="0.5017029841763491" postFractionAlong="0.9011891219546017"/>
    </projection>
    <projection id="NCXLS_M2L_I2L" presynapticPopulation="M2L" postsynapticPopulation="I2L" synapse="Acetylcholine">
      <connection id="73" preCellId="../M2L/0/M2L" postCellId="../I2L/0/I2L" preSegmentId="5" postSegmentId="4" preFractionAlong="0.10240061596289896" postFractionAlong="0.13152522388570997"/>
    </projection>
    <projection id="NCXLS_M2L_M3R" presynapticPopulation="M2L" postsynapticPopulation="M3R" synapse="Acetylcholine">
      <connection id="74" preCellId="../M2L/0/M2L" postCellId="../M3R/0/M3R" preSegmentId="4" postSegmentId="5" preFractionAlong="0.9973811268138131" postFractionAlong="0.8726366876911978"/>
    </projection>
    <projection id="NCXLS_M2L_I5" presynapticPopulation="M2L" postsynapticPopulation="I5" synapse="Acetylcholine">
      <connection id="75" preCellId="../M2L/0/M2L" postCellId="../I5/0/I5" preSegmentId="2" postSegmentId="5" preFractionAlong="0.40607629236703335" postFractionAlong="0.8731593591894047"/>
    </projection>
    <projection id="NCXLS_M2L_NSMR" presynapticPopulation="M2L" postsynapticPopulation="NSMR" synapse="Acetylcholine">
      <connection id="76" preCellId="../M2L/0/M2L" postCellId="../NSMR/0/NSMR" preSegmentId="4" postSegmentId="4" preFractionAlong="0.8958438904667899" postFractionAlong="0.6520826828797434"/>
    </projection>
    <projection id="NCXLS_M2L_MCL" presynapticPopulation="M2L" postsynapticPopulation="MCL" synapse="Acetylcholine">
      <connection id="77" preCellId="../M2L/0/M2L" postCellId="../MCL/0/MCL" preSegmentId="6" postSegmentId="8" preFractionAlong="0.6282394340372324" postFractionAlong="0.588486163711026"/>
    </projection>
    <projection id="NCXLS_M5_I2R" presynapticPopulation="M5" postsynapticPopulation="I2R" synapse="Acetylcholine">
      <connection id="78" preCellId="../M5/0/M5" postCellId="../I2R/0/I2R" preSegmentId="4" postSegmentId="2" preFractionAlong="0.017565455703966948" postFractionAlong="0.619207925029823"/>
    </projection>
    <projection id="NCXLS_M5_M2R" presynapticPopulation="M5" postsynapticPopulation="M2R" synapse="Acetylcholine">
      <connection id="79" preCellId="../M5/0/M5" postCellId="../M2R/0/M2R" preSegmentId="8" postSegmentId="9" preFractionAlong="0.899339409018403" postFractionAlong="0.9699255735659434"/>
    </projection>
    <projection id="NCXLS_M5_I1L" presynapticPopulation="M5" postsynapticPopulation="I1L" synapse="Acetylcholine">
      <connection id="80" preCellId="../M5/0/M5" postCellId="../I1L/0/I1L" preSegmentId="5" postSegmentId="1" preFractionAlong="0.08380843348716427" postFractionAlong="0.16071558489150561"/>
    </projection>
    <projection id="NCXLS_M5_MCR" presynapticPopulation="M5" postsynapticPopulation="MCR" synapse="Acetylcholine">
      <connection id="81" preCellId="../M5/0/M5" postCellId="../MCR/0/MCR" preSegmentId="6" postSegmentId="1" preFractionAlong="0.3086076816354366" postFractionAlong="0.6073563834777438"/>
    </projection>
    <projection id="NCXLS_M5_I1R" presynapticPopulation="M5" postsynapticPopulation="I1R" synapse="Acetylcholine">
      <connection id="82" preCellId="../M5/0/M5" postCellId="../I1R/0/I1R" preSegmentId="5" postSegmentId="2" preFractionAlong="0.0638260347097136" postFractionAlong="0.330357688699061"/>
    </projection>
    <projection id="NCXLS_M5_I3" presynapticPopulation="M5" postsynapticPopulation="I3" synapse="Acetylcholine">
      <connection id="83" preCellId="../M5/0/M5" postCellId="../I3/0/I3" preSegmentId="6" postSegmentId="1" preFractionAlong="0.9380281273644674" postFractionAlong="0.7239998741195626"/>
    </projection>
    <projection id="NCXLS_M5_I2L" presynapticPopulation="M5" postsynapticPopulation="I2L" synapse="Acetylcholine">
      <connection id="84" preCellId="../M5/0/M5" postCellId="../I2L/0/I2L" preSegmentId="9" postSegmentId="1" preFractionAlong="0.4810671908474736" postFractionAlong="0.04585201837470154"/>
    </projection>
    <projection id="NCXLS_M5_M3R" presynapticPopulation="M5" postsynapticPopulation="M3R" synapse="Acetylcholine">
      <connection id="85" preCellId="../M5/0/M5" postCellId="../M3R/0/M3R" preSegmentId="4" postSegmentId="4" preFractionAlong="0.4704322476632413" postFractionAlong="0.26655012045428694"/>
    </projection>
    <projection id="NCXLS_M5_I5" presynapticPopulation="M5" postsynapticPopulation="I5" synapse="Acetylcholine">
      <connection id="86" preCellId="../M5/0/M5" postCellId="../I5/0/I5" preSegmentId="9" postSegmentId="2" preFractionAlong="0.649044467268214" postFractionAlong="0.8828117988673707"/>
    </projection>
    <projection id="NCXLS_M5_NSMR" presynapticPopulation="M5" postsynapticPopulation="NSMR" synapse="Acetylcholine">
      <connection id="87" preCellId="../M5/0/M5" postCellId="../NSMR/0/NSMR" preSegmentId="3" postSegmentId="1" preFractionAlong="0.9514772528525935" postFractionAlong="0.6372798101230875"/>
    </projection>
    <projection id="NCXLS_M3R_I4" presynapticPopulation="M3R" postsynapticPopulation="I4" synapse="Acetylcholine">
      <connection id="88" preCellId="../M3R/0/M3R" postCellId="../I4/0/I4" preSegmentId="4" postSegmentId="5" preFractionAlong="0.6997690434814383" postFractionAlong="0.20557172534840662"/>
    </projection>
    <projection id="NCXLS_M3R_I2R" presynapticPopulation="M3R" postsynapticPopulation="I2R" synapse="Acetylcholine">
      <connection id="89" preCellId="../M3R/0/M3R" postCellId="../I2R/0/I2R" preSegmentId="5" postSegmentId="2" preFractionAlong="0.7262864640181202" postFractionAlong="0.5110526677945765"/>
    </projection>
    <projection id="NCXLS_M3R_MI" presynapticPopulation="M3R" postsynapticPopulation="MI" synapse="Acetylcholine">
      <connection id="90" preCellId="../M3R/0/M3R" postCellId="../MI/0/MI" preSegmentId="5" postSegmentId="9" preFractionAlong="0.7546825208681412" postFractionAlong="0.9334727919475578"/>
    </projection>
    <projection id="NCXLS_M3R_M3L" presynapticPopulation="M3R" postsynapticPopulation="M3L" synapse="Glutamate">
      <connection id="91" preCellId="../M3R/0/M3R" postCellId="../M3L/0/M3L" preSegmentId="5" postSegmentId="2" preFractionAlong="0.2767800814657747" postFractionAlong="0.7146768709254209"/>
    </projection>
    <projection id="NCXLS_M3R_MCR" presynapticPopulation="M3R" postsynapticPopulation="MCR" synapse="Acetylcholine">
      <connection id="92" preCellId="../M3R/0/M3R" postCellId="../MCR/0/MCR" preSegmentId="2" postSegmentId="5" preFractionAlong="0.7708984043188025" postFractionAlong="0.1428099257826696"/>
    </projection>
    <projection id="NCXLS_M3R_I6" presynapticPopulation="M3R" postsynapticPopulation="I6" synapse="Acetylcholine">
      <connection id="93" preCellId="../M3R/0/M3R" postCellId="../I6/0/I6" preSegmentId="9" postSegmentId="6" preFractionAlong="0.2038783426215992" postFractionAlong="0.9028270117268217"/>
    </projection>
    <projection id="NCXLS_M3R_M2L" presynapticPopulation="M3R" postsynapticPopulation="M2L" synapse="Glutamate">
      <connection id="94" preCellId="../M3R/0/M3R" postCellId="../M2L/0/M2L" preSegmentId="8" postSegmentId="5" preFractionAlong="0.4210713981936338" postFractionAlong="0.20228794187253796"/>
    </projection>
    <projection id="NCXLS_M3R_NSML" presynapticPopulation="M3R" postsynapticPopulation="NSML" synapse="Acetylcholine">
      <connection id="95" preCellId="../M3R/0/M3R" postCellId="../NSML/0/NSML" preSegmentId="8" postSegmentId="2" preFractionAlong="0.2952470545129191" postFractionAlong="0.7690936731964834"/>
    </projection>
    <projection id="NCXLS_M3R_MCL" presynapticPopulation="M3R" postsynapticPopulation="MCL" synapse="Acetylcholine">
      <connection id="96" preCellId="../M3R/0/M3R" postCellId="../MCL/0/MCL" preSegmentId="3" postSegmentId="2" preFractionAlong="0.747745820932628" postFractionAlong="0.9128959803062341"/>
    </projection>
    <projection id="NCXLS_I5_I2L" presynapticPopulation="I5" postsynapticPopulation="I2L" synapse="Glutamate">
      <connection id="97" preCellId="../I5/0/I5" postCellId="../I2L/0/I2L" preSegmentId="6" postSegmentId="8" preFractionAlong="0.8883077474377054" postFractionAlong="0.3875816674368331"/>
    </projection>
    <projection id="NCXLS_NSMR_I1L" presynapticPopulation="NSMR" postsynapticPopulation="I1L" synapse="Serotonin_Glutamate">
      <connection id="98" preCellId="../NSMR/0/NSMR" postCellId="../I1L/0/I1L" preSegmentId="5" postSegmentId="7" preFractionAlong="0.5961627979106775" postFractionAlong="0.8933416418276082"/>
    </projection>
    <projection id="NCXLS_NSMR_I1R" presynapticPopulation="NSMR" postsynapticPopulation="I1R" synapse="Serotonin_Glutamate">
      <connection id="99" preCellId="../NSMR/0/NSMR" postCellId="../I1R/0/I1R" preSegmentId="2" postSegmentId="7" preFractionAlong="0.7050799281837917" postFractionAlong="0.5435360976472599"/>
    </projection>
    <projection id="NCXLS_NSMR_I2L" presynapticPopulation="NSMR" postsynapticPopulation="I2L" synapse="Serotonin_Glutamate">
      <connection id="100" preCellId="../NSMR/0/NSMR" postCellId="../I2L/0/I2L" preSegmentId="8" postSegmentId="4" preFractionAlong="0.2920455580979151" postFractionAlong="0.5948230994905769"/>
    </projection>
    <projection id="NCXLS_MCL_I4" presynapticPopulation="MCL" postsynapticPopulation="I4" synapse="Acetylcholine">
      <connection id="101" preCellId="../MCL/0/MCL" postCellId="../I4/0/I4" preSegmentId="3" postSegmentId="5" preFractionAlong="0.06470033050398849" postFractionAlong="0.7338700872128415"/>
    </projection>
    <projection id="NCXLS_MCL_M4" presynapticPopulation="MCL" postsynapticPopulation="M4" synapse="Acetylcholine">
      <connection id="102" preCellId="../MCL/0/MCL" postCellId="../M4/0/M4" preSegmentId="5" postSegmentId="8" preFractionAlong="0.5811223999290556" postFractionAlong="0.5298991758050076"/>
    </projection>
    <projection id="NCXLS_MCL_I1L" presynapticPopulation="MCL" postsynapticPopulation="I1L" synapse="Acetylcholine">
      <connection id="103" preCellId="../MCL/0/MCL" postCellId="../I1L/0/I1L" preSegmentId="4" postSegmentId="9" preFractionAlong="0.30036322357111367" postFractionAlong="0.5271239217776975"/>
    </projection>
    <projection id="NCXLS_MCL_MCR" presynapticPopulation="MCL" postsynapticPopulation="MCR" synapse="Acetylcholine">
      <connection id="104" preCellId="../MCL/0/MCL" postCellId="../MCR/0/MCR" preSegmentId="9" postSegmentId="7" preFractionAlong="0.3869990592543089" postFractionAlong="0.5035817774144603"/>
    </projection>
    <projection id="NCXLS_MCL_I6" presynapticPopulation="MCL" postsynapticPopulation="I6" synapse="Acetylcholine">
      <connection id="105" preCellId="../MCL/0/MCL" postCellId="../I6/0/I6" preSegmentId="5" postSegmentId="9" preFractionAlong="0.8763044229591579" postFractionAlong="0.5722677888644485"/>
    </projection>
    <projection id="NC_I1L_RMDDL" presynapticPopulation="I1L" postsynapticPopulation="RMDDL" synapse="Acetylcholine">
      <connection id="106" preCellId="../I1L/0/I1L" postCellId="../RMDDL/0/RMDDL" preSegmentId="2" postSegmentId="3" preFractionAlong="0.7934415913721323" postFractionAlong="0.03433217114285325"/>
    </projection>
    <projection id="NC_I1L_RMDVL" presynapticPopulation="I1L" postsynapticPopulation="RMDVL" synapse="Acetylcholine">
      <connection id="107" preCellId="../I1L/0/I1L" postCellId="../RMDVL/0/RMDVL" preSegmentId="3" postSegmentId="2" preFractionAlong="0.8651493347713713" postFractionAlong="0.5796394555340199"/>
    </projection>
    <projection id="NC_I1R_RMDDR" presynapticPopulation="I1R" postsynapticPopulation="RMDDR" synapse="Acetylcholine">
      <connection id="108" preCellId="../I1R/0/I1R" postCellId="../RMDDR/0/RMDDR" preSegmentId="1" postSegmentId="3" preFractionAlong="0.23731416089475155" postFractionAlong="0.43759774375379357"/>
    </projection>
    <projection id="NC_I1R_RMDVR" presynapticPopulation="I1R" postsynapticPopulation="RMDVR" synapse="Acetylcholine">
      <connection id="109" preCellId="../I1R/0/I1R" postCellId="../RMDVR/0/RMDVR" preSegmentId="7" postSegmentId="5" preFractionAlong="0.6615645681734055" postFractionAlong="0.6885832059788232"/>
    </projection>
    <projection id="NC_I2L_URXL" presynapticPopulation="I2L" postsynapticPopulation="URXL" synapse="Glutamate">
      <connection id="110" preCellId="../I2L/0/I2L" postCellId="../URXL/0/URXL" preSegmentId="7" postSegmentId="9" preFractionAlong="0.033821287571519254" postFractionAlong="0.4043300593475422"/>
    </projection>
    <projection id="NC_I2R_URXR" presynapticPopulation="I2R" postsynapticPopulation="URXR" synapse="Glutamate">
      <connection id="111" preCellId="../I2R/0/I2R" postCellId="../URXR/0/URXR" preSegmentId="6" postSegmentId="2" preFractionAlong="0.8148670149654462" postFractionAlong="0.9273326151740112"/>
    </projection>
    <projection id="NC_AVKL_I1L" presynapticPopulation="AVKL" postsynapticPopulation="I1L" synapse="Acetylcholine">
      <connection id="112" preCellId="../AVKL/0/AVKL" postCellId="../I1L/0/I1L" preSegmentId="3" postSegmentId="2" preFractionAlong="0.2451539461047435" postFractionAlong="0.5056657430843782"/>
    </projection>
    <projection id="NC_AVKR_I1R" presynapticPopulation="AVKR" postsynapticPopulation="I1R" synapse="Acetylcholine">
      <connection id="113" preCellId="../AVKR/0/AVKR" postCellId="../I1R/0/I1R" preSegmentId="4" postSegmentId="2" preFractionAlong="0.5542952115087567" postFractionAlong="0.6668362807612931"/>
    </projection>
    <projection id="NC_RIS_I1L" presynapticPopulation="RIS" postsynapticPopulation="I1L" synapse="Glutamate">
      <connection id="114" preCellId="../RIS/0/RIS" postCellId="../I1L/0/I1L" preSegmentId="6" postSegmentId="7" preFractionAlong="0.5926586478854466" postFractionAlong="0.4949521337049916"/>
    </projection>
    <projection id="NC_RIS_I1R" presynapticPopulation="RIS" postsynapticPopulation="I1R" synapse="Glutamate">
      <connection id="115" preCellId="../RIS/0/RIS" postCellId="../I1R/0/I1R" preSegmentId="3" postSegmentId="4" preFractionAlong="0.730542631496579" postFractionAlong="0.04635326943427953"/>
    </projection>
    <projection id="NC_AVAL_I2L" presynapticPopulation="AVAL" postsynapticPopulation="I2L" synapse="Acetylcholine">
      <connection id="116" preCellId="../AVAL/0/AVAL" postCellId="../I2L/0/I2L" preSegmentId="2" postSegmentId="8" preFractionAlong="0.9278422666061945" postFractionAlong="0.25734198818953224"/>
    </projection>
    <projection id="NC_AVAR_I2R" presynapticPopulation="AVAR" postsynapticPopulation="I2R" synapse="Acetylcholine">
      <connection id="117" preCellId="../AVAR/0/AVAR" postCellId="../I2R/0/I2R" preSegmentId="4" postSegmentId="3" preFractionAlong="0.9974149326174252" postFractionAlong="0.9424291093454871"/>
    </projection>
    <projection id="NC_SMBVL_I4" presynapticPopulation="SMBVL" postsynapticPopulation="I4" synapse="Acetylcholine">
      <connection id="118" preCellId="../SMBVL/0/SMBVL" postCellId="../I4/0/I4" preSegmentId="9" postSegmentId="7" preFractionAlong="0.8613627189565668" postFractionAlong="0.8311347654036959"/>
    </projection>
    <projection id="NC_SMBVR_I4" presynapticPopulation="SMBVR" postsynapticPopulation="I4" synapse="Acetylcholine">
      <connection id="119" preCellId="../SMBVR/0/SMBVR" postCellId="../I4/0/I4" preSegmentId="3" postSegmentId="3" preFractionAlong="0.08321770274007045" postFractionAlong="0.9152518840307584"/>
    </projection>
  </network>
</neuroml>
