<?xml version='1.0' encoding='UTF-8'?>
<neuroml xmlns="http://www.neuroml.org/schema/neuroml2" xmlns:xsi="http://www.w3.org/2001/XMLSchema-instance" xsi:schemaLocation="http://www.neuroml.org/schema/neuroml2 https://raw.githubusercontent.com/NeuroML/NeuroML2/development/Schemas/NeuroML2/NeuroML_v2beta4.xsd" id="gvft_network_bio_prior_lamW_0.189_DF_0.013_t90.net">
  <notes>NeuroML2 network generated from GVFT simulation on 2025-05-04 12:18:40
</notes>
  <include href="AVAL.cell.nml"/>
  <include href="AVAR.cell.nml"/>
  <include href="AVKL.cell.nml"/>
  <include href="AVKR.cell.nml"/>
  <include href="RIS.cell.nml"/>
  <include href="RMDDL.cell.nml"/>
  <include href="RMDDR.cell.nml"/>
  <include href="RMDVL.cell.nml"/>
  <include href="RMDVR.cell.nml"/>
  <include href="SMBVL.cell.nml"/>
  <include href="SMBVR.cell.nml"/>
  <include href="URXL.cell.nml"/>
  <include href="URXR.cell.nml"/>
  <include href="I6.cell.nml"/>
  <include href="M3L.cell.nml"/>
  <include href="I5.cell.nml"/>
  <include href="M1.cell.nml"/>
  <include href="I1R.cell.nml"/>
  <include href="MCR.cell.nml"/>
  <include href="I2R.cell.nml"/>
  <include href="I4.cell.nml"/>
  <include href="NSMR.cell.nml"/>
  <include href="M4.cell.nml"/>
  <include href="I3.cell.nml"/>
  <include href="MI.cell.nml"/>
  <include href="I2L.cell.nml"/>
  <include href="M5.cell.nml"/>
  <include href="NSML.cell.nml"/>
  <include href="M2R.cell.nml"/>
  <include href="M3R.cell.nml"/>
  <include href="MCL.cell.nml"/>
  <include href="I1L.cell.nml"/>
  <include href="M2L.cell.nml"/>
  <include href="Acetylcholine.synapse.nml"/>
  <include href="Glutamate.synapse.nml"/>
  <include href="Generic_GJ.synapse.nml"/>
  <include href="Serotonin_Glutamate.synapse.nml"/>
  <network id="gvft_network_bio_prior_lamW_0.189_DF_0.013_t90.net" type="networkWithTemperature" temperature="20.0 degC">
    <population id="M1" component="M1" type="populationList" size="1">
      <instance id="0">
        <location x="-0.03517589" y="0.10552765" z="0.0"/>
      </instance>
    </population>
    <population id="M2L" component="M2L" type="populationList" size="1">
      <instance id="0">
        <location x="-0.9698492" y="-0.0050251363" z="0.0"/>
      </instance>
    </population>
    <population id="M2R" component="M2R" type="populationList" size="1">
      <instance id="0">
        <location x="0.80904526" y="-0.14572865" z="0.0"/>
      </instance>
    </population>
    <population id="M3L" component="M3L" type="populationList" size="1">
      <instance id="0">
        <location x="0.19597991" y="0.42713568" z="0.0"/>
      </instance>
    </population>
    <population id="M3R" component="M3R" type="populationList" size="1">
      <instance id="0">
        <location x="0.638191" y="0.26633167" z="0.0"/>
      </instance>
    </population>
    <population id="M4" component="M4" type="populationList" size="1">
      <instance id="0">
        <location x="0.5678392" y="0.28643218" z="0.0"/>
      </instance>
    </population>
    <population id="M5" component="M5" type="populationList" size="1">
      <instance id="0">
        <location x="-0.40703517" y="-0.43718594" z="0.0"/>
      </instance>
    </population>
    <population id="I1L" component="I1L" type="populationList" size="1">
      <instance id="0">
        <location x="0.959799" y="1.0" z="0.0"/>
      </instance>
    </population>
    <population id="I1R" component="I1R" type="populationList" size="1">
      <instance id="0">
        <location x="0.7788945" y="-0.86934674" z="0.0"/>
      </instance>
    </population>
    <population id="I2L" component="I2L" type="populationList" size="1">
      <instance id="0">
        <location x="0.7788945" y="0.51758796" z="0.0"/>
      </instance>
    </population>
    <population id="I2R" component="I2R" type="populationList" size="1">
      <instance id="0">
        <location x="0.65829146" y="-0.80904526" z="0.0"/>
      </instance>
    </population>
    <population id="I3" component="I3" type="populationList" size="1">
      <instance id="0">
        <location x="-0.8994975" y="0.919598" z="0.0"/>
      </instance>
    </population>
    <population id="I4" component="I4" type="populationList" size="1">
      <instance id="0">
        <location x="0.59799" y="-0.44723618" z="0.0"/>
      </instance>
    </population>
    <population id="I5" component="I5" type="populationList" size="1">
      <instance id="0">
        <location x="-0.6683417" y="0.68844223" z="0.0"/>
      </instance>
    </population>
    <population id="I6" component="I6" type="populationList" size="1">
      <instance id="0">
        <location x="-0.24623117" y="-0.3266332" z="0.0"/>
      </instance>
    </population>
    <population id="MCL" component="MCL" type="populationList" size="1">
      <instance id="0">
        <location x="0.095477395" y="-0.57788944" z="0.0"/>
      </instance>
    </population>
    <population id="MCR" component="MCR" type="populationList" size="1">
      <instance id="0">
        <location x="-0.8190955" y="0.638191" z="0.0"/>
      </instance>
    </population>
    <population id="MI" component="MI" type="populationList" size="1">
      <instance id="0">
        <location x="0.3266332" y="0.095477395" z="0.0"/>
      </instance>
    </population>
    <population id="NSML" component="NSML" type="populationList" size="1">
      <instance id="0">
        <location x="-0.36683416" y="0.55778897" z="0.0"/>
      </instance>
    </population>
    <population id="NSMR" component="NSMR" type="populationList" size="1">
      <instance id="0">
        <location x="-0.5477387" y="-0.41708544" z="0.0"/>
      </instance>
    </population>
    <population id="AVAL" component="AVAL" type="populationList" size="1">
      <instance id="0">
        <location x="5.0" y="0.0" z="0.0"/>
      </instance>
    </population>
    <population id="AVAR" component="AVAR" type="populationList" size="1">
      <instance id="0">
        <location x="5.0" y="0.0" z="0.0"/>
      </instance>
    </population>
    <population id="AVKL" component="AVKL" type="populationList" size="1">
      <instance id="0">
        <location x="5.0" y="0.0" z="0.0"/>
      </instance>
    </population>
    <population id="AVKR" component="AVKR" type="populationList" size="1">
      <instance id="0">
        <location x="5.0" y="0.0" z="0.0"/>
      </instance>
    </population>
    <population id="RIS" component="RIS" type="populationList" size="1">
      <instance id="0">
        <location x="5.0" y="0.0" z="0.0"/>
      </instance>
    </population>
    <population id="RMDDL" component="RMDDL" type="populationList" size="1">
      <instance id="0">
        <location x="5.0" y="0.0" z="0.0"/>
      </instance>
    </population>
    <population id="RMDDR" component="RMDDR" type="populationList" size="1">
      <instance id="0">
        <location x="5.0" y="0.0" z="0.0"/>
      </instance>
    </population>
    <population id="RMDVL" component="RMDVL" type="populationList" size="1">
      <instance id="0">
        <location x="5.0" y="0.0" z="0.0"/>
      </instance>
    </population>
    <population id="RMDVR" component="RMDVR" type="populationList" size="1">
      <instance id="0">
        <location x="5.0" y="0.0" z="0.0"/>
      </instance>
    </population>
    <population id="SMBVL" component="SMBVL" type="populationList" size="1">
      <instance id="0">
        <location x="5.0" y="0.0" z="0.0"/>
      </instance>
    </population>
    <population id="SMBVR" component="SMBVR" type="populationList" size="1">
      <instance id="0">
        <location x="5.0" y="0.0" z="0.0"/>
      </instance>
    </population>
    <population id="URXL" component="URXL" type="populationList" size="1">
      <instance id="0">
        <location x="5.0" y="0.0" z="0.0"/>
      </instance>
    </population>
    <population id="URXR" component="URXR" type="populationList" size="1">
      <instance id="0">
        <location x="5.0" y="0.0" z="0.0"/>
      </instance>
    </population>
    <projection id="NCXLS_M4_M3R" presynapticPopulation="M4" postsynapticPopulation="M3R" synapse="Glutamate">
      <connection id="0" preCellId="../M4/0/M4" postCellId="../M3R/0/M3R" preSegmentId="6" postSegmentId="1" preFractionAlong="0.12203049432184865" postFractionAlong="0.12512525714174694"/>
    </projection>
    <projection id="NCXLS_M4_I2L" presynapticPopulation="M4" postsynapticPopulation="I2L" synapse="Acetylcholine">
      <connection id="1" preCellId="../M4/0/M4" postCellId="../I2L/0/I2L" preSegmentId="9" postSegmentId="1" preFractionAlong="0.030857904308072448" postFractionAlong="0.051895299518410876"/>
    </projection>
    <projection id="NCXLS_M4_I1L" presynapticPopulation="M4" postsynapticPopulation="I1L" synapse="Acetylcholine">
      <connection id="2" preCellId="../M4/0/M4" postCellId="../I1L/0/I1L" preSegmentId="9" postSegmentId="6" preFractionAlong="0.3356104542698427" postFractionAlong="0.9785254683891406"/>
    </projection>
    <projection id="NCXLS_MCL_I1R" presynapticPopulation="MCL" postsynapticPopulation="I1R" synapse="Acetylcholine">
      <connection id="3" preCellId="../MCL/0/MCL" postCellId="../I1R/0/I1R" preSegmentId="3" postSegmentId="1" preFractionAlong="0.7011698615902597" postFractionAlong="0.7270567616153901"/>
    </projection>
    <projection id="NCXLS_MCL_I2R" presynapticPopulation="MCL" postsynapticPopulation="I2R" synapse="Acetylcholine">
      <connection id="4" preCellId="../MCL/0/MCL" postCellId="../I2R/0/I2R" preSegmentId="7" postSegmentId="1" preFractionAlong="0.3119840203264185" postFractionAlong="0.48250042023536066"/>
    </projection>
    <projection id="NCXLS_M5_NSMR" presynapticPopulation="M5" postsynapticPopulation="NSMR" synapse="Acetylcholine">
      <connection id="5" preCellId="../M5/0/M5" postCellId="../NSMR/0/NSMR" preSegmentId="4" postSegmentId="4" preFractionAlong="0.3843550385241349" postFractionAlong="0.02519341395922936"/>
    </projection>
    <projection id="NCXLS_M5_M2L" presynapticPopulation="M5" postsynapticPopulation="M2L" synapse="Acetylcholine">
      <connection id="6" preCellId="../M5/0/M5" postCellId="../M2L/0/M2L" preSegmentId="4" postSegmentId="3" preFractionAlong="0.011417983454073632" postFractionAlong="0.703699779629051"/>
    </projection>
    <projection id="NCXLS_I5_I3" presynapticPopulation="I5" postsynapticPopulation="I3" synapse="Acetylcholine">
      <connection id="7" preCellId="../I5/0/I5" postCellId="../I3/0/I3" preSegmentId="2" postSegmentId="7" preFractionAlong="0.23497340499595276" postFractionAlong="0.7048710100433817"/>
    </projection>
    <projection id="NCXLS_M2R_MCL" presynapticPopulation="M2R" postsynapticPopulation="MCL" synapse="Acetylcholine">
      <connection id="8" preCellId="../M2R/0/M2R" postCellId="../MCL/0/MCL" preSegmentId="3" postSegmentId="6" preFractionAlong="0.5464303160778473" postFractionAlong="0.9670352752561462"/>
    </projection>
    <electricalProjection id="NCXLS_M2R_M5_GJ" presynapticPopulation="M2R" postsynapticPopulation="M5">
      <electricalConnection id="9" preCell="0" postCell="0" synapse="Generic_GJ" preSegment="3" postSegment="5" preFractionAlong="0.5047955983045281" postFractionAlong="0.7184539473225501"/>
    </electricalProjection>
    <projection id="NCXLS_M2R_I6" presynapticPopulation="M2R" postsynapticPopulation="I6" synapse="Acetylcholine">
      <connection id="10" preCellId="../M2R/0/M2R" postCellId="../I6/0/I6" preSegmentId="6" postSegmentId="8" preFractionAlong="0.17925561190779005" postFractionAlong="0.8000034817636814"/>
    </projection>
    <projection id="NCXLS_M2R_I1R" presynapticPopulation="M2R" postsynapticPopulation="I1R" synapse="Acetylcholine">
      <connection id="11" preCellId="../M2R/0/M2R" postCellId="../I1R/0/I1R" preSegmentId="3" postSegmentId="3" preFractionAlong="0.3965536819899632" postFractionAlong="0.13171502857909356"/>
    </projection>
    <projection id="NCXLS_M2R_NSMR" presynapticPopulation="M2R" postsynapticPopulation="NSMR" synapse="Acetylcholine">
      <connection id="12" preCellId="../M2R/0/M2R" postCellId="../NSMR/0/NSMR" preSegmentId="9" postSegmentId="4" preFractionAlong="0.6771524124576737" postFractionAlong="0.6250291860852057"/>
    </projection>
    <projection id="NCXLS_M2R_I4" presynapticPopulation="M2R" postsynapticPopulation="I4" synapse="Acetylcholine">
      <connection id="13" preCellId="../M2R/0/M2R" postCellId="../I4/0/I4" preSegmentId="2" postSegmentId="8" preFractionAlong="0.8164107849650307" postFractionAlong="0.5015154614797338"/>
    </projection>
    <projection id="NCXLS_M2R_M2L" presynapticPopulation="M2R" postsynapticPopulation="M2L" synapse="Glutamate">
      <connection id="14" preCellId="../M2R/0/M2R" postCellId="../M2L/0/M2L" preSegmentId="8" postSegmentId="7" preFractionAlong="0.31286316085513" postFractionAlong="0.9352970985453276"/>
    </projection>
    <projection id="NCXLS_M2R_I2R" presynapticPopulation="M2R" postsynapticPopulation="I2R" synapse="Acetylcholine">
      <connection id="15" preCellId="../M2R/0/M2R" postCellId="../I2R/0/I2R" preSegmentId="2" postSegmentId="7" preFractionAlong="0.9060870604812605" postFractionAlong="0.012156771477386807"/>
    </projection>
    <projection id="NCXLS_M3L_I3" presynapticPopulation="M3L" postsynapticPopulation="I3" synapse="Acetylcholine">
      <connection id="16" preCellId="../M3L/0/M3L" postCellId="../I3/0/I3" preSegmentId="8" postSegmentId="1" preFractionAlong="0.5488586650773559" postFractionAlong="0.2876327290436782"/>
    </projection>
    <projection id="NCXLS_M3L_I5" presynapticPopulation="M3L" postsynapticPopulation="I5" synapse="Acetylcholine">
      <connection id="17" preCellId="../M3L/0/M3L" postCellId="../I5/0/I5" preSegmentId="5" postSegmentId="1" preFractionAlong="0.9349944318387654" postFractionAlong="0.43054020950718996"/>
    </projection>
    <projection id="NCXLS_M3L_MCR" presynapticPopulation="M3L" postsynapticPopulation="MCR" synapse="Acetylcholine">
      <connection id="18" preCellId="../M3L/0/M3L" postCellId="../MCR/0/MCR" preSegmentId="5" postSegmentId="6" preFractionAlong="0.24713155466139192" postFractionAlong="0.3558547592592114"/>
    </projection>
    <projection id="NCXLS_M3L_NSML" presynapticPopulation="M3L" postsynapticPopulation="NSML" synapse="Acetylcholine">
      <connection id="19" preCellId="../M3L/0/M3L" postCellId="../NSML/0/NSML" preSegmentId="2" postSegmentId="9" preFractionAlong="0.6854438832219015" postFractionAlong="0.332456157148712"/>
    </projection>
    <projection id="NCXLS_M3L_I1L" presynapticPopulation="M3L" postsynapticPopulation="I1L" synapse="Acetylcholine">
      <connection id="20" preCellId="../M3L/0/M3L" postCellId="../I1L/0/I1L" preSegmentId="2" postSegmentId="7" preFractionAlong="0.9444485826943034" postFractionAlong="0.6417343972985582"/>
    </projection>
    <electricalProjection id="NCXLS_M3R_M2R_GJ" presynapticPopulation="M3R" postsynapticPopulation="M2R">
      <electricalConnection id="21" preCell="0" postCell="0" synapse="Generic_GJ" preSegment="6" postSegment="7" preFractionAlong="0.6322821536376398" postFractionAlong="0.1989921389594368"/>
    </electricalProjection>
    <projection id="NCXLS_M3R_I1R" presynapticPopulation="M3R" postsynapticPopulation="I1R" synapse="Acetylcholine">
      <connection id="22" preCellId="../M3R/0/M3R" postCellId="../I1R/0/I1R" preSegmentId="3" postSegmentId="6" preFractionAlong="0.6011026956243283" postFractionAlong="0.9903617819983719"/>
    </projection>
    <projection id="NCXLS_M3R_I4" presynapticPopulation="M3R" postsynapticPopulation="I4" synapse="Acetylcholine">
      <connection id="23" preCellId="../M3R/0/M3R" postCellId="../I4/0/I4" preSegmentId="8" postSegmentId="2" preFractionAlong="0.9412724482418516" postFractionAlong="0.9147311149565036"/>
    </projection>
    <projection id="NCXLS_M3R_I2L" presynapticPopulation="M3R" postsynapticPopulation="I2L" synapse="Acetylcholine">
      <connection id="24" preCellId="../M3R/0/M3R" postCellId="../I2L/0/I2L" preSegmentId="8" postSegmentId="1" preFractionAlong="0.10312136240807579" postFractionAlong="0.5477846943833194"/>
    </projection>
    <projection id="NCXLS_M3R_I2R" presynapticPopulation="M3R" postsynapticPopulation="I2R" synapse="Acetylcholine">
      <connection id="25" preCellId="../M3R/0/M3R" postCellId="../I2R/0/I2R" preSegmentId="9" postSegmentId="5" preFractionAlong="0.18981530297215599" postFractionAlong="0.5821832300925898"/>
    </projection>
    <projection id="NCXLS_M3R_I1L" presynapticPopulation="M3R" postsynapticPopulation="I1L" synapse="Acetylcholine">
      <connection id="26" preCellId="../M3R/0/M3R" postCellId="../I1L/0/I1L" preSegmentId="1" postSegmentId="1" preFractionAlong="0.39761237855287057" postFractionAlong="0.2642762631586393"/>
    </projection>
    <projection id="NCXLS_M1_M4" presynapticPopulation="M1" postsynapticPopulation="M4" synapse="Glutamate">
      <connection id="27" preCellId="../M1/0/M1" postCellId="../M4/0/M4" preSegmentId="2" postSegmentId="9" preFractionAlong="0.7401613687614631" postFractionAlong="0.630700471158785"/>
    </projection>
    <projection id="NCXLS_M1_MCL" presynapticPopulation="M1" postsynapticPopulation="MCL" synapse="Acetylcholine">
      <connection id="28" preCellId="../M1/0/M1" postCellId="../MCL/0/MCL" preSegmentId="8" postSegmentId="6" preFractionAlong="0.9685373316998922" postFractionAlong="0.6036372005593751"/>
    </projection>
    <projection id="NCXLS_M1_I6" presynapticPopulation="M1" postsynapticPopulation="I6" synapse="Acetylcholine">
      <connection id="29" preCellId="../M1/0/M1" postCellId="../I6/0/I6" preSegmentId="7" postSegmentId="6" preFractionAlong="0.0683341048456042" postFractionAlong="0.43037474969079326"/>
    </projection>
    <projection id="NCXLS_M1_M2R" presynapticPopulation="M1" postsynapticPopulation="M2R" synapse="Glutamate">
      <connection id="30" preCellId="../M1/0/M1" postCellId="../M2R/0/M2R" preSegmentId="4" postSegmentId="3" preFractionAlong="0.6236487782902661" postFractionAlong="0.6485048201186882"/>
    </projection>
    <projection id="NCXLS_M1_M3L" presynapticPopulation="M1" postsynapticPopulation="M3L" synapse="Acetylcholine">
      <connection id="31" preCellId="../M1/0/M1" postCellId="../M3L/0/M3L" preSegmentId="5" postSegmentId="2" preFractionAlong="0.7037923109905077" postFractionAlong="0.3732598144627589"/>
    </projection>
    <projection id="NCXLS_M1_MI" presynapticPopulation="M1" postsynapticPopulation="MI" synapse="Acetylcholine">
      <connection id="32" preCellId="../M1/0/M1" postCellId="../MI/0/MI" preSegmentId="9" postSegmentId="1" preFractionAlong="0.6720560387522534" postFractionAlong="0.5835569673248185"/>
    </projection>
    <projection id="NCXLS_M1_M3R" presynapticPopulation="M1" postsynapticPopulation="M3R" synapse="Acetylcholine">
      <connection id="33" preCellId="../M1/0/M1" postCellId="../M3R/0/M3R" preSegmentId="4" postSegmentId="2" preFractionAlong="0.8660956336116915" postFractionAlong="0.9467337289233956"/>
    </projection>
    <projection id="NCXLS_M1_I1R" presynapticPopulation="M1" postsynapticPopulation="I1R" synapse="Acetylcholine">
      <connection id="34" preCellId="../M1/0/M1" postCellId="../I1R/0/I1R" preSegmentId="9" postSegmentId="5" preFractionAlong="0.9447362587830797" postFractionAlong="0.7365352283347926"/>
    </projection>
    <projection id="NCXLS_M1_I4" presynapticPopulation="M1" postsynapticPopulation="I4" synapse="Acetylcholine">
      <connection id="35" preCellId="../M1/0/M1" postCellId="../I4/0/I4" preSegmentId="5" postSegmentId="8" preFractionAlong="0.5875858711094019" postFractionAlong="0.7011395944174736"/>
    </projection>
    <projection id="NCXLS_M1_I2L" presynapticPopulation="M1" postsynapticPopulation="I2L" synapse="Acetylcholine">
      <connection id="36" preCellId="../M1/0/M1" postCellId="../I2L/0/I2L" preSegmentId="9" postSegmentId="1" preFractionAlong="0.015394891691308477" postFractionAlong="0.5829260568042631"/>
    </projection>
    <projection id="NCXLS_M1_I2R" presynapticPopulation="M1" postsynapticPopulation="I2R" synapse="Acetylcholine">
      <connection id="37" preCellId="../M1/0/M1" postCellId="../I2R/0/I2R" preSegmentId="1" postSegmentId="9" preFractionAlong="0.45025424614289034" postFractionAlong="0.9575810150838173"/>
    </projection>
    <projection id="NCXLS_M1_I1L" presynapticPopulation="M1" postsynapticPopulation="I1L" synapse="Acetylcholine">
      <connection id="38" preCellId="../M1/0/M1" postCellId="../I1L/0/I1L" preSegmentId="4" postSegmentId="9" preFractionAlong="0.8398016066644267" postFractionAlong="0.18854060574925113"/>
    </projection>
    <projection id="NCXLS_M2L_M4" presynapticPopulation="M2L" postsynapticPopulation="M4" synapse="Glutamate">
      <connection id="39" preCellId="../M2L/0/M2L" postCellId="../M4/0/M4" preSegmentId="6" postSegmentId="6" preFractionAlong="0.10189310087293679" postFractionAlong="0.008319942227192012"/>
    </projection>
    <projection id="NCXLS_M2L_I3" presynapticPopulation="M2L" postsynapticPopulation="I3" synapse="Acetylcholine">
      <connection id="40" preCellId="../M2L/0/M2L" postCellId="../I3/0/I3" preSegmentId="6" postSegmentId="2" preFractionAlong="0.0926254830513672" postFractionAlong="0.7483843496762314"/>
    </projection>
    <projection id="NCXLS_M2L_I5" presynapticPopulation="M2L" postsynapticPopulation="I5" synapse="Acetylcholine">
      <connection id="41" preCellId="../M2L/0/M2L" postCellId="../I5/0/I5" preSegmentId="9" postSegmentId="4" preFractionAlong="0.4344033190066098" postFractionAlong="0.723447817850001"/>
    </projection>
    <projection id="NCXLS_M2L_M2R" presynapticPopulation="M2L" postsynapticPopulation="M2R" synapse="Acetylcholine">
      <connection id="42" preCellId="../M2L/0/M2L" postCellId="../M2R/0/M2R" preSegmentId="3" postSegmentId="8" preFractionAlong="0.22917195121416212" postFractionAlong="0.5468759658760446"/>
    </projection>
    <projection id="NCXLS_M2L_MCR" presynapticPopulation="M2L" postsynapticPopulation="MCR" synapse="Acetylcholine">
      <connection id="43" preCellId="../M2L/0/M2L" postCellId="../MCR/0/MCR" preSegmentId="9" postSegmentId="2" preFractionAlong="0.7140527233781268" postFractionAlong="0.0913914863317764"/>
    </projection>
    <projection id="NCXLS_M2L_M3L" presynapticPopulation="M2L" postsynapticPopulation="M3L" synapse="Glutamate">
      <connection id="44" preCellId="../M2L/0/M2L" postCellId="../M3L/0/M3L" preSegmentId="1" postSegmentId="5" preFractionAlong="0.8774700466544819" postFractionAlong="0.7387231507265664"/>
    </projection>
    <projection id="NCXLS_M2L_MI" presynapticPopulation="M2L" postsynapticPopulation="MI" synapse="Acetylcholine">
      <connection id="45" preCellId="../M2L/0/M2L" postCellId="../MI/0/MI" preSegmentId="1" postSegmentId="9" preFractionAlong="0.015813196232962068" postFractionAlong="0.07714516853958187"/>
    </projection>
    <projection id="NCXLS_M2L_NSML" presynapticPopulation="M2L" postsynapticPopulation="NSML" synapse="Acetylcholine">
      <connection id="46" preCellId="../M2L/0/M2L" postCellId="../NSML/0/NSML" preSegmentId="2" postSegmentId="8" preFractionAlong="0.3548608307461478" postFractionAlong="0.4247715304250529"/>
    </projection>
    <electricalProjection id="NCXLS_M2L_M3R_GJ" presynapticPopulation="M2L" postsynapticPopulation="M3R">
      <electricalConnection id="47" preCell="0" postCell="0" synapse="Generic_GJ" preSegment="1" postSegment="2" preFractionAlong="0.37220039182521925" postFractionAlong="0.33303487180539837"/>
    </electricalProjection>
    <electricalProjection id="NCXLS_M2L_M1_GJ" presynapticPopulation="M2L" postsynapticPopulation="M1">
      <electricalConnection id="48" preCell="0" postCell="0" synapse="Generic_GJ" preSegment="2" postSegment="6" preFractionAlong="0.3832842396422014" postFractionAlong="0.49350099215440824"/>
    </electricalProjection>
    <projection id="NCXLS_M2L_I2L" presynapticPopulation="M2L" postsynapticPopulation="I2L" synapse="Acetylcholine">
      <connection id="49" preCellId="../M2L/0/M2L" postCellId="../I2L/0/I2L" preSegmentId="8" postSegmentId="3" preFractionAlong="0.6167836078525412" postFractionAlong="0.742881493667939"/>
    </projection>
    <projection id="NCXLS_M2L_I1L" presynapticPopulation="M2L" postsynapticPopulation="I1L" synapse="Acetylcholine">
      <connection id="50" preCellId="../M2L/0/M2L" postCellId="../I1L/0/I1L" preSegmentId="8" postSegmentId="8" preFractionAlong="0.06845871933357806" postFractionAlong="0.3711129384301278"/>
    </projection>
    <projection id="NC_I1L_RMDDL" presynapticPopulation="I1L" postsynapticPopulation="RMDDL" synapse="Acetylcholine">
      <connection id="1000" preCellId="../I1L/0/I1L" postCellId="../RMDDL/0/RMDDL" preSegmentId="9" postSegmentId="6" preFractionAlong="0.7997187639648612" postFractionAlong="0.33360678902904317"/>
    </projection>
    <projection id="NC_I1L_RMDVL" presynapticPopulation="I1L" postsynapticPopulation="RMDVL" synapse="Acetylcholine">
      <connection id="1001" preCellId="../I1L/0/I1L" postCellId="../RMDVL/0/RMDVL" preSegmentId="1" postSegmentId="6" preFractionAlong="0.8598238353912759" postFractionAlong="0.03500791480680565"/>
    </projection>
    <projection id="NC_I1R_RMDDR" presynapticPopulation="I1R" postsynapticPopulation="RMDDR" synapse="Acetylcholine">
      <connection id="1002" preCellId="../I1R/0/I1R" postCellId="../RMDDR/0/RMDDR" preSegmentId="5" postSegmentId="2" preFractionAlong="0.6302472194561579" postFractionAlong="0.24838360874320753"/>
    </projection>
    <projection id="NC_I1R_RMDVR" presynapticPopulation="I1R" postsynapticPopulation="RMDVR" synapse="Acetylcholine">
      <connection id="1003" preCellId="../I1R/0/I1R" postCellId="../RMDVR/0/RMDVR" preSegmentId="6" postSegmentId="8" preFractionAlong="0.4425455148147456" postFractionAlong="0.6493223245768817"/>
    </projection>
    <projection id="NC_I2L_URXL" presynapticPopulation="I2L" postsynapticPopulation="URXL" synapse="Glutamate">
      <connection id="1004" preCellId="../I2L/0/I2L" postCellId="../URXL/0/URXL" preSegmentId="5" postSegmentId="2" preFractionAlong="0.8247432373470076" postFractionAlong="0.2923831104121931"/>
    </projection>
    <projection id="NC_I2R_URXR" presynapticPopulation="I2R" postsynapticPopulation="URXR" synapse="Glutamate">
      <connection id="1005" preCellId="../I2R/0/I2R" postCellId="../URXR/0/URXR" preSegmentId="9" postSegmentId="4" preFractionAlong="0.5902326591508927" postFractionAlong="0.40763285797965576"/>
    </projection>
    <projection id="NC_AVKL_I1L" presynapticPopulation="AVKL" postsynapticPopulation="I1L" synapse="Acetylcholine">
      <connection id="1006" preCellId="../AVKL/0/AVKL" postCellId="../I1L/0/I1L" preSegmentId="6" postSegmentId="8" preFractionAlong="0.9271106288584273" postFractionAlong="0.10539321810780522"/>
    </projection>
    <projection id="NC_AVKR_I1R" presynapticPopulation="AVKR" postsynapticPopulation="I1R" synapse="Acetylcholine">
      <connection id="1007" preCellId="../AVKR/0/AVKR" postCellId="../I1R/0/I1R" preSegmentId="7" postSegmentId="3" preFractionAlong="0.40967105337599263" postFractionAlong="0.655173714524338"/>
    </projection>
    <projection id="NC_RIS_I1L" presynapticPopulation="RIS" postsynapticPopulation="I1L" synapse="Glutamate">
      <connection id="1008" preCellId="../RIS/0/RIS" postCellId="../I1L/0/I1L" preSegmentId="1" postSegmentId="6" preFractionAlong="0.1594922625413583" postFractionAlong="0.16046261427122643"/>
    </projection>
    <projection id="NC_RIS_I1R" presynapticPopulation="RIS" postsynapticPopulation="I1R" synapse="Glutamate">
      <connection id="1009" preCellId="../RIS/0/RIS" postCellId="../I1R/0/I1R" preSegmentId="5" postSegmentId="1" preFractionAlong="0.18564670490124302" postFractionAlong="0.6642193849889683"/>
    </projection>
    <projection id="NC_AVAL_I2L" presynapticPopulation="AVAL" postsynapticPopulation="I2L" synapse="Acetylcholine">
      <connection id="1010" preCellId="../AVAL/0/AVAL" postCellId="../I2L/0/I2L" preSegmentId="7" postSegmentId="3" preFractionAlong="0.8141256855911618" postFractionAlong="0.6851343098744841"/>
    </projection>
    <projection id="NC_AVAR_I2R" presynapticPopulation="AVAR" postsynapticPopulation="I2R" synapse="Acetylcholine">
      <connection id="1011" preCellId="../AVAR/0/AVAR" postCellId="../I2R/0/I2R" preSegmentId="3" postSegmentId="4" preFractionAlong="0.28918744629594983" postFractionAlong="0.309806875322469"/>
    </projection>
    <projection id="NC_SMBVL_I4" presynapticPopulation="SMBVL" postsynapticPopulation="I4" synapse="Acetylcholine">
      <connection id="1012" preCellId="../SMBVL/0/SMBVL" postCellId="../I4/0/I4" preSegmentId="8" postSegmentId="7" preFractionAlong="0.2548822489148823" postFractionAlong="0.7425308328404214"/>
    </projection>
    <projection id="NC_SMBVR_I4" presynapticPopulation="SMBVR" postsynapticPopulation="I4" synapse="Acetylcholine">
      <connection id="1013" preCellId="../SMBVR/0/SMBVR" postCellId="../I4/0/I4" preSegmentId="4" postSegmentId="8" preFractionAlong="0.7892928483196856" postFractionAlong="0.30779583168074565"/>
    </projection>
  </network>
</neuroml>
