<?xml version='1.0' encoding='UTF-8'?>
<neuroml xmlns="http://www.neuroml.org/schema/neuroml2" xmlns:xsi="http://www.w3.org/2001/XMLSchema-instance" xsi:schemaLocation="http://www.neuroml.org/schema/neuroml2 https://raw.githubusercontent.com/NeuroML/NeuroML2/development/Schemas/NeuroML2/NeuroML_v2beta4.xsd" id="gvft_network_bio_prior_lamW_0.189_DF_0.019_t30.net">
  <notes>NeuroML2 network generated from GVFT simulation on 2025-05-04 12:19:09
</notes>
  <include href="AVAL.cell.nml"/>
  <include href="AVAR.cell.nml"/>
  <include href="AVKL.cell.nml"/>
  <include href="AVKR.cell.nml"/>
  <include href="RIS.cell.nml"/>
  <include href="RMDDL.cell.nml"/>
  <include href="RMDDR.cell.nml"/>
  <include href="RMDVL.cell.nml"/>
  <include href="RMDVR.cell.nml"/>
  <include href="SMBVL.cell.nml"/>
  <include href="SMBVR.cell.nml"/>
  <include href="URXL.cell.nml"/>
  <include href="URXR.cell.nml"/>
  <include href="I6.cell.nml"/>
  <include href="M3L.cell.nml"/>
  <include href="I5.cell.nml"/>
  <include href="M1.cell.nml"/>
  <include href="I1R.cell.nml"/>
  <include href="MCR.cell.nml"/>
  <include href="I2R.cell.nml"/>
  <include href="I4.cell.nml"/>
  <include href="NSMR.cell.nml"/>
  <include href="M4.cell.nml"/>
  <include href="I3.cell.nml"/>
  <include href="MI.cell.nml"/>
  <include href="I2L.cell.nml"/>
  <include href="M5.cell.nml"/>
  <include href="NSML.cell.nml"/>
  <include href="M2R.cell.nml"/>
  <include href="M3R.cell.nml"/>
  <include href="MCL.cell.nml"/>
  <include href="I1L.cell.nml"/>
  <include href="M2L.cell.nml"/>
  <include href="Acetylcholine.synapse.nml"/>
  <include href="Glutamate.synapse.nml"/>
  <include href="Generic_GJ.synapse.nml"/>
  <include href="Serotonin_Glutamate.synapse.nml"/>
  <network id="gvft_network_bio_prior_lamW_0.189_DF_0.019_t30.net" type="networkWithTemperature" temperature="20.0 degC">
    <population id="M1" component="M1" type="populationList" size="1">
      <instance id="0">
        <location x="0.71859294" y="-0.2763819" z="0.0"/>
      </instance>
    </population>
    <population id="M2L" component="M2L" type="populationList" size="1">
      <instance id="0">
        <location x="0.75879395" y="-0.1155779" z="0.0"/>
      </instance>
    </population>
    <population id="M2R" component="M2R" type="populationList" size="1">
      <instance id="0">
        <location x="-0.18592966" y="0.12562814" z="0.0"/>
      </instance>
    </population>
    <population id="M3L" component="M3L" type="populationList" size="1">
      <instance id="0">
        <location x="-0.2964824" y="-0.43718594" z="0.0"/>
      </instance>
    </population>
    <population id="M3R" component="M3R" type="populationList" size="1">
      <instance id="0">
        <location x="-0.9296482" y="0.879397" z="0.0"/>
      </instance>
    </population>
    <population id="M4" component="M4" type="populationList" size="1">
      <instance id="0">
        <location x="-0.9798995" y="-0.6080402" z="0.0"/>
      </instance>
    </population>
    <population id="M5" component="M5" type="populationList" size="1">
      <instance id="0">
        <location x="-0.08542714" y="0.3467337" z="0.0"/>
      </instance>
    </population>
    <population id="I1L" component="I1L" type="populationList" size="1">
      <instance id="0">
        <location x="-0.51758796" y="0.7889447" z="0.0"/>
      </instance>
    </population>
    <population id="I1R" component="I1R" type="populationList" size="1">
      <instance id="0">
        <location x="-0.2562814" y="-0.28643218" z="0.0"/>
      </instance>
    </population>
    <population id="I2L" component="I2L" type="populationList" size="1">
      <instance id="0">
        <location x="0.76884425" y="0.2562814" z="0.0"/>
      </instance>
    </population>
    <population id="I2R" component="I2R" type="populationList" size="1">
      <instance id="0">
        <location x="-0.6080402" y="-1.0" z="0.0"/>
      </instance>
    </population>
    <population id="I3" component="I3" type="populationList" size="1">
      <instance id="0">
        <location x="-0.8894472" y="0.42713568" z="0.0"/>
      </instance>
    </population>
    <population id="I4" component="I4" type="populationList" size="1">
      <instance id="0">
        <location x="-0.23618092" y="-0.61809045" z="0.0"/>
      </instance>
    </population>
    <population id="I5" component="I5" type="populationList" size="1">
      <instance id="0">
        <location x="0.6683417" y="-0.4874372" z="0.0"/>
      </instance>
    </population>
    <population id="I6" component="I6" type="populationList" size="1">
      <instance id="0">
        <location x="0.9798995" y="-0.49748746" z="0.0"/>
      </instance>
    </population>
    <population id="MCL" component="MCL" type="populationList" size="1">
      <instance id="0">
        <location x="0.53768843" y="-0.19597991" z="0.0"/>
      </instance>
    </population>
    <population id="MCR" component="MCR" type="populationList" size="1">
      <instance id="0">
        <location x="-0.8190955" y="-0.7889447" z="0.0"/>
      </instance>
    </population>
    <population id="MI" component="MI" type="populationList" size="1">
      <instance id="0">
        <location x="-0.59799" y="-0.68844223" z="0.0"/>
      </instance>
    </population>
    <population id="NSML" component="NSML" type="populationList" size="1">
      <instance id="0">
        <location x="0.83919597" y="-0.33668342" z="0.0"/>
      </instance>
    </population>
    <population id="NSMR" component="NSMR" type="populationList" size="1">
      <instance id="0">
        <location x="-0.21608041" y="-0.59799" z="0.0"/>
      </instance>
    </population>
    <population id="AVAL" component="AVAL" type="populationList" size="1">
      <instance id="0">
        <location x="5.0" y="0.0" z="0.0"/>
      </instance>
    </population>
    <population id="AVAR" component="AVAR" type="populationList" size="1">
      <instance id="0">
        <location x="5.0" y="0.0" z="0.0"/>
      </instance>
    </population>
    <population id="AVKL" component="AVKL" type="populationList" size="1">
      <instance id="0">
        <location x="5.0" y="0.0" z="0.0"/>
      </instance>
    </population>
    <population id="AVKR" component="AVKR" type="populationList" size="1">
      <instance id="0">
        <location x="5.0" y="0.0" z="0.0"/>
      </instance>
    </population>
    <population id="RIS" component="RIS" type="populationList" size="1">
      <instance id="0">
        <location x="5.0" y="0.0" z="0.0"/>
      </instance>
    </population>
    <population id="RMDDL" component="RMDDL" type="populationList" size="1">
      <instance id="0">
        <location x="5.0" y="0.0" z="0.0"/>
      </instance>
    </population>
    <population id="RMDDR" component="RMDDR" type="populationList" size="1">
      <instance id="0">
        <location x="5.0" y="0.0" z="0.0"/>
      </instance>
    </population>
    <population id="RMDVL" component="RMDVL" type="populationList" size="1">
      <instance id="0">
        <location x="5.0" y="0.0" z="0.0"/>
      </instance>
    </population>
    <population id="RMDVR" component="RMDVR" type="populationList" size="1">
      <instance id="0">
        <location x="5.0" y="0.0" z="0.0"/>
      </instance>
    </population>
    <population id="SMBVL" component="SMBVL" type="populationList" size="1">
      <instance id="0">
        <location x="5.0" y="0.0" z="0.0"/>
      </instance>
    </population>
    <population id="SMBVR" component="SMBVR" type="populationList" size="1">
      <instance id="0">
        <location x="5.0" y="0.0" z="0.0"/>
      </instance>
    </population>
    <population id="URXL" component="URXL" type="populationList" size="1">
      <instance id="0">
        <location x="5.0" y="0.0" z="0.0"/>
      </instance>
    </population>
    <population id="URXR" component="URXR" type="populationList" size="1">
      <instance id="0">
        <location x="5.0" y="0.0" z="0.0"/>
      </instance>
    </population>
    <projection id="NCXLS_M1_MCL" presynapticPopulation="M1" postsynapticPopulation="MCL" synapse="Acetylcholine">
      <connection id="0" preCellId="../M1/0/M1" postCellId="../MCL/0/MCL" preSegmentId="1" postSegmentId="8" preFractionAlong="0.13924684459410952" postFractionAlong="0.6120085299594553"/>
    </projection>
    <projection id="NCXLS_M1_I1R" presynapticPopulation="M1" postsynapticPopulation="I1R" synapse="Acetylcholine">
      <connection id="1" preCellId="../M1/0/M1" postCellId="../I1R/0/I1R" preSegmentId="6" postSegmentId="2" preFractionAlong="0.047196701697378995" postFractionAlong="0.9614166196420495"/>
    </projection>
    <projection id="NCXLS_M1_I4" presynapticPopulation="M1" postsynapticPopulation="I4" synapse="Acetylcholine">
      <connection id="2" preCellId="../M1/0/M1" postCellId="../I4/0/I4" preSegmentId="2" postSegmentId="4" preFractionAlong="0.23307281189083495" postFractionAlong="0.6951874662100657"/>
    </projection>
    <projection id="NCXLS_M1_MCR" presynapticPopulation="M1" postsynapticPopulation="MCR" synapse="Acetylcholine">
      <connection id="3" preCellId="../M1/0/M1" postCellId="../MCR/0/MCR" preSegmentId="9" postSegmentId="2" preFractionAlong="0.7755052967189994" postFractionAlong="0.39312179820707915"/>
    </projection>
    <projection id="NCXLS_M1_I3" presynapticPopulation="M1" postsynapticPopulation="I3" synapse="Acetylcholine">
      <connection id="4" preCellId="../M1/0/M1" postCellId="../I3/0/I3" preSegmentId="4" postSegmentId="1" preFractionAlong="0.2215172721131058" postFractionAlong="0.056162009903313104"/>
    </projection>
    <projection id="NCXLS_M1_M3L" presynapticPopulation="M1" postsynapticPopulation="M3L" synapse="Acetylcholine">
      <connection id="5" preCellId="../M1/0/M1" postCellId="../M3L/0/M3L" preSegmentId="9" postSegmentId="2" preFractionAlong="0.1674597445179885" postFractionAlong="0.4625935471051531"/>
    </projection>
    <projection id="NCXLS_M1_I5" presynapticPopulation="M1" postsynapticPopulation="I5" synapse="Acetylcholine">
      <connection id="6" preCellId="../M1/0/M1" postCellId="../I5/0/I5" preSegmentId="7" postSegmentId="9" preFractionAlong="0.1383715947205566" postFractionAlong="0.982739540910386"/>
    </projection>
    <projection id="NCXLS_M1_M4" presynapticPopulation="M1" postsynapticPopulation="M4" synapse="Glutamate">
      <connection id="7" preCellId="../M1/0/M1" postCellId="../M4/0/M4" preSegmentId="6" postSegmentId="2" preFractionAlong="0.07336406745960267" postFractionAlong="0.6631462489752088"/>
    </projection>
    <projection id="NCXLS_M1_M2R" presynapticPopulation="M1" postsynapticPopulation="M2R" synapse="Glutamate">
      <connection id="8" preCellId="../M1/0/M1" postCellId="../M2R/0/M2R" preSegmentId="8" postSegmentId="4" preFractionAlong="0.42219223388067806" postFractionAlong="0.7850639210464312"/>
    </projection>
    <projection id="NCXLS_M1_M5" presynapticPopulation="M1" postsynapticPopulation="M5" synapse="Glutamate">
      <connection id="9" preCellId="../M1/0/M1" postCellId="../M5/0/M5" preSegmentId="3" postSegmentId="5" preFractionAlong="0.8202533189448897" postFractionAlong="0.6487471138950182"/>
    </projection>
    <projection id="NCXLS_M1_NSMR" presynapticPopulation="M1" postsynapticPopulation="NSMR" synapse="Acetylcholine">
      <connection id="10" preCellId="../M1/0/M1" postCellId="../NSMR/0/NSMR" preSegmentId="1" postSegmentId="1" preFractionAlong="0.27686996949201226" postFractionAlong="0.046063063681977434"/>
    </projection>
    <projection id="NCXLS_M1_I2R" presynapticPopulation="M1" postsynapticPopulation="I2R" synapse="Acetylcholine">
      <connection id="11" preCellId="../M1/0/M1" postCellId="../I2R/0/I2R" preSegmentId="4" postSegmentId="5" preFractionAlong="0.6607985296909104" postFractionAlong="0.7463628843132415"/>
    </projection>
    <projection id="NCXLS_M1_I1L" presynapticPopulation="M1" postsynapticPopulation="I1L" synapse="Acetylcholine">
      <connection id="12" preCellId="../M1/0/M1" postCellId="../I1L/0/I1L" preSegmentId="1" postSegmentId="7" preFractionAlong="0.8456535222773424" postFractionAlong="0.2596032837084785"/>
    </projection>
    <electricalProjection id="NCXLS_M1_M3R_GJ" presynapticPopulation="M1" postsynapticPopulation="M3R">
      <electricalConnection id="13" preCell="0" postCell="0" synapse="Generic_GJ" preSegment="3" postSegment="9" preFractionAlong="0.5707614809590734" postFractionAlong="0.47870485796552253"/>
    </electricalProjection>
    <projection id="NCXLS_M1_MI" presynapticPopulation="M1" postsynapticPopulation="MI" synapse="Acetylcholine">
      <connection id="14" preCellId="../M1/0/M1" postCellId="../MI/0/MI" preSegmentId="9" postSegmentId="2" preFractionAlong="0.0002270382182555375" postFractionAlong="0.9150015377475272"/>
    </projection>
    <projection id="NCXLS_MCL_M1" presynapticPopulation="MCL" postsynapticPopulation="M1" synapse="Acetylcholine">
      <connection id="15" preCellId="../MCL/0/MCL" postCellId="../M1/0/M1" preSegmentId="6" postSegmentId="6" preFractionAlong="0.8222281125770106" postFractionAlong="0.7528486558822063"/>
    </projection>
    <projection id="NCXLS_MCL_NSML" presynapticPopulation="MCL" postsynapticPopulation="NSML" synapse="Acetylcholine">
      <connection id="16" preCellId="../MCL/0/MCL" postCellId="../NSML/0/NSML" preSegmentId="1" postSegmentId="2" preFractionAlong="0.7227846006215212" postFractionAlong="0.23184129171472645"/>
    </projection>
    <projection id="NCXLS_MCL_I2L" presynapticPopulation="MCL" postsynapticPopulation="I2L" synapse="Acetylcholine">
      <connection id="17" preCellId="../MCL/0/MCL" postCellId="../I2L/0/I2L" preSegmentId="1" postSegmentId="8" preFractionAlong="0.30770281338984384" postFractionAlong="0.24217465034747054"/>
    </projection>
    <projection id="NCXLS_MCL_I5" presynapticPopulation="MCL" postsynapticPopulation="I5" synapse="Acetylcholine">
      <connection id="18" preCellId="../MCL/0/MCL" postCellId="../I5/0/I5" preSegmentId="1" postSegmentId="9" preFractionAlong="0.749379016724156" postFractionAlong="0.917840883093553"/>
    </projection>
    <projection id="NCXLS_MCL_M2L" presynapticPopulation="MCL" postsynapticPopulation="M2L" synapse="Acetylcholine">
      <connection id="19" preCellId="../MCL/0/MCL" postCellId="../M2L/0/M2L" preSegmentId="2" postSegmentId="7" preFractionAlong="0.7502607940873155" postFractionAlong="0.27450667350707825"/>
    </projection>
    <projection id="NCXLS_MCL_I6" presynapticPopulation="MCL" postsynapticPopulation="I6" synapse="Acetylcholine">
      <connection id="20" preCellId="../MCL/0/MCL" postCellId="../I6/0/I6" preSegmentId="1" postSegmentId="8" preFractionAlong="0.8024017844513243" postFractionAlong="0.3412444497577206"/>
    </projection>
    <projection id="NCXLS_MCR_I3" presynapticPopulation="MCR" postsynapticPopulation="I3" synapse="Acetylcholine">
      <connection id="21" preCellId="../MCR/0/MCR" postCellId="../I3/0/I3" preSegmentId="5" postSegmentId="7" preFractionAlong="0.8150721006758068" postFractionAlong="0.8774521266031688"/>
    </projection>
    <projection id="NCXLS_MCR_M4" presynapticPopulation="MCR" postsynapticPopulation="M4" synapse="Acetylcholine">
      <connection id="22" preCellId="../MCR/0/MCR" postCellId="../M4/0/M4" preSegmentId="2" postSegmentId="7" preFractionAlong="0.671587742938926" postFractionAlong="0.03172249181603115"/>
    </projection>
    <projection id="NCXLS_MCR_I1L" presynapticPopulation="MCR" postsynapticPopulation="I1L" synapse="Acetylcholine">
      <connection id="23" preCellId="../MCR/0/MCR" postCellId="../I1L/0/I1L" preSegmentId="2" postSegmentId="4" preFractionAlong="0.9888405413036631" postFractionAlong="0.48323207587543515"/>
    </projection>
    <projection id="NCXLS_MCR_M3R" presynapticPopulation="MCR" postsynapticPopulation="M3R" synapse="Acetylcholine">
      <connection id="24" preCellId="../MCR/0/MCR" postCellId="../M3R/0/M3R" preSegmentId="7" postSegmentId="8" preFractionAlong="0.2794453073189026" postFractionAlong="0.7825001443802936"/>
    </projection>
    <projection id="NCXLS_NSML_I6" presynapticPopulation="NSML" postsynapticPopulation="I6" synapse="Serotonin_Glutamate">
      <connection id="25" preCellId="../NSML/0/NSML" postCellId="../I6/0/I6" preSegmentId="4" postSegmentId="1" preFractionAlong="0.8575306077519237" postFractionAlong="0.0973668937912211"/>
    </projection>
    <projection id="NCXLS_I3_I1L" presynapticPopulation="I3" postsynapticPopulation="I1L" synapse="Glutamate">
      <connection id="26" preCellId="../I3/0/I3" postCellId="../I1L/0/I1L" preSegmentId="5" postSegmentId="9" preFractionAlong="0.006982261880348117" postFractionAlong="0.4034809690269996"/>
    </projection>
    <projection id="NCXLS_I3_M3R" presynapticPopulation="I3" postsynapticPopulation="M3R" synapse="Acetylcholine">
      <connection id="27" preCellId="../I3/0/I3" postCellId="../M3R/0/M3R" preSegmentId="3" postSegmentId="8" preFractionAlong="0.8188692705204715" postFractionAlong="0.3373306088457655"/>
    </projection>
    <projection id="NCXLS_M3L_I1R" presynapticPopulation="M3L" postsynapticPopulation="I1R" synapse="Acetylcholine">
      <connection id="28" preCellId="../M3L/0/M3L" postCellId="../I1R/0/I1R" preSegmentId="8" postSegmentId="6" preFractionAlong="0.9918891959474917" postFractionAlong="0.9513968619791061"/>
    </projection>
    <projection id="NCXLS_M3L_MCR" presynapticPopulation="M3L" postsynapticPopulation="MCR" synapse="Acetylcholine">
      <connection id="29" preCellId="../M3L/0/M3L" postCellId="../MCR/0/MCR" preSegmentId="1" postSegmentId="8" preFractionAlong="0.5375846256925658" postFractionAlong="0.18492029746714433"/>
    </projection>
    <projection id="NCXLS_M3L_I3" presynapticPopulation="M3L" postsynapticPopulation="I3" synapse="Acetylcholine">
      <connection id="30" preCellId="../M3L/0/M3L" postCellId="../I3/0/I3" preSegmentId="6" postSegmentId="9" preFractionAlong="0.2913610728377445" postFractionAlong="0.41739478232914795"/>
    </projection>
    <projection id="NCXLS_M3L_M4" presynapticPopulation="M3L" postsynapticPopulation="M4" synapse="Acetylcholine">
      <connection id="31" preCellId="../M3L/0/M3L" postCellId="../M4/0/M4" preSegmentId="6" postSegmentId="4" preFractionAlong="0.8078656456839812" postFractionAlong="0.7374099443119462"/>
    </projection>
    <electricalProjection id="NCXLS_M3L_M2R_GJ" presynapticPopulation="M3L" postsynapticPopulation="M2R">
      <electricalConnection id="32" preCell="0" postCell="0" synapse="Generic_GJ" preSegment="2" postSegment="1" preFractionAlong="0.953402879382095" postFractionAlong="0.06022694490029745"/>
    </electricalProjection>
    <projection id="NCXLS_M3L_M5" presynapticPopulation="M3L" postsynapticPopulation="M5" synapse="Acetylcholine">
      <connection id="33" preCellId="../M3L/0/M3L" postCellId="../M5/0/M5" preSegmentId="7" postSegmentId="1" preFractionAlong="0.3146289089351988" postFractionAlong="0.6740175348839673"/>
    </projection>
    <projection id="NCXLS_M3L_I1L" presynapticPopulation="M3L" postsynapticPopulation="I1L" synapse="Acetylcholine">
      <connection id="34" preCellId="../M3L/0/M3L" postCellId="../I1L/0/I1L" preSegmentId="8" postSegmentId="6" preFractionAlong="0.7179326909401018" postFractionAlong="0.28360792341713625"/>
    </projection>
    <projection id="NCXLS_M3L_M3R" presynapticPopulation="M3L" postsynapticPopulation="M3R" synapse="Acetylcholine">
      <connection id="35" preCellId="../M3L/0/M3L" postCellId="../M3R/0/M3R" preSegmentId="9" postSegmentId="2" preFractionAlong="0.9094295036858765" postFractionAlong="0.19012876631870568"/>
    </projection>
    <projection id="NCXLS_M3L_MI" presynapticPopulation="M3L" postsynapticPopulation="MI" synapse="Acetylcholine">
      <connection id="36" preCellId="../M3L/0/M3L" postCellId="../MI/0/MI" preSegmentId="4" postSegmentId="5" preFractionAlong="0.5446308711071358" postFractionAlong="0.0778565196087696"/>
    </projection>
    <projection id="NCXLS_M4_MCL" presynapticPopulation="M4" postsynapticPopulation="MCL" synapse="Acetylcholine">
      <connection id="37" preCellId="../M4/0/M4" postCellId="../MCL/0/MCL" preSegmentId="3" postSegmentId="1" preFractionAlong="0.24696116699189252" postFractionAlong="0.8596453453526065"/>
    </projection>
    <projection id="NCXLS_M4_I1R" presynapticPopulation="M4" postsynapticPopulation="I1R" synapse="Acetylcholine">
      <connection id="38" preCellId="../M4/0/M4" postCellId="../I1R/0/I1R" preSegmentId="6" postSegmentId="8" preFractionAlong="0.21228564166859132" postFractionAlong="0.11555837668063174"/>
    </projection>
    <projection id="NCXLS_M4_I3" presynapticPopulation="M4" postsynapticPopulation="I3" synapse="Acetylcholine">
      <connection id="39" preCellId="../M4/0/M4" postCellId="../I3/0/I3" preSegmentId="4" postSegmentId="1" preFractionAlong="0.8196248695476449" postFractionAlong="0.8881913496613041"/>
    </projection>
    <projection id="NCXLS_M4_I2L" presynapticPopulation="M4" postsynapticPopulation="I2L" synapse="Acetylcholine">
      <connection id="40" preCellId="../M4/0/M4" postCellId="../I2L/0/I2L" preSegmentId="5" postSegmentId="7" preFractionAlong="0.5037083870840707" postFractionAlong="0.8784158630449617"/>
    </projection>
    <projection id="NCXLS_M4_M3L" presynapticPopulation="M4" postsynapticPopulation="M3L" synapse="Acetylcholine">
      <connection id="41" preCellId="../M4/0/M4" postCellId="../M3L/0/M3L" preSegmentId="4" postSegmentId="7" preFractionAlong="0.5922213993314405" postFractionAlong="0.7009353650179992"/>
    </projection>
    <electricalProjection id="NCXLS_M4_M2R_GJ" presynapticPopulation="M4" postsynapticPopulation="M2R">
      <electricalConnection id="42" preCell="0" postCell="0" synapse="Generic_GJ" preSegment="2" postSegment="1" preFractionAlong="0.503345130606154" postFractionAlong="0.7964405615234773"/>
    </electricalProjection>
    <projection id="NCXLS_M4_M5" presynapticPopulation="M4" postsynapticPopulation="M5" synapse="Glutamate">
      <connection id="43" preCellId="../M4/0/M4" postCellId="../M5/0/M5" preSegmentId="9" postSegmentId="4" preFractionAlong="0.6633625340146814" postFractionAlong="0.11822241207245987"/>
    </projection>
    <electricalProjection id="NCXLS_M4_M2L_GJ" presynapticPopulation="M4" postsynapticPopulation="M2L">
      <electricalConnection id="44" preCell="0" postCell="0" synapse="Generic_GJ" preSegment="6" postSegment="3" preFractionAlong="0.37736317679665077" postFractionAlong="0.41351653028995916"/>
    </electricalProjection>
    <projection id="NCXLS_M4_I1L" presynapticPopulation="M4" postsynapticPopulation="I1L" synapse="Acetylcholine">
      <connection id="45" preCellId="../M4/0/M4" postCellId="../I1L/0/I1L" preSegmentId="7" postSegmentId="7" preFractionAlong="0.2739880994699718" postFractionAlong="0.9556494672664894"/>
    </projection>
    <projection id="NCXLS_M4_M3R" presynapticPopulation="M4" postsynapticPopulation="M3R" synapse="Acetylcholine">
      <connection id="46" preCellId="../M4/0/M4" postCellId="../M3R/0/M3R" preSegmentId="1" postSegmentId="4" preFractionAlong="0.17909493932818155" postFractionAlong="0.39221779343354013"/>
    </projection>
    <projection id="NCXLS_M2R_I1R" presynapticPopulation="M2R" postsynapticPopulation="I1R" synapse="Acetylcholine">
      <connection id="47" preCellId="../M2R/0/M2R" postCellId="../I1R/0/I1R" preSegmentId="9" postSegmentId="5" preFractionAlong="0.14119906353718492" postFractionAlong="0.7635158436682122"/>
    </projection>
    <projection id="NCXLS_M2R_I4" presynapticPopulation="M2R" postsynapticPopulation="I4" synapse="Acetylcholine">
      <connection id="48" preCellId="../M2R/0/M2R" postCellId="../I4/0/I4" preSegmentId="1" postSegmentId="7" preFractionAlong="0.6202413542689121" postFractionAlong="0.47774212639953595"/>
    </projection>
    <projection id="NCXLS_M2R_MCR" presynapticPopulation="M2R" postsynapticPopulation="MCR" synapse="Acetylcholine">
      <connection id="49" preCellId="../M2R/0/M2R" postCellId="../MCR/0/MCR" preSegmentId="3" postSegmentId="3" preFractionAlong="0.19201608474003673" postFractionAlong="0.14602101929696254"/>
    </projection>
    <projection id="NCXLS_M2R_I3" presynapticPopulation="M2R" postsynapticPopulation="I3" synapse="Acetylcholine">
      <connection id="50" preCellId="../M2R/0/M2R" postCellId="../I3/0/I3" preSegmentId="9" postSegmentId="9" preFractionAlong="0.9176472779044335" postFractionAlong="0.8874689402128824"/>
    </projection>
    <projection id="NCXLS_M2R_M3L" presynapticPopulation="M2R" postsynapticPopulation="M3L" synapse="Acetylcholine">
      <connection id="51" preCellId="../M2R/0/M2R" postCellId="../M3L/0/M3L" preSegmentId="2" postSegmentId="7" preFractionAlong="0.8203240881472009" postFractionAlong="0.5618637898095185"/>
    </projection>
    <projection id="NCXLS_M2R_M4" presynapticPopulation="M2R" postsynapticPopulation="M4" synapse="Acetylcholine">
      <connection id="52" preCellId="../M2R/0/M2R" postCellId="../M4/0/M4" preSegmentId="4" postSegmentId="6" preFractionAlong="0.3559577734706405" postFractionAlong="0.1485067816436808"/>
    </projection>
    <projection id="NCXLS_M2R_NSMR" presynapticPopulation="M2R" postsynapticPopulation="NSMR" synapse="Acetylcholine">
      <connection id="53" preCellId="../M2R/0/M2R" postCellId="../NSMR/0/NSMR" preSegmentId="2" postSegmentId="4" preFractionAlong="0.5519363610604665" postFractionAlong="0.24183819541535312"/>
    </projection>
    <projection id="NCXLS_M2R_I2R" presynapticPopulation="M2R" postsynapticPopulation="I2R" synapse="Acetylcholine">
      <connection id="54" preCellId="../M2R/0/M2R" postCellId="../I2R/0/I2R" preSegmentId="1" postSegmentId="3" preFractionAlong="0.23748330516938398" postFractionAlong="0.2998975929945362"/>
    </projection>
    <projection id="NCXLS_M2R_I1L" presynapticPopulation="M2R" postsynapticPopulation="I1L" synapse="Acetylcholine">
      <connection id="55" preCellId="../M2R/0/M2R" postCellId="../I1L/0/I1L" preSegmentId="8" postSegmentId="9" preFractionAlong="0.526082518417403" postFractionAlong="0.7593108551502052"/>
    </projection>
    <projection id="NCXLS_M2R_M3R" presynapticPopulation="M2R" postsynapticPopulation="M3R" synapse="Glutamate">
      <connection id="56" preCellId="../M2R/0/M2R" postCellId="../M3R/0/M3R" preSegmentId="1" postSegmentId="2" preFractionAlong="0.47251544281958524" postFractionAlong="0.37822451524334477"/>
    </projection>
    <projection id="NCXLS_M2R_MI" presynapticPopulation="M2R" postsynapticPopulation="MI" synapse="Acetylcholine">
      <connection id="57" preCellId="../M2R/0/M2R" postCellId="../MI/0/MI" preSegmentId="2" postSegmentId="7" preFractionAlong="0.4131073977271442" postFractionAlong="0.19934548947118313"/>
    </projection>
    <projection id="NCXLS_M5_M1" presynapticPopulation="M5" postsynapticPopulation="M1" synapse="Glutamate">
      <connection id="58" preCellId="../M5/0/M5" postCellId="../M1/0/M1" preSegmentId="6" postSegmentId="1" preFractionAlong="0.8536545489411119" postFractionAlong="0.7252870843545552"/>
    </projection>
    <projection id="NCXLS_M5_MCL" presynapticPopulation="M5" postsynapticPopulation="MCL" synapse="Acetylcholine">
      <connection id="59" preCellId="../M5/0/M5" postCellId="../MCL/0/MCL" preSegmentId="5" postSegmentId="6" preFractionAlong="0.20214939922527075" postFractionAlong="0.5454903404948357"/>
    </projection>
    <projection id="NCXLS_M5_NSML" presynapticPopulation="M5" postsynapticPopulation="NSML" synapse="Acetylcholine">
      <connection id="60" preCellId="../M5/0/M5" postCellId="../NSML/0/NSML" preSegmentId="8" postSegmentId="1" preFractionAlong="0.08975950056015713" postFractionAlong="0.9108262646863152"/>
    </projection>
    <projection id="NCXLS_M5_I2L" presynapticPopulation="M5" postsynapticPopulation="I2L" synapse="Acetylcholine">
      <connection id="61" preCellId="../M5/0/M5" postCellId="../I2L/0/I2L" preSegmentId="2" postSegmentId="9" preFractionAlong="0.24555062594449106" postFractionAlong="0.8123261802470616"/>
    </projection>
    <projection id="NCXLS_M5_I5" presynapticPopulation="M5" postsynapticPopulation="I5" synapse="Acetylcholine">
      <connection id="62" preCellId="../M5/0/M5" postCellId="../I5/0/I5" preSegmentId="4" postSegmentId="1" preFractionAlong="0.11148768783878193" postFractionAlong="0.5704094914036416"/>
    </projection>
    <projection id="NCXLS_M5_M2L" presynapticPopulation="M5" postsynapticPopulation="M2L" synapse="Acetylcholine">
      <connection id="63" preCellId="../M5/0/M5" postCellId="../M2L/0/M2L" preSegmentId="8" postSegmentId="5" preFractionAlong="0.5466772648973117" postFractionAlong="0.8844787275967592"/>
    </projection>
    <projection id="NCXLS_M5_I6" presynapticPopulation="M5" postsynapticPopulation="I6" synapse="Acetylcholine">
      <connection id="64" preCellId="../M5/0/M5" postCellId="../I6/0/I6" preSegmentId="8" postSegmentId="1" preFractionAlong="0.1954580003683999" postFractionAlong="0.16622936205165872"/>
    </projection>
    <projection id="NCXLS_M2L_MCL" presynapticPopulation="M2L" postsynapticPopulation="MCL" synapse="Acetylcholine">
      <connection id="65" preCellId="../M2L/0/M2L" postCellId="../MCL/0/MCL" preSegmentId="5" postSegmentId="2" preFractionAlong="0.20126378813447243" postFractionAlong="0.8902366217957709"/>
    </projection>
    <projection id="NCXLS_M2L_I1R" presynapticPopulation="M2L" postsynapticPopulation="I1R" synapse="Acetylcholine">
      <connection id="66" preCellId="../M2L/0/M2L" postCellId="../I1R/0/I1R" preSegmentId="4" postSegmentId="2" preFractionAlong="0.5020081977391821" postFractionAlong="0.5831278234528693"/>
    </projection>
    <projection id="NCXLS_M2L_I4" presynapticPopulation="M2L" postsynapticPopulation="I4" synapse="Acetylcholine">
      <connection id="67" preCellId="../M2L/0/M2L" postCellId="../I4/0/I4" preSegmentId="9" postSegmentId="5" preFractionAlong="0.8726258854858964" postFractionAlong="0.08710928946143404"/>
    </projection>
    <projection id="NCXLS_M2L_MCR" presynapticPopulation="M2L" postsynapticPopulation="MCR" synapse="Acetylcholine">
      <connection id="68" preCellId="../M2L/0/M2L" postCellId="../MCR/0/MCR" preSegmentId="9" postSegmentId="1" preFractionAlong="0.44485243282754083" postFractionAlong="0.4890484004492832"/>
    </projection>
    <projection id="NCXLS_M2L_I3" presynapticPopulation="M2L" postsynapticPopulation="I3" synapse="Acetylcholine">
      <connection id="69" preCellId="../M2L/0/M2L" postCellId="../I3/0/I3" preSegmentId="2" postSegmentId="1" preFractionAlong="0.9095484730121384" postFractionAlong="0.5689554832818507"/>
    </projection>
    <projection id="NCXLS_M2L_I2L" presynapticPopulation="M2L" postsynapticPopulation="I2L" synapse="Acetylcholine">
      <connection id="70" preCellId="../M2L/0/M2L" postCellId="../I2L/0/I2L" preSegmentId="1" postSegmentId="1" preFractionAlong="0.31219188378638796" postFractionAlong="0.7251111599333161"/>
    </projection>
    <projection id="NCXLS_M2L_M3L" presynapticPopulation="M2L" postsynapticPopulation="M3L" synapse="Glutamate">
      <connection id="71" preCellId="../M2L/0/M2L" postCellId="../M3L/0/M3L" preSegmentId="1" postSegmentId="7" preFractionAlong="0.832937392318661" postFractionAlong="0.9857682495857412"/>
    </projection>
    <electricalProjection id="NCXLS_M2L_M4_GJ" presynapticPopulation="M2L" postsynapticPopulation="M4">
      <electricalConnection id="72" preCell="0" postCell="0" synapse="Generic_GJ" preSegment="4" postSegment="5" preFractionAlong="0.6013840706885634" postFractionAlong="0.3392202983917838"/>
    </electricalProjection>
    <projection id="NCXLS_M2L_M2R" presynapticPopulation="M2L" postsynapticPopulation="M2R" synapse="Acetylcholine">
      <connection id="73" preCellId="../M2L/0/M2L" postCellId="../M2R/0/M2R" preSegmentId="4" postSegmentId="8" preFractionAlong="0.8450396488966425" postFractionAlong="0.39505333785679597"/>
    </projection>
    <projection id="NCXLS_M2L_M5" presynapticPopulation="M2L" postsynapticPopulation="M5" synapse="Acetylcholine">
      <connection id="74" preCellId="../M2L/0/M2L" postCellId="../M5/0/M5" preSegmentId="1" postSegmentId="9" preFractionAlong="0.4018762712367395" postFractionAlong="0.6737562297840898"/>
    </projection>
    <projection id="NCXLS_M2L_NSMR" presynapticPopulation="M2L" postsynapticPopulation="NSMR" synapse="Acetylcholine">
      <connection id="75" preCellId="../M2L/0/M2L" postCellId="../NSMR/0/NSMR" preSegmentId="8" postSegmentId="7" preFractionAlong="0.3569824294686639" postFractionAlong="0.6347441411040295"/>
    </projection>
    <projection id="NCXLS_M2L_I2R" presynapticPopulation="M2L" postsynapticPopulation="I2R" synapse="Acetylcholine">
      <connection id="76" preCellId="../M2L/0/M2L" postCellId="../I2R/0/I2R" preSegmentId="7" postSegmentId="9" preFractionAlong="0.21912606467080087" postFractionAlong="0.11284318718362141"/>
    </projection>
    <projection id="NCXLS_M2L_I1L" presynapticPopulation="M2L" postsynapticPopulation="I1L" synapse="Acetylcholine">
      <connection id="77" preCellId="../M2L/0/M2L" postCellId="../I1L/0/I1L" preSegmentId="7" postSegmentId="1" preFractionAlong="0.7486087085818324" postFractionAlong="0.4826012356615207"/>
    </projection>
    <projection id="NCXLS_M2L_M3R" presynapticPopulation="M2L" postsynapticPopulation="M3R" synapse="Glutamate">
      <connection id="78" preCellId="../M2L/0/M2L" postCellId="../M3R/0/M3R" preSegmentId="3" postSegmentId="4" preFractionAlong="0.5313568317526952" postFractionAlong="0.39577767966043076"/>
    </projection>
    <projection id="NCXLS_M2L_MI" presynapticPopulation="M2L" postsynapticPopulation="MI" synapse="Acetylcholine">
      <connection id="79" preCellId="../M2L/0/M2L" postCellId="../MI/0/MI" preSegmentId="2" postSegmentId="1" preFractionAlong="0.8979552161850192" postFractionAlong="0.5250493402453846"/>
    </projection>
    <projection id="NCXLS_NSMR_I4" presynapticPopulation="NSMR" postsynapticPopulation="I4" synapse="Serotonin_Glutamate">
      <connection id="80" preCellId="../NSMR/0/NSMR" postCellId="../I4/0/I4" preSegmentId="8" postSegmentId="2" preFractionAlong="0.6667315298575898" postFractionAlong="0.5109707430450621"/>
    </projection>
    <projection id="NCXLS_NSMR_MCR" presynapticPopulation="NSMR" postsynapticPopulation="MCR" synapse="Serotonin_Glutamate">
      <connection id="81" preCellId="../NSMR/0/NSMR" postCellId="../MCR/0/MCR" preSegmentId="4" postSegmentId="8" preFractionAlong="0.03926505164866023" postFractionAlong="0.9772838231769293"/>
    </projection>
    <projection id="NCXLS_NSMR_M4" presynapticPopulation="NSMR" postsynapticPopulation="M4" synapse="Serotonin_Glutamate">
      <connection id="82" preCellId="../NSMR/0/NSMR" postCellId="../M4/0/M4" preSegmentId="7" postSegmentId="1" preFractionAlong="0.8390996987996115" postFractionAlong="0.5506604592365643"/>
    </projection>
    <projection id="NCXLS_NSMR_I2R" presynapticPopulation="NSMR" postsynapticPopulation="I2R" synapse="Serotonin_Glutamate">
      <connection id="83" preCellId="../NSMR/0/NSMR" postCellId="../I2R/0/I2R" preSegmentId="4" postSegmentId="4" preFractionAlong="0.7281164373361664" postFractionAlong="0.600251410099583"/>
    </projection>
    <electricalProjection id="NCXLS_NSMR_MI_GJ" presynapticPopulation="NSMR" postsynapticPopulation="MI">
      <electricalConnection id="84" preCell="0" postCell="0" synapse="Generic_GJ" preSegment="8" postSegment="2" preFractionAlong="0.8555511234358725" postFractionAlong="0.41829111109348593"/>
    </electricalProjection>
    <projection id="NCXLS_M3R_M1" presynapticPopulation="M3R" postsynapticPopulation="M1" synapse="Acetylcholine">
      <connection id="85" preCellId="../M3R/0/M3R" postCellId="../M1/0/M1" preSegmentId="3" postSegmentId="2" preFractionAlong="0.9367245558534901" postFractionAlong="0.5156765510770731"/>
    </projection>
    <projection id="NCXLS_M3R_MCL" presynapticPopulation="M3R" postsynapticPopulation="MCL" synapse="Acetylcholine">
      <connection id="86" preCellId="../M3R/0/M3R" postCellId="../MCL/0/MCL" preSegmentId="4" postSegmentId="6" preFractionAlong="0.10815501457335674" postFractionAlong="0.8421068624835116"/>
    </projection>
    <projection id="NCXLS_M3R_NSML" presynapticPopulation="M3R" postsynapticPopulation="NSML" synapse="Acetylcholine">
      <connection id="87" preCellId="../M3R/0/M3R" postCellId="../NSML/0/NSML" preSegmentId="6" postSegmentId="5" preFractionAlong="0.3936355202774421" postFractionAlong="0.4734356593750214"/>
    </projection>
    <projection id="NCXLS_M3R_I2L" presynapticPopulation="M3R" postsynapticPopulation="I2L" synapse="Acetylcholine">
      <connection id="88" preCellId="../M3R/0/M3R" postCellId="../I2L/0/I2L" preSegmentId="3" postSegmentId="6" preFractionAlong="0.20699360124505817" postFractionAlong="0.8514057478914739"/>
    </projection>
    <projection id="NCXLS_M3R_I5" presynapticPopulation="M3R" postsynapticPopulation="I5" synapse="Acetylcholine">
      <connection id="89" preCellId="../M3R/0/M3R" postCellId="../I5/0/I5" preSegmentId="5" postSegmentId="7" preFractionAlong="0.8475476330547363" postFractionAlong="0.18181765283733875"/>
    </projection>
    <projection id="NCXLS_M3R_M2R" presynapticPopulation="M3R" postsynapticPopulation="M2R" synapse="Acetylcholine">
      <connection id="90" preCellId="../M3R/0/M3R" postCellId="../M2R/0/M2R" preSegmentId="3" postSegmentId="5" preFractionAlong="0.7066041289942178" postFractionAlong="0.5353477680616567"/>
    </projection>
    <projection id="NCXLS_M3R_M5" presynapticPopulation="M3R" postsynapticPopulation="M5" synapse="Acetylcholine">
      <connection id="91" preCellId="../M3R/0/M3R" postCellId="../M5/0/M5" preSegmentId="3" postSegmentId="6" preFractionAlong="0.21174586205241952" postFractionAlong="0.04149732550990637"/>
    </projection>
    <electricalProjection id="NCXLS_M3R_M2L_GJ" presynapticPopulation="M3R" postsynapticPopulation="M2L">
      <electricalConnection id="92" preCell="0" postCell="0" synapse="Generic_GJ" preSegment="5" postSegment="9" preFractionAlong="0.559744661333675" postFractionAlong="0.8579349139973288"/>
    </electricalProjection>
    <projection id="NCXLS_M3R_I6" presynapticPopulation="M3R" postsynapticPopulation="I6" synapse="Acetylcholine">
      <connection id="93" preCellId="../M3R/0/M3R" postCellId="../I6/0/I6" preSegmentId="8" postSegmentId="3" preFractionAlong="0.3062678870046147" postFractionAlong="0.2650812843385726"/>
    </projection>
    <projection id="NCXLS_M3R_I1L" presynapticPopulation="M3R" postsynapticPopulation="I1L" synapse="Acetylcholine">
      <connection id="94" preCellId="../M3R/0/M3R" postCellId="../I1L/0/I1L" preSegmentId="6" postSegmentId="7" preFractionAlong="0.2589042747931396" postFractionAlong="0.052826686364721986"/>
    </projection>
    <projection id="NCXLS_MI_MCR" presynapticPopulation="MI" postsynapticPopulation="MCR" synapse="Serotonin_Glutamate">
      <connection id="95" preCellId="../MI/0/MI" postCellId="../MCR/0/MCR" preSegmentId="1" postSegmentId="1" preFractionAlong="0.7918913237957292" postFractionAlong="0.8115720043515481"/>
    </projection>
    <projection id="NCXLS_MI_M4" presynapticPopulation="MI" postsynapticPopulation="M4" synapse="Glutamate">
      <connection id="96" preCellId="../MI/0/MI" postCellId="../M4/0/M4" preSegmentId="1" postSegmentId="7" preFractionAlong="0.600583196987136" postFractionAlong="0.16625533034970064"/>
    </projection>
    <projection id="NCXLS_MI_I2R" presynapticPopulation="MI" postsynapticPopulation="I2R" synapse="Acetylcholine">
      <connection id="97" preCellId="../MI/0/MI" postCellId="../I2R/0/I2R" preSegmentId="5" postSegmentId="6" preFractionAlong="0.8983552751676653" postFractionAlong="0.5826861465545828"/>
    </projection>
    <projection id="NC_I1L_RMDDL" presynapticPopulation="I1L" postsynapticPopulation="RMDDL" synapse="Acetylcholine">
      <connection id="1000" preCellId="../I1L/0/I1L" postCellId="../RMDDL/0/RMDDL" preSegmentId="3" postSegmentId="2" preFractionAlong="0.12141490550497214" postFractionAlong="0.7211323573568237"/>
    </projection>
    <projection id="NC_I1L_RMDVL" presynapticPopulation="I1L" postsynapticPopulation="RMDVL" synapse="Acetylcholine">
      <connection id="1001" preCellId="../I1L/0/I1L" postCellId="../RMDVL/0/RMDVL" preSegmentId="6" postSegmentId="8" preFractionAlong="0.32838549961660535" postFractionAlong="0.4872120069219139"/>
    </projection>
    <projection id="NC_I1R_RMDDR" presynapticPopulation="I1R" postsynapticPopulation="RMDDR" synapse="Acetylcholine">
      <connection id="1002" preCellId="../I1R/0/I1R" postCellId="../RMDDR/0/RMDDR" preSegmentId="9" postSegmentId="9" preFractionAlong="0.40788960850728007" postFractionAlong="0.27963631849320625"/>
    </projection>
    <projection id="NC_I1R_RMDVR" presynapticPopulation="I1R" postsynapticPopulation="RMDVR" synapse="Acetylcholine">
      <connection id="1003" preCellId="../I1R/0/I1R" postCellId="../RMDVR/0/RMDVR" preSegmentId="5" postSegmentId="4" preFractionAlong="0.19755590567847825" postFractionAlong="0.8051743973603768"/>
    </projection>
    <projection id="NC_I2L_URXL" presynapticPopulation="I2L" postsynapticPopulation="URXL" synapse="Glutamate">
      <connection id="1004" preCellId="../I2L/0/I2L" postCellId="../URXL/0/URXL" preSegmentId="8" postSegmentId="4" preFractionAlong="0.08496628988946642" postFractionAlong="0.43624602635715737"/>
    </projection>
    <projection id="NC_I2R_URXR" presynapticPopulation="I2R" postsynapticPopulation="URXR" synapse="Glutamate">
      <connection id="1005" preCellId="../I2R/0/I2R" postCellId="../URXR/0/URXR" preSegmentId="6" postSegmentId="2" preFractionAlong="0.2767541319513086" postFractionAlong="0.5581711838904407"/>
    </projection>
    <projection id="NC_AVKL_I1L" presynapticPopulation="AVKL" postsynapticPopulation="I1L" synapse="Acetylcholine">
      <connection id="1006" preCellId="../AVKL/0/AVKL" postCellId="../I1L/0/I1L" preSegmentId="2" postSegmentId="7" preFractionAlong="0.8934047290879871" postFractionAlong="0.38783426957109435"/>
    </projection>
    <projection id="NC_AVKR_I1R" presynapticPopulation="AVKR" postsynapticPopulation="I1R" synapse="Acetylcholine">
      <connection id="1007" preCellId="../AVKR/0/AVKR" postCellId="../I1R/0/I1R" preSegmentId="9" postSegmentId="1" preFractionAlong="0.7246962542618245" postFractionAlong="0.8364155965798566"/>
    </projection>
    <projection id="NC_RIS_I1L" presynapticPopulation="RIS" postsynapticPopulation="I1L" synapse="Glutamate">
      <connection id="1008" preCellId="../RIS/0/RIS" postCellId="../I1L/0/I1L" preSegmentId="6" postSegmentId="7" preFractionAlong="0.04093394437434539" postFractionAlong="0.049661491459718876"/>
    </projection>
    <projection id="NC_RIS_I1R" presynapticPopulation="RIS" postsynapticPopulation="I1R" synapse="Glutamate">
      <connection id="1009" preCellId="../RIS/0/RIS" postCellId="../I1R/0/I1R" preSegmentId="3" postSegmentId="2" preFractionAlong="0.06310636911554623" postFractionAlong="0.3246091685101615"/>
    </projection>
    <projection id="NC_AVAL_I2L" presynapticPopulation="AVAL" postsynapticPopulation="I2L" synapse="Acetylcholine">
      <connection id="1010" preCellId="../AVAL/0/AVAL" postCellId="../I2L/0/I2L" preSegmentId="8" postSegmentId="8" preFractionAlong="0.33726689605422633" postFractionAlong="0.17959978144009592"/>
    </projection>
    <projection id="NC_AVAR_I2R" presynapticPopulation="AVAR" postsynapticPopulation="I2R" synapse="Acetylcholine">
      <connection id="1011" preCellId="../AVAR/0/AVAR" postCellId="../I2R/0/I2R" preSegmentId="9" postSegmentId="7" preFractionAlong="0.4834980851068038" postFractionAlong="0.42914949195832186"/>
    </projection>
    <projection id="NC_SMBVL_I4" presynapticPopulation="SMBVL" postsynapticPopulation="I4" synapse="Acetylcholine">
      <connection id="1012" preCellId="../SMBVL/0/SMBVL" postCellId="../I4/0/I4" preSegmentId="8" postSegmentId="9" preFractionAlong="0.4568178045561352" postFractionAlong="0.8456673490987714"/>
    </projection>
    <projection id="NC_SMBVR_I4" presynapticPopulation="SMBVR" postsynapticPopulation="I4" synapse="Acetylcholine">
      <connection id="1013" preCellId="../SMBVR/0/SMBVR" postCellId="../I4/0/I4" preSegmentId="9" postSegmentId="4" preFractionAlong="0.3779940386261531" postFractionAlong="0.9811815587938422"/>
    </projection>
  </network>
</neuroml>
