<?xml version='1.0' encoding='UTF-8'?>
<neuroml xmlns="http://www.neuroml.org/schema/neuroml2" xmlns:xsi="http://www.w3.org/2001/XMLSchema-instance" xsi:schemaLocation="http://www.neuroml.org/schema/neuroml2 https://raw.githubusercontent.com/NeuroML/NeuroML2/development/Schemas/NeuroML2/NeuroML_v2beta4.xsd" id="gvft_network_bio_prior_lamW_0_189_DF_0_033_t30_net">
  <notes>NeuroML2 network generated from GVFT simulation on 2025-05-05 09:27:59
</notes>
  <include href="AVAL.cell.nml"/>
  <include href="AVAR.cell.nml"/>
  <include href="AVKL.cell.nml"/>
  <include href="AVKR.cell.nml"/>
  <include href="RIS.cell.nml"/>
  <include href="RMDDL.cell.nml"/>
  <include href="RMDDR.cell.nml"/>
  <include href="RMDVL.cell.nml"/>
  <include href="RMDVR.cell.nml"/>
  <include href="SMBVL.cell.nml"/>
  <include href="SMBVR.cell.nml"/>
  <include href="URXL.cell.nml"/>
  <include href="URXR.cell.nml"/>
  <include href="MCL.cell.nml"/>
  <include href="I4.cell.nml"/>
  <include href="M5.cell.nml"/>
  <include href="I1L.cell.nml"/>
  <include href="NSMR.cell.nml"/>
  <include href="NSML.cell.nml"/>
  <include href="I2R.cell.nml"/>
  <include href="M4.cell.nml"/>
  <include href="MCR.cell.nml"/>
  <include href="M3R.cell.nml"/>
  <include href="I6.cell.nml"/>
  <include href="MI.cell.nml"/>
  <include href="I2L.cell.nml"/>
  <include href="I3.cell.nml"/>
  <include href="M2R.cell.nml"/>
  <include href="M3L.cell.nml"/>
  <include href="I1R.cell.nml"/>
  <include href="M1.cell.nml"/>
  <include href="I5.cell.nml"/>
  <include href="M2L.cell.nml"/>
  <include href="Glutamate.synapse.nml"/>
  <include href="Acetylcholine.synapse.nml"/>
  <include href="Serotonin_Glutamate.synapse.nml"/>
  <include href="Generic_GJ.nml"/>
  <network id="gvft_network_bio_prior_lamW_0_189_DF_0_033_t30_net" type="networkWithTemperature" temperature="20.0 degC">
    <population id="M1" component="M1" type="populationList" size="1">
      <instance id="0">
        <location x="0.55778897" y="-0.9798995" z="0.0"/>
      </instance>
    </population>
    <population id="M2L" component="M2L" type="populationList" size="1">
      <instance id="0">
        <location x="0.20603016" y="-0.72864324" z="0.0"/>
      </instance>
    </population>
    <population id="M2R" component="M2R" type="populationList" size="1">
      <instance id="0">
        <location x="-0.095477395" y="0.08542714" z="0.0"/>
      </instance>
    </population>
    <population id="M3L" component="M3L" type="populationList" size="1">
      <instance id="0">
        <location x="0.49748746" y="0.47738695" z="0.0"/>
      </instance>
    </population>
    <population id="M3R" component="M3R" type="populationList" size="1">
      <instance id="0">
        <location x="-0.16582915" y="-0.7889447" z="0.0"/>
      </instance>
    </population>
    <population id="M4" component="M4" type="populationList" size="1">
      <instance id="0">
        <location x="0.8291457" y="0.03517589" z="0.0"/>
      </instance>
    </population>
    <population id="M5" component="M5" type="populationList" size="1">
      <instance id="0">
        <location x="0.055276394" y="-0.45728645" z="0.0"/>
      </instance>
    </population>
    <population id="I1L" component="I1L" type="populationList" size="1">
      <instance id="0">
        <location x="-0.015075387" y="-0.9798995" z="0.0"/>
      </instance>
    </population>
    <population id="I1R" component="I1R" type="populationList" size="1">
      <instance id="0">
        <location x="0.41708544" y="0.30653268" z="0.0"/>
      </instance>
    </population>
    <population id="I2L" component="I2L" type="populationList" size="1">
      <instance id="0">
        <location x="-0.57788944" y="0.095477395" z="0.0"/>
      </instance>
    </population>
    <population id="I2R" component="I2R" type="populationList" size="1">
      <instance id="0">
        <location x="-0.8492462" y="0.7889447" z="0.0"/>
      </instance>
    </population>
    <population id="I3" component="I3" type="populationList" size="1">
      <instance id="0">
        <location x="0.79899496" y="0.879397" z="0.0"/>
      </instance>
    </population>
    <population id="I4" component="I4" type="populationList" size="1">
      <instance id="0">
        <location x="-0.5678392" y="0.43718594" z="0.0"/>
      </instance>
    </population>
    <population id="I5" component="I5" type="populationList" size="1">
      <instance id="0">
        <location x="0.6281407" y="0.6080402" z="0.0"/>
      </instance>
    </population>
    <population id="I6" component="I6" type="populationList" size="1">
      <instance id="0">
        <location x="0.28643218" y="-0.879397" z="0.0"/>
      </instance>
    </population>
    <population id="MCL" component="MCL" type="populationList" size="1">
      <instance id="0">
        <location x="-0.04522614" y="-0.6080402" z="0.0"/>
      </instance>
    </population>
    <population id="MCR" component="MCR" type="populationList" size="1">
      <instance id="0">
        <location x="-0.0753769" y="-0.22613066" z="0.0"/>
      </instance>
    </population>
    <population id="MI" component="MI" type="populationList" size="1">
      <instance id="0">
        <location x="0.44723618" y="-0.2763819" z="0.0"/>
      </instance>
    </population>
    <population id="NSML" component="NSML" type="populationList" size="1">
      <instance id="0">
        <location x="0.8492462" y="-0.33668342" z="0.0"/>
      </instance>
    </population>
    <population id="NSMR" component="NSMR" type="populationList" size="1">
      <instance id="0">
        <location x="0.14572865" y="-0.8592965" z="0.0"/>
      </instance>
    </population>
    <population id="AVAL" component="AVAL" type="populationList" size="1">
      <instance id="0">
        <location x="5.0" y="0.0" z="0.0"/>
      </instance>
    </population>
    <population id="AVAR" component="AVAR" type="populationList" size="1">
      <instance id="0">
        <location x="5.0" y="0.0" z="0.0"/>
      </instance>
    </population>
    <population id="AVKL" component="AVKL" type="populationList" size="1">
      <instance id="0">
        <location x="5.0" y="0.0" z="0.0"/>
      </instance>
    </population>
    <population id="AVKR" component="AVKR" type="populationList" size="1">
      <instance id="0">
        <location x="5.0" y="0.0" z="0.0"/>
      </instance>
    </population>
    <population id="RIS" component="RIS" type="populationList" size="1">
      <instance id="0">
        <location x="5.0" y="0.0" z="0.0"/>
      </instance>
    </population>
    <population id="RMDDL" component="RMDDL" type="populationList" size="1">
      <instance id="0">
        <location x="5.0" y="0.0" z="0.0"/>
      </instance>
    </population>
    <population id="RMDDR" component="RMDDR" type="populationList" size="1">
      <instance id="0">
        <location x="5.0" y="0.0" z="0.0"/>
      </instance>
    </population>
    <population id="RMDVL" component="RMDVL" type="populationList" size="1">
      <instance id="0">
        <location x="5.0" y="0.0" z="0.0"/>
      </instance>
    </population>
    <population id="RMDVR" component="RMDVR" type="populationList" size="1">
      <instance id="0">
        <location x="5.0" y="0.0" z="0.0"/>
      </instance>
    </population>
    <population id="SMBVL" component="SMBVL" type="populationList" size="1">
      <instance id="0">
        <location x="5.0" y="0.0" z="0.0"/>
      </instance>
    </population>
    <population id="SMBVR" component="SMBVR" type="populationList" size="1">
      <instance id="0">
        <location x="5.0" y="0.0" z="0.0"/>
      </instance>
    </population>
    <population id="URXL" component="URXL" type="populationList" size="1">
      <instance id="0">
        <location x="5.0" y="0.0" z="0.0"/>
      </instance>
    </population>
    <population id="URXR" component="URXR" type="populationList" size="1">
      <instance id="0">
        <location x="5.0" y="0.0" z="0.0"/>
      </instance>
    </population>
    <projection id="NCXLS_NSML_I1L" presynapticPopulation="NSML" postsynapticPopulation="I1L" synapse="Serotonin_Glutamate">
      <connection id="0" preCellId="../NSML/0/NSML" postCellId="../I1L/0/I1L" preSegmentId="4" postSegmentId="8" preFractionAlong="0.4678323393717424" postFractionAlong="0.20962988795134618"/>
    </projection>
    <projection id="NCXLS_NSML_I6" presynapticPopulation="NSML" postsynapticPopulation="I6" synapse="Serotonin_Glutamate">
      <connection id="1" preCellId="../NSML/0/NSML" postCellId="../I6/0/I6" preSegmentId="4" postSegmentId="1" preFractionAlong="0.24994108461855935" postFractionAlong="0.8166223661523051"/>
    </projection>
    <projection id="NCXLS_NSML_NSMR" presynapticPopulation="NSML" postsynapticPopulation="NSMR" synapse="Serotonin_Glutamate">
      <connection id="2" preCellId="../NSML/0/NSML" postCellId="../NSMR/0/NSMR" preSegmentId="4" postSegmentId="6" preFractionAlong="0.9666976167943213" postFractionAlong="0.2818509585194898"/>
    </projection>
    <projection id="NCXLS_NSML_M2L" presynapticPopulation="NSML" postsynapticPopulation="M2L" synapse="Serotonin_Glutamate">
      <connection id="3" preCellId="../NSML/0/NSML" postCellId="../M2L/0/M2L" preSegmentId="9" postSegmentId="8" preFractionAlong="0.9934167051071289" postFractionAlong="0.8810943963834458"/>
    </projection>
    <projection id="NCXLS_NSML_M1" presynapticPopulation="NSML" postsynapticPopulation="M1" synapse="Serotonin_Glutamate">
      <connection id="4" preCellId="../NSML/0/NSML" postCellId="../M1/0/M1" preSegmentId="3" postSegmentId="8" preFractionAlong="0.9903745229672121" postFractionAlong="0.7013698617326146"/>
    </projection>
    <projection id="NCXLS_I6_I1L" presynapticPopulation="I6" postsynapticPopulation="I1L" synapse="Acetylcholine">
      <connection id="5" preCellId="../I6/0/I6" postCellId="../I1L/0/I1L" preSegmentId="1" postSegmentId="5" preFractionAlong="0.32501382202250084" postFractionAlong="0.5338510392923871"/>
    </projection>
    <projection id="NCXLS_I6_M1" presynapticPopulation="I6" postsynapticPopulation="M1" synapse="Acetylcholine">
      <connection id="6" preCellId="../I6/0/I6" postCellId="../M1/0/M1" preSegmentId="2" postSegmentId="2" preFractionAlong="0.20290579555517785" postFractionAlong="0.9126791529118726"/>
    </projection>
    <projection id="NCXLS_M4_I2R" presynapticPopulation="M4" postsynapticPopulation="I2R" synapse="Acetylcholine">
      <connection id="7" preCellId="../M4/0/M4" postCellId="../I2R/0/I2R" preSegmentId="4" postSegmentId="6" preFractionAlong="0.6251618113680982" postFractionAlong="0.9041956360677682"/>
    </projection>
    <projection id="NCXLS_M4_I3" presynapticPopulation="M4" postsynapticPopulation="I3" synapse="Acetylcholine">
      <connection id="8" preCellId="../M4/0/M4" postCellId="../I3/0/I3" preSegmentId="9" postSegmentId="2" preFractionAlong="0.532632744028782" postFractionAlong="0.2243026268249746"/>
    </projection>
    <projection id="NCXLS_M4_I4" presynapticPopulation="M4" postsynapticPopulation="I4" synapse="Acetylcholine">
      <connection id="9" preCellId="../M4/0/M4" postCellId="../I4/0/I4" preSegmentId="4" postSegmentId="1" preFractionAlong="0.4113169986071701" postFractionAlong="0.6834731397737456"/>
    </projection>
    <projection id="NCXLS_M4_M3L" presynapticPopulation="M4" postsynapticPopulation="M3L" synapse="Acetylcholine">
      <connection id="10" preCellId="../M4/0/M4" postCellId="../M3L/0/M3L" preSegmentId="2" postSegmentId="4" preFractionAlong="0.5154224480069131" postFractionAlong="0.466119419267759"/>
    </projection>
    <projection id="NCXLS_M4_M2R" presynapticPopulation="M4" postsynapticPopulation="M2R" synapse="Glutamate">
      <connection id="11" preCellId="../M4/0/M4" postCellId="../M2R/0/M2R" preSegmentId="1" postSegmentId="2" preFractionAlong="0.33568544147991564" postFractionAlong="0.7605429846558067"/>
    </projection>
    <projection id="NCXLS_M4_I5" presynapticPopulation="M4" postsynapticPopulation="I5" synapse="Acetylcholine">
      <connection id="12" preCellId="../M4/0/M4" postCellId="../I5/0/I5" preSegmentId="4" postSegmentId="9" preFractionAlong="0.6775652257748761" postFractionAlong="0.10288624532205115"/>
    </projection>
    <projection id="NCXLS_M4_I1R" presynapticPopulation="M4" postsynapticPopulation="I1R" synapse="Acetylcholine">
      <connection id="13" preCellId="../M4/0/M4" postCellId="../I1R/0/I1R" preSegmentId="1" postSegmentId="3" preFractionAlong="0.8717390879121647" postFractionAlong="0.5109769156255564"/>
    </projection>
    <projection id="NCXLS_M4_MCR" presynapticPopulation="M4" postsynapticPopulation="MCR" synapse="Acetylcholine">
      <connection id="14" preCellId="../M4/0/M4" postCellId="../MCR/0/MCR" preSegmentId="5" postSegmentId="2" preFractionAlong="0.06944782605440092" postFractionAlong="0.5958348969007224"/>
    </projection>
    <projection id="NCXLS_M4_I2L" presynapticPopulation="M4" postsynapticPopulation="I2L" synapse="Acetylcholine">
      <connection id="15" preCellId="../M4/0/M4" postCellId="../I2L/0/I2L" preSegmentId="2" postSegmentId="3" preFractionAlong="0.32498740955708616" postFractionAlong="0.932292575873167"/>
    </projection>
    <projection id="NCXLS_NSMR_I1L" presynapticPopulation="NSMR" postsynapticPopulation="I1L" synapse="Serotonin_Glutamate">
      <connection id="16" preCellId="../NSMR/0/NSMR" postCellId="../I1L/0/I1L" preSegmentId="5" postSegmentId="3" preFractionAlong="0.9398266426442479" postFractionAlong="0.25013395714924425"/>
    </projection>
    <projection id="NCXLS_NSMR_I6" presynapticPopulation="NSMR" postsynapticPopulation="I6" synapse="Serotonin_Glutamate">
      <connection id="17" preCellId="../NSMR/0/NSMR" postCellId="../I6/0/I6" preSegmentId="9" postSegmentId="8" preFractionAlong="0.6284074964385535" postFractionAlong="0.7616269727892948"/>
    </projection>
    <projection id="NCXLS_NSMR_M1" presynapticPopulation="NSMR" postsynapticPopulation="M1" synapse="Serotonin_Glutamate">
      <connection id="18" preCellId="../NSMR/0/NSMR" postCellId="../M1/0/M1" preSegmentId="1" postSegmentId="4" preFractionAlong="0.368358247281912" postFractionAlong="0.9623394230171654"/>
    </projection>
    <projection id="NCXLS_M3R_I2R" presynapticPopulation="M3R" postsynapticPopulation="I2R" synapse="Acetylcholine">
      <connection id="19" preCellId="../M3R/0/M3R" postCellId="../I2R/0/I2R" preSegmentId="4" postSegmentId="9" preFractionAlong="0.8906403175312186" postFractionAlong="0.3748336985771594"/>
    </projection>
    <projection id="NCXLS_M3R_I3" presynapticPopulation="M3R" postsynapticPopulation="I3" synapse="Acetylcholine">
      <connection id="20" preCellId="../M3R/0/M3R" postCellId="../I3/0/I3" preSegmentId="6" postSegmentId="4" preFractionAlong="0.025409238379578203" postFractionAlong="0.3358498680900046"/>
    </projection>
    <projection id="NCXLS_M3R_I4" presynapticPopulation="M3R" postsynapticPopulation="I4" synapse="Acetylcholine">
      <connection id="21" preCellId="../M3R/0/M3R" postCellId="../I4/0/I4" preSegmentId="6" postSegmentId="7" preFractionAlong="0.1474839747372675" postFractionAlong="0.5476682345123464"/>
    </projection>
    <projection id="NCXLS_M3R_MI" presynapticPopulation="M3R" postsynapticPopulation="MI" synapse="Acetylcholine">
      <connection id="22" preCellId="../M3R/0/M3R" postCellId="../MI/0/MI" preSegmentId="7" postSegmentId="9" preFractionAlong="0.9355655602022196" postFractionAlong="0.7846399144689324"/>
    </projection>
    <projection id="NCXLS_M3R_MCL" presynapticPopulation="M3R" postsynapticPopulation="MCL" synapse="Acetylcholine">
      <connection id="23" preCellId="../M3R/0/M3R" postCellId="../MCL/0/MCL" preSegmentId="8" postSegmentId="7" preFractionAlong="0.6658456035860639" postFractionAlong="0.18089937202436612"/>
    </projection>
    <projection id="NCXLS_M3R_M3L" presynapticPopulation="M3R" postsynapticPopulation="M3L" synapse="Glutamate">
      <connection id="24" preCellId="../M3R/0/M3R" postCellId="../M3L/0/M3L" preSegmentId="3" postSegmentId="5" preFractionAlong="0.7367605947320999" postFractionAlong="0.01671109373772628"/>
    </projection>
    <projection id="NCXLS_M3R_I5" presynapticPopulation="M3R" postsynapticPopulation="I5" synapse="Acetylcholine">
      <connection id="25" preCellId="../M3R/0/M3R" postCellId="../I5/0/I5" preSegmentId="7" postSegmentId="1" preFractionAlong="0.6146466324829039" postFractionAlong="0.689674201102843"/>
    </projection>
    <projection id="NCXLS_M3R_I1R" presynapticPopulation="M3R" postsynapticPopulation="I1R" synapse="Acetylcholine">
      <connection id="26" preCellId="../M3R/0/M3R" postCellId="../I1R/0/I1R" preSegmentId="4" postSegmentId="2" preFractionAlong="0.3849137719139506" postFractionAlong="0.10347922665377307"/>
    </projection>
    <projection id="NCXLS_M3R_MCR" presynapticPopulation="M3R" postsynapticPopulation="MCR" synapse="Acetylcholine">
      <connection id="27" preCellId="../M3R/0/M3R" postCellId="../MCR/0/MCR" preSegmentId="4" postSegmentId="7" preFractionAlong="0.9219276706303697" postFractionAlong="0.8874851867073358"/>
    </projection>
    <projection id="NCXLS_M3R_I2L" presynapticPopulation="M3R" postsynapticPopulation="I2L" synapse="Acetylcholine">
      <connection id="28" preCellId="../M3R/0/M3R" postCellId="../I2L/0/I2L" preSegmentId="7" postSegmentId="1" preFractionAlong="0.03830722199145098" postFractionAlong="0.048497368893938186"/>
    </projection>
    <projection id="NCXLS_M2L_NSML" presynapticPopulation="M2L" postsynapticPopulation="NSML" synapse="Acetylcholine">
      <connection id="29" preCellId="../M2L/0/M2L" postCellId="../NSML/0/NSML" preSegmentId="8" postSegmentId="8" preFractionAlong="0.6291222193389995" postFractionAlong="0.5841946353345618"/>
    </projection>
    <projection id="NCXLS_M2L_M4" presynapticPopulation="M2L" postsynapticPopulation="M4" synapse="Acetylcholine">
      <connection id="30" preCellId="../M2L/0/M2L" postCellId="../M4/0/M4" preSegmentId="2" postSegmentId="3" preFractionAlong="0.7172829719321067" postFractionAlong="0.019032253592738413"/>
    </projection>
    <projection id="NCXLS_M2L_I2R" presynapticPopulation="M2L" postsynapticPopulation="I2R" synapse="Acetylcholine">
      <connection id="31" preCellId="../M2L/0/M2L" postCellId="../I2R/0/I2R" preSegmentId="1" postSegmentId="3" preFractionAlong="0.07532004254455416" postFractionAlong="0.6409643959973319"/>
    </projection>
    <projection id="NCXLS_M2L_I3" presynapticPopulation="M2L" postsynapticPopulation="I3" synapse="Acetylcholine">
      <connection id="32" preCellId="../M2L/0/M2L" postCellId="../I3/0/I3" preSegmentId="3" postSegmentId="7" preFractionAlong="0.8170397786091792" postFractionAlong="0.6658565440578772"/>
    </projection>
    <projection id="NCXLS_M2L_I4" presynapticPopulation="M2L" postsynapticPopulation="I4" synapse="Acetylcholine">
      <connection id="33" preCellId="../M2L/0/M2L" postCellId="../I4/0/I4" preSegmentId="7" postSegmentId="8" preFractionAlong="0.5928632094935181" postFractionAlong="0.5158021016654792"/>
    </projection>
    <projection id="NCXLS_M2L_M3R" presynapticPopulation="M2L" postsynapticPopulation="M3R" synapse="Acetylcholine">
      <connection id="34" preCellId="../M2L/0/M2L" postCellId="../M3R/0/M3R" preSegmentId="8" postSegmentId="5" preFractionAlong="0.490460316009237" postFractionAlong="0.8359210861871572"/>
    </projection>
    <projection id="NCXLS_M2L_MI" presynapticPopulation="M2L" postsynapticPopulation="MI" synapse="Acetylcholine">
      <connection id="35" preCellId="../M2L/0/M2L" postCellId="../MI/0/MI" preSegmentId="9" postSegmentId="4" preFractionAlong="0.7948937497064975" postFractionAlong="0.6290575985596337"/>
    </projection>
    <projection id="NCXLS_M2L_MCL" presynapticPopulation="M2L" postsynapticPopulation="MCL" synapse="Acetylcholine">
      <connection id="36" preCellId="../M2L/0/M2L" postCellId="../MCL/0/MCL" preSegmentId="8" postSegmentId="2" preFractionAlong="0.9706208456868457" postFractionAlong="0.6956228028582475"/>
    </projection>
    <projection id="NCXLS_M2L_M3L" presynapticPopulation="M2L" postsynapticPopulation="M3L" synapse="Glutamate">
      <connection id="37" preCellId="../M2L/0/M2L" postCellId="../M3L/0/M3L" preSegmentId="9" postSegmentId="1" preFractionAlong="0.10247026632558398" postFractionAlong="0.28209307681563933"/>
    </projection>
    <projection id="NCXLS_M2L_M2R" presynapticPopulation="M2L" postsynapticPopulation="M2R" synapse="Acetylcholine">
      <connection id="38" preCellId="../M2L/0/M2L" postCellId="../M2R/0/M2R" preSegmentId="5" postSegmentId="4" preFractionAlong="0.9705786551976789" postFractionAlong="0.39505843451227507"/>
    </projection>
    <projection id="NCXLS_M2L_I5" presynapticPopulation="M2L" postsynapticPopulation="I5" synapse="Acetylcholine">
      <connection id="39" preCellId="../M2L/0/M2L" postCellId="../I5/0/I5" preSegmentId="1" postSegmentId="6" preFractionAlong="0.9711717690288483" postFractionAlong="0.9095626601275719"/>
    </projection>
    <projection id="NCXLS_M2L_I1R" presynapticPopulation="M2L" postsynapticPopulation="I1R" synapse="Acetylcholine">
      <connection id="40" preCellId="../M2L/0/M2L" postCellId="../I1R/0/I1R" preSegmentId="7" postSegmentId="7" preFractionAlong="0.7788972975820573" postFractionAlong="0.15369948375502596"/>
    </projection>
    <projection id="NCXLS_M2L_MCR" presynapticPopulation="M2L" postsynapticPopulation="MCR" synapse="Acetylcholine">
      <connection id="41" preCellId="../M2L/0/M2L" postCellId="../MCR/0/MCR" preSegmentId="8" postSegmentId="3" preFractionAlong="0.6921053978139172" postFractionAlong="0.2513189686263154"/>
    </projection>
    <projection id="NCXLS_M2L_I2L" presynapticPopulation="M2L" postsynapticPopulation="I2L" synapse="Acetylcholine">
      <connection id="42" preCellId="../M2L/0/M2L" postCellId="../I2L/0/I2L" preSegmentId="6" postSegmentId="8" preFractionAlong="0.8999665197961908" postFractionAlong="0.286112023227863"/>
    </projection>
    <projection id="NCXLS_M2L_M5" presynapticPopulation="M2L" postsynapticPopulation="M5" synapse="Acetylcholine">
      <connection id="43" preCellId="../M2L/0/M2L" postCellId="../M5/0/M5" preSegmentId="5" postSegmentId="5" preFractionAlong="0.9202625979949539" postFractionAlong="0.8055268624050334"/>
    </projection>
    <projection id="NCXLS_MI_M4" presynapticPopulation="MI" postsynapticPopulation="M4" synapse="Acetylcholine">
      <connection id="44" preCellId="../MI/0/MI" postCellId="../M4/0/M4" preSegmentId="9" postSegmentId="9" preFractionAlong="0.9130330980537907" postFractionAlong="0.07851121821074392"/>
    </projection>
    <projection id="NCXLS_MI_I3" presynapticPopulation="MI" postsynapticPopulation="I3" synapse="Serotonin_Glutamate">
      <connection id="45" preCellId="../MI/0/MI" postCellId="../I3/0/I3" preSegmentId="6" postSegmentId="4" preFractionAlong="0.547420051873056" postFractionAlong="0.6691974493788007"/>
    </projection>
    <projection id="NCXLS_MI_M3L" presynapticPopulation="MI" postsynapticPopulation="M3L" synapse="Acetylcholine">
      <connection id="46" preCellId="../MI/0/MI" postCellId="../M3L/0/M3L" preSegmentId="1" postSegmentId="2" preFractionAlong="0.034097861666753215" postFractionAlong="0.7627067232232837"/>
    </projection>
    <projection id="NCXLS_MI_I5" presynapticPopulation="MI" postsynapticPopulation="I5" synapse="Glutamate">
      <connection id="47" preCellId="../MI/0/MI" postCellId="../I5/0/I5" preSegmentId="4" postSegmentId="5" preFractionAlong="0.15096499313029488" postFractionAlong="0.8235742773513072"/>
    </projection>
    <projection id="NCXLS_MI_I1R" presynapticPopulation="MI" postsynapticPopulation="I1R" synapse="Acetylcholine">
      <connection id="48" preCellId="../MI/0/MI" postCellId="../I1R/0/I1R" preSegmentId="5" postSegmentId="4" preFractionAlong="0.375375164840385" postFractionAlong="0.7097352778996852"/>
    </projection>
    <projection id="NCXLS_MCL_I1L" presynapticPopulation="MCL" postsynapticPopulation="I1L" synapse="Acetylcholine">
      <connection id="49" preCellId="../MCL/0/MCL" postCellId="../I1L/0/I1L" preSegmentId="8" postSegmentId="4" preFractionAlong="0.21175151373079615" postFractionAlong="0.9016501768797186"/>
    </projection>
    <projection id="NCXLS_MCL_I6" presynapticPopulation="MCL" postsynapticPopulation="I6" synapse="Acetylcholine">
      <connection id="50" preCellId="../MCL/0/MCL" postCellId="../I6/0/I6" preSegmentId="3" postSegmentId="5" preFractionAlong="0.16363289262919012" postFractionAlong="0.33716960283431563"/>
    </projection>
    <projection id="NCXLS_MCL_M3R" presynapticPopulation="MCL" postsynapticPopulation="M3R" synapse="Acetylcholine">
      <connection id="51" preCellId="../MCL/0/MCL" postCellId="../M3R/0/M3R" preSegmentId="5" postSegmentId="2" preFractionAlong="0.39899291667024717" postFractionAlong="0.8255523794176862"/>
    </projection>
    <projection id="NCXLS_MCL_M2L" presynapticPopulation="MCL" postsynapticPopulation="M2L" synapse="Acetylcholine">
      <connection id="52" preCellId="../MCL/0/MCL" postCellId="../M2L/0/M2L" preSegmentId="1" postSegmentId="6" preFractionAlong="0.4815050931776321" postFractionAlong="0.3046118146566501"/>
    </projection>
    <projection id="NCXLS_MCL_M1" presynapticPopulation="MCL" postsynapticPopulation="M1" synapse="Acetylcholine">
      <connection id="53" preCellId="../MCL/0/MCL" postCellId="../M1/0/M1" preSegmentId="8" postSegmentId="9" preFractionAlong="0.7165724586028168" postFractionAlong="0.9729547330228147"/>
    </projection>
    <projection id="NCXLS_M3L_I1L" presynapticPopulation="M3L" postsynapticPopulation="I1L" synapse="Acetylcholine">
      <connection id="54" preCellId="../M3L/0/M3L" postCellId="../I1L/0/I1L" preSegmentId="6" postSegmentId="1" preFractionAlong="0.03722268508939519" postFractionAlong="0.8938586774932468"/>
    </projection>
    <projection id="NCXLS_M3L_I6" presynapticPopulation="M3L" postsynapticPopulation="I6" synapse="Acetylcholine">
      <connection id="55" preCellId="../M3L/0/M3L" postCellId="../I6/0/I6" preSegmentId="9" postSegmentId="6" preFractionAlong="0.5886075856938554" postFractionAlong="0.25782569593593974"/>
    </projection>
    <projection id="NCXLS_M3L_I2R" presynapticPopulation="M3L" postsynapticPopulation="I2R" synapse="Acetylcholine">
      <connection id="56" preCellId="../M3L/0/M3L" postCellId="../I2R/0/I2R" preSegmentId="5" postSegmentId="5" preFractionAlong="0.8440787343822349" postFractionAlong="0.2173851042772743"/>
    </projection>
    <projection id="NCXLS_M3L_NSMR" presynapticPopulation="M3L" postsynapticPopulation="NSMR" synapse="Acetylcholine">
      <connection id="57" preCellId="../M3L/0/M3L" postCellId="../NSMR/0/NSMR" preSegmentId="3" postSegmentId="4" preFractionAlong="0.26850804196791844" postFractionAlong="0.1910524864594867"/>
    </projection>
    <projection id="NCXLS_M3L_I4" presynapticPopulation="M3L" postsynapticPopulation="I4" synapse="Acetylcholine">
      <connection id="58" preCellId="../M3L/0/M3L" postCellId="../I4/0/I4" preSegmentId="8" postSegmentId="9" preFractionAlong="0.2037032916565763" postFractionAlong="0.7631898707194947"/>
    </projection>
    <projection id="NCXLS_M3L_M2L" presynapticPopulation="M3L" postsynapticPopulation="M2L" synapse="Acetylcholine">
      <connection id="59" preCellId="../M3L/0/M3L" postCellId="../M2L/0/M2L" preSegmentId="8" postSegmentId="9" preFractionAlong="0.578470923013724" postFractionAlong="0.9862498564718843"/>
    </projection>
    <projection id="NCXLS_M3L_MI" presynapticPopulation="M3L" postsynapticPopulation="MI" synapse="Acetylcholine">
      <connection id="60" preCellId="../M3L/0/M3L" postCellId="../MI/0/MI" preSegmentId="8" postSegmentId="3" preFractionAlong="0.86952608331733" postFractionAlong="0.7599833692987511"/>
    </projection>
    <projection id="NCXLS_M3L_MCL" presynapticPopulation="M3L" postsynapticPopulation="MCL" synapse="Acetylcholine">
      <connection id="61" preCellId="../M3L/0/M3L" postCellId="../MCL/0/MCL" preSegmentId="5" postSegmentId="8" preFractionAlong="0.7532767271313036" postFractionAlong="0.9566755370794907"/>
    </projection>
    <projection id="NCXLS_M3L_M2R" presynapticPopulation="M3L" postsynapticPopulation="M2R" synapse="Glutamate">
      <connection id="62" preCellId="../M3L/0/M3L" postCellId="../M2R/0/M2R" preSegmentId="6" postSegmentId="6" preFractionAlong="0.5379147001977388" postFractionAlong="0.2179983043884346"/>
    </projection>
    <projection id="NCXLS_M3L_I1R" presynapticPopulation="M3L" postsynapticPopulation="I1R" synapse="Acetylcholine">
      <connection id="63" preCellId="../M3L/0/M3L" postCellId="../I1R/0/I1R" preSegmentId="7" postSegmentId="7" preFractionAlong="0.5757685815522844" postFractionAlong="0.5509622214187242"/>
    </projection>
    <projection id="NCXLS_M3L_MCR" presynapticPopulation="M3L" postsynapticPopulation="MCR" synapse="Acetylcholine">
      <connection id="64" preCellId="../M3L/0/M3L" postCellId="../MCR/0/MCR" preSegmentId="6" postSegmentId="4" preFractionAlong="0.8462320881248673" postFractionAlong="0.3198202868008465"/>
    </projection>
    <projection id="NCXLS_M3L_I2L" presynapticPopulation="M3L" postsynapticPopulation="I2L" synapse="Acetylcholine">
      <connection id="65" preCellId="../M3L/0/M3L" postCellId="../I2L/0/I2L" preSegmentId="8" postSegmentId="1" preFractionAlong="0.4704134760448099" postFractionAlong="0.2787280433353797"/>
    </projection>
    <projection id="NCXLS_M3L_M5" presynapticPopulation="M3L" postsynapticPopulation="M5" synapse="Acetylcholine">
      <connection id="66" preCellId="../M3L/0/M3L" postCellId="../M5/0/M5" preSegmentId="4" postSegmentId="9" preFractionAlong="0.5801877633045324" postFractionAlong="0.6364353445734805"/>
    </projection>
    <projection id="NCXLS_M2R_I1L" presynapticPopulation="M2R" postsynapticPopulation="I1L" synapse="Acetylcholine">
      <connection id="67" preCellId="../M2R/0/M2R" postCellId="../I1L/0/I1L" preSegmentId="1" postSegmentId="8" preFractionAlong="0.7102863387138983" postFractionAlong="0.6274341503743958"/>
    </projection>
    <projection id="NCXLS_M2R_NSML" presynapticPopulation="M2R" postsynapticPopulation="NSML" synapse="Acetylcholine">
      <connection id="68" preCellId="../M2R/0/M2R" postCellId="../NSML/0/NSML" preSegmentId="8" postSegmentId="8" preFractionAlong="0.1396126603529665" postFractionAlong="0.6635887789978331"/>
    </projection>
    <projection id="NCXLS_M2R_I6" presynapticPopulation="M2R" postsynapticPopulation="I6" synapse="Acetylcholine">
      <connection id="69" preCellId="../M2R/0/M2R" postCellId="../I6/0/I6" preSegmentId="6" postSegmentId="5" preFractionAlong="0.24541059208746152" postFractionAlong="0.654976323062026"/>
    </projection>
    <projection id="NCXLS_M2R_M4" presynapticPopulation="M2R" postsynapticPopulation="M4" synapse="Glutamate">
      <connection id="70" preCellId="../M2R/0/M2R" postCellId="../M4/0/M4" preSegmentId="9" postSegmentId="9" preFractionAlong="0.627864769943869" postFractionAlong="0.7971780582613112"/>
    </projection>
    <projection id="NCXLS_M2R_NSMR" presynapticPopulation="M2R" postsynapticPopulation="NSMR" synapse="Acetylcholine">
      <connection id="71" preCellId="../M2R/0/M2R" postCellId="../NSMR/0/NSMR" preSegmentId="7" postSegmentId="8" preFractionAlong="0.924805479191647" postFractionAlong="0.32964649674772484"/>
    </projection>
    <projection id="NCXLS_M2R_MI" presynapticPopulation="M2R" postsynapticPopulation="MI" synapse="Acetylcholine">
      <connection id="72" preCellId="../M2R/0/M2R" postCellId="../MI/0/MI" preSegmentId="3" postSegmentId="8" preFractionAlong="0.022282428071070615" postFractionAlong="0.9081488584424017"/>
    </projection>
    <projection id="NCXLS_M2R_MCL" presynapticPopulation="M2R" postsynapticPopulation="MCL" synapse="Acetylcholine">
      <connection id="73" preCellId="../M2R/0/M2R" postCellId="../MCL/0/MCL" preSegmentId="5" postSegmentId="2" preFractionAlong="0.19448223073046034" postFractionAlong="0.2000486331536323"/>
    </projection>
    <projection id="NCXLS_M2R_M3L" presynapticPopulation="M2R" postsynapticPopulation="M3L" synapse="Acetylcholine">
      <connection id="74" preCellId="../M2R/0/M2R" postCellId="../M3L/0/M3L" preSegmentId="3" postSegmentId="1" preFractionAlong="0.00999377485857078" postFractionAlong="0.7825056359493593"/>
    </projection>
    <projection id="NCXLS_M2R_I1R" presynapticPopulation="M2R" postsynapticPopulation="I1R" synapse="Acetylcholine">
      <connection id="75" preCellId="../M2R/0/M2R" postCellId="../I1R/0/I1R" preSegmentId="3" postSegmentId="7" preFractionAlong="0.47822211488311783" postFractionAlong="0.6378728330734764"/>
    </projection>
    <projection id="NCXLS_M2R_M1" presynapticPopulation="M2R" postsynapticPopulation="M1" synapse="Glutamate">
      <connection id="76" preCellId="../M2R/0/M2R" postCellId="../M1/0/M1" preSegmentId="4" postSegmentId="5" preFractionAlong="0.05847926361591138" postFractionAlong="0.41860361738396823"/>
    </projection>
    <projection id="NCXLS_M2R_MCR" presynapticPopulation="M2R" postsynapticPopulation="MCR" synapse="Acetylcholine">
      <connection id="77" preCellId="../M2R/0/M2R" postCellId="../MCR/0/MCR" preSegmentId="3" postSegmentId="5" preFractionAlong="0.6636489895040385" postFractionAlong="0.5216381965906517"/>
    </projection>
    <projection id="NCXLS_M2R_M5" presynapticPopulation="M2R" postsynapticPopulation="M5" synapse="Acetylcholine">
      <connection id="78" preCellId="../M2R/0/M2R" postCellId="../M5/0/M5" preSegmentId="5" postSegmentId="9" preFractionAlong="0.21355674149568205" postFractionAlong="0.013338044834512619"/>
    </projection>
    <projection id="NCXLS_M1_I1L" presynapticPopulation="M1" postsynapticPopulation="I1L" synapse="Acetylcholine">
      <connection id="79" preCellId="../M1/0/M1" postCellId="../I1L/0/I1L" preSegmentId="9" postSegmentId="4" preFractionAlong="0.1506544886606338" postFractionAlong="0.4229066318539193"/>
    </projection>
    <projection id="NCXLS_M1_I6" presynapticPopulation="M1" postsynapticPopulation="I6" synapse="Acetylcholine">
      <connection id="80" preCellId="../M1/0/M1" postCellId="../I6/0/I6" preSegmentId="5" postSegmentId="6" preFractionAlong="0.6256732123887586" postFractionAlong="0.41115663795530666"/>
    </projection>
    <projection id="NCXLS_M1_I2R" presynapticPopulation="M1" postsynapticPopulation="I2R" synapse="Acetylcholine">
      <connection id="81" preCellId="../M1/0/M1" postCellId="../I2R/0/I2R" preSegmentId="1" postSegmentId="2" preFractionAlong="0.7974644903726232" postFractionAlong="0.8324923700561442"/>
    </projection>
    <projection id="NCXLS_M1_NSMR" presynapticPopulation="M1" postsynapticPopulation="NSMR" synapse="Acetylcholine">
      <connection id="82" preCellId="../M1/0/M1" postCellId="../NSMR/0/NSMR" preSegmentId="2" postSegmentId="6" preFractionAlong="0.2739693463756029" postFractionAlong="0.17526761992592432"/>
    </projection>
    <projection id="NCXLS_M1_I3" presynapticPopulation="M1" postsynapticPopulation="I3" synapse="Acetylcholine">
      <connection id="83" preCellId="../M1/0/M1" postCellId="../I3/0/I3" preSegmentId="5" postSegmentId="6" preFractionAlong="0.26622786700996703" postFractionAlong="0.3359666440469845"/>
    </projection>
    <projection id="NCXLS_M1_I4" presynapticPopulation="M1" postsynapticPopulation="I4" synapse="Acetylcholine">
      <connection id="84" preCellId="../M1/0/M1" postCellId="../I4/0/I4" preSegmentId="6" postSegmentId="4" preFractionAlong="0.4802888197905403" postFractionAlong="0.8435055387927836"/>
    </projection>
    <projection id="NCXLS_M1_M2L" presynapticPopulation="M1" postsynapticPopulation="M2L" synapse="Acetylcholine">
      <connection id="85" preCellId="../M1/0/M1" postCellId="../M2L/0/M2L" preSegmentId="2" postSegmentId="4" preFractionAlong="0.16434060122826777" postFractionAlong="0.02052251171251529"/>
    </projection>
    <projection id="NCXLS_M1_MI" presynapticPopulation="M1" postsynapticPopulation="MI" synapse="Acetylcholine">
      <connection id="86" preCellId="../M1/0/M1" postCellId="../MI/0/MI" preSegmentId="3" postSegmentId="2" preFractionAlong="0.14105092107023653" postFractionAlong="0.5748300268556906"/>
    </projection>
    <projection id="NCXLS_M1_MCL" presynapticPopulation="M1" postsynapticPopulation="MCL" synapse="Acetylcholine">
      <connection id="87" preCellId="../M1/0/M1" postCellId="../MCL/0/MCL" preSegmentId="2" postSegmentId="3" preFractionAlong="0.44993829275305575" postFractionAlong="0.7158744169317086"/>
    </projection>
    <projection id="NCXLS_M1_M3L" presynapticPopulation="M1" postsynapticPopulation="M3L" synapse="Glutamate">
      <connection id="88" preCellId="../M1/0/M1" postCellId="../M3L/0/M3L" preSegmentId="9" postSegmentId="7" preFractionAlong="0.6307063320910085" postFractionAlong="0.043699724125018435"/>
    </projection>
    <projection id="NCXLS_M1_M2R" presynapticPopulation="M1" postsynapticPopulation="M2R" synapse="Acetylcholine">
      <connection id="89" preCellId="../M1/0/M1" postCellId="../M2R/0/M2R" preSegmentId="4" postSegmentId="5" preFractionAlong="0.4272516013962966" postFractionAlong="0.811339479201512"/>
    </projection>
    <projection id="NCXLS_M1_I5" presynapticPopulation="M1" postsynapticPopulation="I5" synapse="Acetylcholine">
      <connection id="90" preCellId="../M1/0/M1" postCellId="../I5/0/I5" preSegmentId="3" postSegmentId="2" preFractionAlong="0.016706091911565912" postFractionAlong="0.17847209421412236"/>
    </projection>
    <projection id="NCXLS_M1_I1R" presynapticPopulation="M1" postsynapticPopulation="I1R" synapse="Acetylcholine">
      <connection id="91" preCellId="../M1/0/M1" postCellId="../I1R/0/I1R" preSegmentId="9" postSegmentId="6" preFractionAlong="0.4230589275451947" postFractionAlong="0.5867156839217995"/>
    </projection>
    <projection id="NCXLS_M1_MCR" presynapticPopulation="M1" postsynapticPopulation="MCR" synapse="Acetylcholine">
      <connection id="92" preCellId="../M1/0/M1" postCellId="../MCR/0/MCR" preSegmentId="5" postSegmentId="9" preFractionAlong="0.6224518744903452" postFractionAlong="0.32466887789345844"/>
    </projection>
    <projection id="NCXLS_M1_I2L" presynapticPopulation="M1" postsynapticPopulation="I2L" synapse="Acetylcholine">
      <connection id="93" preCellId="../M1/0/M1" postCellId="../I2L/0/I2L" preSegmentId="4" postSegmentId="2" preFractionAlong="0.3239941959538054" postFractionAlong="0.8641883625548357"/>
    </projection>
    <projection id="NCXLS_MCR_I1L" presynapticPopulation="MCR" postsynapticPopulation="I1L" synapse="Acetylcholine">
      <connection id="94" preCellId="../MCR/0/MCR" postCellId="../I1L/0/I1L" preSegmentId="1" postSegmentId="9" preFractionAlong="0.19027509223368944" postFractionAlong="0.15263579133084437"/>
    </projection>
    <projection id="NCXLS_MCR_I6" presynapticPopulation="MCR" postsynapticPopulation="I6" synapse="Acetylcholine">
      <connection id="95" preCellId="../MCR/0/MCR" postCellId="../I6/0/I6" preSegmentId="4" postSegmentId="2" preFractionAlong="0.7037810050346648" postFractionAlong="0.41217304680961164"/>
    </projection>
    <projection id="NCXLS_MCR_M3R" presynapticPopulation="MCR" postsynapticPopulation="M3R" synapse="Acetylcholine">
      <connection id="96" preCellId="../MCR/0/MCR" postCellId="../M3R/0/M3R" preSegmentId="4" postSegmentId="9" preFractionAlong="0.7083889681093689" postFractionAlong="0.5187974874961478"/>
    </projection>
    <projection id="NCXLS_MCR_M2L" presynapticPopulation="MCR" postsynapticPopulation="M2L" synapse="Acetylcholine">
      <connection id="97" preCellId="../MCR/0/MCR" postCellId="../M2L/0/M2L" preSegmentId="9" postSegmentId="3" preFractionAlong="0.25442480524169564" postFractionAlong="0.907351271516869"/>
    </projection>
    <projection id="NCXLS_MCR_I2L" presynapticPopulation="MCR" postsynapticPopulation="I2L" synapse="Acetylcholine">
      <connection id="98" preCellId="../MCR/0/MCR" postCellId="../I2L/0/I2L" preSegmentId="8" postSegmentId="3" preFractionAlong="0.982189903415557" postFractionAlong="0.8620141069116402"/>
    </projection>
    <projection id="NCXLS_MCR_M5" presynapticPopulation="MCR" postsynapticPopulation="M5" synapse="Acetylcholine">
      <connection id="99" preCellId="../MCR/0/MCR" postCellId="../M5/0/M5" preSegmentId="8" postSegmentId="8" preFractionAlong="0.9737407004323977" postFractionAlong="0.7429875028259558"/>
    </projection>
    <projection id="NCXLS_M5_I2R" presynapticPopulation="M5" postsynapticPopulation="I2R" synapse="Acetylcholine">
      <connection id="100" preCellId="../M5/0/M5" postCellId="../I2R/0/I2R" preSegmentId="5" postSegmentId="3" preFractionAlong="0.19032122315601763" postFractionAlong="0.8717463771925572"/>
    </projection>
    <projection id="NCXLS_M5_I3" presynapticPopulation="M5" postsynapticPopulation="I3" synapse="Acetylcholine">
      <connection id="101" preCellId="../M5/0/M5" postCellId="../I3/0/I3" preSegmentId="4" postSegmentId="7" preFractionAlong="0.05671359663311071" postFractionAlong="0.6639868618670157"/>
    </projection>
    <projection id="NCXLS_M5_I4" presynapticPopulation="M5" postsynapticPopulation="I4" synapse="Acetylcholine">
      <connection id="102" preCellId="../M5/0/M5" postCellId="../I4/0/I4" preSegmentId="1" postSegmentId="6" preFractionAlong="0.409495849791478" postFractionAlong="0.4659496263655637"/>
    </projection>
    <projection id="NCXLS_M5_M2R" presynapticPopulation="M5" postsynapticPopulation="M2R" synapse="Acetylcholine">
      <connection id="103" preCellId="../M5/0/M5" postCellId="../M2R/0/M2R" preSegmentId="3" postSegmentId="9" preFractionAlong="0.041535270956132186" postFractionAlong="0.41405559123881364"/>
    </projection>
    <projection id="NCXLS_M5_I5" presynapticPopulation="M5" postsynapticPopulation="I5" synapse="Acetylcholine">
      <connection id="104" preCellId="../M5/0/M5" postCellId="../I5/0/I5" preSegmentId="9" postSegmentId="8" preFractionAlong="0.408283513223197" postFractionAlong="0.5827187021330221"/>
    </projection>
    <projection id="NCXLS_M5_I1R" presynapticPopulation="M5" postsynapticPopulation="I1R" synapse="Acetylcholine">
      <connection id="105" preCellId="../M5/0/M5" postCellId="../I1R/0/I1R" preSegmentId="4" postSegmentId="2" preFractionAlong="0.35207477294564693" postFractionAlong="0.36534593017832684"/>
    </projection>
    <projection id="NCXLS_M5_MCR" presynapticPopulation="M5" postsynapticPopulation="MCR" synapse="Acetylcholine">
      <connection id="106" preCellId="../M5/0/M5" postCellId="../MCR/0/MCR" preSegmentId="3" postSegmentId="4" preFractionAlong="0.8716689092695127" postFractionAlong="0.30217015335834085"/>
    </projection>
    <projection id="NCXLS_M5_I2L" presynapticPopulation="M5" postsynapticPopulation="I2L" synapse="Acetylcholine">
      <connection id="107" preCellId="../M5/0/M5" postCellId="../I2L/0/I2L" preSegmentId="8" postSegmentId="8" preFractionAlong="0.6783262046312631" postFractionAlong="0.2505617565679805"/>
    </projection>
    <projection id="NC_I1L_RMDDL" presynapticPopulation="I1L" postsynapticPopulation="RMDDL" synapse="Acetylcholine">
      <connection id="108" preCellId="../I1L/0/I1L" postCellId="../RMDDL/0/RMDDL" preSegmentId="1" postSegmentId="9" preFractionAlong="0.14428065068874918" postFractionAlong="0.16590504430068942"/>
    </projection>
    <projection id="NC_I1L_RMDVL" presynapticPopulation="I1L" postsynapticPopulation="RMDVL" synapse="Acetylcholine">
      <connection id="109" preCellId="../I1L/0/I1L" postCellId="../RMDVL/0/RMDVL" preSegmentId="9" postSegmentId="9" preFractionAlong="0.3121387916632715" postFractionAlong="0.2657380781656792"/>
    </projection>
    <projection id="NC_I1R_RMDDR" presynapticPopulation="I1R" postsynapticPopulation="RMDDR" synapse="Acetylcholine">
      <connection id="110" preCellId="../I1R/0/I1R" postCellId="../RMDDR/0/RMDDR" preSegmentId="8" postSegmentId="7" preFractionAlong="0.7664830893227842" postFractionAlong="0.8826719353006454"/>
    </projection>
    <projection id="NC_I1R_RMDVR" presynapticPopulation="I1R" postsynapticPopulation="RMDVR" synapse="Acetylcholine">
      <connection id="111" preCellId="../I1R/0/I1R" postCellId="../RMDVR/0/RMDVR" preSegmentId="2" postSegmentId="2" preFractionAlong="0.4660341195000369" postFractionAlong="0.5339564085805625"/>
    </projection>
    <projection id="NC_I2L_URXL" presynapticPopulation="I2L" postsynapticPopulation="URXL" synapse="Glutamate">
      <connection id="112" preCellId="../I2L/0/I2L" postCellId="../URXL/0/URXL" preSegmentId="2" postSegmentId="4" preFractionAlong="0.39882153140754373" postFractionAlong="0.8352469488855016"/>
    </projection>
    <projection id="NC_I2R_URXR" presynapticPopulation="I2R" postsynapticPopulation="URXR" synapse="Glutamate">
      <connection id="113" preCellId="../I2R/0/I2R" postCellId="../URXR/0/URXR" preSegmentId="7" postSegmentId="9" preFractionAlong="0.011269446189398291" postFractionAlong="0.3523464118280094"/>
    </projection>
    <projection id="NC_AVKL_I1L" presynapticPopulation="AVKL" postsynapticPopulation="I1L" synapse="Acetylcholine">
      <connection id="114" preCellId="../AVKL/0/AVKL" postCellId="../I1L/0/I1L" preSegmentId="1" postSegmentId="7" preFractionAlong="0.32834434465344475" postFractionAlong="0.22469449178035583"/>
    </projection>
    <projection id="NC_AVKR_I1R" presynapticPopulation="AVKR" postsynapticPopulation="I1R" synapse="Acetylcholine">
      <connection id="115" preCellId="../AVKR/0/AVKR" postCellId="../I1R/0/I1R" preSegmentId="1" postSegmentId="4" preFractionAlong="0.7889219324141032" postFractionAlong="0.006022040368406367"/>
    </projection>
    <projection id="NC_RIS_I1L" presynapticPopulation="RIS" postsynapticPopulation="I1L" synapse="Glutamate">
      <connection id="116" preCellId="../RIS/0/RIS" postCellId="../I1L/0/I1L" preSegmentId="5" postSegmentId="9" preFractionAlong="0.537959631644099" postFractionAlong="0.24756206688676552"/>
    </projection>
    <projection id="NC_RIS_I1R" presynapticPopulation="RIS" postsynapticPopulation="I1R" synapse="Glutamate">
      <connection id="117" preCellId="../RIS/0/RIS" postCellId="../I1R/0/I1R" preSegmentId="7" postSegmentId="9" preFractionAlong="0.3598780123338343" postFractionAlong="0.2742076050602448"/>
    </projection>
    <projection id="NC_AVAL_I2L" presynapticPopulation="AVAL" postsynapticPopulation="I2L" synapse="Acetylcholine">
      <connection id="118" preCellId="../AVAL/0/AVAL" postCellId="../I2L/0/I2L" preSegmentId="6" postSegmentId="4" preFractionAlong="0.14516370836127268" postFractionAlong="0.9331635115498803"/>
    </projection>
    <projection id="NC_AVAR_I2R" presynapticPopulation="AVAR" postsynapticPopulation="I2R" synapse="Acetylcholine">
      <connection id="119" preCellId="../AVAR/0/AVAR" postCellId="../I2R/0/I2R" preSegmentId="2" postSegmentId="3" preFractionAlong="0.3942710347842806" postFractionAlong="0.6989532645197365"/>
    </projection>
    <projection id="NC_SMBVL_I4" presynapticPopulation="SMBVL" postsynapticPopulation="I4" synapse="Acetylcholine">
      <connection id="120" preCellId="../SMBVL/0/SMBVL" postCellId="../I4/0/I4" preSegmentId="3" postSegmentId="4" preFractionAlong="0.5374881528341916" postFractionAlong="0.49849022703441426"/>
    </projection>
    <projection id="NC_SMBVR_I4" presynapticPopulation="SMBVR" postsynapticPopulation="I4" synapse="Acetylcholine">
      <connection id="121" preCellId="../SMBVR/0/SMBVR" postCellId="../I4/0/I4" preSegmentId="8" postSegmentId="6" preFractionAlong="0.09054881029156803" postFractionAlong="0.35264403113672926"/>
    </projection>
    <electricalProjection id="NCXLS_M3R_M4_GJ" presynapticPopulation="M3R" postsynapticPopulation="M4">
      <electricalConnection id="122" preCell="0" postCell="0" synapse="Generic_GJ" preSegment="1" postSegment="5" preFractionAlong="0.9064471318940434" postFractionAlong="0.0022529826129237263"/>
    </electricalProjection>
    <electricalProjection id="NCXLS_M3R_M2R_GJ" presynapticPopulation="M3R" postsynapticPopulation="M2R">
      <electricalConnection id="123" preCell="0" postCell="0" synapse="Generic_GJ" preSegment="2" postSegment="3" preFractionAlong="0.7117215917272376" postFractionAlong="0.6062660635323717"/>
    </electricalProjection>
    <electricalProjection id="NCXLS_M3R_M5_GJ" presynapticPopulation="M3R" postsynapticPopulation="M5">
      <electricalConnection id="124" preCell="0" postCell="0" synapse="Generic_GJ" preSegment="3" postSegment="5" preFractionAlong="0.7765054174666707" postFractionAlong="0.779578020749287"/>
    </electricalProjection>
    <electricalProjection id="NCXLS_MI_NSML_GJ" presynapticPopulation="MI" postsynapticPopulation="NSML">
      <electricalConnection id="125" preCell="0" postCell="0" synapse="Generic_GJ" preSegment="8" postSegment="3" preFractionAlong="0.012835601396736895" postFractionAlong="0.3121887367723004"/>
    </electricalProjection>
    <electricalProjection id="NCXLS_MCL_NSMR_GJ" presynapticPopulation="MCL" postsynapticPopulation="NSMR">
      <electricalConnection id="126" preCell="0" postCell="0" synapse="Generic_GJ" preSegment="3" postSegment="1" preFractionAlong="0.16557112581954114" postFractionAlong="0.3362259729920992"/>
    </electricalProjection>
    <electricalProjection id="NCXLS_M3L_M3R_GJ" presynapticPopulation="M3L" postsynapticPopulation="M3R">
      <electricalConnection id="127" preCell="0" postCell="0" synapse="Generic_GJ" preSegment="3" postSegment="8" preFractionAlong="0.33025824836885564" postFractionAlong="0.4143481084316266"/>
    </electricalProjection>
    <electricalProjection id="NCXLS_M3L_M1_GJ" presynapticPopulation="M3L" postsynapticPopulation="M1">
      <electricalConnection id="128" preCell="0" postCell="0" synapse="Generic_GJ" preSegment="3" postSegment="7" preFractionAlong="0.3232283927779175" postFractionAlong="0.28752019863212763"/>
    </electricalProjection>
    <electricalProjection id="NCXLS_M2R_M3R_GJ" presynapticPopulation="M2R" postsynapticPopulation="M3R">
      <electricalConnection id="129" preCell="0" postCell="0" synapse="Generic_GJ" preSegment="8" postSegment="1" preFractionAlong="0.7983131337633469" postFractionAlong="0.10112483911648751"/>
    </electricalProjection>
    <electricalProjection id="NCXLS_M2R_M2L_GJ" presynapticPopulation="M2R" postsynapticPopulation="M2L">
      <electricalConnection id="130" preCell="0" postCell="0" synapse="Generic_GJ" preSegment="4" postSegment="5" preFractionAlong="0.8193978447055413" postFractionAlong="0.5524104668680087"/>
    </electricalProjection>
    <electricalProjection id="NCXLS_M1_M3R_GJ" presynapticPopulation="M1" postsynapticPopulation="M3R">
      <electricalConnection id="131" preCell="0" postCell="0" synapse="Generic_GJ" preSegment="7" postSegment="2" preFractionAlong="0.8045418010122957" postFractionAlong="0.7064105328502284"/>
    </electricalProjection>
    <electricalProjection id="NCXLS_M1_M5_GJ" presynapticPopulation="M1" postsynapticPopulation="M5">
      <electricalConnection id="132" preCell="0" postCell="0" synapse="Generic_GJ" preSegment="8" postSegment="2" preFractionAlong="0.7595807500150725" postFractionAlong="0.3449047949941023"/>
    </electricalProjection>
    <electricalProjection id="NCXLS_MCR_NSMR_GJ" presynapticPopulation="MCR" postsynapticPopulation="NSMR">
      <electricalConnection id="133" preCell="0" postCell="0" synapse="Generic_GJ" preSegment="4" postSegment="3" preFractionAlong="0.31487772591774976" postFractionAlong="0.3586368678745754"/>
    </electricalProjection>
    <electricalProjection id="NCXLS_MCR_MCL_GJ" presynapticPopulation="MCR" postsynapticPopulation="MCL">
      <electricalConnection id="134" preCell="0" postCell="0" synapse="Generic_GJ" preSegment="5" postSegment="4" preFractionAlong="0.6577574650262021" postFractionAlong="0.8158391711776937"/>
    </electricalProjection>
    <electricalProjection id="NCXLS_M5_M3L_GJ" presynapticPopulation="M5" postsynapticPopulation="M3L">
      <electricalConnection id="135" preCell="0" postCell="0" synapse="Generic_GJ" preSegment="5" postSegment="9" preFractionAlong="0.7088062979704114" postFractionAlong="0.9561667844973851"/>
    </electricalProjection>
  </network>
</neuroml>
