<?xml version='1.0' encoding='UTF-8'?>
<neuroml xmlns="http://www.neuroml.org/schema/neuroml2" xmlns:xsi="http://www.w3.org/2001/XMLSchema-instance" xsi:schemaLocation="http://www.neuroml.org/schema/neuroml2 https://raw.githubusercontent.com/NeuroML/NeuroML2/development/Schemas/NeuroML2/NeuroML_v2beta4.xsd" id="gvft_network_bio_prior_lamW_0_189_DF_0_033_t60_net">
  <notes>NeuroML2 network generated from GVFT simulation on 2025-05-05 09:28:12
</notes>
  <include href="AVAL.cell.nml"/>
  <include href="AVAR.cell.nml"/>
  <include href="AVKL.cell.nml"/>
  <include href="AVKR.cell.nml"/>
  <include href="RIS.cell.nml"/>
  <include href="RMDDL.cell.nml"/>
  <include href="RMDDR.cell.nml"/>
  <include href="RMDVL.cell.nml"/>
  <include href="RMDVR.cell.nml"/>
  <include href="SMBVL.cell.nml"/>
  <include href="SMBVR.cell.nml"/>
  <include href="URXL.cell.nml"/>
  <include href="URXR.cell.nml"/>
  <include href="MCL.cell.nml"/>
  <include href="I4.cell.nml"/>
  <include href="M5.cell.nml"/>
  <include href="I1L.cell.nml"/>
  <include href="NSMR.cell.nml"/>
  <include href="NSML.cell.nml"/>
  <include href="I2R.cell.nml"/>
  <include href="M4.cell.nml"/>
  <include href="MCR.cell.nml"/>
  <include href="M3R.cell.nml"/>
  <include href="I6.cell.nml"/>
  <include href="MI.cell.nml"/>
  <include href="I2L.cell.nml"/>
  <include href="I3.cell.nml"/>
  <include href="M2R.cell.nml"/>
  <include href="M3L.cell.nml"/>
  <include href="I1R.cell.nml"/>
  <include href="M1.cell.nml"/>
  <include href="I5.cell.nml"/>
  <include href="M2L.cell.nml"/>
  <include href="Glutamate.synapse.nml"/>
  <include href="Acetylcholine.synapse.nml"/>
  <include href="Serotonin_Glutamate.synapse.nml"/>
  <include href="Generic_GJ.nml"/>
  <network id="gvft_network_bio_prior_lamW_0_189_DF_0_033_t60_net" type="networkWithTemperature" temperature="20.0 degC">
    <population id="M1" component="M1" type="populationList" size="1">
      <instance id="0">
        <location x="-0.37688443" y="-0.24623117" z="0.0"/>
      </instance>
    </population>
    <population id="M2L" component="M2L" type="populationList" size="1">
      <instance id="0">
        <location x="0.76884425" y="0.03517589" z="0.0"/>
      </instance>
    </population>
    <population id="M2R" component="M2R" type="populationList" size="1">
      <instance id="0">
        <location x="0.42713568" y="-0.16582915" z="0.0"/>
      </instance>
    </population>
    <population id="M3L" component="M3L" type="populationList" size="1">
      <instance id="0">
        <location x="-0.095477395" y="0.095477395" z="0.0"/>
      </instance>
    </population>
    <population id="M3R" component="M3R" type="populationList" size="1">
      <instance id="0">
        <location x="0.83919597" y="-0.61809045" z="0.0"/>
      </instance>
    </population>
    <population id="M4" component="M4" type="populationList" size="1">
      <instance id="0">
        <location x="-0.31658292" y="-0.8994975" z="0.0"/>
      </instance>
    </population>
    <population id="M5" component="M5" type="populationList" size="1">
      <instance id="0">
        <location x="-0.45728645" y="-0.08542714" z="0.0"/>
      </instance>
    </population>
    <population id="I1L" component="I1L" type="populationList" size="1">
      <instance id="0">
        <location x="0.22613066" y="0.7889447" z="0.0"/>
      </instance>
    </population>
    <population id="I1R" component="I1R" type="populationList" size="1">
      <instance id="0">
        <location x="1.0" y="-0.18592966" z="0.0"/>
      </instance>
    </population>
    <population id="I2L" component="I2L" type="populationList" size="1">
      <instance id="0">
        <location x="-0.5477387" y="-0.9798995" z="0.0"/>
      </instance>
    </population>
    <population id="I2R" component="I2R" type="populationList" size="1">
      <instance id="0">
        <location x="0.8190955" y="0.90954775" z="0.0"/>
      </instance>
    </population>
    <population id="I3" component="I3" type="populationList" size="1">
      <instance id="0">
        <location x="-0.959799" y="-0.65829146" z="0.0"/>
      </instance>
    </population>
    <population id="I4" component="I4" type="populationList" size="1">
      <instance id="0">
        <location x="0.04522614" y="0.6482412" z="0.0"/>
      </instance>
    </population>
    <population id="I5" component="I5" type="populationList" size="1">
      <instance id="0">
        <location x="0.31658292" y="-0.8894472" z="0.0"/>
      </instance>
    </population>
    <population id="I6" component="I6" type="populationList" size="1">
      <instance id="0">
        <location x="0.69849247" y="0.98994976" z="0.0"/>
      </instance>
    </population>
    <population id="MCL" component="MCL" type="populationList" size="1">
      <instance id="0">
        <location x="0.1155779" y="0.025125638" z="0.0"/>
      </instance>
    </population>
    <population id="MCR" component="MCR" type="populationList" size="1">
      <instance id="0">
        <location x="0.30653268" y="0.18592966" z="0.0"/>
      </instance>
    </population>
    <population id="MI" component="MI" type="populationList" size="1">
      <instance id="0">
        <location x="0.1758794" y="0.2562814" z="0.0"/>
      </instance>
    </population>
    <population id="NSML" component="NSML" type="populationList" size="1">
      <instance id="0">
        <location x="0.5477387" y="-0.095477395" z="0.0"/>
      </instance>
    </population>
    <population id="NSMR" component="NSMR" type="populationList" size="1">
      <instance id="0">
        <location x="-0.1758794" y="0.16582915" z="0.0"/>
      </instance>
    </population>
    <population id="AVAL" component="AVAL" type="populationList" size="1">
      <instance id="0">
        <location x="5.0" y="0.0" z="0.0"/>
      </instance>
    </population>
    <population id="AVAR" component="AVAR" type="populationList" size="1">
      <instance id="0">
        <location x="5.0" y="0.0" z="0.0"/>
      </instance>
    </population>
    <population id="AVKL" component="AVKL" type="populationList" size="1">
      <instance id="0">
        <location x="5.0" y="0.0" z="0.0"/>
      </instance>
    </population>
    <population id="AVKR" component="AVKR" type="populationList" size="1">
      <instance id="0">
        <location x="5.0" y="0.0" z="0.0"/>
      </instance>
    </population>
    <population id="RIS" component="RIS" type="populationList" size="1">
      <instance id="0">
        <location x="5.0" y="0.0" z="0.0"/>
      </instance>
    </population>
    <population id="RMDDL" component="RMDDL" type="populationList" size="1">
      <instance id="0">
        <location x="5.0" y="0.0" z="0.0"/>
      </instance>
    </population>
    <population id="RMDDR" component="RMDDR" type="populationList" size="1">
      <instance id="0">
        <location x="5.0" y="0.0" z="0.0"/>
      </instance>
    </population>
    <population id="RMDVL" component="RMDVL" type="populationList" size="1">
      <instance id="0">
        <location x="5.0" y="0.0" z="0.0"/>
      </instance>
    </population>
    <population id="RMDVR" component="RMDVR" type="populationList" size="1">
      <instance id="0">
        <location x="5.0" y="0.0" z="0.0"/>
      </instance>
    </population>
    <population id="SMBVL" component="SMBVL" type="populationList" size="1">
      <instance id="0">
        <location x="5.0" y="0.0" z="0.0"/>
      </instance>
    </population>
    <population id="SMBVR" component="SMBVR" type="populationList" size="1">
      <instance id="0">
        <location x="5.0" y="0.0" z="0.0"/>
      </instance>
    </population>
    <population id="URXL" component="URXL" type="populationList" size="1">
      <instance id="0">
        <location x="5.0" y="0.0" z="0.0"/>
      </instance>
    </population>
    <population id="URXR" component="URXR" type="populationList" size="1">
      <instance id="0">
        <location x="5.0" y="0.0" z="0.0"/>
      </instance>
    </population>
    <projection id="NCXLS_NSMR_I1L" presynapticPopulation="NSMR" postsynapticPopulation="I1L" synapse="Serotonin_Glutamate">
      <connection id="0" preCellId="../NSMR/0/NSMR" postCellId="../I1L/0/I1L" preSegmentId="6" postSegmentId="2" preFractionAlong="0.18164101406746547" postFractionAlong="0.4307568483609884"/>
    </projection>
    <projection id="NCXLS_NSMR_M5" presynapticPopulation="NSMR" postsynapticPopulation="M5" synapse="Serotonin_Glutamate">
      <connection id="1" preCellId="../NSMR/0/NSMR" postCellId="../M5/0/M5" preSegmentId="8" postSegmentId="8" preFractionAlong="0.6857331015524998" postFractionAlong="0.10986547781937006"/>
    </projection>
    <projection id="NCXLS_NSMR_I4" presynapticPopulation="NSMR" postsynapticPopulation="I4" synapse="Serotonin_Glutamate">
      <connection id="2" preCellId="../NSMR/0/NSMR" postCellId="../I4/0/I4" preSegmentId="2" postSegmentId="8" preFractionAlong="0.5798342336703631" postFractionAlong="0.9967282140794629"/>
    </projection>
    <projection id="NCXLS_NSMR_I3" presynapticPopulation="NSMR" postsynapticPopulation="I3" synapse="Serotonin_Glutamate">
      <connection id="3" preCellId="../NSMR/0/NSMR" postCellId="../I3/0/I3" preSegmentId="8" postSegmentId="5" preFractionAlong="0.07648977325413198" postFractionAlong="0.30643919092327754"/>
    </projection>
    <projection id="NCXLS_NSML_I5" presynapticPopulation="NSML" postsynapticPopulation="I5" synapse="Serotonin_Glutamate">
      <connection id="4" preCellId="../NSML/0/NSML" postCellId="../I5/0/I5" preSegmentId="1" postSegmentId="9" preFractionAlong="0.016406428726948752" postFractionAlong="0.08236213180828056"/>
    </projection>
    <projection id="NCXLS_NSML_M3R" presynapticPopulation="NSML" postsynapticPopulation="M3R" synapse="Serotonin_Glutamate">
      <connection id="5" preCellId="../NSML/0/NSML" postCellId="../M3R/0/M3R" preSegmentId="9" postSegmentId="2" preFractionAlong="0.5540020816855962" postFractionAlong="0.7677715701934723"/>
    </projection>
    <projection id="NCXLS_NSML_I1R" presynapticPopulation="NSML" postsynapticPopulation="I1R" synapse="Serotonin_Glutamate">
      <connection id="6" preCellId="../NSML/0/NSML" postCellId="../I1R/0/I1R" preSegmentId="5" postSegmentId="1" preFractionAlong="0.3972328397276593" postFractionAlong="0.8706945022561537"/>
    </projection>
    <projection id="NCXLS_NSML_M2L" presynapticPopulation="NSML" postsynapticPopulation="M2L" synapse="Serotonin_Glutamate">
      <connection id="7" preCellId="../NSML/0/NSML" postCellId="../M2L/0/M2L" preSegmentId="8" postSegmentId="4" preFractionAlong="0.35654214321427224" postFractionAlong="0.9405592607568448"/>
    </projection>
    <projection id="NCXLS_M2R_NSMR" presynapticPopulation="M2R" postsynapticPopulation="NSMR" synapse="Acetylcholine">
      <connection id="8" preCellId="../M2R/0/M2R" postCellId="../NSMR/0/NSMR" preSegmentId="8" postSegmentId="6" preFractionAlong="0.09500276182293066" postFractionAlong="0.06928490144422583"/>
    </projection>
    <projection id="NCXLS_M2R_I2L" presynapticPopulation="M2R" postsynapticPopulation="I2L" synapse="Acetylcholine">
      <connection id="9" preCellId="../M2R/0/M2R" postCellId="../I2L/0/I2L" preSegmentId="3" postSegmentId="8" preFractionAlong="0.641711482284288" postFractionAlong="0.3272936435708872"/>
    </projection>
    <projection id="NCXLS_M2R_I6" presynapticPopulation="M2R" postsynapticPopulation="I6" synapse="Acetylcholine">
      <connection id="10" preCellId="../M2R/0/M2R" postCellId="../I6/0/I6" preSegmentId="9" postSegmentId="1" preFractionAlong="0.061033718573237805" postFractionAlong="0.8573346449228768"/>
    </projection>
    <projection id="NCXLS_M2R_I1L" presynapticPopulation="M2R" postsynapticPopulation="I1L" synapse="Acetylcholine">
      <connection id="11" preCellId="../M2R/0/M2R" postCellId="../I1L/0/I1L" preSegmentId="3" postSegmentId="8" preFractionAlong="0.9854962713920856" postFractionAlong="0.9365049809018454"/>
    </projection>
    <projection id="NCXLS_M2R_M5" presynapticPopulation="M2R" postsynapticPopulation="M5" synapse="Glutamate">
      <connection id="12" preCellId="../M2R/0/M2R" postCellId="../M5/0/M5" preSegmentId="7" postSegmentId="7" preFractionAlong="0.31401471024483485" postFractionAlong="0.11854093697564827"/>
    </projection>
    <projection id="NCXLS_M2R_I4" presynapticPopulation="M2R" postsynapticPopulation="I4" synapse="Acetylcholine">
      <connection id="13" preCellId="../M2R/0/M2R" postCellId="../I4/0/I4" preSegmentId="1" postSegmentId="3" preFractionAlong="0.5520042798853176" postFractionAlong="0.2111604699627524"/>
    </projection>
    <projection id="NCXLS_M2R_M3L" presynapticPopulation="M2R" postsynapticPopulation="M3L" synapse="Acetylcholine">
      <connection id="14" preCellId="../M2R/0/M2R" postCellId="../M3L/0/M3L" preSegmentId="9" postSegmentId="7" preFractionAlong="0.7193558317505231" postFractionAlong="0.02000516442616851"/>
    </projection>
    <projection id="NCXLS_M2R_MCR" presynapticPopulation="M2R" postsynapticPopulation="MCR" synapse="Acetylcholine">
      <connection id="15" preCellId="../M2R/0/M2R" postCellId="../MCR/0/MCR" preSegmentId="5" postSegmentId="7" preFractionAlong="0.0596738603371072" postFractionAlong="0.47218360663446746"/>
    </projection>
    <projection id="NCXLS_M2R_MCL" presynapticPopulation="M2R" postsynapticPopulation="MCL" synapse="Acetylcholine">
      <connection id="16" preCellId="../M2R/0/M2R" postCellId="../MCL/0/MCL" preSegmentId="6" postSegmentId="8" preFractionAlong="0.349976030978181" postFractionAlong="0.23105461954550788"/>
    </projection>
    <projection id="NCXLS_M2R_I3" presynapticPopulation="M2R" postsynapticPopulation="I3" synapse="Acetylcholine">
      <connection id="17" preCellId="../M2R/0/M2R" postCellId="../I3/0/I3" preSegmentId="3" postSegmentId="2" preFractionAlong="0.15266186976349116" postFractionAlong="0.3665117555589056"/>
    </projection>
    <projection id="NCXLS_M2R_MI" presynapticPopulation="M2R" postsynapticPopulation="MI" synapse="Acetylcholine">
      <connection id="18" preCellId="../M2R/0/M2R" postCellId="../MI/0/MI" preSegmentId="5" postSegmentId="5" preFractionAlong="0.24708788480321153" postFractionAlong="0.639670675559954"/>
    </projection>
    <projection id="NCXLS_I6_M3R" presynapticPopulation="I6" postsynapticPopulation="M3R" synapse="Acetylcholine">
      <connection id="19" preCellId="../I6/0/I6" postCellId="../M3R/0/M3R" preSegmentId="3" postSegmentId="2" preFractionAlong="0.572529873623784" postFractionAlong="0.8192862362841031"/>
    </projection>
    <projection id="NCXLS_I6_I2R" presynapticPopulation="I6" postsynapticPopulation="I2R" synapse="Acetylcholine">
      <connection id="20" preCellId="../I6/0/I6" postCellId="../I2R/0/I2R" preSegmentId="6" postSegmentId="2" preFractionAlong="0.15117169828232546" postFractionAlong="0.9147317347788052"/>
    </projection>
    <projection id="NCXLS_I6_I1R" presynapticPopulation="I6" postsynapticPopulation="I1R" synapse="Glutamate">
      <connection id="21" preCellId="../I6/0/I6" postCellId="../I1R/0/I1R" preSegmentId="5" postSegmentId="3" preFractionAlong="0.005302510932846061" postFractionAlong="0.7373736335395861"/>
    </projection>
    <projection id="NCXLS_I6_M2L" presynapticPopulation="I6" postsynapticPopulation="M2L" synapse="Acetylcholine">
      <connection id="22" preCellId="../I6/0/I6" postCellId="../M2L/0/M2L" preSegmentId="1" postSegmentId="7" preFractionAlong="0.563941769644487" postFractionAlong="0.4043261228494788"/>
    </projection>
    <projection id="NCXLS_M3R_NSML" presynapticPopulation="M3R" postsynapticPopulation="NSML" synapse="Acetylcholine">
      <connection id="23" preCellId="../M3R/0/M3R" postCellId="../NSML/0/NSML" preSegmentId="3" postSegmentId="3" preFractionAlong="0.3551661913907085" postFractionAlong="0.2793310185303406"/>
    </projection>
    <projection id="NCXLS_M3R_M2R" presynapticPopulation="M3R" postsynapticPopulation="M2R" synapse="Acetylcholine">
      <connection id="24" preCellId="../M3R/0/M3R" postCellId="../M2R/0/M2R" preSegmentId="1" postSegmentId="4" preFractionAlong="0.3845657494316247" postFractionAlong="0.3037614660177791"/>
    </projection>
    <projection id="NCXLS_M3R_I6" presynapticPopulation="M3R" postsynapticPopulation="I6" synapse="Acetylcholine">
      <connection id="25" preCellId="../M3R/0/M3R" postCellId="../I6/0/I6" preSegmentId="5" postSegmentId="7" preFractionAlong="0.7538382591853766" postFractionAlong="0.345449133973149"/>
    </projection>
    <projection id="NCXLS_M3R_I2R" presynapticPopulation="M3R" postsynapticPopulation="I2R" synapse="Acetylcholine">
      <connection id="26" preCellId="../M3R/0/M3R" postCellId="../I2R/0/I2R" preSegmentId="2" postSegmentId="8" preFractionAlong="0.691703417875346" postFractionAlong="0.8110787805905092"/>
    </projection>
    <projection id="NCXLS_M3R_I1L" presynapticPopulation="M3R" postsynapticPopulation="I1L" synapse="Acetylcholine">
      <connection id="27" preCellId="../M3R/0/M3R" postCellId="../I1L/0/I1L" preSegmentId="2" postSegmentId="6" preFractionAlong="0.7626724239765541" postFractionAlong="0.9972051439743013"/>
    </projection>
    <projection id="NCXLS_M3R_I1R" presynapticPopulation="M3R" postsynapticPopulation="I1R" synapse="Acetylcholine">
      <connection id="28" preCellId="../M3R/0/M3R" postCellId="../I1R/0/I1R" preSegmentId="7" postSegmentId="2" preFractionAlong="0.5581390987920192" postFractionAlong="0.4095566413956515"/>
    </projection>
    <projection id="NCXLS_M3R_I4" presynapticPopulation="M3R" postsynapticPopulation="I4" synapse="Acetylcholine">
      <connection id="29" preCellId="../M3R/0/M3R" postCellId="../I4/0/I4" preSegmentId="7" postSegmentId="9" preFractionAlong="0.14118598457971832" postFractionAlong="0.37880411531957203"/>
    </projection>
    <projection id="NCXLS_M3R_M2L" presynapticPopulation="M3R" postsynapticPopulation="M2L" synapse="Acetylcholine">
      <connection id="30" preCellId="../M3R/0/M3R" postCellId="../M2L/0/M2L" preSegmentId="9" postSegmentId="5" preFractionAlong="0.9969108892977727" postFractionAlong="0.7688552706898137"/>
    </projection>
    <projection id="NCXLS_M3R_MCR" presynapticPopulation="M3R" postsynapticPopulation="MCR" synapse="Acetylcholine">
      <connection id="31" preCellId="../M3R/0/M3R" postCellId="../MCR/0/MCR" preSegmentId="2" postSegmentId="7" preFractionAlong="0.19601864530485813" postFractionAlong="0.24850232750227352"/>
    </projection>
    <projection id="NCXLS_M3R_MCL" presynapticPopulation="M3R" postsynapticPopulation="MCL" synapse="Acetylcholine">
      <connection id="32" preCellId="../M3R/0/M3R" postCellId="../MCL/0/MCL" preSegmentId="6" postSegmentId="7" preFractionAlong="0.706076315836315" postFractionAlong="0.5699090802127617"/>
    </projection>
    <projection id="NCXLS_M3R_MI" presynapticPopulation="M3R" postsynapticPopulation="MI" synapse="Acetylcholine">
      <connection id="33" preCellId="../M3R/0/M3R" postCellId="../MI/0/MI" preSegmentId="6" postSegmentId="7" preFractionAlong="0.7962137690179005" postFractionAlong="0.06432419452904947"/>
    </projection>
    <projection id="NCXLS_M5_NSMR" presynapticPopulation="M5" postsynapticPopulation="NSMR" synapse="Acetylcholine">
      <connection id="34" preCellId="../M5/0/M5" postCellId="../NSMR/0/NSMR" preSegmentId="4" postSegmentId="6" preFractionAlong="0.5124061434601496" postFractionAlong="0.06358804246578653"/>
    </projection>
    <projection id="NCXLS_M5_I6" presynapticPopulation="M5" postsynapticPopulation="I6" synapse="Acetylcholine">
      <connection id="35" preCellId="../M5/0/M5" postCellId="../I6/0/I6" preSegmentId="6" postSegmentId="4" preFractionAlong="0.14629250272118988" postFractionAlong="0.29578654249351977"/>
    </projection>
    <projection id="NCXLS_M5_I2R" presynapticPopulation="M5" postsynapticPopulation="I2R" synapse="Acetylcholine">
      <connection id="36" preCellId="../M5/0/M5" postCellId="../I2R/0/I2R" preSegmentId="2" postSegmentId="6" preFractionAlong="0.3114643326814126" postFractionAlong="0.5888374693418312"/>
    </projection>
    <projection id="NCXLS_M5_I1L" presynapticPopulation="M5" postsynapticPopulation="I1L" synapse="Acetylcholine">
      <connection id="37" preCellId="../M5/0/M5" postCellId="../I1L/0/I1L" preSegmentId="7" postSegmentId="3" preFractionAlong="0.5294039633567269" postFractionAlong="0.7249802459988351"/>
    </projection>
    <projection id="NCXLS_M5_I4" presynapticPopulation="M5" postsynapticPopulation="I4" synapse="Acetylcholine">
      <connection id="38" preCellId="../M5/0/M5" postCellId="../I4/0/I4" preSegmentId="6" postSegmentId="7" preFractionAlong="0.0892428661788337" postFractionAlong="0.5780921207932251"/>
    </projection>
    <projection id="NCXLS_M5_M3L" presynapticPopulation="M5" postsynapticPopulation="M3L" synapse="Acetylcholine">
      <connection id="39" preCellId="../M5/0/M5" postCellId="../M3L/0/M3L" preSegmentId="8" postSegmentId="8" preFractionAlong="0.18240939826512226" postFractionAlong="0.795597284057737"/>
    </projection>
    <projection id="NCXLS_M5_MCR" presynapticPopulation="M5" postsynapticPopulation="MCR" synapse="Acetylcholine">
      <connection id="40" preCellId="../M5/0/M5" postCellId="../MCR/0/MCR" preSegmentId="8" postSegmentId="1" preFractionAlong="0.7775295649772314" postFractionAlong="0.4181077227864215"/>
    </projection>
    <projection id="NCXLS_M5_MCL" presynapticPopulation="M5" postsynapticPopulation="MCL" synapse="Acetylcholine">
      <connection id="41" preCellId="../M5/0/M5" postCellId="../MCL/0/MCL" preSegmentId="7" postSegmentId="6" preFractionAlong="0.419258098425614" postFractionAlong="0.8870697629157349"/>
    </projection>
    <projection id="NCXLS_M5_MI" presynapticPopulation="M5" postsynapticPopulation="MI" synapse="Acetylcholine">
      <connection id="42" preCellId="../M5/0/M5" postCellId="../MI/0/MI" preSegmentId="9" postSegmentId="6" preFractionAlong="0.32911541289482726" postFractionAlong="0.7712010290366336"/>
    </projection>
    <projection id="NCXLS_I4_I6" presynapticPopulation="I4" postsynapticPopulation="I6" synapse="Acetylcholine">
      <connection id="43" preCellId="../I4/0/I4" postCellId="../I6/0/I6" preSegmentId="4" postSegmentId="5" preFractionAlong="0.9008942082353228" postFractionAlong="0.14150530090026514"/>
    </projection>
    <projection id="NCXLS_I4_I1L" presynapticPopulation="I4" postsynapticPopulation="I1L" synapse="Glutamate">
      <connection id="44" preCellId="../I4/0/I4" postCellId="../I1L/0/I1L" preSegmentId="7" postSegmentId="8" preFractionAlong="0.4624668731004188" postFractionAlong="0.9518374354168085"/>
    </projection>
    <projection id="NCXLS_M2L_NSMR" presynapticPopulation="M2L" postsynapticPopulation="NSMR" synapse="Acetylcholine">
      <connection id="45" preCellId="../M2L/0/M2L" postCellId="../NSMR/0/NSMR" preSegmentId="9" postSegmentId="7" preFractionAlong="0.07544993547966361" postFractionAlong="0.852224580078157"/>
    </projection>
    <projection id="NCXLS_M2L_NSML" presynapticPopulation="M2L" postsynapticPopulation="NSML" synapse="Acetylcholine">
      <connection id="46" preCellId="../M2L/0/M2L" postCellId="../NSML/0/NSML" preSegmentId="1" postSegmentId="8" preFractionAlong="0.7005321155919974" postFractionAlong="0.6822456310494183"/>
    </projection>
    <projection id="NCXLS_M2L_I2L" presynapticPopulation="M2L" postsynapticPopulation="I2L" synapse="Acetylcholine">
      <connection id="47" preCellId="../M2L/0/M2L" postCellId="../I2L/0/I2L" preSegmentId="6" postSegmentId="2" preFractionAlong="0.6250945585613864" postFractionAlong="0.9617915038112181"/>
    </projection>
    <projection id="NCXLS_M2L_M2R" presynapticPopulation="M2L" postsynapticPopulation="M2R" synapse="Glutamate">
      <connection id="48" preCellId="../M2L/0/M2L" postCellId="../M2R/0/M2R" preSegmentId="8" postSegmentId="8" preFractionAlong="0.10876823155377657" postFractionAlong="0.023187401586550083"/>
    </projection>
    <projection id="NCXLS_M2L_I6" presynapticPopulation="M2L" postsynapticPopulation="I6" synapse="Acetylcholine">
      <connection id="49" preCellId="../M2L/0/M2L" postCellId="../I6/0/I6" preSegmentId="6" postSegmentId="6" preFractionAlong="0.3139025531672073" postFractionAlong="0.7012382779042275"/>
    </projection>
    <projection id="NCXLS_M2L_I2R" presynapticPopulation="M2L" postsynapticPopulation="I2R" synapse="Acetylcholine">
      <connection id="50" preCellId="../M2L/0/M2L" postCellId="../I2R/0/I2R" preSegmentId="3" postSegmentId="9" preFractionAlong="0.32853511659620593" postFractionAlong="0.10254812592464657"/>
    </projection>
    <projection id="NCXLS_M2L_I1L" presynapticPopulation="M2L" postsynapticPopulation="I1L" synapse="Acetylcholine">
      <connection id="51" preCellId="../M2L/0/M2L" postCellId="../I1L/0/I1L" preSegmentId="6" postSegmentId="4" preFractionAlong="0.35336157154092396" postFractionAlong="0.4230169524388131"/>
    </projection>
    <projection id="NCXLS_M2L_I4" presynapticPopulation="M2L" postsynapticPopulation="I4" synapse="Acetylcholine">
      <connection id="52" preCellId="../M2L/0/M2L" postCellId="../I4/0/I4" preSegmentId="8" postSegmentId="6" preFractionAlong="0.6857437323304836" postFractionAlong="0.9266494080645696"/>
    </projection>
    <projection id="NCXLS_M2L_M3L" presynapticPopulation="M2L" postsynapticPopulation="M3L" synapse="Acetylcholine">
      <connection id="53" preCellId="../M2L/0/M2L" postCellId="../M3L/0/M3L" preSegmentId="3" postSegmentId="2" preFractionAlong="0.7278776220711732" postFractionAlong="0.4140619402133414"/>
    </projection>
    <projection id="NCXLS_M2L_MCR" presynapticPopulation="M2L" postsynapticPopulation="MCR" synapse="Acetylcholine">
      <connection id="54" preCellId="../M2L/0/M2L" postCellId="../MCR/0/MCR" preSegmentId="6" postSegmentId="7" preFractionAlong="0.19112497497642955" postFractionAlong="0.6703058812907523"/>
    </projection>
    <projection id="NCXLS_M2L_M4" presynapticPopulation="M2L" postsynapticPopulation="M4" synapse="Glutamate">
      <connection id="55" preCellId="../M2L/0/M2L" postCellId="../M4/0/M4" preSegmentId="5" postSegmentId="8" preFractionAlong="0.4472523465196122" postFractionAlong="0.09586063984832793"/>
    </projection>
    <projection id="NCXLS_M2L_MCL" presynapticPopulation="M2L" postsynapticPopulation="MCL" synapse="Acetylcholine">
      <connection id="56" preCellId="../M2L/0/M2L" postCellId="../MCL/0/MCL" preSegmentId="4" postSegmentId="2" preFractionAlong="0.4517691173956855" postFractionAlong="0.8579670912415589"/>
    </projection>
    <projection id="NCXLS_M2L_I3" presynapticPopulation="M2L" postsynapticPopulation="I3" synapse="Acetylcholine">
      <connection id="57" preCellId="../M2L/0/M2L" postCellId="../I3/0/I3" preSegmentId="9" postSegmentId="3" preFractionAlong="0.6187381412176327" postFractionAlong="0.9341944419085537"/>
    </projection>
    <projection id="NCXLS_M2L_M1" presynapticPopulation="M2L" postsynapticPopulation="M1" synapse="Acetylcholine">
      <connection id="58" preCellId="../M2L/0/M2L" postCellId="../M1/0/M1" preSegmentId="8" postSegmentId="3" preFractionAlong="0.3051938344399526" postFractionAlong="0.7965420660296458"/>
    </projection>
    <projection id="NCXLS_M2L_MI" presynapticPopulation="M2L" postsynapticPopulation="MI" synapse="Acetylcholine">
      <connection id="59" preCellId="../M2L/0/M2L" postCellId="../MI/0/MI" preSegmentId="5" postSegmentId="4" preFractionAlong="0.1635262086081204" postFractionAlong="0.09452876400049559"/>
    </projection>
    <projection id="NCXLS_M3L_I5" presynapticPopulation="M3L" postsynapticPopulation="I5" synapse="Acetylcholine">
      <connection id="60" preCellId="../M3L/0/M3L" postCellId="../I5/0/I5" preSegmentId="8" postSegmentId="5" preFractionAlong="0.46495502361773045" postFractionAlong="0.653458278205396"/>
    </projection>
    <projection id="NCXLS_M3L_NSML" presynapticPopulation="M3L" postsynapticPopulation="NSML" synapse="Acetylcholine">
      <connection id="61" preCellId="../M3L/0/M3L" postCellId="../NSML/0/NSML" preSegmentId="5" postSegmentId="1" preFractionAlong="0.4695022322743341" postFractionAlong="0.5640566733437882"/>
    </projection>
    <projection id="NCXLS_M3L_I2L" presynapticPopulation="M3L" postsynapticPopulation="I2L" synapse="Acetylcholine">
      <connection id="62" preCellId="../M3L/0/M3L" postCellId="../I2L/0/I2L" preSegmentId="5" postSegmentId="8" preFractionAlong="0.2954229842766055" postFractionAlong="0.45248707496077023"/>
    </projection>
    <projection id="NCXLS_M3L_M2R" presynapticPopulation="M3L" postsynapticPopulation="M2R" synapse="Acetylcholine">
      <connection id="63" preCellId="../M3L/0/M3L" postCellId="../M2R/0/M2R" preSegmentId="1" postSegmentId="1" preFractionAlong="0.9921971531284334" postFractionAlong="0.09918414687418287"/>
    </projection>
    <projection id="NCXLS_M3L_M3R" presynapticPopulation="M3L" postsynapticPopulation="M3R" synapse="Acetylcholine">
      <connection id="64" preCellId="../M3L/0/M3L" postCellId="../M3R/0/M3R" preSegmentId="7" postSegmentId="6" preFractionAlong="0.5305941458002693" postFractionAlong="0.06890969560318216"/>
    </projection>
    <projection id="NCXLS_M3L_I1R" presynapticPopulation="M3L" postsynapticPopulation="I1R" synapse="Acetylcholine">
      <connection id="65" preCellId="../M3L/0/M3L" postCellId="../I1R/0/I1R" preSegmentId="9" postSegmentId="6" preFractionAlong="0.8236032332153927" postFractionAlong="0.10412476243739388"/>
    </projection>
    <projection id="NCXLS_M3L_MCR" presynapticPopulation="M3L" postsynapticPopulation="MCR" synapse="Acetylcholine">
      <connection id="66" preCellId="../M3L/0/M3L" postCellId="../MCR/0/MCR" preSegmentId="9" postSegmentId="5" preFractionAlong="0.19527312117922124" postFractionAlong="0.16231986208501203"/>
    </projection>
    <projection id="NCXLS_M3L_M4" presynapticPopulation="M3L" postsynapticPopulation="M4" synapse="Acetylcholine">
      <connection id="67" preCellId="../M3L/0/M3L" postCellId="../M4/0/M4" preSegmentId="9" postSegmentId="3" preFractionAlong="0.4927829345196203" postFractionAlong="0.23778842111157128"/>
    </projection>
    <projection id="NCXLS_M3L_MCL" presynapticPopulation="M3L" postsynapticPopulation="MCL" synapse="Acetylcholine">
      <connection id="68" preCellId="../M3L/0/M3L" postCellId="../MCL/0/MCL" preSegmentId="5" postSegmentId="3" preFractionAlong="0.8875800485895678" postFractionAlong="0.25947564957181846"/>
    </projection>
    <projection id="NCXLS_M3L_I3" presynapticPopulation="M3L" postsynapticPopulation="I3" synapse="Acetylcholine">
      <connection id="69" preCellId="../M3L/0/M3L" postCellId="../I3/0/I3" preSegmentId="8" postSegmentId="6" preFractionAlong="0.1947937836376018" postFractionAlong="0.41334226414881536"/>
    </projection>
    <projection id="NCXLS_M3L_MI" presynapticPopulation="M3L" postsynapticPopulation="MI" synapse="Acetylcholine">
      <connection id="70" preCellId="../M3L/0/M3L" postCellId="../MI/0/MI" preSegmentId="6" postSegmentId="5" preFractionAlong="0.10352852963016412" postFractionAlong="0.18364384986839744"/>
    </projection>
    <projection id="NCXLS_MCR_I5" presynapticPopulation="MCR" postsynapticPopulation="I5" synapse="Acetylcholine">
      <connection id="71" preCellId="../MCR/0/MCR" postCellId="../I5/0/I5" preSegmentId="2" postSegmentId="5" preFractionAlong="0.17375569622982334" postFractionAlong="0.10966422149279831"/>
    </projection>
    <projection id="NCXLS_MCR_I2L" presynapticPopulation="MCR" postsynapticPopulation="I2L" synapse="Acetylcholine">
      <connection id="72" preCellId="../MCR/0/MCR" postCellId="../I2L/0/I2L" preSegmentId="7" postSegmentId="8" preFractionAlong="0.09024131766741716" postFractionAlong="0.284484479207302"/>
    </projection>
    <projection id="NCXLS_MCR_M2R" presynapticPopulation="MCR" postsynapticPopulation="M2R" synapse="Acetylcholine">
      <connection id="73" preCellId="../MCR/0/MCR" postCellId="../M2R/0/M2R" preSegmentId="2" postSegmentId="6" preFractionAlong="0.18622160946111532" postFractionAlong="0.31563812720065376"/>
    </projection>
    <projection id="NCXLS_MCR_M3R" presynapticPopulation="MCR" postsynapticPopulation="M3R" synapse="Acetylcholine">
      <connection id="74" preCellId="../MCR/0/MCR" postCellId="../M3R/0/M3R" preSegmentId="4" postSegmentId="7" preFractionAlong="0.6340467674692488" postFractionAlong="0.36107645054378623"/>
    </projection>
    <projection id="NCXLS_MCR_I1R" presynapticPopulation="MCR" postsynapticPopulation="I1R" synapse="Acetylcholine">
      <connection id="75" preCellId="../MCR/0/MCR" postCellId="../I1R/0/I1R" preSegmentId="3" postSegmentId="5" preFractionAlong="0.4356118578222239" postFractionAlong="0.6094151036580991"/>
    </projection>
    <projection id="NCXLS_MCR_M2L" presynapticPopulation="MCR" postsynapticPopulation="M2L" synapse="Acetylcholine">
      <connection id="76" preCellId="../MCR/0/MCR" postCellId="../M2L/0/M2L" preSegmentId="2" postSegmentId="7" preFractionAlong="0.01142518740375098" postFractionAlong="0.3132807293890614"/>
    </projection>
    <projection id="NCXLS_MCR_M4" presynapticPopulation="MCR" postsynapticPopulation="M4" synapse="Acetylcholine">
      <connection id="77" preCellId="../MCR/0/MCR" postCellId="../M4/0/M4" preSegmentId="7" postSegmentId="9" preFractionAlong="0.9345689467104553" postFractionAlong="0.23911375935981638"/>
    </projection>
    <projection id="NCXLS_MCR_MCL" presynapticPopulation="MCR" postsynapticPopulation="MCL" synapse="Acetylcholine">
      <connection id="78" preCellId="../MCR/0/MCR" postCellId="../MCL/0/MCL" preSegmentId="4" postSegmentId="3" preFractionAlong="0.8694456889989581" postFractionAlong="0.9418474940884476"/>
    </projection>
    <projection id="NCXLS_M4_I5" presynapticPopulation="M4" postsynapticPopulation="I5" synapse="Acetylcholine">
      <connection id="79" preCellId="../M4/0/M4" postCellId="../I5/0/I5" preSegmentId="6" postSegmentId="2" preFractionAlong="0.10944332710326876" postFractionAlong="0.8831855787006627"/>
    </projection>
    <projection id="NCXLS_M4_NSML" presynapticPopulation="M4" postsynapticPopulation="NSML" synapse="Acetylcholine">
      <connection id="80" preCellId="../M4/0/M4" postCellId="../NSML/0/NSML" preSegmentId="2" postSegmentId="8" preFractionAlong="0.29572390495167467" postFractionAlong="0.7602712434028337"/>
    </projection>
    <projection id="NCXLS_M4_M2R" presynapticPopulation="M4" postsynapticPopulation="M2R" synapse="Acetylcholine">
      <connection id="81" preCellId="../M4/0/M4" postCellId="../M2R/0/M2R" preSegmentId="8" postSegmentId="3" preFractionAlong="0.2949929469839797" postFractionAlong="0.008994292817431138"/>
    </projection>
    <projection id="NCXLS_M4_I6" presynapticPopulation="M4" postsynapticPopulation="I6" synapse="Acetylcholine">
      <connection id="82" preCellId="../M4/0/M4" postCellId="../I6/0/I6" preSegmentId="6" postSegmentId="5" preFractionAlong="0.11326908315892237" postFractionAlong="0.6592914727882141"/>
    </projection>
    <projection id="NCXLS_M4_I2R" presynapticPopulation="M4" postsynapticPopulation="I2R" synapse="Acetylcholine">
      <connection id="83" preCellId="../M4/0/M4" postCellId="../I2R/0/I2R" preSegmentId="1" postSegmentId="1" preFractionAlong="0.9692459342110903" postFractionAlong="0.23592308732761258"/>
    </projection>
    <projection id="NCXLS_M4_I1L" presynapticPopulation="M4" postsynapticPopulation="I1L" synapse="Acetylcholine">
      <connection id="84" preCellId="../M4/0/M4" postCellId="../I1L/0/I1L" preSegmentId="9" postSegmentId="6" preFractionAlong="0.3535532768724403" postFractionAlong="0.9004570727479824"/>
    </projection>
    <projection id="NCXLS_M4_I1R" presynapticPopulation="M4" postsynapticPopulation="I1R" synapse="Acetylcholine">
      <connection id="85" preCellId="../M4/0/M4" postCellId="../I1R/0/I1R" preSegmentId="5" postSegmentId="2" preFractionAlong="0.3029580811956363" postFractionAlong="0.22091776717589062"/>
    </projection>
    <projection id="NCXLS_M4_M2L" presynapticPopulation="M4" postsynapticPopulation="M2L" synapse="Acetylcholine">
      <connection id="86" preCellId="../M4/0/M4" postCellId="../M2L/0/M2L" preSegmentId="5" postSegmentId="6" preFractionAlong="0.6024352555904404" postFractionAlong="0.9756387190976338"/>
    </projection>
    <projection id="NCXLS_M4_MCR" presynapticPopulation="M4" postsynapticPopulation="MCR" synapse="Acetylcholine">
      <connection id="87" preCellId="../M4/0/M4" postCellId="../MCR/0/MCR" preSegmentId="5" postSegmentId="6" preFractionAlong="0.13493334296031445" postFractionAlong="0.5967782276083535"/>
    </projection>
    <projection id="NCXLS_M4_MCL" presynapticPopulation="M4" postsynapticPopulation="MCL" synapse="Acetylcholine">
      <connection id="88" preCellId="../M4/0/M4" postCellId="../MCL/0/MCL" preSegmentId="7" postSegmentId="3" preFractionAlong="0.06813426377648368" postFractionAlong="0.3020787992734968"/>
    </projection>
    <projection id="NCXLS_M4_MI" presynapticPopulation="M4" postsynapticPopulation="MI" synapse="Acetylcholine">
      <connection id="89" preCellId="../M4/0/M4" postCellId="../MI/0/MI" preSegmentId="5" postSegmentId="9" preFractionAlong="0.6632143272984561" postFractionAlong="0.4973639202167177"/>
    </projection>
    <projection id="NCXLS_MCL_NSMR" presynapticPopulation="MCL" postsynapticPopulation="NSMR" synapse="Acetylcholine">
      <connection id="90" preCellId="../MCL/0/MCL" postCellId="../NSMR/0/NSMR" preSegmentId="6" postSegmentId="8" preFractionAlong="0.8759873317074103" postFractionAlong="0.9390691921010684"/>
    </projection>
    <projection id="NCXLS_MCL_I2L" presynapticPopulation="MCL" postsynapticPopulation="I2L" synapse="Acetylcholine">
      <connection id="91" preCellId="../MCL/0/MCL" postCellId="../I2L/0/I2L" preSegmentId="2" postSegmentId="3" preFractionAlong="0.13144601664821243" postFractionAlong="0.7974489200763102"/>
    </projection>
    <projection id="NCXLS_MCL_M5" presynapticPopulation="MCL" postsynapticPopulation="M5" synapse="Acetylcholine">
      <connection id="92" preCellId="../MCL/0/MCL" postCellId="../M5/0/M5" preSegmentId="8" postSegmentId="4" preFractionAlong="0.2723534131334612" postFractionAlong="0.9927011622905122"/>
    </projection>
    <projection id="NCXLS_MCL_I4" presynapticPopulation="MCL" postsynapticPopulation="I4" synapse="Acetylcholine">
      <connection id="93" preCellId="../MCL/0/MCL" postCellId="../I4/0/I4" preSegmentId="8" postSegmentId="8" preFractionAlong="0.8788261386551978" postFractionAlong="0.3973559541060573"/>
    </projection>
    <projection id="NCXLS_MCL_M3L" presynapticPopulation="MCL" postsynapticPopulation="M3L" synapse="Acetylcholine">
      <connection id="94" preCellId="../MCL/0/MCL" postCellId="../M3L/0/M3L" preSegmentId="2" postSegmentId="9" preFractionAlong="0.22616325046035524" postFractionAlong="0.8501912818498782"/>
    </projection>
    <projection id="NCXLS_MCL_M4" presynapticPopulation="MCL" postsynapticPopulation="M4" synapse="Acetylcholine">
      <connection id="95" preCellId="../MCL/0/MCL" postCellId="../M4/0/M4" preSegmentId="5" postSegmentId="2" preFractionAlong="0.19699305583894056" postFractionAlong="0.9613247181162168"/>
    </projection>
    <projection id="NCXLS_MCL_I3" presynapticPopulation="MCL" postsynapticPopulation="I3" synapse="Acetylcholine">
      <connection id="96" preCellId="../MCL/0/MCL" postCellId="../I3/0/I3" preSegmentId="8" postSegmentId="9" preFractionAlong="0.24744361898161205" postFractionAlong="0.9438978902546958"/>
    </projection>
    <projection id="NCXLS_MCL_M1" presynapticPopulation="MCL" postsynapticPopulation="M1" synapse="Acetylcholine">
      <connection id="97" preCellId="../MCL/0/MCL" postCellId="../M1/0/M1" preSegmentId="8" postSegmentId="3" preFractionAlong="0.2842105869190634" postFractionAlong="0.062078484032036085"/>
    </projection>
    <projection id="NCXLS_M1_NSMR" presynapticPopulation="M1" postsynapticPopulation="NSMR" synapse="Acetylcholine">
      <connection id="98" preCellId="../M1/0/M1" postCellId="../NSMR/0/NSMR" preSegmentId="3" postSegmentId="9" preFractionAlong="0.3207040933635693" postFractionAlong="0.9618331662913197"/>
    </projection>
    <projection id="NCXLS_M1_NSML" presynapticPopulation="M1" postsynapticPopulation="NSML" synapse="Acetylcholine">
      <connection id="99" preCellId="../M1/0/M1" postCellId="../NSML/0/NSML" preSegmentId="8" postSegmentId="8" preFractionAlong="0.9647478149424267" postFractionAlong="0.25900207179449153"/>
    </projection>
    <projection id="NCXLS_M1_M2R" presynapticPopulation="M1" postsynapticPopulation="M2R" synapse="Glutamate">
      <connection id="100" preCellId="../M1/0/M1" postCellId="../M2R/0/M2R" preSegmentId="5" postSegmentId="2" preFractionAlong="0.6796003918250836" postFractionAlong="0.08361346903152633"/>
    </projection>
    <projection id="NCXLS_M1_I6" presynapticPopulation="M1" postsynapticPopulation="I6" synapse="Acetylcholine">
      <connection id="101" preCellId="../M1/0/M1" postCellId="../I6/0/I6" preSegmentId="1" postSegmentId="6" preFractionAlong="0.26918989119471814" postFractionAlong="0.925845948733657"/>
    </projection>
    <projection id="NCXLS_M1_I2R" presynapticPopulation="M1" postsynapticPopulation="I2R" synapse="Acetylcholine">
      <connection id="102" preCellId="../M1/0/M1" postCellId="../I2R/0/I2R" preSegmentId="5" postSegmentId="4" preFractionAlong="0.8071600782921844" postFractionAlong="0.2762273135652734"/>
    </projection>
    <projection id="NCXLS_M1_I1L" presynapticPopulation="M1" postsynapticPopulation="I1L" synapse="Acetylcholine">
      <connection id="103" preCellId="../M1/0/M1" postCellId="../I1L/0/I1L" preSegmentId="8" postSegmentId="7" preFractionAlong="0.7297354999183951" postFractionAlong="0.82014406795187"/>
    </projection>
    <projection id="NCXLS_M1_M5" presynapticPopulation="M1" postsynapticPopulation="M5" synapse="Glutamate">
      <connection id="104" preCellId="../M1/0/M1" postCellId="../M5/0/M5" preSegmentId="6" postSegmentId="3" preFractionAlong="0.3830869131145168" postFractionAlong="0.9544751330941914"/>
    </projection>
    <projection id="NCXLS_M1_I1R" presynapticPopulation="M1" postsynapticPopulation="I1R" synapse="Acetylcholine">
      <connection id="105" preCellId="../M1/0/M1" postCellId="../I1R/0/I1R" preSegmentId="3" postSegmentId="1" preFractionAlong="0.8198769118260781" postFractionAlong="0.12656502381398038"/>
    </projection>
    <projection id="NCXLS_M1_I4" presynapticPopulation="M1" postsynapticPopulation="I4" synapse="Acetylcholine">
      <connection id="106" preCellId="../M1/0/M1" postCellId="../I4/0/I4" preSegmentId="3" postSegmentId="5" preFractionAlong="0.7517418795059431" postFractionAlong="0.8413749661359962"/>
    </projection>
    <projection id="NCXLS_M1_M2L" presynapticPopulation="M1" postsynapticPopulation="M2L" synapse="Acetylcholine">
      <connection id="107" preCellId="../M1/0/M1" postCellId="../M2L/0/M2L" preSegmentId="4" postSegmentId="5" preFractionAlong="0.8459016674371129" postFractionAlong="0.8640705031454688"/>
    </projection>
    <projection id="NCXLS_M1_M3L" presynapticPopulation="M1" postsynapticPopulation="M3L" synapse="Acetylcholine">
      <connection id="108" preCellId="../M1/0/M1" postCellId="../M3L/0/M3L" preSegmentId="1" postSegmentId="6" preFractionAlong="0.24247963139561746" postFractionAlong="0.5232470752399798"/>
    </projection>
    <projection id="NCXLS_M1_MCR" presynapticPopulation="M1" postsynapticPopulation="MCR" synapse="Acetylcholine">
      <connection id="109" preCellId="../M1/0/M1" postCellId="../MCR/0/MCR" preSegmentId="2" postSegmentId="6" preFractionAlong="0.2812784500731108" postFractionAlong="0.5160052921737911"/>
    </projection>
    <projection id="NCXLS_M1_MCL" presynapticPopulation="M1" postsynapticPopulation="MCL" synapse="Acetylcholine">
      <connection id="110" preCellId="../M1/0/M1" postCellId="../MCL/0/MCL" preSegmentId="4" postSegmentId="6" preFractionAlong="0.09465438039363916" postFractionAlong="0.29669669762808615"/>
    </projection>
    <projection id="NCXLS_M1_MI" presynapticPopulation="M1" postsynapticPopulation="MI" synapse="Acetylcholine">
      <connection id="111" preCellId="../M1/0/M1" postCellId="../MI/0/MI" preSegmentId="6" postSegmentId="2" preFractionAlong="0.7445070366477197" postFractionAlong="0.5202090739563148"/>
    </projection>
    <projection id="NCXLS_MI_NSMR" presynapticPopulation="MI" postsynapticPopulation="NSMR" synapse="Acetylcholine">
      <connection id="112" preCellId="../MI/0/MI" postCellId="../NSMR/0/NSMR" preSegmentId="9" postSegmentId="2" preFractionAlong="0.2895493230822981" postFractionAlong="0.5573324247507513"/>
    </projection>
    <projection id="NCXLS_MI_I2L" presynapticPopulation="MI" postsynapticPopulation="I2L" synapse="Acetylcholine">
      <connection id="113" preCellId="../MI/0/MI" postCellId="../I2L/0/I2L" preSegmentId="1" postSegmentId="2" preFractionAlong="0.8547201364105933" postFractionAlong="0.2058392869952762"/>
    </projection>
    <projection id="NCXLS_MI_M5" presynapticPopulation="MI" postsynapticPopulation="M5" synapse="Acetylcholine">
      <connection id="114" preCellId="../MI/0/MI" postCellId="../M5/0/M5" preSegmentId="9" postSegmentId="6" preFractionAlong="0.7327618613816829" postFractionAlong="0.12507123945056908"/>
    </projection>
    <projection id="NCXLS_MI_I4" presynapticPopulation="MI" postsynapticPopulation="I4" synapse="Acetylcholine">
      <connection id="115" preCellId="../MI/0/MI" postCellId="../I4/0/I4" preSegmentId="5" postSegmentId="4" preFractionAlong="0.37985462876245213" postFractionAlong="0.7634448955760644"/>
    </projection>
    <projection id="NCXLS_MI_M3L" presynapticPopulation="MI" postsynapticPopulation="M3L" synapse="Acetylcholine">
      <connection id="116" preCellId="../MI/0/MI" postCellId="../M3L/0/M3L" preSegmentId="9" postSegmentId="1" preFractionAlong="0.662523910383704" postFractionAlong="0.0062855458685912025"/>
    </projection>
    <projection id="NCXLS_MI_M4" presynapticPopulation="MI" postsynapticPopulation="M4" synapse="Glutamate">
      <connection id="117" preCellId="../MI/0/MI" postCellId="../M4/0/M4" preSegmentId="4" postSegmentId="4" preFractionAlong="0.7084478458162832" postFractionAlong="0.7716522004189084"/>
    </projection>
    <projection id="NCXLS_MI_I3" presynapticPopulation="MI" postsynapticPopulation="I3" synapse="Glutamate">
      <connection id="118" preCellId="../MI/0/MI" postCellId="../I3/0/I3" preSegmentId="3" postSegmentId="6" preFractionAlong="0.08189252820000481" postFractionAlong="0.310293419286774"/>
    </projection>
    <projection id="NCXLS_MI_M1" presynapticPopulation="MI" postsynapticPopulation="M1" synapse="Glutamate">
      <connection id="119" preCellId="../MI/0/MI" postCellId="../M1/0/M1" preSegmentId="5" postSegmentId="8" preFractionAlong="0.36925447415014123" postFractionAlong="0.344313778651542"/>
    </projection>
    <projection id="NC_I1L_RMDDL" presynapticPopulation="I1L" postsynapticPopulation="RMDDL" synapse="Acetylcholine">
      <connection id="120" preCellId="../I1L/0/I1L" postCellId="../RMDDL/0/RMDDL" preSegmentId="7" postSegmentId="8" preFractionAlong="0.9656358287081145" postFractionAlong="0.20236356032178937"/>
    </projection>
    <projection id="NC_I1L_RMDVL" presynapticPopulation="I1L" postsynapticPopulation="RMDVL" synapse="Acetylcholine">
      <connection id="121" preCellId="../I1L/0/I1L" postCellId="../RMDVL/0/RMDVL" preSegmentId="9" postSegmentId="9" preFractionAlong="0.12026562198879953" postFractionAlong="0.07119829448553239"/>
    </projection>
    <projection id="NC_I1R_RMDDR" presynapticPopulation="I1R" postsynapticPopulation="RMDDR" synapse="Acetylcholine">
      <connection id="122" preCellId="../I1R/0/I1R" postCellId="../RMDDR/0/RMDDR" preSegmentId="5" postSegmentId="5" preFractionAlong="0.8556873679208534" postFractionAlong="0.8235527271765656"/>
    </projection>
    <projection id="NC_I1R_RMDVR" presynapticPopulation="I1R" postsynapticPopulation="RMDVR" synapse="Acetylcholine">
      <connection id="123" preCellId="../I1R/0/I1R" postCellId="../RMDVR/0/RMDVR" preSegmentId="6" postSegmentId="8" preFractionAlong="0.04827456356064708" postFractionAlong="0.18613006610838456"/>
    </projection>
    <projection id="NC_I2L_URXL" presynapticPopulation="I2L" postsynapticPopulation="URXL" synapse="Glutamate">
      <connection id="124" preCellId="../I2L/0/I2L" postCellId="../URXL/0/URXL" preSegmentId="8" postSegmentId="3" preFractionAlong="0.3584257423801488" postFractionAlong="0.905548281603916"/>
    </projection>
    <projection id="NC_I2R_URXR" presynapticPopulation="I2R" postsynapticPopulation="URXR" synapse="Glutamate">
      <connection id="125" preCellId="../I2R/0/I2R" postCellId="../URXR/0/URXR" preSegmentId="4" postSegmentId="3" preFractionAlong="0.5476857230291441" postFractionAlong="0.33441445135461234"/>
    </projection>
    <projection id="NC_AVKL_I1L" presynapticPopulation="AVKL" postsynapticPopulation="I1L" synapse="Acetylcholine">
      <connection id="126" preCellId="../AVKL/0/AVKL" postCellId="../I1L/0/I1L" preSegmentId="2" postSegmentId="8" preFractionAlong="0.012391463981169193" postFractionAlong="0.8861200114631643"/>
    </projection>
    <projection id="NC_AVKR_I1R" presynapticPopulation="AVKR" postsynapticPopulation="I1R" synapse="Acetylcholine">
      <connection id="127" preCellId="../AVKR/0/AVKR" postCellId="../I1R/0/I1R" preSegmentId="6" postSegmentId="5" preFractionAlong="0.1573581752545351" postFractionAlong="0.7011787183542708"/>
    </projection>
    <projection id="NC_RIS_I1L" presynapticPopulation="RIS" postsynapticPopulation="I1L" synapse="Glutamate">
      <connection id="128" preCellId="../RIS/0/RIS" postCellId="../I1L/0/I1L" preSegmentId="6" postSegmentId="6" preFractionAlong="0.6410663538067879" postFractionAlong="0.9287249713607529"/>
    </projection>
    <projection id="NC_RIS_I1R" presynapticPopulation="RIS" postsynapticPopulation="I1R" synapse="Glutamate">
      <connection id="129" preCellId="../RIS/0/RIS" postCellId="../I1R/0/I1R" preSegmentId="6" postSegmentId="1" preFractionAlong="0.6073087429212753" postFractionAlong="0.6156151093887886"/>
    </projection>
    <projection id="NC_AVAL_I2L" presynapticPopulation="AVAL" postsynapticPopulation="I2L" synapse="Acetylcholine">
      <connection id="130" preCellId="../AVAL/0/AVAL" postCellId="../I2L/0/I2L" preSegmentId="5" postSegmentId="3" preFractionAlong="0.5771171572259512" postFractionAlong="0.0862731577335456"/>
    </projection>
    <projection id="NC_AVAR_I2R" presynapticPopulation="AVAR" postsynapticPopulation="I2R" synapse="Acetylcholine">
      <connection id="131" preCellId="../AVAR/0/AVAR" postCellId="../I2R/0/I2R" preSegmentId="6" postSegmentId="2" preFractionAlong="0.412049225889386" postFractionAlong="0.835237316824051"/>
    </projection>
    <projection id="NC_SMBVL_I4" presynapticPopulation="SMBVL" postsynapticPopulation="I4" synapse="Acetylcholine">
      <connection id="132" preCellId="../SMBVL/0/SMBVL" postCellId="../I4/0/I4" preSegmentId="8" postSegmentId="2" preFractionAlong="0.7310663732984578" postFractionAlong="0.01900740002567136"/>
    </projection>
    <projection id="NC_SMBVR_I4" presynapticPopulation="SMBVR" postsynapticPopulation="I4" synapse="Acetylcholine">
      <connection id="133" preCellId="../SMBVR/0/SMBVR" postCellId="../I4/0/I4" preSegmentId="9" postSegmentId="4" preFractionAlong="0.26582054072262484" postFractionAlong="0.09351568246937336"/>
    </projection>
    <electricalProjection id="NCXLS_M2R_M4_GJ" presynapticPopulation="M2R" postsynapticPopulation="M4">
      <electricalConnection id="134" preCell="0" postCell="0" synapse="Generic_GJ" preSegment="8" postSegment="2" preFractionAlong="0.4982237402682267" postFractionAlong="0.347174506336289"/>
    </electricalProjection>
    <electricalProjection id="NCXLS_M2R_M1_GJ" presynapticPopulation="M2R" postsynapticPopulation="M1">
      <electricalConnection id="135" preCell="0" postCell="0" synapse="Generic_GJ" preSegment="8" postSegment="1" preFractionAlong="0.7518897916419774" postFractionAlong="0.15311353090573343"/>
    </electricalProjection>
    <electricalProjection id="NCXLS_M2L_M5_GJ" presynapticPopulation="M2L" postsynapticPopulation="M5">
      <electricalConnection id="136" preCell="0" postCell="0" synapse="Generic_GJ" preSegment="4" postSegment="8" preFractionAlong="0.8283690072301977" postFractionAlong="0.7915310711650553"/>
    </electricalProjection>
    <electricalProjection id="NCXLS_M3L_M2L_GJ" presynapticPopulation="M3L" postsynapticPopulation="M2L">
      <electricalConnection id="137" preCell="0" postCell="0" synapse="Generic_GJ" preSegment="7" postSegment="1" preFractionAlong="0.12230431629372385" postFractionAlong="0.2168342176929906"/>
    </electricalProjection>
    <electricalProjection id="NCXLS_M3L_M1_GJ" presynapticPopulation="M3L" postsynapticPopulation="M1">
      <electricalConnection id="138" preCell="0" postCell="0" synapse="Generic_GJ" preSegment="3" postSegment="7" preFractionAlong="0.6423326205578509" postFractionAlong="0.681529731124555"/>
    </electricalProjection>
    <electricalProjection id="NCXLS_MCR_NSML_GJ" presynapticPopulation="MCR" postsynapticPopulation="NSML">
      <electricalConnection id="139" preCell="0" postCell="0" synapse="Generic_GJ" preSegment="8" postSegment="9" preFractionAlong="0.6486830449042336" postFractionAlong="0.7106573770668566"/>
    </electricalProjection>
    <electricalProjection id="NCXLS_M4_M3R_GJ" presynapticPopulation="M4" postsynapticPopulation="M3R">
      <electricalConnection id="140" preCell="0" postCell="0" synapse="Generic_GJ" preSegment="3" postSegment="5" preFractionAlong="0.770011389902282" postFractionAlong="0.35947157628934157"/>
    </electricalProjection>
    <electricalProjection id="NCXLS_MI_MCL_GJ" presynapticPopulation="MI" postsynapticPopulation="MCL">
      <electricalConnection id="141" preCell="0" postCell="0" synapse="Generic_GJ" preSegment="5" postSegment="9" preFractionAlong="0.39661034205540036" postFractionAlong="0.4851029839390655"/>
    </electricalProjection>
  </network>
</neuroml>
