<?xml version='1.0' encoding='UTF-8'?>
<neuroml xmlns="http://www.neuroml.org/schema/neuroml2" xmlns:xsi="http://www.w3.org/2001/XMLSchema-instance" xsi:schemaLocation="http://www.neuroml.org/schema/neuroml2 https://raw.githubusercontent.com/NeuroML/NeuroML2/development/Schemas/NeuroML2/NeuroML_v2beta4.xsd" id="gvft_network_bio_prior_lamW_0.278_DF_0.013_t10.net">
  <notes>NeuroML2 network generated from GVFT simulation on 2025-05-04 10:20:06
</notes>
  <include href="I1L.cell.nml"/>
  <include href="I1R.cell.nml"/>
  <include href="M1.cell.nml"/>
  <include href="M2L.cell.nml"/>
  <include href="M2R.cell.nml"/>
  <include href="M3L.cell.nml"/>
  <include href="M3R.cell.nml"/>
  <include href="M4.cell.nml"/>
  <include href="MI.cell.nml"/>
  <include href="NSML.cell.nml"/>
  <include href="NSMR.cell.nml"/>
  <include href="Acetylcholine.synapse.nml"/>
  <include href="Generic_GJ.nml"/>
  <include href="Glutamate.synapse.nml"/>
  <network id="gvft_network_bio_prior_lamW_0.278_DF_0.013_t10.net" type="networkWithTemperature" temperature="20.0 degC">
    <population id="I1L" component="I1L" type="populationList" size="5">
      <instance id="0">
        <location x="-0.9698492288589478" y="0.5175879597663879" z="0.0"/>
      </instance>
      <instance id="1">
        <location x="-0.9597989916801453" y="-0.7487437129020691" z="0.0"/>
      </instance>
      <instance id="2">
        <location x="-0.7487437129020691" y="0.14572864770889282" z="0.0"/>
      </instance>
      <instance id="3">
        <location x="-0.9597989916801453" y="-0.015075387433171272" z="0.0"/>
      </instance>
      <instance id="4">
        <location x="-0.6180904507637024" y="0.6783919334411621" z="0.0"/>
      </instance>
    </population>
    <population id="I1R" component="I1R" type="populationList" size="3">
      <instance id="0">
        <location x="0.7085427045822144" y="0.39698493480682373" z="0.0"/>
      </instance>
      <instance id="1">
        <location x="-0.06532664597034454" y="0.979899525642395" z="0.0"/>
      </instance>
      <instance id="2">
        <location x="0.979899525642395" y="0.26633167266845703" z="0.0"/>
      </instance>
    </population>
    <population id="M1" component="M1" type="populationList" size="1">
      <instance id="0">
        <location x="-0.43718594312667847" y="0.8190954923629761" z="0.0"/>
      </instance>
    </population>
    <population id="M2L" component="M2L" type="populationList" size="1">
      <instance id="0">
        <location x="-0.3467336893081665" y="0.7889447212219238" z="0.0"/>
      </instance>
    </population>
    <population id="M2R" component="M2R" type="populationList" size="1">
      <instance id="0">
        <location x="-0.8492462038993835" y="-0.005025136284530163" z="0.0"/>
      </instance>
    </population>
    <population id="M3L" component="M3L" type="populationList" size="1">
      <instance id="0">
        <location x="0.07537689805030823" y="0.03517588973045349" z="0.0"/>
      </instance>
    </population>
    <population id="M3R" component="M3R" type="populationList" size="1">
      <instance id="0">
        <location x="-0.10552764683961868" y="0.7587939500808716" z="0.0"/>
      </instance>
    </population>
    <population id="M4" component="M4" type="populationList" size="1">
      <instance id="0">
        <location x="0.2763819098472595" y="0.23618091642856598" z="0.0"/>
      </instance>
    </population>
    <population id="MI" component="MI" type="populationList" size="1">
      <instance id="0">
        <location x="0.5778894424438477" y="-0.6281406879425049" z="0.0"/>
      </instance>
    </population>
    <population id="NSML" component="NSML" type="populationList" size="3">
      <instance id="0">
        <location x="-0.3467336893081665" y="0.5678392052650452" z="0.0"/>
      </instance>
      <instance id="1">
        <location x="0.4673366844654083" y="-0.7085427045822144" z="0.0"/>
      </instance>
      <instance id="2">
        <location x="0.8793969750404358" y="-0.6984924674034119" z="0.0"/>
      </instance>
    </population>
    <population id="NSMR" component="NSMR" type="populationList" size="2">
      <instance id="0">
        <location x="0.929648220539093" y="-0.19597990810871124" z="0.0"/>
      </instance>
      <instance id="1">
        <location x="0.7085427045822144" y="-0.49748745560646057" z="0.0"/>
      </instance>
    </population>
    <projection id="NCXLS_I1R_I1R" presynapticPopulation="I1R" postsynapticPopulation="I1R" synapse="Acetylcholine">
      <connection id="0" preCellId="../I1R/0/I1R" postCellId="../I1R/2/I1R" preSegmentId="3" postSegmentId="5" preFractionAlong="0.075" postFractionAlong="0.203"/>
    </projection>
    <projection id="NCXLS_M1_I1L" presynapticPopulation="M1" postsynapticPopulation="I1L" synapse="Acetylcholine">
      <connection id="1" preCellId="../M1/0/M1" postCellId="../I1L/0/I1L" preSegmentId="1" postSegmentId="2" preFractionAlong="0.864" postFractionAlong="0.217"/>
      <connection id="2" preCellId="../M1/0/M1" postCellId="../I1L/1/I1L" preSegmentId="1" postSegmentId="6" preFractionAlong="0.864" postFractionAlong="0.752"/>
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    </projection>
    <projection id="NCXLS_M1_M2R" presynapticPopulation="M1" postsynapticPopulation="M2R" synapse="Acetylcholine">
      <connection id="6" preCellId="../M1/0/M1" postCellId="../M2R/0/M2R" preSegmentId="1" postSegmentId="1" preFractionAlong="0.864" postFractionAlong="0.469"/>
    </projection>
    <projection id="NCXLS_M3L_NSML" presynapticPopulation="M3L" postsynapticPopulation="NSML" synapse="Acetylcholine">
      <connection id="7" preCellId="../M3L/0/M3L" postCellId="../NSML/0/NSML" preSegmentId="4" postSegmentId="10" preFractionAlong="0.699" postFractionAlong="0.544"/>
    </projection>
    <projection id="NCXLS_M3L_I1R" presynapticPopulation="M3L" postsynapticPopulation="I1R" synapse="Acetylcholine">
      <connection id="8" preCellId="../M3L/0/M3L" postCellId="../I1R/0/I1R" preSegmentId="4" postSegmentId="6" preFractionAlong="0.699" postFractionAlong="0.459"/>
      <connection id="9" preCellId="../M3L/0/M3L" postCellId="../I1R/1/I1R" preSegmentId="4" postSegmentId="7" preFractionAlong="0.699" postFractionAlong="0.59"/>
      <connection id="11" preCellId="../M3L/0/M3L" postCellId="../I1R/2/I1R" preSegmentId="4" postSegmentId="5" preFractionAlong="0.699" postFractionAlong="0.203"/>
    </projection>
    <electricalProjection id="NCXLS_M3L_M1_GJ" presynapticPopulation="M3L" postsynapticPopulation="M1">
      <electricalConnection id="10" preCell="0" postCell="0" synapse="Generic_GJ" preSegment="4" postSegment="8" preFractionAlong="0.699" postFractionAlong="0.291"/>
    </electricalProjection>
    <projection id="NCXLS_M3L_M3R" presynapticPopulation="M3L" postsynapticPopulation="M3R" synapse="Glutamate">
      <connection id="12" preCellId="../M3L/0/M3L" postCellId="../M3R/0/M3R" preSegmentId="4" postSegmentId="9" preFractionAlong="0.699" postFractionAlong="0.48"/>
    </projection>
    <projection id="NCXLS_M3L_M4" presynapticPopulation="M3L" postsynapticPopulation="M4" synapse="Acetylcholine">
      <connection id="13" preCellId="../M3L/0/M3L" postCellId="../M4/0/M4" preSegmentId="4" postSegmentId="2" preFractionAlong="0.699" postFractionAlong="0.687"/>
    </projection>
    <projection id="NCXLS_M3L_I1L" presynapticPopulation="M3L" postsynapticPopulation="I1L" synapse="Acetylcholine">
      <connection id="14" preCellId="../M3L/0/M3L" postCellId="../I1L/4/I1L" preSegmentId="4" postSegmentId="5" preFractionAlong="0.699" postFractionAlong="0.686"/>
    </projection>
    <projection id="NCXLS_M3L_M2L" presynapticPopulation="M3L" postsynapticPopulation="M2L" synapse="Glutamate">
      <connection id="15" preCellId="../M3L/0/M3L" postCellId="../M2L/0/M2L" preSegmentId="4" postSegmentId="5" preFractionAlong="0.699" postFractionAlong="0.962"/>
    </projection>
    <electricalProjection id="NCXLS_I1L_I1L_GJ" presynapticPopulation="I1L" postsynapticPopulation="I1L">
      <electricalConnection id="16" preCell="2" postCell="0" synapse="Generic_GJ" preSegment="8" postSegment="2" preFractionAlong="0.466" postFractionAlong="0.217"/>
      <electricalConnection id="17" preCell="2" postCell="3" synapse="Generic_GJ" preSegment="8" postSegment="5" preFractionAlong="0.466" postFractionAlong="0.91"/>
    </electricalProjection>
    <projection id="NCXLS_I1L_I1L" presynapticPopulation="I1L" postsynapticPopulation="I1L" synapse="Acetylcholine">
      <connection id="18" preCellId="../I1L/2/I1L" postCellId="../I1L/4/I1L" preSegmentId="8" postSegmentId="5" preFractionAlong="0.466" postFractionAlong="0.686"/>
      <connection id="22" preCellId="../I1L/3/I1L" postCellId="../I1L/0/I1L" preSegmentId="10" postSegmentId="2" preFractionAlong="0.121" postFractionAlong="0.217"/>
      <connection id="26" preCellId="../I1L/4/I1L" postCellId="../I1L/0/I1L" preSegmentId="3" postSegmentId="2" preFractionAlong="0.444" postFractionAlong="0.217"/>
      <connection id="27" preCellId="../I1L/4/I1L" postCellId="../I1L/3/I1L" preSegmentId="3" postSegmentId="5" preFractionAlong="0.444" postFractionAlong="0.91"/>
    </projection>
    <projection id="NCXLS_M3R_I1R" presynapticPopulation="M3R" postsynapticPopulation="I1R" synapse="Acetylcholine">
      <connection id="19" preCellId="../M3R/0/M3R" postCellId="../I1R/1/I1R" preSegmentId="10" postSegmentId="7" preFractionAlong="0.782" postFractionAlong="0.59"/>
    </projection>
    <electricalProjection id="NCXLS_M3R_M1_GJ" presynapticPopulation="M3R" postsynapticPopulation="M1">
      <electricalConnection id="20" preCell="0" postCell="0" synapse="Generic_GJ" preSegment="10" postSegment="8" preFractionAlong="0.782" postFractionAlong="0.291"/>
    </electricalProjection>
    <electricalProjection id="NCXLS_M3R_M2L_GJ" presynapticPopulation="M3R" postsynapticPopulation="M2L">
      <electricalConnection id="21" preCell="0" postCell="0" synapse="Generic_GJ" preSegment="10" postSegment="5" preFractionAlong="0.782" postFractionAlong="0.962"/>
    </electricalProjection>
    <projection id="NCXLS_M4_I1R" presynapticPopulation="M4" postsynapticPopulation="I1R" synapse="Acetylcholine">
      <connection id="23" preCellId="../M4/0/M4" postCellId="../I1R/0/I1R" preSegmentId="8" postSegmentId="6" preFractionAlong="0.777" postFractionAlong="0.459"/>
      <connection id="24" preCellId="../M4/0/M4" postCellId="../I1R/2/I1R" preSegmentId="8" postSegmentId="5" preFractionAlong="0.777" postFractionAlong="0.203"/>
    </projection>
    <projection id="NCXLS_M4_NSMR" presynapticPopulation="M4" postsynapticPopulation="NSMR" synapse="Acetylcholine">
      <connection id="25" preCellId="../M4/0/M4" postCellId="../NSMR/0/NSMR" preSegmentId="8" postSegmentId="1" preFractionAlong="0.777" postFractionAlong="0.995"/>
    </projection>
    <projection id="NCXLS_M2L_I1L" presynapticPopulation="M2L" postsynapticPopulation="I1L" synapse="Acetylcholine">
      <connection id="28" preCellId="../M2L/0/M2L" postCellId="../I1L/0/I1L" preSegmentId="8" postSegmentId="2" preFractionAlong="0.001" postFractionAlong="0.217"/>
      <connection id="29" preCellId="../M2L/0/M2L" postCellId="../I1L/1/I1L" preSegmentId="8" postSegmentId="6" preFractionAlong="0.001" postFractionAlong="0.752"/>
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    </projection>
    <electricalProjection id="NCXLS_M2L_M1_GJ" presynapticPopulation="M2L" postsynapticPopulation="M1">
      <electricalConnection id="30" preCell="0" postCell="0" synapse="Generic_GJ" preSegment="8" postSegment="8" preFractionAlong="0.001" postFractionAlong="0.291"/>
    </electricalProjection>
    <electricalProjection id="NCXLS_M2L_M2R_GJ" presynapticPopulation="M2L" postsynapticPopulation="M2R">
      <electricalConnection id="34" preCell="0" postCell="0" synapse="Generic_GJ" preSegment="8" postSegment="1" preFractionAlong="0.001" postFractionAlong="0.469"/>
    </electricalProjection>
    <projection id="NCXLS_M2R_I1L" presynapticPopulation="M2R" postsynapticPopulation="I1L" synapse="Acetylcholine">
      <connection id="35" preCellId="../M2R/0/M2R" postCellId="../I1L/0/I1L" preSegmentId="6" postSegmentId="2" preFractionAlong="0.854" postFractionAlong="0.217"/>
      <connection id="36" preCellId="../M2R/0/M2R" postCellId="../I1L/3/I1L" preSegmentId="6" postSegmentId="5" preFractionAlong="0.854" postFractionAlong="0.91"/>
    </projection>
    <projection id="NCXLS_MI_NSML" presynapticPopulation="MI" postsynapticPopulation="NSML" synapse="Acetylcholine">
      <connection id="37" preCellId="../MI/0/MI" postCellId="../NSML/1/NSML" preSegmentId="5" postSegmentId="5" preFractionAlong="0.5" postFractionAlong="0.554"/>
      <connection id="38" preCellId="../MI/0/MI" postCellId="../NSML/2/NSML" preSegmentId="5" postSegmentId="10" preFractionAlong="0.5" postFractionAlong="0.724"/>
    </projection>
  </network>
</neuroml>
