<?xml version='1.0' encoding='UTF-8'?>
<neuroml xmlns="http://www.neuroml.org/schema/neuroml2" xmlns:xsi="http://www.w3.org/2001/XMLSchema-instance" xsi:schemaLocation="http://www.neuroml.org/schema/neuroml2 https://raw.githubusercontent.com/NeuroML/NeuroML2/development/Schemas/NeuroML2/NeuroML_v2beta4.xsd" id="gvft_network_bio_prior_lamW_0.278_DF_0.013_t40.net">
  <notes>NeuroML2 network generated from GVFT simulation on 2025-05-04 10:20:12
</notes>
  <include href="I1L.cell.nml"/>
  <include href="I1R.cell.nml"/>
  <include href="I2L.cell.nml"/>
  <include href="I2R.cell.nml"/>
  <include href="I3.cell.nml"/>
  <include href="M1.cell.nml"/>
  <include href="M2L.cell.nml"/>
  <include href="M2R.cell.nml"/>
  <include href="MI.cell.nml"/>
  <include href="NSML.cell.nml"/>
  <include href="NSMR.cell.nml"/>
  <include href="Acetylcholine.synapse.nml"/>
  <include href="Generic_GJ.nml"/>
  <include href="Glutamate.synapse.nml"/>
  <include href="Serotonin_Glutamate.synapse.nml"/>
  <network id="gvft_network_bio_prior_lamW_0.278_DF_0.013_t40.net" type="networkWithTemperature" temperature="20.0 degC">
    <population id="I1L" component="I1L" type="populationList" size="1">
      <instance id="0">
        <location x="0.6482412219047546" y="-0.20603016018867493" z="0.0"/>
      </instance>
    </population>
    <population id="I1R" component="I1R" type="populationList" size="1">
      <instance id="0">
        <location x="0.839195966720581" y="-0.6180904507637024" z="0.0"/>
      </instance>
    </population>
    <population id="I2L" component="I2L" type="populationList" size="4">
      <instance id="0">
        <location x="-0.43718594312667847" y="0.6482412219047546" z="0.0"/>
      </instance>
      <instance id="1">
        <location x="-0.7989949584007263" y="0.979899525642395" z="0.0"/>
      </instance>
      <instance id="2">
        <location x="-0.9396985173225403" y="0.5979899764060974" z="0.0"/>
      </instance>
      <instance id="3">
        <location x="-0.7185929417610168" y="0.4070351719856262" z="0.0"/>
      </instance>
    </population>
    <population id="I2R" component="I2R" type="populationList" size="1">
      <instance id="0">
        <location x="0.2261306643486023" y="-0.5678392052650452" z="0.0"/>
      </instance>
    </population>
    <population id="I3" component="I3" type="populationList" size="1">
      <instance id="0">
        <location x="-0.10552764683961868" y="-0.7989949584007263" z="0.0"/>
      </instance>
    </population>
    <population id="M1" component="M1" type="populationList" size="1">
      <instance id="0">
        <location x="-0.4170854389667511" y="-0.015075387433171272" z="0.0"/>
      </instance>
    </population>
    <population id="M2L" component="M2L" type="populationList" size="1">
      <instance id="0">
        <location x="0.10552764683961868" y="0.5477386713027954" z="0.0"/>
      </instance>
    </population>
    <population id="M2R" component="M2R" type="populationList" size="3">
      <instance id="0">
        <location x="-0.30653268098831177" y="-0.356783926486969" z="0.0"/>
      </instance>
      <instance id="1">
        <location x="-0.13567839562892914" y="-0.23618091642856598" z="0.0"/>
      </instance>
      <instance id="2">
        <location x="0.39698493480682373" y="-0.06532664597034454" z="0.0"/>
      </instance>
    </population>
    <population id="MI" component="MI" type="populationList" size="2">
      <instance id="0">
        <location x="0.2261306643486023" y="0.3467336893081665" z="0.0"/>
      </instance>
      <instance id="1">
        <location x="-0.045226141810417175" y="0.2261306643486023" z="0.0"/>
      </instance>
    </population>
    <population id="NSML" component="NSML" type="populationList" size="3">
      <instance id="0">
        <location x="0.8793969750404358" y="0.4070351719856262" z="0.0"/>
      </instance>
      <instance id="1">
        <location x="0.839195966720581" y="0.6884422302246094" z="0.0"/>
      </instance>
      <instance id="2">
        <location x="0.6080402135848999" y="0.5577889680862427" z="0.0"/>
      </instance>
    </population>
    <population id="NSMR" component="NSMR" type="populationList" size="2">
      <instance id="0">
        <location x="-0.43718594312667847" y="-0.03517588973045349" z="0.0"/>
      </instance>
      <instance id="1">
        <location x="-0.25628140568733215" y="0.23618091642856598" z="0.0"/>
      </instance>
    </population>
    <projection id="NCXLS_M1_I2L" presynapticPopulation="M1" postsynapticPopulation="I2L" synapse="Acetylcholine">
      <connection id="0" preCellId="../M1/0/M1" postCellId="../I2L/1/I2L" preSegmentId="1" postSegmentId="2" preFractionAlong="0.864" postFractionAlong="0.204"/>
      <connection id="2" preCellId="../M1/0/M1" postCellId="../I2L/2/I2L" preSegmentId="1" postSegmentId="4" preFractionAlong="0.864" postFractionAlong="0.568"/>
      <connection id="3" preCellId="../M1/0/M1" postCellId="../I2L/3/I2L" preSegmentId="1" postSegmentId="4" preFractionAlong="0.864" postFractionAlong="0.81"/>
    </projection>
    <projection id="NCXLS_M1_NSMR" presynapticPopulation="M1" postsynapticPopulation="NSMR" synapse="Acetylcholine">
      <connection id="1" preCellId="../M1/0/M1" postCellId="../NSMR/0/NSMR" preSegmentId="1" postSegmentId="1" preFractionAlong="0.864" postFractionAlong="0.995"/>
    </projection>
    <projection id="NCXLS_NSMR_I2L" presynapticPopulation="NSMR" postsynapticPopulation="I2L" synapse="Serotonin_Glutamate">
      <connection id="4" preCellId="../NSMR/0/NSMR" postCellId="../I2L/1/I2L" preSegmentId="10" postSegmentId="2" preFractionAlong="0.339" postFractionAlong="0.204"/>
      <connection id="5" preCellId="../NSMR/0/NSMR" postCellId="../I2L/2/I2L" preSegmentId="10" postSegmentId="4" preFractionAlong="0.339" postFractionAlong="0.568"/>
      <connection id="6" preCellId="../NSMR/0/NSMR" postCellId="../I2L/3/I2L" preSegmentId="10" postSegmentId="4" preFractionAlong="0.339" postFractionAlong="0.81"/>
    </projection>
    <projection id="NCXLS_M2R_I1L" presynapticPopulation="M2R" postsynapticPopulation="I1L" synapse="Acetylcholine">
      <connection id="7" preCellId="../M2R/0/M2R" postCellId="../I1L/0/I1L" preSegmentId="6" postSegmentId="2" preFractionAlong="0.854" postFractionAlong="0.217"/>
    </projection>
    <projection id="NCXLS_M2R_I2R" presynapticPopulation="M2R" postsynapticPopulation="I2R" synapse="Acetylcholine">
      <connection id="8" preCellId="../M2R/0/M2R" postCellId="../I2R/0/I2R" preSegmentId="6" postSegmentId="9" preFractionAlong="0.854" postFractionAlong="0.207"/>
      <connection id="39" preCellId="../M2R/2/M2R" postCellId="../I2R/0/I2R" preSegmentId="1" postSegmentId="9" preFractionAlong="0.863" postFractionAlong="0.207"/>
    </projection>
    <projection id="NCXLS_M2R_I1R" presynapticPopulation="M2R" postsynapticPopulation="I1R" synapse="Acetylcholine">
      <connection id="9" preCellId="../M2R/0/M2R" postCellId="../I1R/0/I1R" preSegmentId="6" postSegmentId="6" preFractionAlong="0.854" postFractionAlong="0.459"/>
    </projection>
    <projection id="NCXLS_M2R_I3" presynapticPopulation="M2R" postsynapticPopulation="I3" synapse="Acetylcholine">
      <connection id="10" preCellId="../M2R/0/M2R" postCellId="../I3/0/I3" preSegmentId="6" postSegmentId="7" preFractionAlong="0.854" postFractionAlong="0.388"/>
      <connection id="15" preCellId="../M2R/1/M2R" postCellId="../I3/0/I3" preSegmentId="9" postSegmentId="7" preFractionAlong="0.163" postFractionAlong="0.388"/>
      <connection id="46" preCellId="../M2R/2/M2R" postCellId="../I3/0/I3" preSegmentId="1" postSegmentId="7" preFractionAlong="0.863" postFractionAlong="0.388"/>
    </projection>
    <projection id="NCXLS_M2R_M2R" presynapticPopulation="M2R" postsynapticPopulation="M2R" synapse="Glutamate">
      <connection id="11" preCellId="../M2R/0/M2R" postCellId="../M2R/2/M2R" preSegmentId="6" postSegmentId="7" preFractionAlong="0.854" postFractionAlong="0.184"/>
    </projection>
    <projection id="NCXLS_M2R_M1" presynapticPopulation="M2R" postsynapticPopulation="M1" synapse="Acetylcholine">
      <connection id="12" preCellId="../M2R/1/M2R" postCellId="../M1/0/M1" preSegmentId="9" postSegmentId="8" preFractionAlong="0.163" postFractionAlong="0.291"/>
    </projection>
    <projection id="NCXLS_M2R_NSMR" presynapticPopulation="M2R" postsynapticPopulation="NSMR" synapse="Acetylcholine">
      <connection id="13" preCellId="../M2R/1/M2R" postCellId="../NSMR/0/NSMR" preSegmentId="9" postSegmentId="1" preFractionAlong="0.163" postFractionAlong="0.995"/>
      <connection id="37" preCellId="../M2R/2/M2R" postCellId="../NSMR/0/NSMR" preSegmentId="1" postSegmentId="1" preFractionAlong="0.863" postFractionAlong="0.995"/>
      <connection id="41" preCellId="../M2R/2/M2R" postCellId="../NSMR/1/NSMR" preSegmentId="1" postSegmentId="4" preFractionAlong="0.863" postFractionAlong="0.183"/>
    </projection>
    <projection id="NCXLS_M2R_M2R" presynapticPopulation="M2R" postsynapticPopulation="M2R" synapse="Acetylcholine">
      <connection id="14" preCellId="../M2R/1/M2R" postCellId="../M2R/0/M2R" preSegmentId="9" postSegmentId="1" preFractionAlong="0.163" postFractionAlong="0.469"/>
      <connection id="40" preCellId="../M2R/2/M2R" postCellId="../M2R/0/M2R" preSegmentId="1" postSegmentId="1" preFractionAlong="0.863" postFractionAlong="0.469"/>
    </projection>
    <projection id="NCXLS_M2L_I2L" presynapticPopulation="M2L" postsynapticPopulation="I2L" synapse="Acetylcholine">
      <connection id="16" preCellId="../M2L/0/M2L" postCellId="../I2L/0/I2L" preSegmentId="8" postSegmentId="8" preFractionAlong="0.001" postFractionAlong="0.031"/>
      <connection id="17" preCellId="../M2L/0/M2L" postCellId="../I2L/1/I2L" preSegmentId="8" postSegmentId="2" preFractionAlong="0.001" postFractionAlong="0.204"/>
      <connection id="18" preCellId="../M2L/0/M2L" postCellId="../I2L/2/I2L" preSegmentId="8" postSegmentId="4" preFractionAlong="0.001" postFractionAlong="0.568"/>
      <connection id="19" preCellId="../M2L/0/M2L" postCellId="../I2L/3/I2L" preSegmentId="8" postSegmentId="4" preFractionAlong="0.001" postFractionAlong="0.81"/>
    </projection>
    <projection id="NCXLS_MI_I1L" presynapticPopulation="MI" postsynapticPopulation="I1L" synapse="Acetylcholine">
      <connection id="20" preCellId="../MI/0/MI" postCellId="../I1L/0/I1L" preSegmentId="5" postSegmentId="2" preFractionAlong="0.5" postFractionAlong="0.217"/>
      <connection id="25" preCellId="../MI/1/MI" postCellId="../I1L/0/I1L" preSegmentId="6" postSegmentId="2" preFractionAlong="0.858" postFractionAlong="0.217"/>
    </projection>
    <projection id="NCXLS_MI_NSML" presynapticPopulation="MI" postsynapticPopulation="NSML" synapse="Acetylcholine">
      <connection id="21" preCellId="../MI/0/MI" postCellId="../NSML/0/NSML" preSegmentId="5" postSegmentId="10" preFractionAlong="0.5" postFractionAlong="0.544"/>
      <connection id="22" preCellId="../MI/0/MI" postCellId="../NSML/1/NSML" preSegmentId="5" postSegmentId="5" preFractionAlong="0.5" postFractionAlong="0.554"/>
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    </projection>
    <projection id="NCXLS_MI_I1R" presynapticPopulation="MI" postsynapticPopulation="I1R" synapse="Acetylcholine">
      <connection id="23" preCellId="../MI/0/MI" postCellId="../I1R/0/I1R" preSegmentId="5" postSegmentId="6" preFractionAlong="0.5" postFractionAlong="0.459"/>
      <connection id="30" preCellId="../MI/1/MI" postCellId="../I1R/0/I1R" preSegmentId="6" postSegmentId="6" preFractionAlong="0.858" postFractionAlong="0.459"/>
    </projection>
    <projection id="NCXLS_MI_I2R" presynapticPopulation="MI" postsynapticPopulation="I2R" synapse="Acetylcholine">
      <connection id="28" preCellId="../MI/1/MI" postCellId="../I2R/0/I2R" preSegmentId="6" postSegmentId="9" preFractionAlong="0.858" postFractionAlong="0.207"/>
    </projection>
    <projection id="NCXLS_MI_M2L" presynapticPopulation="MI" postsynapticPopulation="M2L" synapse="Glutamate">
      <connection id="29" preCellId="../MI/1/MI" postCellId="../M2L/0/M2L" preSegmentId="6" postSegmentId="5" preFractionAlong="0.858" postFractionAlong="0.962"/>
    </projection>
    <projection id="NCXLS_MI_MI" presynapticPopulation="MI" postsynapticPopulation="MI" synapse="Acetylcholine">
      <connection id="31" preCellId="../MI/1/MI" postCellId="../MI/0/MI" preSegmentId="6" postSegmentId="2" preFractionAlong="0.858" postFractionAlong="0.685"/>
    </projection>
    <projection id="NCXLS_MI_M2R" presynapticPopulation="MI" postsynapticPopulation="M2R" synapse="Acetylcholine">
      <connection id="33" preCellId="../MI/1/MI" postCellId="../M2R/2/M2R" preSegmentId="6" postSegmentId="7" preFractionAlong="0.858" postFractionAlong="0.184"/>
    </projection>
    <projection id="NCXLS_M2R_I2L" presynapticPopulation="M2R" postsynapticPopulation="I2L" synapse="Acetylcholine">
      <connection id="34" preCellId="../M2R/2/M2R" postCellId="../I2L/0/I2L" preSegmentId="1" postSegmentId="8" preFractionAlong="0.863" postFractionAlong="0.031"/>
      <connection id="36" preCellId="../M2R/2/M2R" postCellId="../I2L/1/I2L" preSegmentId="1" postSegmentId="2" preFractionAlong="0.863" postFractionAlong="0.204"/>
      <connection id="38" preCellId="../M2R/2/M2R" postCellId="../I2L/2/I2L" preSegmentId="1" postSegmentId="4" preFractionAlong="0.863" postFractionAlong="0.568"/>
      <connection id="43" preCellId="../M2R/2/M2R" postCellId="../I2L/3/I2L" preSegmentId="1" postSegmentId="4" preFractionAlong="0.863" postFractionAlong="0.81"/>
    </projection>
    <electricalProjection id="NCXLS_M2R_M1_GJ" presynapticPopulation="M2R" postsynapticPopulation="M1">
      <electricalConnection id="35" preCell="2" postCell="0" synapse="Generic_GJ" preSegment="1" postSegment="8" preFractionAlong="0.863" postFractionAlong="0.291"/>
    </electricalProjection>
    <electricalProjection id="NCXLS_M2R_M2R_GJ" presynapticPopulation="M2R" postsynapticPopulation="M2R">
      <electricalConnection id="42" preCell="2" postCell="1" synapse="Generic_GJ" preSegment="1" postSegment="10" preFractionAlong="0.863" postFractionAlong="0.348"/>
    </electricalProjection>
    <projection id="NCXLS_M2R_M2L" presynapticPopulation="M2R" postsynapticPopulation="M2L" synapse="Acetylcholine">
      <connection id="44" preCellId="../M2R/2/M2R" postCellId="../M2L/0/M2L" preSegmentId="1" postSegmentId="5" preFractionAlong="0.863" postFractionAlong="0.962"/>
    </projection>
    <electricalProjection id="NCXLS_M2R_MI_GJ" presynapticPopulation="M2R" postsynapticPopulation="MI">
      <electricalConnection id="45" preCell="2" postCell="1" synapse="Generic_GJ" preSegment="1" postSegment="3" preFractionAlong="0.863" postFractionAlong="0.384"/>
    </electricalProjection>
  </network>
</neuroml>
