<?xml version='1.0' encoding='UTF-8'?>
<neuroml xmlns="http://www.neuroml.org/schema/neuroml2" xmlns:xsi="http://www.w3.org/2001/XMLSchema-instance" xsi:schemaLocation="http://www.neuroml.org/schema/neuroml2 https://raw.githubusercontent.com/NeuroML/NeuroML2/development/Schemas/NeuroML2/NeuroML_v2beta4.xsd" id="gvft_network_bio_prior_lamW_0.278_DF_0.013_t90.net">
  <notes>NeuroML2 network generated from GVFT simulation on 2025-05-04 10:20:25
</notes>
  <include href="I1L.cell.nml"/>
  <include href="I1R.cell.nml"/>
  <include href="I2L.cell.nml"/>
  <include href="M1.cell.nml"/>
  <include href="M2L.cell.nml"/>
  <include href="M2R.cell.nml"/>
  <include href="M3L.cell.nml"/>
  <include href="M3R.cell.nml"/>
  <include href="M4.cell.nml"/>
  <include href="NSML.cell.nml"/>
  <include href="NSMR.cell.nml"/>
  <include href="Acetylcholine.synapse.nml"/>
  <include href="Generic_GJ.nml"/>
  <include href="Glutamate.synapse.nml"/>
  <include href="Serotonin_Glutamate.synapse.nml"/>
  <network id="gvft_network_bio_prior_lamW_0.278_DF_0.013_t90.net" type="networkWithTemperature" temperature="20.0 degC">
    <population id="I1L" component="I1L" type="populationList" size="1">
      <instance id="0">
        <location x="0.7788944840431213" y="0.5175879597663879" z="0.0"/>
      </instance>
    </population>
    <population id="I1R" component="I1R" type="populationList" size="3">
      <instance id="0">
        <location x="0.7788944840431213" y="-0.8693467378616333" z="0.0"/>
      </instance>
      <instance id="1">
        <location x="0.5979899764060974" y="-0.44723618030548096" z="0.0"/>
      </instance>
      <instance id="2">
        <location x="0.6582914590835571" y="-0.8090452551841736" z="0.0"/>
      </instance>
    </population>
    <population id="I2L" component="I2L" type="populationList" size="4">
      <instance id="0">
        <location x="-0.8994975090026855" y="0.9195979833602905" z="0.0"/>
      </instance>
      <instance id="1">
        <location x="-0.8190954923629761" y="0.6381909847259521" z="0.0"/>
      </instance>
      <instance id="2">
        <location x="-0.5477386713027954" y="-0.4170854389667511" z="0.0"/>
      </instance>
      <instance id="3">
        <location x="-0.9698492288589478" y="-0.005025136284530163" z="0.0"/>
      </instance>
    </population>
    <population id="M1" component="M1" type="populationList" size="2">
      <instance id="0">
        <location x="0.5678392052650452" y="0.2864321768283844" z="0.0"/>
      </instance>
      <instance id="1">
        <location x="-0.03517588973045349" y="0.10552764683961868" z="0.0"/>
      </instance>
    </population>
    <population id="M2L" component="M2L" type="populationList" size="1">
      <instance id="0">
        <location x="0.8090452551841736" y="-0.14572864770889282" z="0.0"/>
      </instance>
    </population>
    <population id="M2R" component="M2R" type="populationList" size="1">
      <instance id="0">
        <location x="0.6381909847259521" y="0.26633167266845703" z="0.0"/>
      </instance>
    </population>
    <population id="M3L" component="M3L" type="populationList" size="1">
      <instance id="0">
        <location x="-0.4070351719856262" y="-0.43718594312667847" z="0.0"/>
      </instance>
    </population>
    <population id="M3R" component="M3R" type="populationList" size="1">
      <instance id="0">
        <location x="-0.6683416962623596" y="0.6884422302246094" z="0.0"/>
      </instance>
    </population>
    <population id="M4" component="M4" type="populationList" size="1">
      <instance id="0">
        <location x="0.19597990810871124" y="0.4271356761455536" z="0.0"/>
      </instance>
    </population>
    <population id="NSML" component="NSML" type="populationList" size="3">
      <instance id="0">
        <location x="0.32663318514823914" y="0.095477394759655" z="0.0"/>
      </instance>
      <instance id="1">
        <location x="0.095477394759655" y="-0.5778894424438477" z="0.0"/>
      </instance>
      <instance id="2">
        <location x="-0.3668341636657715" y="0.5577889680862427" z="0.0"/>
      </instance>
    </population>
    <population id="NSMR" component="NSMR" type="populationList" size="2">
      <instance id="0">
        <location x="0.9597989916801453" y="1.0" z="0.0"/>
      </instance>
      <instance id="1">
        <location x="-0.24623116850852966" y="-0.32663318514823914" z="0.0"/>
      </instance>
    </population>
    <projection id="NCXLS_M1_I1L" presynapticPopulation="M1" postsynapticPopulation="I1L" synapse="Acetylcholine">
      <connection id="0" preCellId="../M1/0/M1" postCellId="../I1L/0/I1L" preSegmentId="1" postSegmentId="2" preFractionAlong="0.864" postFractionAlong="0.217"/>
      <connection id="32" preCellId="../M1/1/M1" postCellId="../I1L/0/I1L" preSegmentId="9" postSegmentId="2" preFractionAlong="0.979" postFractionAlong="0.217"/>
    </projection>
    <projection id="NCXLS_M1_NSMR" presynapticPopulation="M1" postsynapticPopulation="NSMR" synapse="Acetylcholine">
      <connection id="1" preCellId="../M1/0/M1" postCellId="../NSMR/0/NSMR" preSegmentId="1" postSegmentId="1" preFractionAlong="0.864" postFractionAlong="0.995"/>
    </projection>
    <projection id="NCXLS_NSML_I1R" presynapticPopulation="NSML" postsynapticPopulation="I1R" synapse="Serotonin_Glutamate">
      <connection id="2" preCellId="../NSML/1/NSML" postCellId="../I1R/0/I1R" preSegmentId="5" postSegmentId="6" preFractionAlong="0.574" postFractionAlong="0.459"/>
      <connection id="3" preCellId="../NSML/1/NSML" postCellId="../I1R/2/I1R" preSegmentId="5" postSegmentId="5" preFractionAlong="0.574" postFractionAlong="0.203"/>
    </projection>
    <projection id="NCXLS_M3L_I2L" presynapticPopulation="M3L" postsynapticPopulation="I2L" synapse="Acetylcholine">
      <connection id="4" preCellId="../M3L/0/M3L" postCellId="../I2L/2/I2L" preSegmentId="4" postSegmentId="4" preFractionAlong="0.699" postFractionAlong="0.568"/>
      <connection id="5" preCellId="../M3L/0/M3L" postCellId="../I2L/3/I2L" preSegmentId="4" postSegmentId="4" preFractionAlong="0.699" postFractionAlong="0.81"/>
    </projection>
    <projection id="NCXLS_M3R_I2L" presynapticPopulation="M3R" postsynapticPopulation="I2L" synapse="Acetylcholine">
      <connection id="6" preCellId="../M3R/0/M3R" postCellId="../I2L/0/I2L" preSegmentId="10" postSegmentId="8" preFractionAlong="0.782" postFractionAlong="0.031"/>
      <connection id="7" preCellId="../M3R/0/M3R" postCellId="../I2L/1/I2L" preSegmentId="10" postSegmentId="2" preFractionAlong="0.782" postFractionAlong="0.204"/>
    </projection>
    <projection id="NCXLS_M2L_NSML" presynapticPopulation="M2L" postsynapticPopulation="NSML" synapse="Acetylcholine">
      <connection id="8" preCellId="../M2L/0/M2L" postCellId="../NSML/1/NSML" preSegmentId="8" postSegmentId="5" preFractionAlong="0.001" postFractionAlong="0.554"/>
    </projection>
    <projection id="NCXLS_M2L_M3L" presynapticPopulation="M2L" postsynapticPopulation="M3L" synapse="Acetylcholine">
      <connection id="9" preCellId="../M2L/0/M2L" postCellId="../M3L/0/M3L" preSegmentId="8" postSegmentId="1" preFractionAlong="0.001" postFractionAlong="0.675"/>
    </projection>
    <projection id="NCXLS_M2L_NSMR" presynapticPopulation="M2L" postsynapticPopulation="NSMR" synapse="Acetylcholine">
      <connection id="10" preCellId="../M2L/0/M2L" postCellId="../NSMR/1/NSMR" preSegmentId="8" postSegmentId="4" preFractionAlong="0.001" postFractionAlong="0.183"/>
    </projection>
    <projection id="NCXLS_M2L_I1R" presynapticPopulation="M2L" postsynapticPopulation="I1R" synapse="Acetylcholine">
      <connection id="11" preCellId="../M2L/0/M2L" postCellId="../I1R/0/I1R" preSegmentId="8" postSegmentId="6" preFractionAlong="0.001" postFractionAlong="0.459"/>
      <connection id="13" preCellId="../M2L/0/M2L" postCellId="../I1R/1/I1R" preSegmentId="8" postSegmentId="7" preFractionAlong="0.001" postFractionAlong="0.59"/>
      <connection id="14" preCellId="../M2L/0/M2L" postCellId="../I1R/2/I1R" preSegmentId="8" postSegmentId="5" preFractionAlong="0.001" postFractionAlong="0.203"/>
    </projection>
    <projection id="NCXLS_M2L_I2L" presynapticPopulation="M2L" postsynapticPopulation="I2L" synapse="Acetylcholine">
      <connection id="12" preCellId="../M2L/0/M2L" postCellId="../I2L/2/I2L" preSegmentId="8" postSegmentId="4" preFractionAlong="0.001" postFractionAlong="0.568"/>
    </projection>
    <projection id="NCXLS_M4_I2L" presynapticPopulation="M4" postsynapticPopulation="I2L" synapse="Acetylcholine">
      <connection id="15" preCellId="../M4/0/M4" postCellId="../I2L/0/I2L" preSegmentId="8" postSegmentId="8" preFractionAlong="0.777" postFractionAlong="0.031"/>
      <connection id="17" preCellId="../M4/0/M4" postCellId="../I2L/1/I2L" preSegmentId="8" postSegmentId="2" preFractionAlong="0.777" postFractionAlong="0.204"/>
      <connection id="19" preCellId="../M4/0/M4" postCellId="../I2L/2/I2L" preSegmentId="8" postSegmentId="4" preFractionAlong="0.777" postFractionAlong="0.568"/>
      <connection id="20" preCellId="../M4/0/M4" postCellId="../I2L/3/I2L" preSegmentId="8" postSegmentId="4" preFractionAlong="0.777" postFractionAlong="0.81"/>
    </projection>
    <electricalProjection id="NCXLS_M4_M3R_GJ" presynapticPopulation="M4" postsynapticPopulation="M3R">
      <electricalConnection id="16" preCell="0" postCell="0" synapse="Generic_GJ" preSegment="8" postSegment="9" preFractionAlong="0.777" postFractionAlong="0.48"/>
    </electricalProjection>
    <projection id="NCXLS_M4_NSML" presynapticPopulation="M4" postsynapticPopulation="NSML" synapse="Acetylcholine">
      <connection id="18" preCellId="../M4/0/M4" postCellId="../NSML/2/NSML" preSegmentId="8" postSegmentId="10" preFractionAlong="0.777" postFractionAlong="0.724"/>
    </projection>
    <projection id="NCXLS_M2R_M2L" presynapticPopulation="M2R" postsynapticPopulation="M2L" synapse="Acetylcholine">
      <connection id="21" preCellId="../M2R/0/M2R" postCellId="../M2L/0/M2L" preSegmentId="6" postSegmentId="5" preFractionAlong="0.854" postFractionAlong="0.962"/>
    </projection>
    <projection id="NCXLS_M2R_I1R" presynapticPopulation="M2R" postsynapticPopulation="I1R" synapse="Acetylcholine">
      <connection id="22" preCellId="../M2R/0/M2R" postCellId="../I1R/0/I1R" preSegmentId="6" postSegmentId="6" preFractionAlong="0.854" postFractionAlong="0.459"/>
      <connection id="23" preCellId="../M2R/0/M2R" postCellId="../I1R/1/I1R" preSegmentId="6" postSegmentId="7" preFractionAlong="0.854" postFractionAlong="0.59"/>
      <connection id="24" preCellId="../M2R/0/M2R" postCellId="../I1R/2/I1R" preSegmentId="6" postSegmentId="5" preFractionAlong="0.854" postFractionAlong="0.203"/>
    </projection>
    <projection id="NCXLS_M1_M1" presynapticPopulation="M1" postsynapticPopulation="M1" synapse="Glutamate">
      <connection id="25" preCellId="../M1/1/M1" postCellId="../M1/0/M1" preSegmentId="9" postSegmentId="8" preFractionAlong="0.979" postFractionAlong="0.291"/>
    </projection>
    <projection id="NCXLS_M1_NSML" presynapticPopulation="M1" postsynapticPopulation="NSML" synapse="Acetylcholine">
      <connection id="26" preCellId="../M1/1/M1" postCellId="../NSML/1/NSML" preSegmentId="9" postSegmentId="5" preFractionAlong="0.979" postFractionAlong="0.554"/>
      <connection id="28" preCellId="../M1/1/M1" postCellId="../NSML/0/NSML" preSegmentId="9" postSegmentId="10" preFractionAlong="0.979" postFractionAlong="0.544"/>
    </projection>
    <projection id="NCXLS_M1_M2L" presynapticPopulation="M1" postsynapticPopulation="M2L" synapse="Acetylcholine">
      <connection id="27" preCellId="../M1/1/M1" postCellId="../M2L/0/M2L" preSegmentId="9" postSegmentId="5" preFractionAlong="0.979" postFractionAlong="0.962"/>
    </projection>
    <projection id="NCXLS_M1_M2R" presynapticPopulation="M1" postsynapticPopulation="M2R" synapse="Acetylcholine">
      <connection id="29" preCellId="../M1/1/M1" postCellId="../M2R/0/M2R" preSegmentId="9" postSegmentId="1" preFractionAlong="0.979" postFractionAlong="0.469"/>
    </projection>
    <projection id="NCXLS_M1_I1R" presynapticPopulation="M1" postsynapticPopulation="I1R" synapse="Acetylcholine">
      <connection id="30" preCellId="../M1/1/M1" postCellId="../I1R/0/I1R" preSegmentId="9" postSegmentId="6" preFractionAlong="0.979" postFractionAlong="0.459"/>
      <connection id="31" preCellId="../M1/1/M1" postCellId="../I1R/1/I1R" preSegmentId="9" postSegmentId="7" preFractionAlong="0.979" postFractionAlong="0.59"/>
      <connection id="33" preCellId="../M1/1/M1" postCellId="../I1R/2/I1R" preSegmentId="9" postSegmentId="5" preFractionAlong="0.979" postFractionAlong="0.203"/>
    </projection>
  </network>
</neuroml>
