<?xml version='1.0' encoding='UTF-8'?>
<neuroml xmlns="http://www.neuroml.org/schema/neuroml2" xmlns:xsi="http://www.w3.org/2001/XMLSchema-instance" xsi:schemaLocation="http://www.neuroml.org/schema/neuroml2 https://raw.githubusercontent.com/NeuroML/NeuroML2/development/Schemas/NeuroML2/NeuroML_v2beta4.xsd" id="gvft_network_bio_prior_lamW_0.278_DF_0.026_t20.net">
  <notes>NeuroML2 network generated from GVFT simulation on 2025-05-04 10:20:45
</notes>
  <include href="I1L.cell.nml"/>
  <include href="I1R.cell.nml"/>
  <include href="I2L.cell.nml"/>
  <include href="I2R.cell.nml"/>
  <include href="M1.cell.nml"/>
  <include href="M2L.cell.nml"/>
  <include href="M2R.cell.nml"/>
  <include href="M3L.cell.nml"/>
  <include href="NSML.cell.nml"/>
  <include href="NSMR.cell.nml"/>
  <include href="Acetylcholine.synapse.nml"/>
  <include href="Generic_GJ.nml"/>
  <include href="Glutamate.synapse.nml"/>
  <include href="Serotonin_Glutamate.synapse.nml"/>
  <network id="gvft_network_bio_prior_lamW_0.278_DF_0.026_t20.net" type="networkWithTemperature" temperature="20.0 degC">
    <population id="I1L" component="I1L" type="populationList" size="5">
      <instance id="0">
        <location x="-0.7386934757232666" y="-0.6080402135848999" z="0.0"/>
      </instance>
      <instance id="1">
        <location x="-0.4170854389667511" y="-0.8090452551841736" z="0.0"/>
      </instance>
      <instance id="2">
        <location x="-0.909547746181488" y="0.18592965602874756" z="0.0"/>
      </instance>
      <instance id="3">
        <location x="-0.5577889680862427" y="-0.38693466782569885" z="0.0"/>
      </instance>
      <instance id="4">
        <location x="-0.8592965006828308" y="-0.19597990810871124" z="0.0"/>
      </instance>
    </population>
    <population id="I1R" component="I1R" type="populationList" size="1">
      <instance id="0">
        <location x="0.839195966720581" y="-0.909547746181488" z="0.0"/>
      </instance>
    </population>
    <population id="I2L" component="I2L" type="populationList" size="1">
      <instance id="0">
        <location x="-0.24623116850852966" y="-0.9396985173225403" z="0.0"/>
      </instance>
    </population>
    <population id="I2R" component="I2R" type="populationList" size="1">
      <instance id="0">
        <location x="-0.5778894424438477" y="0.6482412219047546" z="0.0"/>
      </instance>
    </population>
    <population id="M1" component="M1" type="populationList" size="1">
      <instance id="0">
        <location x="-0.015075387433171272" y="-0.06532664597034454" z="0.0"/>
      </instance>
    </population>
    <population id="M2L" component="M2L" type="populationList" size="1">
      <instance id="0">
        <location x="-1.0" y="0.25628140568733215" z="0.0"/>
      </instance>
    </population>
    <population id="M2R" component="M2R" type="populationList" size="1">
      <instance id="0">
        <location x="0.7487437129020691" y="0.03517588973045349" z="0.0"/>
      </instance>
    </population>
    <population id="M3L" component="M3L" type="populationList" size="4">
      <instance id="0">
        <location x="0.839195966720581" y="0.5276381969451904" z="0.0"/>
      </instance>
      <instance id="1">
        <location x="0.929648220539093" y="0.14572864770889282" z="0.0"/>
      </instance>
      <instance id="2">
        <location x="0.5075377225875854" y="0.5778894424438477" z="0.0"/>
      </instance>
      <instance id="3">
        <location x="0.045226141810417175" y="-0.2160804122686386" z="0.0"/>
      </instance>
    </population>
    <population id="NSML" component="NSML" type="populationList" size="3">
      <instance id="0">
        <location x="-0.9698492288589478" y="0.05527639389038086" z="0.0"/>
      </instance>
      <instance id="1">
        <location x="0.8592965006828308" y="-0.6884422302246094" z="0.0"/>
      </instance>
      <instance id="2">
        <location x="0.2160804122686386" y="0.39698493480682373" z="0.0"/>
      </instance>
    </population>
    <population id="NSMR" component="NSMR" type="populationList" size="2">
      <instance id="0">
        <location x="0.31658291816711426" y="0.07537689805030823" z="0.0"/>
      </instance>
      <instance id="1">
        <location x="0.1658291518688202" y="0.095477394759655" z="0.0"/>
      </instance>
    </population>
    <projection id="NCXLS_M1_I1L" presynapticPopulation="M1" postsynapticPopulation="I1L" synapse="Acetylcholine">
      <connection id="0" preCellId="../M1/0/M1" postCellId="../I1L/0/I1L" preSegmentId="1" postSegmentId="2" preFractionAlong="0.864" postFractionAlong="0.217"/>
      <connection id="3" preCellId="../M1/0/M1" postCellId="../I1L/1/I1L" preSegmentId="1" postSegmentId="6" preFractionAlong="0.864" postFractionAlong="0.752"/>
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    </projection>
    <electricalProjection id="NCXLS_M1_M2L_GJ" presynapticPopulation="M1" postsynapticPopulation="M2L">
      <electricalConnection id="1" preCell="0" postCell="0" synapse="Generic_GJ" preSegment="1" postSegment="5" preFractionAlong="0.864" postFractionAlong="0.962"/>
    </electricalProjection>
    <projection id="NCXLS_M1_NSML" presynapticPopulation="M1" postsynapticPopulation="NSML" synapse="Acetylcholine">
      <connection id="2" preCellId="../M1/0/M1" postCellId="../NSML/0/NSML" preSegmentId="1" postSegmentId="10" preFractionAlong="0.864" postFractionAlong="0.544"/>
    </projection>
    <projection id="NCXLS_M1_I2R" presynapticPopulation="M1" postsynapticPopulation="I2R" synapse="Acetylcholine">
      <connection id="4" preCellId="../M1/0/M1" postCellId="../I2R/0/I2R" preSegmentId="1" postSegmentId="9" preFractionAlong="0.864" postFractionAlong="0.207"/>
    </projection>
    <projection id="NCXLS_M2L_I1L" presynapticPopulation="M2L" postsynapticPopulation="I1L" synapse="Acetylcholine">
      <connection id="8" preCellId="../M2L/0/M2L" postCellId="../I1L/0/I1L" preSegmentId="8" postSegmentId="2" preFractionAlong="0.001" postFractionAlong="0.217"/>
      <connection id="10" preCellId="../M2L/0/M2L" postCellId="../I1L/1/I1L" preSegmentId="8" postSegmentId="6" preFractionAlong="0.001" postFractionAlong="0.752"/>
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    </projection>
    <projection id="NCXLS_M2L_NSML" presynapticPopulation="M2L" postsynapticPopulation="NSML" synapse="Acetylcholine">
      <connection id="9" preCellId="../M2L/0/M2L" postCellId="../NSML/0/NSML" preSegmentId="8" postSegmentId="10" preFractionAlong="0.001" postFractionAlong="0.544"/>
    </projection>
    <projection id="NCXLS_M2L_I2L" presynapticPopulation="M2L" postsynapticPopulation="I2L" synapse="Acetylcholine">
      <connection id="11" preCellId="../M2L/0/M2L" postCellId="../I2L/0/I2L" preSegmentId="8" postSegmentId="8" preFractionAlong="0.001" postFractionAlong="0.031"/>
    </projection>
    <projection id="NCXLS_NSML_M2L" presynapticPopulation="NSML" postsynapticPopulation="M2L" synapse="Serotonin_Glutamate">
      <connection id="15" preCellId="../NSML/0/NSML" postCellId="../M2L/0/M2L" preSegmentId="7" postSegmentId="5" preFractionAlong="0.302" postFractionAlong="0.962"/>
    </projection>
    <projection id="NCXLS_NSML_I2R" presynapticPopulation="NSML" postsynapticPopulation="I2R" synapse="Serotonin_Glutamate">
      <connection id="16" preCellId="../NSML/0/NSML" postCellId="../I2R/0/I2R" preSegmentId="7" postSegmentId="9" preFractionAlong="0.302" postFractionAlong="0.207"/>
    </projection>
    <projection id="NCXLS_NSML_I1L" presynapticPopulation="NSML" postsynapticPopulation="I1L" synapse="Serotonin_Glutamate">
      <connection id="17" preCellId="../NSML/0/NSML" postCellId="../I1L/2/I1L" preSegmentId="7" postSegmentId="8" preFractionAlong="0.302" postFractionAlong="0.948"/>
    </projection>
    <projection id="NCXLS_M3L_I1L" presynapticPopulation="M3L" postsynapticPopulation="I1L" synapse="Acetylcholine">
      <connection id="18" preCellId="../M3L/0/M3L" postCellId="../I1L/0/I1L" preSegmentId="4" postSegmentId="2" preFractionAlong="0.699" postFractionAlong="0.217"/>
      <connection id="23" preCellId="../M3L/0/M3L" postCellId="../I1L/1/I1L" preSegmentId="4" postSegmentId="6" preFractionAlong="0.699" postFractionAlong="0.752"/>
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    </projection>
    <projection id="NCXLS_M3L_M1" presynapticPopulation="M3L" postsynapticPopulation="M1" synapse="Acetylcholine">
      <connection id="19" preCellId="../M3L/0/M3L" postCellId="../M1/0/M1" preSegmentId="4" postSegmentId="8" preFractionAlong="0.699" postFractionAlong="0.291"/>
    </projection>
    <projection id="NCXLS_M3L_M2L" presynapticPopulation="M3L" postsynapticPopulation="M2L" synapse="Acetylcholine">
      <connection id="20" preCellId="../M3L/0/M3L" postCellId="../M2L/0/M2L" preSegmentId="4" postSegmentId="5" preFractionAlong="0.699" postFractionAlong="0.962"/>
    </projection>
    <projection id="NCXLS_M3L_NSML" presynapticPopulation="M3L" postsynapticPopulation="NSML" synapse="Acetylcholine">
      <connection id="21" preCellId="../M3L/0/M3L" postCellId="../NSML/0/NSML" preSegmentId="4" postSegmentId="10" preFractionAlong="0.699" postFractionAlong="0.544"/>
      <connection id="24" preCellId="../M3L/0/M3L" postCellId="../NSML/1/NSML" preSegmentId="4" postSegmentId="5" preFractionAlong="0.699" postFractionAlong="0.554"/>
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    </projection>
    <projection id="NCXLS_M3L_NSMR" presynapticPopulation="M3L" postsynapticPopulation="NSMR" synapse="Acetylcholine">
      <connection id="22" preCellId="../M3L/0/M3L" postCellId="../NSMR/0/NSMR" preSegmentId="4" postSegmentId="1" preFractionAlong="0.699" postFractionAlong="0.995"/>
      <connection id="25" preCellId="../M3L/0/M3L" postCellId="../NSMR/1/NSMR" preSegmentId="4" postSegmentId="4" preFractionAlong="0.699" postFractionAlong="0.183"/>
    </projection>
    <projection id="NCXLS_M3L_I1R" presynapticPopulation="M3L" postsynapticPopulation="I1R" synapse="Acetylcholine">
      <connection id="26" preCellId="../M3L/0/M3L" postCellId="../I1R/0/I1R" preSegmentId="4" postSegmentId="6" preFractionAlong="0.699" postFractionAlong="0.459"/>
      <connection id="40" preCellId="../M3L/1/M3L" postCellId="../I1R/0/I1R" preSegmentId="4" postSegmentId="6" preFractionAlong="0.34" postFractionAlong="0.459"/>
      <connection id="74" preCellId="../M3L/2/M3L" postCellId="../I1R/0/I1R" preSegmentId="8" postSegmentId="6" preFractionAlong="0.932" postFractionAlong="0.459"/>
      <connection id="80" preCellId="../M3L/3/M3L" postCellId="../I1R/0/I1R" preSegmentId="2" postSegmentId="6" preFractionAlong="0.066" postFractionAlong="0.459"/>
    </projection>
    <projection id="NCXLS_M3L_M3L" presynapticPopulation="M3L" postsynapticPopulation="M3L" synapse="Glutamate">
      <connection id="27" preCellId="../M3L/0/M3L" postCellId="../M3L/1/M3L" preSegmentId="4" postSegmentId="6" preFractionAlong="0.699" postFractionAlong="0.911"/>
      <connection id="72" preCellId="../M3L/2/M3L" postCellId="../M3L/0/M3L" preSegmentId="8" postSegmentId="1" preFractionAlong="0.932" postFractionAlong="0.675"/>
    </projection>
    <projection id="NCXLS_M3L_I2L" presynapticPopulation="M3L" postsynapticPopulation="I2L" synapse="Acetylcholine">
      <connection id="28" preCellId="../M3L/0/M3L" postCellId="../I2L/0/I2L" preSegmentId="4" postSegmentId="8" preFractionAlong="0.699" postFractionAlong="0.031"/>
      <connection id="81" preCellId="../M3L/3/M3L" postCellId="../I2L/0/I2L" preSegmentId="2" postSegmentId="8" preFractionAlong="0.066" postFractionAlong="0.031"/>
    </projection>
    <projection id="NCXLS_M3L_M2R" presynapticPopulation="M3L" postsynapticPopulation="M2R" synapse="Acetylcholine">
      <connection id="30" preCellId="../M3L/0/M3L" postCellId="../M2R/0/M2R" preSegmentId="4" postSegmentId="1" preFractionAlong="0.699" postFractionAlong="0.469"/>
      <connection id="76" preCellId="../M3L/2/M3L" postCellId="../M2R/0/M2R" preSegmentId="8" postSegmentId="1" preFractionAlong="0.932" postFractionAlong="0.469"/>
    </projection>
    <projection id="NCXLS_M3L_I2R" presynapticPopulation="M3L" postsynapticPopulation="I2R" synapse="Acetylcholine">
      <connection id="31" preCellId="../M3L/0/M3L" postCellId="../I2R/0/I2R" preSegmentId="4" postSegmentId="9" preFractionAlong="0.699" postFractionAlong="0.207"/>
    </projection>
    <projection id="NCXLS_M3L_M3L" presynapticPopulation="M3L" postsynapticPopulation="M3L" synapse="Acetylcholine">
      <connection id="33" preCellId="../M3L/0/M3L" postCellId="../M3L/2/M3L" preSegmentId="4" postSegmentId="1" preFractionAlong="0.699" postFractionAlong="0.26"/>
    </projection>
    <electricalProjection id="NCXLS_M3L_M3L_GJ" presynapticPopulation="M3L" postsynapticPopulation="M3L">
      <electricalConnection id="36" preCell="0" postCell="3" synapse="Generic_GJ" preSegment="4" postSegment="6" preFractionAlong="0.699" postFractionAlong="0.58"/>
      <electricalConnection id="75" preCell="2" postCell="1" synapse="Generic_GJ" preSegment="8" postSegment="6" preFractionAlong="0.932" postFractionAlong="0.911"/>
    </electricalProjection>
    <projection id="NCXLS_NSML_I1R" presynapticPopulation="NSML" postsynapticPopulation="I1R" synapse="Serotonin_Glutamate">
      <connection id="37" preCellId="../NSML/1/NSML" postCellId="../I1R/0/I1R" preSegmentId="5" postSegmentId="6" preFractionAlong="0.574" postFractionAlong="0.459"/>
    </projection>
    <projection id="NCXLS_NSML_I2L" presynapticPopulation="NSML" postsynapticPopulation="I2L" synapse="Serotonin_Glutamate">
      <connection id="38" preCellId="../NSML/1/NSML" postCellId="../I2L/0/I2L" preSegmentId="5" postSegmentId="8" preFractionAlong="0.574" postFractionAlong="0.031"/>
    </projection>
    <projection id="NCXLS_NSML_M3L" presynapticPopulation="NSML" postsynapticPopulation="M3L" synapse="Serotonin_Glutamate">
      <connection id="41" preCellId="../NSML/2/NSML" postCellId="../M3L/0/M3L" preSegmentId="9" postSegmentId="1" preFractionAlong="0.211" postFractionAlong="0.675"/>
      <connection id="42" preCellId="../NSML/2/NSML" postCellId="../M3L/2/M3L" preSegmentId="9" postSegmentId="1" preFractionAlong="0.211" postFractionAlong="0.26"/>
    </projection>
    <projection id="NCXLS_M2R_I1L" presynapticPopulation="M2R" postsynapticPopulation="I1L" synapse="Acetylcholine">
      <connection id="43" preCellId="../M2R/0/M2R" postCellId="../I1L/0/I1L" preSegmentId="6" postSegmentId="2" preFractionAlong="0.854" postFractionAlong="0.217"/>
      <connection id="48" preCellId="../M2R/0/M2R" postCellId="../I1L/1/I1L" preSegmentId="6" postSegmentId="6" preFractionAlong="0.854" postFractionAlong="0.752"/>
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    </projection>
    <electricalProjection id="NCXLS_M2R_M1_GJ" presynapticPopulation="M2R" postsynapticPopulation="M1">
      <electricalConnection id="44" preCell="0" postCell="0" synapse="Generic_GJ" preSegment="6" postSegment="8" preFractionAlong="0.854" postFractionAlong="0.291"/>
    </electricalProjection>
    <projection id="NCXLS_M2R_M2L" presynapticPopulation="M2R" postsynapticPopulation="M2L" synapse="Acetylcholine">
      <connection id="45" preCellId="../M2R/0/M2R" postCellId="../M2L/0/M2L" preSegmentId="6" postSegmentId="5" preFractionAlong="0.854" postFractionAlong="0.962"/>
    </projection>
    <projection id="NCXLS_M2R_NSML" presynapticPopulation="M2R" postsynapticPopulation="NSML" synapse="Acetylcholine">
      <connection id="46" preCellId="../M2R/0/M2R" postCellId="../NSML/0/NSML" preSegmentId="6" postSegmentId="10" preFractionAlong="0.854" postFractionAlong="0.544"/>
      <connection id="51" preCellId="../M2R/0/M2R" postCellId="../NSML/2/NSML" preSegmentId="6" postSegmentId="10" preFractionAlong="0.854" postFractionAlong="0.724"/>
    </projection>
    <projection id="NCXLS_M2R_NSMR" presynapticPopulation="M2R" postsynapticPopulation="NSMR" synapse="Acetylcholine">
      <connection id="47" preCellId="../M2R/0/M2R" postCellId="../NSMR/0/NSMR" preSegmentId="6" postSegmentId="1" preFractionAlong="0.854" postFractionAlong="0.995"/>
      <connection id="49" preCellId="../M2R/0/M2R" postCellId="../NSMR/1/NSMR" preSegmentId="6" postSegmentId="4" preFractionAlong="0.854" postFractionAlong="0.183"/>
    </projection>
    <projection id="NCXLS_M2R_I2L" presynapticPopulation="M2R" postsynapticPopulation="I2L" synapse="Acetylcholine">
      <connection id="50" preCellId="../M2R/0/M2R" postCellId="../I2L/0/I2L" preSegmentId="6" postSegmentId="8" preFractionAlong="0.854" postFractionAlong="0.031"/>
    </projection>
    <projection id="NCXLS_M2R_I2R" presynapticPopulation="M2R" postsynapticPopulation="I2R" synapse="Acetylcholine">
      <connection id="52" preCellId="../M2R/0/M2R" postCellId="../I2R/0/I2R" preSegmentId="6" postSegmentId="9" preFractionAlong="0.854" postFractionAlong="0.207"/>
    </projection>
    <projection id="NCXLS_M2R_M3L" presynapticPopulation="M2R" postsynapticPopulation="M3L" synapse="Acetylcholine">
      <connection id="54" preCellId="../M2R/0/M2R" postCellId="../M3L/2/M3L" preSegmentId="6" postSegmentId="1" preFractionAlong="0.854" postFractionAlong="0.26"/>
      <connection id="57" preCellId="../M2R/0/M2R" postCellId="../M3L/3/M3L" preSegmentId="6" postSegmentId="6" preFractionAlong="0.854" postFractionAlong="0.58"/>
    </projection>
    <projection id="NCXLS_I2R_M1" presynapticPopulation="I2R" postsynapticPopulation="M1" synapse="Acetylcholine">
      <connection id="58" preCellId="../I2R/0/I2R" postCellId="../M1/0/M1" preSegmentId="7" postSegmentId="8" preFractionAlong="0.037" postFractionAlong="0.291"/>
    </projection>
    <projection id="NCXLS_I2R_M3L" presynapticPopulation="I2R" postsynapticPopulation="M3L" synapse="Glutamate">
      <connection id="59" preCellId="../I2R/0/I2R" postCellId="../M3L/0/M3L" preSegmentId="7" postSegmentId="1" preFractionAlong="0.037" postFractionAlong="0.675"/>
      <connection id="71" preCellId="../I2R/0/I2R" postCellId="../M3L/3/M3L" preSegmentId="7" postSegmentId="6" preFractionAlong="0.037" postFractionAlong="0.58"/>
    </projection>
    <projection id="NCXLS_I2R_NSMR" presynapticPopulation="I2R" postsynapticPopulation="NSMR" synapse="Acetylcholine">
      <connection id="60" preCellId="../I2R/0/I2R" postCellId="../NSMR/0/NSMR" preSegmentId="7" postSegmentId="1" preFractionAlong="0.037" postFractionAlong="0.995"/>
      <connection id="63" preCellId="../I2R/0/I2R" postCellId="../NSMR/1/NSMR" preSegmentId="7" postSegmentId="4" preFractionAlong="0.037" postFractionAlong="0.183"/>
    </projection>
    <projection id="NCXLS_I2R_I1L" presynapticPopulation="I2R" postsynapticPopulation="I1L" synapse="Acetylcholine">
      <connection id="61" preCellId="../I2R/0/I2R" postCellId="../I1L/1/I1L" preSegmentId="7" postSegmentId="6" preFractionAlong="0.037" postFractionAlong="0.752"/>
      <connection id="70" preCellId="../I2R/0/I2R" postCellId="../I1L/3/I1L" preSegmentId="7" postSegmentId="5" preFractionAlong="0.037" postFractionAlong="0.91"/>
    </projection>
    <projection id="NCXLS_I2R_NSML" presynapticPopulation="I2R" postsynapticPopulation="NSML" synapse="Acetylcholine">
      <connection id="62" preCellId="../I2R/0/I2R" postCellId="../NSML/1/NSML" preSegmentId="7" postSegmentId="5" preFractionAlong="0.037" postFractionAlong="0.554"/>
      <connection id="67" preCellId="../I2R/0/I2R" postCellId="../NSML/2/NSML" preSegmentId="7" postSegmentId="10" preFractionAlong="0.037" postFractionAlong="0.724"/>
    </projection>
    <electricalProjection id="NCXLS_I2R_I1R_GJ" presynapticPopulation="I2R" postsynapticPopulation="I1R">
      <electricalConnection id="64" preCell="0" postCell="0" synapse="Generic_GJ" preSegment="7" postSegment="6" preFractionAlong="0.037" postFractionAlong="0.459"/>
    </electricalProjection>
    <projection id="NCXLS_I2R_M3L" presynapticPopulation="I2R" postsynapticPopulation="M3L" synapse="Acetylcholine">
      <connection id="65" preCellId="../I2R/0/I2R" postCellId="../M3L/1/M3L" preSegmentId="7" postSegmentId="6" preFractionAlong="0.037" postFractionAlong="0.911"/>
      <connection id="69" preCellId="../I2R/0/I2R" postCellId="../M3L/2/M3L" preSegmentId="7" postSegmentId="1" preFractionAlong="0.037" postFractionAlong="0.26"/>
    </projection>
    <electricalProjection id="NCXLS_I2R_I2L_GJ" presynapticPopulation="I2R" postsynapticPopulation="I2L">
      <electricalConnection id="66" preCell="0" postCell="0" synapse="Generic_GJ" preSegment="7" postSegment="8" preFractionAlong="0.037" postFractionAlong="0.031"/>
    </electricalProjection>
    <projection id="NCXLS_I2R_M2R" presynapticPopulation="I2R" postsynapticPopulation="M2R" synapse="Acetylcholine">
      <connection id="68" preCellId="../I2R/0/I2R" postCellId="../M2R/0/M2R" preSegmentId="7" postSegmentId="1" preFractionAlong="0.037" postFractionAlong="0.469"/>
    </projection>
  </network>
</neuroml>
