<?xml version='1.0' encoding='UTF-8'?>
<neuroml xmlns="http://www.neuroml.org/schema/neuroml2" xmlns:xsi="http://www.w3.org/2001/XMLSchema-instance" xsi:schemaLocation="http://www.neuroml.org/schema/neuroml2 https://raw.githubusercontent.com/NeuroML/NeuroML2/development/Schemas/NeuroML2/NeuroML_v2beta4.xsd" id="gvft_network_bio_prior_lamW_0.278_DF_0.026_t30.net">
  <notes>NeuroML2 network generated from GVFT simulation on 2025-05-04 10:20:49
</notes>
  <include href="I1L.cell.nml"/>
  <include href="I1R.cell.nml"/>
  <include href="I2L.cell.nml"/>
  <include href="M1.cell.nml"/>
  <include href="M2L.cell.nml"/>
  <include href="M2R.cell.nml"/>
  <include href="M3L.cell.nml"/>
  <include href="M3R.cell.nml"/>
  <include href="NSML.cell.nml"/>
  <include href="NSMR.cell.nml"/>
  <include href="Acetylcholine.synapse.nml"/>
  <include href="Generic_GJ.nml"/>
  <include href="Glutamate.synapse.nml"/>
  <include href="Serotonin_Glutamate.synapse.nml"/>
  <network id="gvft_network_bio_prior_lamW_0.278_DF_0.026_t30.net" type="networkWithTemperature" temperature="20.0 degC">
    <population id="I1L" component="I1L" type="populationList" size="6">
      <instance id="0">
        <location x="-0.25628140568733215" y="-0.2864321768283844" z="0.0"/>
      </instance>
      <instance id="1">
        <location x="-0.23618091642856598" y="-0.6180904507637024" z="0.0"/>
      </instance>
      <instance id="2">
        <location x="-0.8894472122192383" y="0.4271356761455536" z="0.0"/>
      </instance>
      <instance id="3">
        <location x="-0.6080402135848999" y="-1.0" z="0.0"/>
      </instance>
      <instance id="4">
        <location x="-0.929648220539093" y="0.8793969750404358" z="0.0"/>
      </instance>
      <instance id="5">
        <location x="0.005025136284530163" y="0.1658291518688202" z="0.0"/>
      </instance>
    </population>
    <population id="I1R" component="I1R" type="populationList" size="1">
      <instance id="0">
        <location x="0.6683416962623596" y="-0.4874371886253357" z="0.0"/>
      </instance>
    </population>
    <population id="I2L" component="I2L" type="populationList" size="1">
      <instance id="0">
        <location x="0.979899525642395" y="-0.49748745560646057" z="0.0"/>
      </instance>
    </population>
    <population id="M1" component="M1" type="populationList" size="1">
      <instance id="0">
        <location x="0.7185929417610168" y="-0.2763819098472595" z="0.0"/>
      </instance>
    </population>
    <population id="M2L" component="M2L" type="populationList" size="1">
      <instance id="0">
        <location x="-0.979899525642395" y="-0.6080402135848999" z="0.0"/>
      </instance>
    </population>
    <population id="M2R" component="M2R" type="populationList" size="1">
      <instance id="0">
        <location x="-0.18592965602874756" y="0.12562814354896545" z="0.0"/>
      </instance>
    </population>
    <population id="M3L" component="M3L" type="populationList" size="1">
      <instance id="0">
        <location x="0.7587939500808716" y="-0.11557789891958237" z="0.0"/>
      </instance>
    </population>
    <population id="M3R" component="M3R" type="populationList" size="3">
      <instance id="0">
        <location x="0.5376884341239929" y="-0.19597990810871124" z="0.0"/>
      </instance>
      <instance id="1">
        <location x="-0.8190954923629761" y="-0.7889447212219238" z="0.0"/>
      </instance>
      <instance id="2">
        <location x="-0.08542714267969131" y="0.3467336893081665" z="0.0"/>
      </instance>
    </population>
    <population id="NSML" component="NSML" type="populationList" size="3">
      <instance id="0">
        <location x="-0.2964824140071869" y="-0.43718594312667847" z="0.0"/>
      </instance>
      <instance id="1">
        <location x="-0.5175879597663879" y="0.7889447212219238" z="0.0"/>
      </instance>
      <instance id="2">
        <location x="0.7688442468643188" y="0.25628140568733215" z="0.0"/>
      </instance>
    </population>
    <population id="NSMR" component="NSMR" type="populationList" size="2">
      <instance id="0">
        <location x="-0.2160804122686386" y="-0.5979899764060974" z="0.0"/>
      </instance>
      <instance id="1">
        <location x="0.839195966720581" y="-0.3366834223270416" z="0.0"/>
      </instance>
    </population>
    <projection id="NCXLS_M1_M3R" presynapticPopulation="M1" postsynapticPopulation="M3R" synapse="Acetylcholine">
      <connection id="0" preCellId="../M1/0/M1" postCellId="../M3R/0/M3R" preSegmentId="1" postSegmentId="9" preFractionAlong="0.864" postFractionAlong="0.48"/>
      <connection id="9" preCellId="../M1/0/M1" postCellId="../M3R/2/M3R" preSegmentId="1" postSegmentId="1" preFractionAlong="0.864" postFractionAlong="0.546"/>
    </projection>
    <projection id="NCXLS_M1_I1L" presynapticPopulation="M1" postsynapticPopulation="I1L" synapse="Acetylcholine">
      <connection id="1" preCellId="../M1/0/M1" postCellId="../I1L/0/I1L" preSegmentId="1" postSegmentId="2" preFractionAlong="0.864" postFractionAlong="0.217"/>
      <connection id="2" preCellId="../M1/0/M1" postCellId="../I1L/1/I1L" preSegmentId="1" postSegmentId="6" preFractionAlong="0.864" postFractionAlong="0.752"/>
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    </projection>
    <electricalProjection id="NCXLS_M1_M3R_GJ" presynapticPopulation="M1" postsynapticPopulation="M3R">
      <electricalConnection id="3" preCell="0" postCell="1" synapse="Generic_GJ" preSegment="1" postSegment="5" preFractionAlong="0.864" postFractionAlong="0.202"/>
    </electricalProjection>
    <projection id="NCXLS_M1_NSML" presynapticPopulation="M1" postsynapticPopulation="NSML" synapse="Acetylcholine">
      <connection id="5" preCellId="../M1/0/M1" postCellId="../NSML/0/NSML" preSegmentId="1" postSegmentId="10" preFractionAlong="0.864" postFractionAlong="0.544"/>
    </projection>
    <projection id="NCXLS_M1_I1R" presynapticPopulation="M1" postsynapticPopulation="I1R" synapse="Acetylcholine">
      <connection id="6" preCellId="../M1/0/M1" postCellId="../I1R/0/I1R" preSegmentId="1" postSegmentId="6" preFractionAlong="0.864" postFractionAlong="0.459"/>
    </projection>
    <projection id="NCXLS_M1_M2L" presynapticPopulation="M1" postsynapticPopulation="M2L" synapse="Glutamate">
      <connection id="7" preCellId="../M1/0/M1" postCellId="../M2L/0/M2L" preSegmentId="1" postSegmentId="5" preFractionAlong="0.864" postFractionAlong="0.962"/>
    </projection>
    <projection id="NCXLS_M1_M2R" presynapticPopulation="M1" postsynapticPopulation="M2R" synapse="Acetylcholine">
      <connection id="8" preCellId="../M1/0/M1" postCellId="../M2R/0/M2R" preSegmentId="1" postSegmentId="1" preFractionAlong="0.864" postFractionAlong="0.469"/>
    </projection>
    <projection id="NCXLS_M1_NSMR" presynapticPopulation="M1" postsynapticPopulation="NSMR" synapse="Acetylcholine">
      <connection id="10" preCellId="../M1/0/M1" postCellId="../NSMR/0/NSMR" preSegmentId="1" postSegmentId="1" preFractionAlong="0.864" postFractionAlong="0.995"/>
    </projection>
    <projection id="NCXLS_M3R_M1" presynapticPopulation="M3R" postsynapticPopulation="M1" synapse="Acetylcholine">
      <connection id="14" preCellId="../M3R/0/M3R" postCellId="../M1/0/M1" preSegmentId="10" postSegmentId="8" preFractionAlong="0.782" postFractionAlong="0.291"/>
      <connection id="20" preCellId="../M3R/1/M3R" postCellId="../M1/0/M1" preSegmentId="4" postSegmentId="8" preFractionAlong="0.955" postFractionAlong="0.291"/>
    </projection>
    <projection id="NCXLS_M3R_NSMR" presynapticPopulation="M3R" postsynapticPopulation="NSMR" synapse="Acetylcholine">
      <connection id="15" preCellId="../M3R/0/M3R" postCellId="../NSMR/1/NSMR" preSegmentId="10" postSegmentId="4" preFractionAlong="0.782" postFractionAlong="0.183"/>
      <connection id="24" preCellId="../M3R/1/M3R" postCellId="../NSMR/1/NSMR" preSegmentId="4" postSegmentId="4" preFractionAlong="0.955" postFractionAlong="0.183"/>
      <connection id="31" preCellId="../M3R/1/M3R" postCellId="../NSMR/0/NSMR" preSegmentId="4" postSegmentId="1" preFractionAlong="0.955" postFractionAlong="0.995"/>
      <connection id="61" preCellId="../M3R/2/M3R" postCellId="../NSMR/1/NSMR" preSegmentId="7" postSegmentId="4" preFractionAlong="0.336" postFractionAlong="0.183"/>
    </projection>
    <projection id="NCXLS_M3R_NSML" presynapticPopulation="M3R" postsynapticPopulation="NSML" synapse="Acetylcholine">
      <connection id="16" preCellId="../M3R/0/M3R" postCellId="../NSML/2/NSML" preSegmentId="10" postSegmentId="10" preFractionAlong="0.782" postFractionAlong="0.724"/>
      <connection id="25" preCellId="../M3R/1/M3R" postCellId="../NSML/2/NSML" preSegmentId="4" postSegmentId="10" preFractionAlong="0.955" postFractionAlong="0.724"/>
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    </projection>
    <projection id="NCXLS_M3R_I1R" presynapticPopulation="M3R" postsynapticPopulation="I1R" synapse="Acetylcholine">
      <connection id="17" preCellId="../M3R/0/M3R" postCellId="../I1R/0/I1R" preSegmentId="10" postSegmentId="6" preFractionAlong="0.782" postFractionAlong="0.459"/>
      <connection id="27" preCellId="../M3R/1/M3R" postCellId="../I1R/0/I1R" preSegmentId="4" postSegmentId="6" preFractionAlong="0.955" postFractionAlong="0.459"/>
      <connection id="63" preCellId="../M3R/2/M3R" postCellId="../I1R/0/I1R" preSegmentId="7" postSegmentId="6" preFractionAlong="0.336" postFractionAlong="0.459"/>
    </projection>
    <projection id="NCXLS_M3R_M3L" presynapticPopulation="M3R" postsynapticPopulation="M3L" synapse="Acetylcholine">
      <connection id="18" preCellId="../M3R/0/M3R" postCellId="../M3L/0/M3L" preSegmentId="10" postSegmentId="1" preFractionAlong="0.782" postFractionAlong="0.675"/>
      <connection id="30" preCellId="../M3R/1/M3R" postCellId="../M3L/0/M3L" preSegmentId="4" postSegmentId="1" preFractionAlong="0.955" postFractionAlong="0.675"/>
    </projection>
    <projection id="NCXLS_M3R_I2L" presynapticPopulation="M3R" postsynapticPopulation="I2L" synapse="Acetylcholine">
      <connection id="19" preCellId="../M3R/0/M3R" postCellId="../I2L/0/I2L" preSegmentId="10" postSegmentId="8" preFractionAlong="0.782" postFractionAlong="0.031"/>
      <connection id="32" preCellId="../M3R/1/M3R" postCellId="../I2L/0/I2L" preSegmentId="4" postSegmentId="8" preFractionAlong="0.955" postFractionAlong="0.031"/>
      <connection id="65" preCellId="../M3R/2/M3R" postCellId="../I2L/0/I2L" preSegmentId="7" postSegmentId="8" preFractionAlong="0.336" postFractionAlong="0.031"/>
    </projection>
    <electricalProjection id="NCXLS_M3R_M3R_GJ" presynapticPopulation="M3R" postsynapticPopulation="M3R">
      <electricalConnection id="21" preCell="1" postCell="0" synapse="Generic_GJ" preSegment="4" postSegment="9" preFractionAlong="0.955" postFractionAlong="0.48"/>
    </electricalProjection>
    <projection id="NCXLS_M3R_I1L" presynapticPopulation="M3R" postsynapticPopulation="I1L" synapse="Acetylcholine">
      <connection id="22" preCellId="../M3R/1/M3R" postCellId="../I1L/0/I1L" preSegmentId="4" postSegmentId="2" preFractionAlong="0.955" postFractionAlong="0.217"/>
      <connection id="23" preCellId="../M3R/1/M3R" postCellId="../I1L/1/I1L" preSegmentId="4" postSegmentId="6" preFractionAlong="0.955" postFractionAlong="0.752"/>
      <connection id="33" preCellId="../M3R/1/M3R" postCellId="../I1L/3/I1L" preSegmentId="4" postSegmentId="5" preFractionAlong="0.955" postFractionAlong="0.91"/>
      <connection id="35" preCellId="../M3R/1/M3R" postCellId="../I1L/5/I1L" preSegmentId="4" postSegmentId="3" preFractionAlong="0.955" postFractionAlong="0.511"/>
    </projection>
    <projection id="NCXLS_M3R_M2R" presynapticPopulation="M3R" postsynapticPopulation="M2R" synapse="Acetylcholine">
      <connection id="28" preCellId="../M3R/1/M3R" postCellId="../M2R/0/M2R" preSegmentId="4" postSegmentId="1" preFractionAlong="0.955" postFractionAlong="0.469"/>
    </projection>
    <projection id="NCXLS_M3R_M3R" presynapticPopulation="M3R" postsynapticPopulation="M3R" synapse="Acetylcholine">
      <connection id="29" preCellId="../M3R/1/M3R" postCellId="../M3R/2/M3R" preSegmentId="4" postSegmentId="1" preFractionAlong="0.955" postFractionAlong="0.546"/>
      <connection id="60" preCellId="../M3R/2/M3R" postCellId="../M3R/0/M3R" preSegmentId="7" postSegmentId="9" preFractionAlong="0.336" postFractionAlong="0.48"/>
    </projection>
    <projection id="NCXLS_NSMR_I1R" presynapticPopulation="NSMR" postsynapticPopulation="I1R" synapse="Serotonin_Glutamate">
      <connection id="36" preCellId="../NSMR/1/NSMR" postCellId="../I1R/0/I1R" preSegmentId="4" postSegmentId="6" preFractionAlong="0.385" postFractionAlong="0.459"/>
    </projection>
    <projection id="NCXLS_NSMR_I2L" presynapticPopulation="NSMR" postsynapticPopulation="I2L" synapse="Serotonin_Glutamate">
      <connection id="37" preCellId="../NSMR/1/NSMR" postCellId="../I2L/0/I2L" preSegmentId="4" postSegmentId="8" preFractionAlong="0.385" postFractionAlong="0.031"/>
    </projection>
    <projection id="NCXLS_I1L_I1L" presynapticPopulation="I1L" postsynapticPopulation="I1L" synapse="Acetylcholine">
      <connection id="38" preCellId="../I1L/2/I1L" postCellId="../I1L/4/I1L" preSegmentId="8" postSegmentId="5" preFractionAlong="0.466" postFractionAlong="0.686"/>
    </projection>
    <projection id="NCXLS_NSML_I1L" presynapticPopulation="NSML" postsynapticPopulation="I1L" synapse="Serotonin_Glutamate">
      <connection id="39" preCellId="../NSML/0/NSML" postCellId="../I1L/1/I1L" preSegmentId="7" postSegmentId="6" preFractionAlong="0.302" postFractionAlong="0.752"/>
      <connection id="42" preCellId="../NSML/0/NSML" postCellId="../I1L/3/I1L" preSegmentId="7" postSegmentId="5" preFractionAlong="0.302" postFractionAlong="0.91"/>
    </projection>
    <projection id="NCXLS_NSML_M3R" presynapticPopulation="NSML" postsynapticPopulation="M3R" synapse="Serotonin_Glutamate">
      <connection id="40" preCellId="../NSML/0/NSML" postCellId="../M3R/1/M3R" preSegmentId="7" postSegmentId="5" preFractionAlong="0.302" postFractionAlong="0.202"/>
    </projection>
    <projection id="NCXLS_NSML_M2L" presynapticPopulation="NSML" postsynapticPopulation="M2L" synapse="Serotonin_Glutamate">
      <connection id="41" preCellId="../NSML/0/NSML" postCellId="../M2L/0/M2L" preSegmentId="7" postSegmentId="5" preFractionAlong="0.302" postFractionAlong="0.962"/>
    </projection>
    <projection id="NCXLS_M2L_I1L" presynapticPopulation="M2L" postsynapticPopulation="I1L" synapse="Acetylcholine">
      <connection id="43" preCellId="../M2L/0/M2L" postCellId="../I1L/2/I1L" preSegmentId="8" postSegmentId="8" preFractionAlong="0.001" postFractionAlong="0.948"/>
      <connection id="47" preCellId="../M2L/0/M2L" postCellId="../I1L/4/I1L" preSegmentId="8" postSegmentId="5" preFractionAlong="0.001" postFractionAlong="0.686"/>
      <connection id="48" preCellId="../M2L/0/M2L" postCellId="../I1L/5/I1L" preSegmentId="8" postSegmentId="3" preFractionAlong="0.001" postFractionAlong="0.511"/>
    </projection>
    <projection id="NCXLS_M2L_M2R" presynapticPopulation="M2L" postsynapticPopulation="M2R" synapse="Glutamate">
      <connection id="44" preCellId="../M2L/0/M2L" postCellId="../M2R/0/M2R" preSegmentId="8" postSegmentId="1" preFractionAlong="0.001" postFractionAlong="0.469"/>
    </projection>
    <projection id="NCXLS_M2L_M3R" presynapticPopulation="M2L" postsynapticPopulation="M3R" synapse="Acetylcholine">
      <connection id="45" preCellId="../M2L/0/M2L" postCellId="../M3R/2/M3R" preSegmentId="8" postSegmentId="1" preFractionAlong="0.001" postFractionAlong="0.546"/>
    </projection>
    <projection id="NCXLS_M2L_NSML" presynapticPopulation="M2L" postsynapticPopulation="NSML" synapse="Acetylcholine">
      <connection id="46" preCellId="../M2L/0/M2L" postCellId="../NSML/1/NSML" preSegmentId="8" postSegmentId="5" preFractionAlong="0.001" postFractionAlong="0.554"/>
    </projection>
    <projection id="NCXLS_M2R_I1L" presynapticPopulation="M2R" postsynapticPopulation="I1L" synapse="Acetylcholine">
      <connection id="49" preCellId="../M2R/0/M2R" postCellId="../I1L/0/I1L" preSegmentId="6" postSegmentId="2" preFractionAlong="0.854" postFractionAlong="0.217"/>
      <connection id="50" preCellId="../M2R/0/M2R" postCellId="../I1L/1/I1L" preSegmentId="6" postSegmentId="6" preFractionAlong="0.854" postFractionAlong="0.752"/>
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    </projection>
    <projection id="NCXLS_M2R_M3R" presynapticPopulation="M2R" postsynapticPopulation="M3R" synapse="Acetylcholine">
      <connection id="51" preCellId="../M2R/0/M2R" postCellId="../M3R/1/M3R" preSegmentId="6" postSegmentId="5" preFractionAlong="0.854" postFractionAlong="0.202"/>
    </projection>
    <projection id="NCXLS_M2R_NSML" presynapticPopulation="M2R" postsynapticPopulation="NSML" synapse="Acetylcholine">
      <connection id="53" preCellId="../M2R/0/M2R" postCellId="../NSML/0/NSML" preSegmentId="6" postSegmentId="10" preFractionAlong="0.854" postFractionAlong="0.544"/>
      <connection id="57" preCellId="../M2R/0/M2R" postCellId="../NSML/1/NSML" preSegmentId="6" postSegmentId="5" preFractionAlong="0.854" postFractionAlong="0.554"/>
    </projection>
    <electricalProjection id="NCXLS_M2R_M2L_GJ" presynapticPopulation="M2R" postsynapticPopulation="M2L">
      <electricalConnection id="54" preCell="0" postCell="0" synapse="Generic_GJ" preSegment="6" postSegment="5" preFractionAlong="0.854" postFractionAlong="0.962"/>
    </electricalProjection>
    <projection id="NCXLS_M2R_NSMR" presynapticPopulation="M2R" postsynapticPopulation="NSMR" synapse="Acetylcholine">
      <connection id="55" preCellId="../M2R/0/M2R" postCellId="../NSMR/0/NSMR" preSegmentId="6" postSegmentId="1" preFractionAlong="0.854" postFractionAlong="0.995"/>
    </projection>
    <projection id="NCXLS_M3R_M1" presynapticPopulation="M3R" postsynapticPopulation="M1" synapse="Glutamate">
      <connection id="59" preCellId="../M3R/2/M3R" postCellId="../M1/0/M1" preSegmentId="7" postSegmentId="8" preFractionAlong="0.336" postFractionAlong="0.291"/>
    </projection>
    <electricalProjection id="NCXLS_M3R_M3L_GJ" presynapticPopulation="M3R" postsynapticPopulation="M3L">
      <electricalConnection id="64" preCell="2" postCell="0" synapse="Generic_GJ" preSegment="7" postSegment="1" preFractionAlong="0.336" postFractionAlong="0.675"/>
    </electricalProjection>
    <electricalProjection id="NCXLS_M3L_M1_GJ" presynapticPopulation="M3L" postsynapticPopulation="M1">
      <electricalConnection id="66" preCell="0" postCell="0" synapse="Generic_GJ" preSegment="4" postSegment="8" preFractionAlong="0.699" postFractionAlong="0.291"/>
    </electricalProjection>
    <projection id="NCXLS_M3L_M3R" presynapticPopulation="M3L" postsynapticPopulation="M3R" synapse="Acetylcholine">
      <connection id="67" preCellId="../M3L/0/M3L" postCellId="../M3R/0/M3R" preSegmentId="4" postSegmentId="9" preFractionAlong="0.699" postFractionAlong="0.48"/>
      <connection id="70" preCellId="../M3L/0/M3L" postCellId="../M3R/1/M3R" preSegmentId="4" postSegmentId="5" preFractionAlong="0.699" postFractionAlong="0.202"/>
    </projection>
    <projection id="NCXLS_M3L_I1L" presynapticPopulation="M3L" postsynapticPopulation="I1L" synapse="Acetylcholine">
      <connection id="68" preCellId="../M3L/0/M3L" postCellId="../I1L/0/I1L" preSegmentId="4" postSegmentId="2" preFractionAlong="0.699" postFractionAlong="0.217"/>
      <connection id="69" preCellId="../M3L/0/M3L" postCellId="../I1L/1/I1L" preSegmentId="4" postSegmentId="6" preFractionAlong="0.699" postFractionAlong="0.752"/>
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    </projection>
    <projection id="NCXLS_M3L_NSMR" presynapticPopulation="M3L" postsynapticPopulation="NSMR" synapse="Acetylcholine">
      <connection id="71" preCellId="../M3L/0/M3L" postCellId="../NSMR/1/NSMR" preSegmentId="4" postSegmentId="4" preFractionAlong="0.699" postFractionAlong="0.183"/>
      <connection id="78" preCellId="../M3L/0/M3L" postCellId="../NSMR/0/NSMR" preSegmentId="4" postSegmentId="1" preFractionAlong="0.699" postFractionAlong="0.995"/>
    </projection>
    <projection id="NCXLS_M3L_NSML" presynapticPopulation="M3L" postsynapticPopulation="NSML" synapse="Acetylcholine">
      <connection id="73" preCellId="../M3L/0/M3L" postCellId="../NSML/0/NSML" preSegmentId="4" postSegmentId="10" preFractionAlong="0.699" postFractionAlong="0.544"/>
    </projection>
    <projection id="NCXLS_M3L_I1R" presynapticPopulation="M3L" postsynapticPopulation="I1R" synapse="Acetylcholine">
      <connection id="74" preCellId="../M3L/0/M3L" postCellId="../I1R/0/I1R" preSegmentId="4" postSegmentId="6" preFractionAlong="0.699" postFractionAlong="0.459"/>
    </projection>
    <electricalProjection id="NCXLS_M3L_M2L_GJ" presynapticPopulation="M3L" postsynapticPopulation="M2L">
      <electricalConnection id="75" preCell="0" postCell="0" synapse="Generic_GJ" preSegment="4" postSegment="5" preFractionAlong="0.699" postFractionAlong="0.962"/>
    </electricalProjection>
    <projection id="NCXLS_M3L_M2R" presynapticPopulation="M3L" postsynapticPopulation="M2R" synapse="Acetylcholine">
      <connection id="76" preCellId="../M3L/0/M3L" postCellId="../M2R/0/M2R" preSegmentId="4" postSegmentId="1" preFractionAlong="0.699" postFractionAlong="0.469"/>
    </projection>
    <electricalProjection id="NCXLS_M3L_M3R_GJ" presynapticPopulation="M3L" postsynapticPopulation="M3R">
      <electricalConnection id="77" preCell="0" postCell="2" synapse="Generic_GJ" preSegment="4" postSegment="1" preFractionAlong="0.699" postFractionAlong="0.546"/>
    </electricalProjection>
    <projection id="NCXLS_M3L_I2L" presynapticPopulation="M3L" postsynapticPopulation="I2L" synapse="Acetylcholine">
      <connection id="79" preCellId="../M3L/0/M3L" postCellId="../I2L/0/I2L" preSegmentId="4" postSegmentId="8" preFractionAlong="0.699" postFractionAlong="0.031"/>
    </projection>
    <projection id="NCXLS_NSMR_I1L" presynapticPopulation="NSMR" postsynapticPopulation="I1L" synapse="Serotonin_Glutamate">
      <connection id="83" preCellId="../NSMR/0/NSMR" postCellId="../I1L/1/I1L" preSegmentId="10" postSegmentId="6" preFractionAlong="0.339" postFractionAlong="0.752"/>
      <connection id="86" preCellId="../NSMR/0/NSMR" postCellId="../I1L/3/I1L" preSegmentId="10" postSegmentId="5" preFractionAlong="0.339" postFractionAlong="0.91"/>
    </projection>
    <projection id="NCXLS_NSMR_M3R" presynapticPopulation="NSMR" postsynapticPopulation="M3R" synapse="Serotonin_Glutamate">
      <connection id="84" preCellId="../NSMR/0/NSMR" postCellId="../M3R/1/M3R" preSegmentId="10" postSegmentId="5" preFractionAlong="0.339" postFractionAlong="0.202"/>
    </projection>
    <projection id="NCXLS_NSMR_M2L" presynapticPopulation="NSMR" postsynapticPopulation="M2L" synapse="Serotonin_Glutamate">
      <connection id="85" preCellId="../NSMR/0/NSMR" postCellId="../M2L/0/M2L" preSegmentId="10" postSegmentId="5" preFractionAlong="0.339" postFractionAlong="0.962"/>
    </projection>
  </network>
</neuroml>
