<?xml version='1.0' encoding='UTF-8'?>
<neuroml xmlns="http://www.neuroml.org/schema/neuroml2" xmlns:xsi="http://www.w3.org/2001/XMLSchema-instance" xsi:schemaLocation="http://www.neuroml.org/schema/neuroml2 https://raw.githubusercontent.com/NeuroML/NeuroML2/development/Schemas/NeuroML2/NeuroML_v2beta4.xsd" id="gvft_network_bio_prior_lamW_0.278_DF_0.026_t60.net">
  <notes>NeuroML2 network generated from GVFT simulation on 2025-05-04 10:21:03
</notes>
  <include href="I1L.cell.nml"/>
  <include href="I1R.cell.nml"/>
  <include href="I2L.cell.nml"/>
  <include href="M1.cell.nml"/>
  <include href="M2L.cell.nml"/>
  <include href="M2R.cell.nml"/>
  <include href="M3L.cell.nml"/>
  <include href="M3R.cell.nml"/>
  <include href="M4.cell.nml"/>
  <include href="M5.cell.nml"/>
  <include href="NSML.cell.nml"/>
  <include href="NSMR.cell.nml"/>
  <include href="Acetylcholine.synapse.nml"/>
  <include href="Generic_GJ.nml"/>
  <include href="Glutamate.synapse.nml"/>
  <include href="Serotonin_Glutamate.synapse.nml"/>
  <network id="gvft_network_bio_prior_lamW_0.278_DF_0.026_t60.net" type="networkWithTemperature" temperature="20.0 degC">
    <population id="I1L" component="I1L" type="populationList" size="3">
      <instance id="0">
        <location x="-0.03517588973045349" y="0.7587939500808716" z="0.0"/>
      </instance>
      <instance id="1">
        <location x="-0.03517588973045349" y="0.8592965006828308" z="0.0"/>
      </instance>
      <instance id="2">
        <location x="0.30653268098831177" y="0.5577889680862427" z="0.0"/>
      </instance>
    </population>
    <population id="I1R" component="I1R" type="populationList" size="3">
      <instance id="0">
        <location x="0.7085427045822144" y="-0.929648220539093" z="0.0"/>
      </instance>
      <instance id="1">
        <location x="-0.13567839562892914" y="0.015075387433171272" z="0.0"/>
      </instance>
      <instance id="2">
        <location x="0.39698493480682373" y="-0.005025136284530163" z="0.0"/>
      </instance>
    </population>
    <population id="I2L" component="I2L" type="populationList" size="2">
      <instance id="0">
        <location x="-0.5778894424438477" y="0.2160804122686386" z="0.0"/>
      </instance>
      <instance id="1">
        <location x="-0.6683416962623596" y="0.7185929417610168" z="0.0"/>
      </instance>
    </population>
    <population id="M1" component="M1" type="populationList" size="1">
      <instance id="0">
        <location x="0.9899497628211975" y="0.4773869514465332" z="0.0"/>
      </instance>
    </population>
    <population id="M2L" component="M2L" type="populationList" size="1">
      <instance id="0">
        <location x="0.08542714267969131" y="-0.13567839562892914" z="0.0"/>
      </instance>
    </population>
    <population id="M2R" component="M2R" type="populationList" size="1">
      <instance id="0">
        <location x="-0.43718594312667847" y="-0.7185929417610168" z="0.0"/>
      </instance>
    </population>
    <population id="M3L" component="M3L" type="populationList" size="1">
      <instance id="0">
        <location x="-0.2261306643486023" y="0.6984924674034119" z="0.0"/>
      </instance>
    </population>
    <population id="M3R" component="M3R" type="populationList" size="1">
      <instance id="0">
        <location x="0.4070351719856262" y="0.5678392052650452" z="0.0"/>
      </instance>
    </population>
    <population id="M4" component="M4" type="populationList" size="1">
      <instance id="0">
        <location x="0.12562814354896545" y="-0.8291457295417786" z="0.0"/>
      </instance>
    </population>
    <population id="M5" component="M5" type="populationList" size="1">
      <instance id="0">
        <location x="0.10552764683961868" y="-0.43718594312667847" z="0.0"/>
      </instance>
    </population>
    <population id="NSML" component="NSML" type="populationList" size="3">
      <instance id="0">
        <location x="0.13567839562892914" y="0.6381909847259521" z="0.0"/>
      </instance>
      <instance id="1">
        <location x="0.4773869514465332" y="-0.2964824140071869" z="0.0"/>
      </instance>
      <instance id="2">
        <location x="-1.0" y="-0.39698493480682373" z="0.0"/>
      </instance>
    </population>
    <population id="NSMR" component="NSMR" type="populationList" size="2">
      <instance id="0">
        <location x="0.49748745560646057" y="-0.45728644728660583" z="0.0"/>
      </instance>
      <instance id="1">
        <location x="-0.43718594312667847" y="0.025125637650489807" z="0.0"/>
      </instance>
    </population>
    <projection id="NCXLS_I1L_I1L" presynapticPopulation="I1L" postsynapticPopulation="I1L" synapse="Acetylcholine">
      <connection id="0" preCellId="../I1L/0/I1L" postCellId="../I1L/1/I1L" preSegmentId="6" postSegmentId="6" preFractionAlong="0.644" postFractionAlong="0.752"/>
    </projection>
    <projection id="NCXLS_I2L_NSML" presynapticPopulation="I2L" postsynapticPopulation="NSML" synapse="Acetylcholine">
      <connection id="1" preCellId="../I2L/0/I2L" postCellId="../NSML/2/NSML" preSegmentId="10" postSegmentId="10" preFractionAlong="0.838" postFractionAlong="0.724"/>
    </projection>
    <projection id="NCXLS_NSMR_I2L" presynapticPopulation="NSMR" postsynapticPopulation="I2L" synapse="Serotonin_Glutamate">
      <connection id="2" preCellId="../NSMR/1/NSMR" postCellId="../I2L/0/I2L" preSegmentId="4" postSegmentId="8" preFractionAlong="0.385" postFractionAlong="0.031"/>
      <connection id="5" preCellId="../NSMR/1/NSMR" postCellId="../I2L/1/I2L" preSegmentId="4" postSegmentId="2" preFractionAlong="0.385" postFractionAlong="0.204"/>
    </projection>
    <projection id="NCXLS_NSMR_M3L" presynapticPopulation="NSMR" postsynapticPopulation="M3L" synapse="Serotonin_Glutamate">
      <connection id="3" preCellId="../NSMR/1/NSMR" postCellId="../M3L/0/M3L" preSegmentId="4" postSegmentId="1" preFractionAlong="0.385" postFractionAlong="0.675"/>
    </projection>
    <projection id="NCXLS_NSMR_NSML" presynapticPopulation="NSMR" postsynapticPopulation="NSML" synapse="Serotonin_Glutamate">
      <connection id="4" preCellId="../NSMR/1/NSMR" postCellId="../NSML/2/NSML" preSegmentId="4" postSegmentId="10" preFractionAlong="0.385" postFractionAlong="0.724"/>
    </projection>
    <electricalProjection id="NCXLS_NSML_NSMR_GJ" presynapticPopulation="NSML" postsynapticPopulation="NSMR">
      <electricalConnection id="6" preCell="1" postCell="0" synapse="Generic_GJ" preSegment="5" postSegment="1" preFractionAlong="0.574" postFractionAlong="0.995"/>
    </electricalProjection>
    <projection id="NCXLS_NSML_I1R" presynapticPopulation="NSML" postsynapticPopulation="I1R" synapse="Serotonin_Glutamate">
      <connection id="7" preCellId="../NSML/1/NSML" postCellId="../I1R/0/I1R" preSegmentId="5" postSegmentId="6" preFractionAlong="0.574" postFractionAlong="0.459"/>
      <connection id="90" preCellId="../NSML/2/NSML" postCellId="../I1R/0/I1R" preSegmentId="9" postSegmentId="6" preFractionAlong="0.211" postFractionAlong="0.459"/>
    </projection>
    <projection id="NCXLS_M4_I1L" presynapticPopulation="M4" postsynapticPopulation="I1L" synapse="Acetylcholine">
      <connection id="8" preCellId="../M4/0/M4" postCellId="../I1L/0/I1L" preSegmentId="8" postSegmentId="2" preFractionAlong="0.777" postFractionAlong="0.217"/>
      <connection id="11" preCellId="../M4/0/M4" postCellId="../I1L/1/I1L" preSegmentId="8" postSegmentId="6" preFractionAlong="0.777" postFractionAlong="0.752"/>
      <connection id="12" preCellId="../M4/0/M4" postCellId="../I1L/2/I1L" preSegmentId="8" postSegmentId="8" preFractionAlong="0.777" postFractionAlong="0.948"/>
    </projection>
    <projection id="NCXLS_M4_I2L" presynapticPopulation="M4" postsynapticPopulation="I2L" synapse="Acetylcholine">
      <connection id="9" preCellId="../M4/0/M4" postCellId="../I2L/0/I2L" preSegmentId="8" postSegmentId="8" preFractionAlong="0.777" postFractionAlong="0.031"/>
      <connection id="21" preCellId="../M4/0/M4" postCellId="../I2L/1/I2L" preSegmentId="8" postSegmentId="2" preFractionAlong="0.777" postFractionAlong="0.204"/>
    </projection>
    <projection id="NCXLS_M4_I1R" presynapticPopulation="M4" postsynapticPopulation="I1R" synapse="Acetylcholine">
      <connection id="10" preCellId="../M4/0/M4" postCellId="../I1R/1/I1R" preSegmentId="8" postSegmentId="7" preFractionAlong="0.777" postFractionAlong="0.59"/>
      <connection id="13" preCellId="../M4/0/M4" postCellId="../I1R/2/I1R" preSegmentId="8" postSegmentId="5" preFractionAlong="0.777" postFractionAlong="0.203"/>
    </projection>
    <projection id="NCXLS_M4_NSMR" presynapticPopulation="M4" postsynapticPopulation="NSMR" synapse="Acetylcholine">
      <connection id="14" preCellId="../M4/0/M4" postCellId="../NSMR/1/NSMR" preSegmentId="8" postSegmentId="4" preFractionAlong="0.777" postFractionAlong="0.183"/>
    </projection>
    <projection id="NCXLS_M4_M2R" presynapticPopulation="M4" postsynapticPopulation="M2R" synapse="Glutamate">
      <connection id="15" preCellId="../M4/0/M4" postCellId="../M2R/0/M2R" preSegmentId="8" postSegmentId="1" preFractionAlong="0.777" postFractionAlong="0.469"/>
    </projection>
    <projection id="NCXLS_M4_NSML" presynapticPopulation="M4" postsynapticPopulation="NSML" synapse="Acetylcholine">
      <connection id="16" preCellId="../M4/0/M4" postCellId="../NSML/0/NSML" preSegmentId="8" postSegmentId="10" preFractionAlong="0.777" postFractionAlong="0.544"/>
      <connection id="20" preCellId="../M4/0/M4" postCellId="../NSML/2/NSML" preSegmentId="8" postSegmentId="10" preFractionAlong="0.777" postFractionAlong="0.724"/>
    </projection>
    <projection id="NCXLS_M4_M5" presynapticPopulation="M4" postsynapticPopulation="M5" synapse="Acetylcholine">
      <connection id="17" preCellId="../M4/0/M4" postCellId="../M5/0/M5" preSegmentId="8" postSegmentId="3" preFractionAlong="0.777" postFractionAlong="0.518"/>
    </projection>
    <electricalProjection id="NCXLS_M4_M2L_GJ" presynapticPopulation="M4" postsynapticPopulation="M2L">
      <electricalConnection id="18" preCell="0" postCell="0" synapse="Generic_GJ" preSegment="8" postSegment="5" preFractionAlong="0.777" postFractionAlong="0.962"/>
    </electricalProjection>
    <projection id="NCXLS_M4_M3L" presynapticPopulation="M4" postsynapticPopulation="M3L" synapse="Glutamate">
      <connection id="19" preCellId="../M4/0/M4" postCellId="../M3L/0/M3L" preSegmentId="8" postSegmentId="1" preFractionAlong="0.777" postFractionAlong="0.675"/>
    </projection>
    <projection id="NCXLS_M4_M3R" presynapticPopulation="M4" postsynapticPopulation="M3R" synapse="Acetylcholine">
      <connection id="22" preCellId="../M4/0/M4" postCellId="../M3R/0/M3R" preSegmentId="8" postSegmentId="9" preFractionAlong="0.777" postFractionAlong="0.48"/>
    </projection>
    <projection id="NCXLS_M2R_I1L" presynapticPopulation="M2R" postsynapticPopulation="I1L" synapse="Acetylcholine">
      <connection id="23" preCellId="../M2R/0/M2R" postCellId="../I1L/0/I1L" preSegmentId="6" postSegmentId="2" preFractionAlong="0.854" postFractionAlong="0.217"/>
      <connection id="28" preCellId="../M2R/0/M2R" postCellId="../I1L/1/I1L" preSegmentId="6" postSegmentId="6" preFractionAlong="0.854" postFractionAlong="0.752"/>
      <connection id="29" preCellId="../M2R/0/M2R" postCellId="../I1L/2/I1L" preSegmentId="6" postSegmentId="8" preFractionAlong="0.854" postFractionAlong="0.948"/>
    </projection>
    <projection id="NCXLS_M2R_NSMR" presynapticPopulation="M2R" postsynapticPopulation="NSMR" synapse="Acetylcholine">
      <connection id="24" preCellId="../M2R/0/M2R" postCellId="../NSMR/0/NSMR" preSegmentId="6" postSegmentId="1" preFractionAlong="0.854" postFractionAlong="0.995"/>
      <connection id="31" preCellId="../M2R/0/M2R" postCellId="../NSMR/1/NSMR" preSegmentId="6" postSegmentId="4" preFractionAlong="0.854" postFractionAlong="0.183"/>
    </projection>
    <projection id="NCXLS_M2R_I2L" presynapticPopulation="M2R" postsynapticPopulation="I2L" synapse="Acetylcholine">
      <connection id="25" preCellId="../M2R/0/M2R" postCellId="../I2L/0/I2L" preSegmentId="6" postSegmentId="8" preFractionAlong="0.854" postFractionAlong="0.031"/>
      <connection id="39" preCellId="../M2R/0/M2R" postCellId="../I2L/1/I2L" preSegmentId="6" postSegmentId="2" preFractionAlong="0.854" postFractionAlong="0.204"/>
    </projection>
    <projection id="NCXLS_M2R_I1R" presynapticPopulation="M2R" postsynapticPopulation="I1R" synapse="Acetylcholine">
      <connection id="26" preCellId="../M2R/0/M2R" postCellId="../I1R/0/I1R" preSegmentId="6" postSegmentId="6" preFractionAlong="0.854" postFractionAlong="0.459"/>
      <connection id="27" preCellId="../M2R/0/M2R" postCellId="../I1R/1/I1R" preSegmentId="6" postSegmentId="7" preFractionAlong="0.854" postFractionAlong="0.59"/>
      <connection id="30" preCellId="../M2R/0/M2R" postCellId="../I1R/2/I1R" preSegmentId="6" postSegmentId="5" preFractionAlong="0.854" postFractionAlong="0.203"/>
    </projection>
    <projection id="NCXLS_M2R_NSML" presynapticPopulation="M2R" postsynapticPopulation="NSML" synapse="Acetylcholine">
      <connection id="32" preCellId="../M2R/0/M2R" postCellId="../NSML/1/NSML" preSegmentId="6" postSegmentId="5" preFractionAlong="0.854" postFractionAlong="0.554"/>
      <connection id="35" preCellId="../M2R/0/M2R" postCellId="../NSML/0/NSML" preSegmentId="6" postSegmentId="10" preFractionAlong="0.854" postFractionAlong="0.544"/>
    </projection>
    <projection id="NCXLS_M2R_M4" presynapticPopulation="M2R" postsynapticPopulation="M4" synapse="Acetylcholine">
      <connection id="33" preCellId="../M2R/0/M2R" postCellId="../M4/0/M4" preSegmentId="6" postSegmentId="2" preFractionAlong="0.854" postFractionAlong="0.687"/>
    </projection>
    <projection id="NCXLS_M2R_M1" presynapticPopulation="M2R" postsynapticPopulation="M1" synapse="Glutamate">
      <connection id="34" preCellId="../M2R/0/M2R" postCellId="../M1/0/M1" preSegmentId="6" postSegmentId="8" preFractionAlong="0.854" postFractionAlong="0.291"/>
    </projection>
    <projection id="NCXLS_M2R_M5" presynapticPopulation="M2R" postsynapticPopulation="M5" synapse="Acetylcholine">
      <connection id="36" preCellId="../M2R/0/M2R" postCellId="../M5/0/M5" preSegmentId="6" postSegmentId="3" preFractionAlong="0.854" postFractionAlong="0.518"/>
    </projection>
    <projection id="NCXLS_M2R_M2L" presynapticPopulation="M2R" postsynapticPopulation="M2L" synapse="Acetylcholine">
      <connection id="37" preCellId="../M2R/0/M2R" postCellId="../M2L/0/M2L" preSegmentId="6" postSegmentId="5" preFractionAlong="0.854" postFractionAlong="0.962"/>
    </projection>
    <electricalProjection id="NCXLS_M2R_M3L_GJ" presynapticPopulation="M2R" postsynapticPopulation="M3L">
      <electricalConnection id="38" preCell="0" postCell="0" synapse="Generic_GJ" preSegment="6" postSegment="1" preFractionAlong="0.854" postFractionAlong="0.675"/>
    </electricalProjection>
    <projection id="NCXLS_M2R_M3R" presynapticPopulation="M2R" postsynapticPopulation="M3R" synapse="Acetylcholine">
      <connection id="40" preCellId="../M2R/0/M2R" postCellId="../M3R/0/M3R" preSegmentId="6" postSegmentId="9" preFractionAlong="0.854" postFractionAlong="0.48"/>
    </projection>
    <projection id="NCXLS_M1_I1L" presynapticPopulation="M1" postsynapticPopulation="I1L" synapse="Acetylcholine">
      <connection id="41" preCellId="../M1/0/M1" postCellId="../I1L/0/I1L" preSegmentId="1" postSegmentId="2" preFractionAlong="0.864" postFractionAlong="0.217"/>
      <connection id="43" preCellId="../M1/0/M1" postCellId="../I1L/1/I1L" preSegmentId="1" postSegmentId="6" preFractionAlong="0.864" postFractionAlong="0.752"/>
      <connection id="44" preCellId="../M1/0/M1" postCellId="../I1L/2/I1L" preSegmentId="1" postSegmentId="8" preFractionAlong="0.864" postFractionAlong="0.948"/>
    </projection>
    <projection id="NCXLS_M1_I2L" presynapticPopulation="M1" postsynapticPopulation="I2L" synapse="Acetylcholine">
      <connection id="42" preCellId="../M1/0/M1" postCellId="../I2L/0/I2L" preSegmentId="1" postSegmentId="8" preFractionAlong="0.864" postFractionAlong="0.031"/>
      <connection id="47" preCellId="../M1/0/M1" postCellId="../I2L/1/I2L" preSegmentId="1" postSegmentId="2" preFractionAlong="0.864" postFractionAlong="0.204"/>
    </projection>
    <projection id="NCXLS_M1_NSML" presynapticPopulation="M1" postsynapticPopulation="NSML" synapse="Acetylcholine">
      <connection id="45" preCellId="../M1/0/M1" postCellId="../NSML/0/NSML" preSegmentId="1" postSegmentId="10" preFractionAlong="0.864" postFractionAlong="0.544"/>
    </projection>
    <projection id="NCXLS_M1_M3L" presynapticPopulation="M1" postsynapticPopulation="M3L" synapse="Glutamate">
      <connection id="46" preCellId="../M1/0/M1" postCellId="../M3L/0/M3L" preSegmentId="1" postSegmentId="1" preFractionAlong="0.864" postFractionAlong="0.675"/>
    </projection>
    <projection id="NCXLS_M1_M3R" presynapticPopulation="M1" postsynapticPopulation="M3R" synapse="Acetylcholine">
      <connection id="48" preCellId="../M1/0/M1" postCellId="../M3R/0/M3R" preSegmentId="1" postSegmentId="9" preFractionAlong="0.864" postFractionAlong="0.48"/>
    </projection>
    <projection id="NCXLS_NSML_I1L" presynapticPopulation="NSML" postsynapticPopulation="I1L" synapse="Serotonin_Glutamate">
      <connection id="49" preCellId="../NSML/0/NSML" postCellId="../I1L/1/I1L" preSegmentId="7" postSegmentId="6" preFractionAlong="0.302" postFractionAlong="0.752"/>
    </projection>
    <projection id="NCXLS_NSML_M1" presynapticPopulation="NSML" postsynapticPopulation="M1" synapse="Serotonin_Glutamate">
      <connection id="50" preCellId="../NSML/0/NSML" postCellId="../M1/0/M1" preSegmentId="7" postSegmentId="8" preFractionAlong="0.302" postFractionAlong="0.291"/>
    </projection>
    <projection id="NCXLS_NSML_M3R" presynapticPopulation="NSML" postsynapticPopulation="M3R" synapse="Serotonin_Glutamate">
      <connection id="51" preCellId="../NSML/0/NSML" postCellId="../M3R/0/M3R" preSegmentId="7" postSegmentId="9" preFractionAlong="0.302" postFractionAlong="0.48"/>
    </projection>
    <projection id="NCXLS_M5_I1L" presynapticPopulation="M5" postsynapticPopulation="I1L" synapse="Acetylcholine">
      <connection id="52" preCellId="../M5/0/M5" postCellId="../I1L/0/I1L" preSegmentId="10" postSegmentId="2" preFractionAlong="0.747" postFractionAlong="0.217"/>
      <connection id="55" preCellId="../M5/0/M5" postCellId="../I1L/1/I1L" preSegmentId="10" postSegmentId="6" preFractionAlong="0.747" postFractionAlong="0.752"/>
      <connection id="56" preCellId="../M5/0/M5" postCellId="../I1L/2/I1L" preSegmentId="10" postSegmentId="8" preFractionAlong="0.747" postFractionAlong="0.948"/>
    </projection>
    <projection id="NCXLS_M5_I2L" presynapticPopulation="M5" postsynapticPopulation="I2L" synapse="Acetylcholine">
      <connection id="53" preCellId="../M5/0/M5" postCellId="../I2L/0/I2L" preSegmentId="10" postSegmentId="8" preFractionAlong="0.747" postFractionAlong="0.031"/>
      <connection id="63" preCellId="../M5/0/M5" postCellId="../I2L/1/I2L" preSegmentId="10" postSegmentId="2" preFractionAlong="0.747" postFractionAlong="0.204"/>
    </projection>
    <projection id="NCXLS_M5_I1R" presynapticPopulation="M5" postsynapticPopulation="I1R" synapse="Acetylcholine">
      <connection id="54" preCellId="../M5/0/M5" postCellId="../I1R/1/I1R" preSegmentId="10" postSegmentId="7" preFractionAlong="0.747" postFractionAlong="0.59"/>
      <connection id="57" preCellId="../M5/0/M5" postCellId="../I1R/2/I1R" preSegmentId="10" postSegmentId="5" preFractionAlong="0.747" postFractionAlong="0.203"/>
    </projection>
    <projection id="NCXLS_M5_NSMR" presynapticPopulation="M5" postsynapticPopulation="NSMR" synapse="Acetylcholine">
      <connection id="58" preCellId="../M5/0/M5" postCellId="../NSMR/1/NSMR" preSegmentId="10" postSegmentId="4" preFractionAlong="0.747" postFractionAlong="0.183"/>
    </projection>
    <projection id="NCXLS_M5_NSML" presynapticPopulation="M5" postsynapticPopulation="NSML" synapse="Acetylcholine">
      <connection id="59" preCellId="../M5/0/M5" postCellId="../NSML/0/NSML" preSegmentId="10" postSegmentId="10" preFractionAlong="0.747" postFractionAlong="0.544"/>
      <connection id="62" preCellId="../M5/0/M5" postCellId="../NSML/2/NSML" preSegmentId="10" postSegmentId="10" preFractionAlong="0.747" postFractionAlong="0.724"/>
    </projection>
    <projection id="NCXLS_M5_M2L" presynapticPopulation="M5" postsynapticPopulation="M2L" synapse="Glutamate">
      <connection id="60" preCellId="../M5/0/M5" postCellId="../M2L/0/M2L" preSegmentId="10" postSegmentId="5" preFractionAlong="0.747" postFractionAlong="0.962"/>
    </projection>
    <electricalProjection id="NCXLS_M5_M3L_GJ" presynapticPopulation="M5" postsynapticPopulation="M3L">
      <electricalConnection id="61" preCell="0" postCell="0" synapse="Generic_GJ" preSegment="10" postSegment="1" preFractionAlong="0.747" postFractionAlong="0.675"/>
    </electricalProjection>
    <electricalProjection id="NCXLS_M5_M3R_GJ" presynapticPopulation="M5" postsynapticPopulation="M3R">
      <electricalConnection id="64" preCell="0" postCell="0" synapse="Generic_GJ" preSegment="10" postSegment="9" preFractionAlong="0.747" postFractionAlong="0.48"/>
    </electricalProjection>
    <projection id="NCXLS_M2L_I1L" presynapticPopulation="M2L" postsynapticPopulation="I1L" synapse="Acetylcholine">
      <connection id="65" preCellId="../M2L/0/M2L" postCellId="../I1L/0/I1L" preSegmentId="8" postSegmentId="2" preFractionAlong="0.001" postFractionAlong="0.217"/>
      <connection id="68" preCellId="../M2L/0/M2L" postCellId="../I1L/1/I1L" preSegmentId="8" postSegmentId="6" preFractionAlong="0.001" postFractionAlong="0.752"/>
      <connection id="69" preCellId="../M2L/0/M2L" postCellId="../I1L/2/I1L" preSegmentId="8" postSegmentId="8" preFractionAlong="0.001" postFractionAlong="0.948"/>
    </projection>
    <projection id="NCXLS_M2L_I2L" presynapticPopulation="M2L" postsynapticPopulation="I2L" synapse="Acetylcholine">
      <connection id="66" preCellId="../M2L/0/M2L" postCellId="../I2L/0/I2L" preSegmentId="8" postSegmentId="8" preFractionAlong="0.001" postFractionAlong="0.031"/>
      <connection id="75" preCellId="../M2L/0/M2L" postCellId="../I2L/1/I2L" preSegmentId="8" postSegmentId="2" preFractionAlong="0.001" postFractionAlong="0.204"/>
    </projection>
    <projection id="NCXLS_M2L_I1R" presynapticPopulation="M2L" postsynapticPopulation="I1R" synapse="Acetylcholine">
      <connection id="67" preCellId="../M2L/0/M2L" postCellId="../I1R/1/I1R" preSegmentId="8" postSegmentId="7" preFractionAlong="0.001" postFractionAlong="0.59"/>
      <connection id="70" preCellId="../M2L/0/M2L" postCellId="../I1R/2/I1R" preSegmentId="8" postSegmentId="5" preFractionAlong="0.001" postFractionAlong="0.203"/>
    </projection>
    <projection id="NCXLS_M2L_NSMR" presynapticPopulation="M2L" postsynapticPopulation="NSMR" synapse="Acetylcholine">
      <connection id="71" preCellId="../M2L/0/M2L" postCellId="../NSMR/1/NSMR" preSegmentId="8" postSegmentId="4" preFractionAlong="0.001" postFractionAlong="0.183"/>
    </projection>
    <electricalProjection id="NCXLS_M2L_M1_GJ" presynapticPopulation="M2L" postsynapticPopulation="M1">
      <electricalConnection id="72" preCell="0" postCell="0" synapse="Generic_GJ" preSegment="8" postSegment="8" preFractionAlong="0.001" postFractionAlong="0.291"/>
    </electricalProjection>
    <projection id="NCXLS_M2L_NSML" presynapticPopulation="M2L" postsynapticPopulation="NSML" synapse="Acetylcholine">
      <connection id="73" preCellId="../M2L/0/M2L" postCellId="../NSML/0/NSML" preSegmentId="8" postSegmentId="10" preFractionAlong="0.001" postFractionAlong="0.544"/>
    </projection>
    <electricalProjection id="NCXLS_M2L_M3L_GJ" presynapticPopulation="M2L" postsynapticPopulation="M3L">
      <electricalConnection id="74" preCell="0" postCell="0" synapse="Generic_GJ" preSegment="8" postSegment="1" preFractionAlong="0.001" postFractionAlong="0.675"/>
    </electricalProjection>
    <projection id="NCXLS_M2L_M3R" presynapticPopulation="M2L" postsynapticPopulation="M3R" synapse="Glutamate">
      <connection id="76" preCellId="../M2L/0/M2L" postCellId="../M3R/0/M3R" preSegmentId="8" postSegmentId="9" preFractionAlong="0.001" postFractionAlong="0.48"/>
    </projection>
    <projection id="NCXLS_M3L_NSMR" presynapticPopulation="M3L" postsynapticPopulation="NSMR" synapse="Acetylcholine">
      <connection id="77" preCellId="../M3L/0/M3L" postCellId="../NSMR/0/NSMR" preSegmentId="4" postSegmentId="1" preFractionAlong="0.699" postFractionAlong="0.995"/>
      <connection id="82" preCellId="../M3L/0/M3L" postCellId="../NSMR/1/NSMR" preSegmentId="4" postSegmentId="4" preFractionAlong="0.699" postFractionAlong="0.183"/>
    </projection>
    <projection id="NCXLS_M3L_I2L" presynapticPopulation="M3L" postsynapticPopulation="I2L" synapse="Acetylcholine">
      <connection id="78" preCellId="../M3L/0/M3L" postCellId="../I2L/0/I2L" preSegmentId="4" postSegmentId="8" preFractionAlong="0.699" postFractionAlong="0.031"/>
      <connection id="89" preCellId="../M3L/0/M3L" postCellId="../I2L/1/I2L" preSegmentId="4" postSegmentId="2" preFractionAlong="0.699" postFractionAlong="0.204"/>
    </projection>
    <projection id="NCXLS_M3L_I1R" presynapticPopulation="M3L" postsynapticPopulation="I1R" synapse="Acetylcholine">
      <connection id="79" preCellId="../M3L/0/M3L" postCellId="../I1R/0/I1R" preSegmentId="4" postSegmentId="6" preFractionAlong="0.699" postFractionAlong="0.459"/>
      <connection id="80" preCellId="../M3L/0/M3L" postCellId="../I1R/1/I1R" preSegmentId="4" postSegmentId="7" preFractionAlong="0.699" postFractionAlong="0.59"/>
      <connection id="81" preCellId="../M3L/0/M3L" postCellId="../I1R/2/I1R" preSegmentId="4" postSegmentId="5" preFractionAlong="0.699" postFractionAlong="0.203"/>
    </projection>
    <projection id="NCXLS_M3L_NSML" presynapticPopulation="M3L" postsynapticPopulation="NSML" synapse="Acetylcholine">
      <connection id="83" preCellId="../M3L/0/M3L" postCellId="../NSML/1/NSML" preSegmentId="4" postSegmentId="5" preFractionAlong="0.699" postFractionAlong="0.554"/>
      <connection id="88" preCellId="../M3L/0/M3L" postCellId="../NSML/2/NSML" preSegmentId="4" postSegmentId="10" preFractionAlong="0.699" postFractionAlong="0.724"/>
    </projection>
    <projection id="NCXLS_M3L_M4" presynapticPopulation="M3L" postsynapticPopulation="M4" synapse="Acetylcholine">
      <connection id="84" preCellId="../M3L/0/M3L" postCellId="../M4/0/M4" preSegmentId="4" postSegmentId="2" preFractionAlong="0.699" postFractionAlong="0.687"/>
    </projection>
    <electricalProjection id="NCXLS_M3L_M2R_GJ" presynapticPopulation="M3L" postsynapticPopulation="M2R">
      <electricalConnection id="85" preCell="0" postCell="0" synapse="Generic_GJ" preSegment="4" postSegment="1" preFractionAlong="0.699" postFractionAlong="0.469"/>
    </electricalProjection>
    <electricalProjection id="NCXLS_M3L_M5_GJ" presynapticPopulation="M3L" postsynapticPopulation="M5">
      <electricalConnection id="86" preCell="0" postCell="0" synapse="Generic_GJ" preSegment="4" postSegment="3" preFractionAlong="0.699" postFractionAlong="0.518"/>
    </electricalProjection>
    <electricalProjection id="NCXLS_M3L_M2L_GJ" presynapticPopulation="M3L" postsynapticPopulation="M2L">
      <electricalConnection id="87" preCell="0" postCell="0" synapse="Generic_GJ" preSegment="4" postSegment="5" preFractionAlong="0.699" postFractionAlong="0.962"/>
    </electricalProjection>
    <projection id="NCXLS_NSML_M4" presynapticPopulation="NSML" postsynapticPopulation="M4" synapse="Serotonin_Glutamate">
      <connection id="91" preCellId="../NSML/2/NSML" postCellId="../M4/0/M4" preSegmentId="9" postSegmentId="2" preFractionAlong="0.211" postFractionAlong="0.687"/>
    </projection>
    <projection id="NCXLS_NSML_M2R" presynapticPopulation="NSML" postsynapticPopulation="M2R" synapse="Serotonin_Glutamate">
      <connection id="92" preCellId="../NSML/2/NSML" postCellId="../M2R/0/M2R" preSegmentId="9" postSegmentId="1" preFractionAlong="0.211" postFractionAlong="0.469"/>
    </projection>
    <projection id="NCXLS_M3R_I1L" presynapticPopulation="M3R" postsynapticPopulation="I1L" synapse="Acetylcholine">
      <connection id="93" preCellId="../M3R/0/M3R" postCellId="../I1L/0/I1L" preSegmentId="10" postSegmentId="2" preFractionAlong="0.782" postFractionAlong="0.217"/>
      <connection id="98" preCellId="../M3R/0/M3R" postCellId="../I1L/1/I1L" preSegmentId="10" postSegmentId="6" preFractionAlong="0.782" postFractionAlong="0.752"/>
      <connection id="99" preCellId="../M3R/0/M3R" postCellId="../I1L/2/I1L" preSegmentId="10" postSegmentId="8" preFractionAlong="0.782" postFractionAlong="0.948"/>
    </projection>
    <projection id="NCXLS_M3R_NSMR" presynapticPopulation="M3R" postsynapticPopulation="NSMR" synapse="Acetylcholine">
      <connection id="94" preCellId="../M3R/0/M3R" postCellId="../NSMR/0/NSMR" preSegmentId="10" postSegmentId="1" preFractionAlong="0.782" postFractionAlong="0.995"/>
      <connection id="101" preCellId="../M3R/0/M3R" postCellId="../NSMR/1/NSMR" preSegmentId="10" postSegmentId="4" preFractionAlong="0.782" postFractionAlong="0.183"/>
    </projection>
    <projection id="NCXLS_M3R_I2L" presynapticPopulation="M3R" postsynapticPopulation="I2L" synapse="Acetylcholine">
      <connection id="95" preCellId="../M3R/0/M3R" postCellId="../I2L/0/I2L" preSegmentId="10" postSegmentId="8" preFractionAlong="0.782" postFractionAlong="0.031"/>
      <connection id="110" preCellId="../M3R/0/M3R" postCellId="../I2L/1/I2L" preSegmentId="10" postSegmentId="2" preFractionAlong="0.782" postFractionAlong="0.204"/>
    </projection>
    <projection id="NCXLS_M3R_I1R" presynapticPopulation="M3R" postsynapticPopulation="I1R" synapse="Acetylcholine">
      <connection id="96" preCellId="../M3R/0/M3R" postCellId="../I1R/0/I1R" preSegmentId="10" postSegmentId="6" preFractionAlong="0.782" postFractionAlong="0.459"/>
      <connection id="97" preCellId="../M3R/0/M3R" postCellId="../I1R/1/I1R" preSegmentId="10" postSegmentId="7" preFractionAlong="0.782" postFractionAlong="0.59"/>
      <connection id="100" preCellId="../M3R/0/M3R" postCellId="../I1R/2/I1R" preSegmentId="10" postSegmentId="5" preFractionAlong="0.782" postFractionAlong="0.203"/>
    </projection>
    <projection id="NCXLS_M3R_NSML" presynapticPopulation="M3R" postsynapticPopulation="NSML" synapse="Acetylcholine">
      <connection id="102" preCellId="../M3R/0/M3R" postCellId="../NSML/1/NSML" preSegmentId="10" postSegmentId="5" preFractionAlong="0.782" postFractionAlong="0.554"/>
      <connection id="105" preCellId="../M3R/0/M3R" postCellId="../NSML/0/NSML" preSegmentId="10" postSegmentId="10" preFractionAlong="0.782" postFractionAlong="0.544"/>
      <connection id="109" preCellId="../M3R/0/M3R" postCellId="../NSML/2/NSML" preSegmentId="10" postSegmentId="10" preFractionAlong="0.782" postFractionAlong="0.724"/>
    </projection>
    <electricalProjection id="NCXLS_M3R_M4_GJ" presynapticPopulation="M3R" postsynapticPopulation="M4">
      <electricalConnection id="103" preCell="0" postCell="0" synapse="Generic_GJ" preSegment="10" postSegment="2" preFractionAlong="0.782" postFractionAlong="0.687"/>
    </electricalProjection>
    <electricalProjection id="NCXLS_M3R_M2R_GJ" presynapticPopulation="M3R" postsynapticPopulation="M2R">
      <electricalConnection id="104" preCell="0" postCell="0" synapse="Generic_GJ" preSegment="10" postSegment="1" preFractionAlong="0.782" postFractionAlong="0.469"/>
    </electricalProjection>
    <projection id="NCXLS_M3R_M5" presynapticPopulation="M3R" postsynapticPopulation="M5" synapse="Glutamate">
      <connection id="106" preCellId="../M3R/0/M3R" postCellId="../M5/0/M5" preSegmentId="10" postSegmentId="3" preFractionAlong="0.782" postFractionAlong="0.518"/>
    </projection>
    <electricalProjection id="NCXLS_M3R_M2L_GJ" presynapticPopulation="M3R" postsynapticPopulation="M2L">
      <electricalConnection id="107" preCell="0" postCell="0" synapse="Generic_GJ" preSegment="10" postSegment="5" preFractionAlong="0.782" postFractionAlong="0.962"/>
    </electricalProjection>
    <projection id="NCXLS_M3R_M3L" presynapticPopulation="M3R" postsynapticPopulation="M3L" synapse="Acetylcholine">
      <connection id="108" preCellId="../M3R/0/M3R" postCellId="../M3L/0/M3L" preSegmentId="10" postSegmentId="1" preFractionAlong="0.782" postFractionAlong="0.675"/>
    </projection>
  </network>
</neuroml>
