<?xml version='1.0' encoding='UTF-8'?>
<neuroml xmlns="http://www.neuroml.org/schema/neuroml2" xmlns:xsi="http://www.w3.org/2001/XMLSchema-instance" xsi:schemaLocation="http://www.neuroml.org/schema/neuroml2 https://raw.githubusercontent.com/NeuroML/NeuroML2/development/Schemas/NeuroML2/NeuroML_v2beta4.xsd" id="gvft_network_bio_prior_lamW_0.278_DF_0.026_t80.net">
  <notes>NeuroML2 network generated from GVFT simulation on 2025-05-04 10:21:13
</notes>
  <include href="I1L.cell.nml"/>
  <include href="I1R.cell.nml"/>
  <include href="I2L.cell.nml"/>
  <include href="I2R.cell.nml"/>
  <include href="M1.cell.nml"/>
  <include href="M2L.cell.nml"/>
  <include href="M2R.cell.nml"/>
  <include href="M3L.cell.nml"/>
  <include href="M3R.cell.nml"/>
  <include href="NSML.cell.nml"/>
  <include href="NSMR.cell.nml"/>
  <include href="Acetylcholine.synapse.nml"/>
  <include href="Generic_GJ.nml"/>
  <include href="Glutamate.synapse.nml"/>
  <include href="Serotonin_Glutamate.synapse.nml"/>
  <network id="gvft_network_bio_prior_lamW_0.278_DF_0.026_t80.net" type="networkWithTemperature" temperature="20.0 degC">
    <population id="I1L" component="I1L" type="populationList" size="1">
      <instance id="0">
        <location x="0.5276381969451904" y="-0.4271356761455536" z="0.0"/>
      </instance>
    </population>
    <population id="I1R" component="I1R" type="populationList" size="1">
      <instance id="0">
        <location x="0.8492462038993835" y="-0.6080402135848999" z="0.0"/>
      </instance>
    </population>
    <population id="I2L" component="I2L" type="populationList" size="1">
      <instance id="0">
        <location x="0.5778894424438477" y="-0.45728644728660583" z="0.0"/>
      </instance>
    </population>
    <population id="I2R" component="I2R" type="populationList" size="5">
      <instance id="0">
        <location x="-0.49748745560646057" y="-0.44723618030548096" z="0.0"/>
      </instance>
      <instance id="1">
        <location x="-0.19597990810871124" y="-0.6783919334411621" z="0.0"/>
      </instance>
      <instance id="2">
        <location x="0.095477394759655" y="0.8894472122192383" z="0.0"/>
      </instance>
      <instance id="3">
        <location x="-0.8492462038993835" y="-0.13567839562892914" z="0.0"/>
      </instance>
      <instance id="4">
        <location x="-0.045226141810417175" y="0.9195979833602905" z="0.0"/>
      </instance>
    </population>
    <population id="M1" component="M1" type="populationList" size="3">
      <instance id="0">
        <location x="0.1557788997888565" y="-0.13567839562892914" z="0.0"/>
      </instance>
      <instance id="1">
        <location x="0.6180904507637024" y="1.0" z="0.0"/>
      </instance>
      <instance id="2">
        <location x="0.7788944840431213" y="-0.07537689805030823" z="0.0"/>
      </instance>
    </population>
    <population id="M2L" component="M2L" type="populationList" size="1">
      <instance id="0">
        <location x="-0.37688443064689636" y="-0.38693466782569885" z="0.0"/>
      </instance>
    </population>
    <population id="M2R" component="M2R" type="populationList" size="1">
      <instance id="0">
        <location x="0.4271356761455536" y="-0.6884422302246094" z="0.0"/>
      </instance>
    </population>
    <population id="M3L" component="M3L" type="populationList" size="1">
      <instance id="0">
        <location x="-0.14572864770889282" y="-0.7889447212219238" z="0.0"/>
      </instance>
    </population>
    <population id="M3R" component="M3R" type="populationList" size="1">
      <instance id="0">
        <location x="-0.9698492288589478" y="0.6281406879425049" z="0.0"/>
      </instance>
    </population>
    <population id="NSML" component="NSML" type="populationList" size="3">
      <instance id="0">
        <location x="0.45728644728660583" y="-0.2261306643486023" z="0.0"/>
      </instance>
      <instance id="1">
        <location x="-0.8190954923629761" y="0.005025136284530163" z="0.0"/>
      </instance>
      <instance id="2">
        <location x="-1.0" y="0.7487437129020691" z="0.0"/>
      </instance>
    </population>
    <population id="NSMR" component="NSMR" type="populationList" size="2">
      <instance id="0">
        <location x="0.30653268098831177" y="-0.4170854389667511" z="0.0"/>
      </instance>
      <instance id="1">
        <location x="-0.4773869514465332" y="-0.26633167266845703" z="0.0"/>
      </instance>
    </population>
    <projection id="NCXLS_NSML_M2R" presynapticPopulation="NSML" postsynapticPopulation="M2R" synapse="Serotonin_Glutamate">
      <connection id="0" preCellId="../NSML/0/NSML" postCellId="../M2R/0/M2R" preSegmentId="7" postSegmentId="1" preFractionAlong="0.302" postFractionAlong="0.469"/>
    </projection>
    <projection id="NCXLS_NSML_I1L" presynapticPopulation="NSML" postsynapticPopulation="I1L" synapse="Serotonin_Glutamate">
      <connection id="1" preCellId="../NSML/0/NSML" postCellId="../I1L/0/I1L" preSegmentId="7" postSegmentId="2" preFractionAlong="0.302" postFractionAlong="0.217"/>
    </projection>
    <projection id="NCXLS_NSML_I1R" presynapticPopulation="NSML" postsynapticPopulation="I1R" synapse="Serotonin_Glutamate">
      <connection id="2" preCellId="../NSML/0/NSML" postCellId="../I1R/0/I1R" preSegmentId="7" postSegmentId="6" preFractionAlong="0.302" postFractionAlong="0.459"/>
    </projection>
    <projection id="NCXLS_NSML_M1" presynapticPopulation="NSML" postsynapticPopulation="M1" synapse="Serotonin_Glutamate">
      <connection id="3" preCellId="../NSML/0/NSML" postCellId="../M1/2/M1" preSegmentId="7" postSegmentId="10" preFractionAlong="0.302" postFractionAlong="0.654"/>
      <connection id="120" preCellId="../NSML/2/NSML" postCellId="../M1/1/M1" preSegmentId="9" postSegmentId="7" preFractionAlong="0.211" postFractionAlong="0.891"/>
      <connection id="122" preCellId="../NSML/2/NSML" postCellId="../M1/2/M1" preSegmentId="9" postSegmentId="10" preFractionAlong="0.211" postFractionAlong="0.654"/>
    </projection>
    <projection id="NCXLS_NSML_I2L" presynapticPopulation="NSML" postsynapticPopulation="I2L" synapse="Serotonin_Glutamate">
      <connection id="4" preCellId="../NSML/0/NSML" postCellId="../I2L/0/I2L" preSegmentId="7" postSegmentId="8" preFractionAlong="0.302" postFractionAlong="0.031"/>
    </projection>
    <projection id="NCXLS_NSMR_M2R" presynapticPopulation="NSMR" postsynapticPopulation="M2R" synapse="Serotonin_Glutamate">
      <connection id="5" preCellId="../NSMR/0/NSMR" postCellId="../M2R/0/M2R" preSegmentId="10" postSegmentId="1" preFractionAlong="0.339" postFractionAlong="0.469"/>
    </projection>
    <projection id="NCXLS_NSMR_M3L" presynapticPopulation="NSMR" postsynapticPopulation="M3L" synapse="Serotonin_Glutamate">
      <connection id="6" preCellId="../NSMR/0/NSMR" postCellId="../M3L/0/M3L" preSegmentId="10" postSegmentId="1" preFractionAlong="0.339" postFractionAlong="0.675"/>
      <connection id="118" preCellId="../NSMR/1/NSMR" postCellId="../M3L/0/M3L" preSegmentId="4" postSegmentId="1" preFractionAlong="0.385" postFractionAlong="0.675"/>
    </projection>
    <projection id="NCXLS_NSMR_I1L" presynapticPopulation="NSMR" postsynapticPopulation="I1L" synapse="Serotonin_Glutamate">
      <connection id="7" preCellId="../NSMR/0/NSMR" postCellId="../I1L/0/I1L" preSegmentId="10" postSegmentId="2" preFractionAlong="0.339" postFractionAlong="0.217"/>
    </projection>
    <projection id="NCXLS_NSMR_I1R" presynapticPopulation="NSMR" postsynapticPopulation="I1R" synapse="Serotonin_Glutamate">
      <connection id="8" preCellId="../NSMR/0/NSMR" postCellId="../I1R/0/I1R" preSegmentId="10" postSegmentId="6" preFractionAlong="0.339" postFractionAlong="0.459"/>
    </projection>
    <projection id="NCXLS_NSMR_I2L" presynapticPopulation="NSMR" postsynapticPopulation="I2L" synapse="Serotonin_Glutamate">
      <connection id="9" preCellId="../NSMR/0/NSMR" postCellId="../I2L/0/I2L" preSegmentId="10" postSegmentId="8" preFractionAlong="0.339" postFractionAlong="0.031"/>
    </projection>
    <projection id="NCXLS_M1_NSML" presynapticPopulation="M1" postsynapticPopulation="NSML" synapse="Acetylcholine">
      <connection id="10" preCellId="../M1/0/M1" postCellId="../NSML/0/NSML" preSegmentId="1" postSegmentId="10" preFractionAlong="0.864" postFractionAlong="0.544"/>
      <connection id="61" preCellId="../M1/1/M1" postCellId="../NSML/0/NSML" preSegmentId="9" postSegmentId="10" preFractionAlong="0.979" postFractionAlong="0.544"/>
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    </projection>
    <projection id="NCXLS_M1_NSMR" presynapticPopulation="M1" postsynapticPopulation="NSMR" synapse="Acetylcholine">
      <connection id="11" preCellId="../M1/0/M1" postCellId="../NSMR/0/NSMR" preSegmentId="1" postSegmentId="1" preFractionAlong="0.864" postFractionAlong="0.995"/>
      <connection id="62" preCellId="../M1/1/M1" postCellId="../NSMR/0/NSMR" preSegmentId="9" postSegmentId="1" preFractionAlong="0.979" postFractionAlong="0.995"/>
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    </projection>
    <projection id="NCXLS_M1_I2R" presynapticPopulation="M1" postsynapticPopulation="I2R" synapse="Acetylcholine">
      <connection id="12" preCellId="../M1/0/M1" postCellId="../I2R/1/I2R" preSegmentId="1" postSegmentId="5" preFractionAlong="0.864" postFractionAlong="0.781"/>
      <connection id="63" preCellId="../M1/1/M1" postCellId="../I2R/0/I2R" preSegmentId="9" postSegmentId="9" preFractionAlong="0.979" postFractionAlong="0.207"/>
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    </projection>
    <projection id="NCXLS_M1_M2R" presynapticPopulation="M1" postsynapticPopulation="M2R" synapse="Glutamate">
      <connection id="13" preCellId="../M1/0/M1" postCellId="../M2R/0/M2R" preSegmentId="1" postSegmentId="1" preFractionAlong="0.864" postFractionAlong="0.469"/>
      <connection id="68" preCellId="../M1/1/M1" postCellId="../M2R/0/M2R" preSegmentId="9" postSegmentId="1" preFractionAlong="0.979" postFractionAlong="0.469"/>
      <connection id="105" preCellId="../M1/2/M1" postCellId="../M2R/0/M2R" preSegmentId="1" postSegmentId="1" preFractionAlong="0.147" postFractionAlong="0.469"/>
    </projection>
    <projection id="NCXLS_M1_M3L" presynapticPopulation="M1" postsynapticPopulation="M3L" synapse="Acetylcholine">
      <connection id="14" preCellId="../M1/0/M1" postCellId="../M3L/0/M3L" preSegmentId="1" postSegmentId="1" preFractionAlong="0.864" postFractionAlong="0.675"/>
      <connection id="71" preCellId="../M1/1/M1" postCellId="../M3L/0/M3L" preSegmentId="9" postSegmentId="1" preFractionAlong="0.979" postFractionAlong="0.675"/>
      <connection id="107" preCellId="../M1/2/M1" postCellId="../M3L/0/M3L" preSegmentId="1" postSegmentId="1" preFractionAlong="0.147" postFractionAlong="0.675"/>
    </projection>
    <projection id="NCXLS_M1_I1L" presynapticPopulation="M1" postsynapticPopulation="I1L" synapse="Acetylcholine">
      <connection id="15" preCellId="../M1/0/M1" postCellId="../I1L/0/I1L" preSegmentId="1" postSegmentId="2" preFractionAlong="0.864" postFractionAlong="0.217"/>
      <connection id="72" preCellId="../M1/1/M1" postCellId="../I1L/0/I1L" preSegmentId="9" postSegmentId="2" preFractionAlong="0.979" postFractionAlong="0.217"/>
      <connection id="108" preCellId="../M1/2/M1" postCellId="../I1L/0/I1L" preSegmentId="1" postSegmentId="2" preFractionAlong="0.147" postFractionAlong="0.217"/>
    </projection>
    <projection id="NCXLS_M1_I1R" presynapticPopulation="M1" postsynapticPopulation="I1R" synapse="Acetylcholine">
      <connection id="16" preCellId="../M1/0/M1" postCellId="../I1R/0/I1R" preSegmentId="1" postSegmentId="6" preFractionAlong="0.864" postFractionAlong="0.459"/>
      <connection id="73" preCellId="../M1/1/M1" postCellId="../I1R/0/I1R" preSegmentId="9" postSegmentId="6" preFractionAlong="0.979" postFractionAlong="0.459"/>
      <connection id="109" preCellId="../M1/2/M1" postCellId="../I1R/0/I1R" preSegmentId="1" postSegmentId="6" preFractionAlong="0.147" postFractionAlong="0.459"/>
    </projection>
    <electricalProjection id="NCXLS_M1_M1_GJ" presynapticPopulation="M1" postsynapticPopulation="M1">
      <electricalConnection id="17" preCell="0" postCell="2" synapse="Generic_GJ" preSegment="1" postSegment="10" preFractionAlong="0.864" postFractionAlong="0.654"/>
      <electricalConnection id="76" preCell="1" postCell="2" synapse="Generic_GJ" preSegment="9" postSegment="10" preFractionAlong="0.979" postFractionAlong="0.654"/>
    </electricalProjection>
    <projection id="NCXLS_M1_I2L" presynapticPopulation="M1" postsynapticPopulation="I2L" synapse="Acetylcholine">
      <connection id="18" preCellId="../M1/0/M1" postCellId="../I2L/0/I2L" preSegmentId="1" postSegmentId="8" preFractionAlong="0.864" postFractionAlong="0.031"/>
      <connection id="77" preCellId="../M1/1/M1" postCellId="../I2L/0/I2L" preSegmentId="9" postSegmentId="8" preFractionAlong="0.979" postFractionAlong="0.031"/>
      <connection id="111" preCellId="../M1/2/M1" postCellId="../I2L/0/I2L" preSegmentId="1" postSegmentId="8" preFractionAlong="0.147" postFractionAlong="0.031"/>
    </projection>
    <projection id="NCXLS_M2L_I2R" presynapticPopulation="M2L" postsynapticPopulation="I2R" synapse="Acetylcholine">
      <connection id="19" preCellId="../M2L/0/M2L" postCellId="../I2R/0/I2R" preSegmentId="8" postSegmentId="9" preFractionAlong="0.001" postFractionAlong="0.207"/>
      <connection id="21" preCellId="../M2L/0/M2L" postCellId="../I2R/3/I2R" preSegmentId="8" postSegmentId="1" preFractionAlong="0.001" postFractionAlong="0.995"/>
      <connection id="23" preCellId="../M2L/0/M2L" postCellId="../I2R/4/I2R" preSegmentId="8" postSegmentId="3" preFractionAlong="0.001" postFractionAlong="0.105"/>
    </projection>
    <projection id="NCXLS_M2L_NSML" presynapticPopulation="M2L" postsynapticPopulation="NSML" synapse="Acetylcholine">
      <connection id="20" preCellId="../M2L/0/M2L" postCellId="../NSML/1/NSML" preSegmentId="8" postSegmentId="5" preFractionAlong="0.001" postFractionAlong="0.554"/>
      <connection id="25" preCellId="../M2L/0/M2L" postCellId="../NSML/2/NSML" preSegmentId="8" postSegmentId="10" preFractionAlong="0.001" postFractionAlong="0.724"/>
    </projection>
    <electricalProjection id="NCXLS_M2L_M3R_GJ" presynapticPopulation="M2L" postsynapticPopulation="M3R">
      <electricalConnection id="22" preCell="0" postCell="0" synapse="Generic_GJ" preSegment="8" postSegment="9" preFractionAlong="0.001" postFractionAlong="0.48"/>
    </electricalProjection>
    <projection id="NCXLS_M2L_NSMR" presynapticPopulation="M2L" postsynapticPopulation="NSMR" synapse="Acetylcholine">
      <connection id="24" preCellId="../M2L/0/M2L" postCellId="../NSMR/1/NSMR" preSegmentId="8" postSegmentId="4" preFractionAlong="0.001" postFractionAlong="0.183"/>
    </projection>
    <projection id="NCXLS_NSML_M3R" presynapticPopulation="NSML" postsynapticPopulation="M3R" synapse="Serotonin_Glutamate">
      <connection id="26" preCellId="../NSML/1/NSML" postCellId="../M3R/0/M3R" preSegmentId="5" postSegmentId="9" preFractionAlong="0.574" postFractionAlong="0.48"/>
    </projection>
    <projection id="NCXLS_NSML_NSML" presynapticPopulation="NSML" postsynapticPopulation="NSML" synapse="Serotonin_Glutamate">
      <connection id="27" preCellId="../NSML/1/NSML" postCellId="../NSML/2/NSML" preSegmentId="5" postSegmentId="10" preFractionAlong="0.574" postFractionAlong="0.724"/>
    </projection>
    <projection id="NCXLS_M2R_NSML" presynapticPopulation="M2R" postsynapticPopulation="NSML" synapse="Acetylcholine">
      <connection id="28" preCellId="../M2R/0/M2R" postCellId="../NSML/0/NSML" preSegmentId="6" postSegmentId="10" preFractionAlong="0.854" postFractionAlong="0.544"/>
      <connection id="34" preCellId="../M2R/0/M2R" postCellId="../NSML/1/NSML" preSegmentId="6" postSegmentId="5" preFractionAlong="0.854" postFractionAlong="0.554"/>
      <connection id="43" preCellId="../M2R/0/M2R" postCellId="../NSML/2/NSML" preSegmentId="6" postSegmentId="10" preFractionAlong="0.854" postFractionAlong="0.724"/>
    </projection>
    <projection id="NCXLS_M2R_NSMR" presynapticPopulation="M2R" postsynapticPopulation="NSMR" synapse="Acetylcholine">
      <connection id="29" preCellId="../M2R/0/M2R" postCellId="../NSMR/0/NSMR" preSegmentId="6" postSegmentId="1" preFractionAlong="0.854" postFractionAlong="0.995"/>
      <connection id="42" preCellId="../M2R/0/M2R" postCellId="../NSMR/1/NSMR" preSegmentId="6" postSegmentId="4" preFractionAlong="0.854" postFractionAlong="0.183"/>
    </projection>
    <projection id="NCXLS_M2R_I2R" presynapticPopulation="M2R" postsynapticPopulation="I2R" synapse="Acetylcholine">
      <connection id="30" preCellId="../M2R/0/M2R" postCellId="../I2R/0/I2R" preSegmentId="6" postSegmentId="9" preFractionAlong="0.854" postFractionAlong="0.207"/>
      <connection id="33" preCellId="../M2R/0/M2R" postCellId="../I2R/1/I2R" preSegmentId="6" postSegmentId="5" preFractionAlong="0.854" postFractionAlong="0.781"/>
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    </projection>
    <projection id="NCXLS_M2R_M1" presynapticPopulation="M2R" postsynapticPopulation="M1" synapse="Glutamate">
      <connection id="31" preCellId="../M2R/0/M2R" postCellId="../M1/0/M1" preSegmentId="6" postSegmentId="8" preFractionAlong="0.854" postFractionAlong="0.291"/>
      <connection id="39" preCellId="../M2R/0/M2R" postCellId="../M1/1/M1" preSegmentId="6" postSegmentId="7" preFractionAlong="0.854" postFractionAlong="0.891"/>
    </projection>
    <electricalProjection id="NCXLS_M2R_M2L_GJ" presynapticPopulation="M2R" postsynapticPopulation="M2L">
      <electricalConnection id="32" preCell="0" postCell="0" synapse="Generic_GJ" preSegment="6" postSegment="5" preFractionAlong="0.854" postFractionAlong="0.962"/>
    </electricalProjection>
    <electricalProjection id="NCXLS_M2R_M3L_GJ" presynapticPopulation="M2R" postsynapticPopulation="M3L">
      <electricalConnection id="37" preCell="0" postCell="0" synapse="Generic_GJ" preSegment="6" postSegment="1" preFractionAlong="0.854" postFractionAlong="0.675"/>
    </electricalProjection>
    <projection id="NCXLS_M2R_I1L" presynapticPopulation="M2R" postsynapticPopulation="I1L" synapse="Acetylcholine">
      <connection id="38" preCellId="../M2R/0/M2R" postCellId="../I1L/0/I1L" preSegmentId="6" postSegmentId="2" preFractionAlong="0.854" postFractionAlong="0.217"/>
    </projection>
    <projection id="NCXLS_M2R_M3R" presynapticPopulation="M2R" postsynapticPopulation="M3R" synapse="Glutamate">
      <connection id="40" preCellId="../M2R/0/M2R" postCellId="../M3R/0/M3R" preSegmentId="6" postSegmentId="9" preFractionAlong="0.854" postFractionAlong="0.48"/>
    </projection>
    <projection id="NCXLS_M3L_NSML" presynapticPopulation="M3L" postsynapticPopulation="NSML" synapse="Acetylcholine">
      <connection id="44" preCellId="../M3L/0/M3L" postCellId="../NSML/0/NSML" preSegmentId="4" postSegmentId="10" preFractionAlong="0.699" postFractionAlong="0.544"/>
      <connection id="50" preCellId="../M3L/0/M3L" postCellId="../NSML/1/NSML" preSegmentId="4" postSegmentId="5" preFractionAlong="0.699" postFractionAlong="0.554"/>
      <connection id="60" preCellId="../M3L/0/M3L" postCellId="../NSML/2/NSML" preSegmentId="4" postSegmentId="10" preFractionAlong="0.699" postFractionAlong="0.724"/>
    </projection>
    <projection id="NCXLS_M3L_NSMR" presynapticPopulation="M3L" postsynapticPopulation="NSMR" synapse="Acetylcholine">
      <connection id="45" preCellId="../M3L/0/M3L" postCellId="../NSMR/0/NSMR" preSegmentId="4" postSegmentId="1" preFractionAlong="0.699" postFractionAlong="0.995"/>
      <connection id="59" preCellId="../M3L/0/M3L" postCellId="../NSMR/1/NSMR" preSegmentId="4" postSegmentId="4" preFractionAlong="0.699" postFractionAlong="0.183"/>
    </projection>
    <projection id="NCXLS_M3L_I2R" presynapticPopulation="M3L" postsynapticPopulation="I2R" synapse="Acetylcholine">
      <connection id="46" preCellId="../M3L/0/M3L" postCellId="../I2R/0/I2R" preSegmentId="4" postSegmentId="9" preFractionAlong="0.699" postFractionAlong="0.207"/>
      <connection id="49" preCellId="../M3L/0/M3L" postCellId="../I2R/1/I2R" preSegmentId="4" postSegmentId="5" preFractionAlong="0.699" postFractionAlong="0.781"/>
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    </projection>
    <projection id="NCXLS_M3L_M1" presynapticPopulation="M3L" postsynapticPopulation="M1" synapse="Glutamate">
      <connection id="47" preCellId="../M3L/0/M3L" postCellId="../M1/0/M1" preSegmentId="4" postSegmentId="8" preFractionAlong="0.699" postFractionAlong="0.291"/>
    </projection>
    <projection id="NCXLS_M3L_M2L" presynapticPopulation="M3L" postsynapticPopulation="M2L" synapse="Acetylcholine">
      <connection id="48" preCellId="../M3L/0/M3L" postCellId="../M2L/0/M2L" preSegmentId="4" postSegmentId="5" preFractionAlong="0.699" postFractionAlong="0.962"/>
    </projection>
    <projection id="NCXLS_M3L_I1L" presynapticPopulation="M3L" postsynapticPopulation="I1L" synapse="Acetylcholine">
      <connection id="53" preCellId="../M3L/0/M3L" postCellId="../I1L/0/I1L" preSegmentId="4" postSegmentId="2" preFractionAlong="0.699" postFractionAlong="0.217"/>
    </projection>
    <projection id="NCXLS_M3L_M1" presynapticPopulation="M3L" postsynapticPopulation="M1" synapse="Acetylcholine">
      <connection id="54" preCellId="../M3L/0/M3L" postCellId="../M1/1/M1" preSegmentId="4" postSegmentId="7" preFractionAlong="0.699" postFractionAlong="0.891"/>
      <connection id="57" preCellId="../M3L/0/M3L" postCellId="../M1/2/M1" preSegmentId="4" postSegmentId="10" preFractionAlong="0.699" postFractionAlong="0.654"/>
    </projection>
    <projection id="NCXLS_M3L_M3R" presynapticPopulation="M3L" postsynapticPopulation="M3R" synapse="Glutamate">
      <connection id="55" preCellId="../M3L/0/M3L" postCellId="../M3R/0/M3R" preSegmentId="4" postSegmentId="9" preFractionAlong="0.699" postFractionAlong="0.48"/>
    </projection>
    <projection id="NCXLS_M3L_I2L" presynapticPopulation="M3L" postsynapticPopulation="I2L" synapse="Acetylcholine">
      <connection id="58" preCellId="../M3L/0/M3L" postCellId="../I2L/0/I2L" preSegmentId="4" postSegmentId="8" preFractionAlong="0.699" postFractionAlong="0.031"/>
    </projection>
    <projection id="NCXLS_M1_M1" presynapticPopulation="M1" postsynapticPopulation="M1" synapse="Glutamate">
      <connection id="64" preCellId="../M1/1/M1" postCellId="../M1/0/M1" preSegmentId="9" postSegmentId="8" preFractionAlong="0.979" postFractionAlong="0.291"/>
    </projection>
    <electricalProjection id="NCXLS_M1_M2L_GJ" presynapticPopulation="M1" postsynapticPopulation="M2L">
      <electricalConnection id="65" preCell="1" postCell="0" synapse="Generic_GJ" preSegment="9" postSegment="5" preFractionAlong="0.979" postFractionAlong="0.962"/>
    </electricalProjection>
    <projection id="NCXLS_M1_M3R" presynapticPopulation="M1" postsynapticPopulation="M3R" synapse="Glutamate">
      <connection id="74" preCellId="../M1/1/M1" postCellId="../M3R/0/M3R" preSegmentId="9" postSegmentId="9" preFractionAlong="0.979" postFractionAlong="0.48"/>
      <connection id="110" preCellId="../M1/2/M1" postCellId="../M3R/0/M3R" preSegmentId="1" postSegmentId="9" preFractionAlong="0.147" postFractionAlong="0.48"/>
    </projection>
    <projection id="NCXLS_M3R_NSML" presynapticPopulation="M3R" postsynapticPopulation="NSML" synapse="Acetylcholine">
      <connection id="80" preCellId="../M3R/0/M3R" postCellId="../NSML/0/NSML" preSegmentId="10" postSegmentId="10" preFractionAlong="0.782" postFractionAlong="0.544"/>
      <connection id="86" preCellId="../M3R/0/M3R" postCellId="../NSML/1/NSML" preSegmentId="10" postSegmentId="5" preFractionAlong="0.782" postFractionAlong="0.554"/>
    </projection>
    <projection id="NCXLS_M3R_NSMR" presynapticPopulation="M3R" postsynapticPopulation="NSMR" synapse="Acetylcholine">
      <connection id="81" preCellId="../M3R/0/M3R" postCellId="../NSMR/0/NSMR" preSegmentId="10" postSegmentId="1" preFractionAlong="0.782" postFractionAlong="0.995"/>
      <connection id="97" preCellId="../M3R/0/M3R" postCellId="../NSMR/1/NSMR" preSegmentId="10" postSegmentId="4" preFractionAlong="0.782" postFractionAlong="0.183"/>
    </projection>
    <projection id="NCXLS_M3R_I2R" presynapticPopulation="M3R" postsynapticPopulation="I2R" synapse="Acetylcholine">
      <connection id="82" preCellId="../M3R/0/M3R" postCellId="../I2R/0/I2R" preSegmentId="10" postSegmentId="9" preFractionAlong="0.782" postFractionAlong="0.207"/>
      <connection id="85" preCellId="../M3R/0/M3R" postCellId="../I2R/1/I2R" preSegmentId="10" postSegmentId="5" preFractionAlong="0.782" postFractionAlong="0.781"/>
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    </projection>
    <projection id="NCXLS_M3R_M1" presynapticPopulation="M3R" postsynapticPopulation="M1" synapse="Glutamate">
      <connection id="83" preCellId="../M3R/0/M3R" postCellId="../M1/0/M1" preSegmentId="10" postSegmentId="8" preFractionAlong="0.782" postFractionAlong="0.291"/>
    </projection>
    <projection id="NCXLS_M3R_M2L" presynapticPopulation="M3R" postsynapticPopulation="M2L" synapse="Acetylcholine">
      <connection id="84" preCellId="../M3R/0/M3R" postCellId="../M2L/0/M2L" preSegmentId="10" postSegmentId="5" preFractionAlong="0.782" postFractionAlong="0.962"/>
    </projection>
    <projection id="NCXLS_M3R_M2R" presynapticPopulation="M3R" postsynapticPopulation="M2R" synapse="Glutamate">
      <connection id="87" preCellId="../M3R/0/M3R" postCellId="../M2R/0/M2R" preSegmentId="10" postSegmentId="1" preFractionAlong="0.782" postFractionAlong="0.469"/>
    </projection>
    <projection id="NCXLS_M3R_M3L" presynapticPopulation="M3R" postsynapticPopulation="M3L" synapse="Glutamate">
      <connection id="90" preCellId="../M3R/0/M3R" postCellId="../M3L/0/M3L" preSegmentId="10" postSegmentId="1" preFractionAlong="0.782" postFractionAlong="0.675"/>
    </projection>
    <projection id="NCXLS_M3R_I1L" presynapticPopulation="M3R" postsynapticPopulation="I1L" synapse="Acetylcholine">
      <connection id="91" preCellId="../M3R/0/M3R" postCellId="../I1L/0/I1L" preSegmentId="10" postSegmentId="2" preFractionAlong="0.782" postFractionAlong="0.217"/>
    </projection>
    <projection id="NCXLS_M3R_M1" presynapticPopulation="M3R" postsynapticPopulation="M1" synapse="Acetylcholine">
      <connection id="92" preCellId="../M3R/0/M3R" postCellId="../M1/1/M1" preSegmentId="10" postSegmentId="7" preFractionAlong="0.782" postFractionAlong="0.891"/>
      <connection id="95" preCellId="../M3R/0/M3R" postCellId="../M1/2/M1" preSegmentId="10" postSegmentId="10" preFractionAlong="0.782" postFractionAlong="0.654"/>
    </projection>
    <projection id="NCXLS_M3R_I1R" presynapticPopulation="M3R" postsynapticPopulation="I1R" synapse="Acetylcholine">
      <connection id="93" preCellId="../M3R/0/M3R" postCellId="../I1R/0/I1R" preSegmentId="10" postSegmentId="6" preFractionAlong="0.782" postFractionAlong="0.459"/>
    </projection>
    <projection id="NCXLS_M3R_I2L" presynapticPopulation="M3R" postsynapticPopulation="I2L" synapse="Acetylcholine">
      <connection id="96" preCellId="../M3R/0/M3R" postCellId="../I2L/0/I2L" preSegmentId="10" postSegmentId="8" preFractionAlong="0.782" postFractionAlong="0.031"/>
    </projection>
    <projection id="NCXLS_M1_M1" presynapticPopulation="M1" postsynapticPopulation="M1" synapse="Acetylcholine">
      <connection id="101" preCellId="../M1/2/M1" postCellId="../M1/0/M1" preSegmentId="1" postSegmentId="8" preFractionAlong="0.147" postFractionAlong="0.291"/>
    </projection>
    <projection id="NCXLS_M1_M2L" presynapticPopulation="M1" postsynapticPopulation="M2L" synapse="Glutamate">
      <connection id="102" preCellId="../M1/2/M1" postCellId="../M2L/0/M2L" preSegmentId="1" postSegmentId="5" preFractionAlong="0.147" postFractionAlong="0.962"/>
    </projection>
    <projection id="NCXLS_NSMR_I2R" presynapticPopulation="NSMR" postsynapticPopulation="I2R" synapse="Serotonin_Glutamate">
      <connection id="114" preCellId="../NSMR/1/NSMR" postCellId="../I2R/0/I2R" preSegmentId="4" postSegmentId="9" preFractionAlong="0.385" postFractionAlong="0.207"/>
      <connection id="116" preCellId="../NSMR/1/NSMR" postCellId="../I2R/1/I2R" preSegmentId="4" postSegmentId="5" preFractionAlong="0.385" postFractionAlong="0.781"/>
      <connection id="117" preCellId="../NSMR/1/NSMR" postCellId="../I2R/3/I2R" preSegmentId="4" postSegmentId="1" preFractionAlong="0.385" postFractionAlong="0.995"/>
    </projection>
    <projection id="NCXLS_NSMR_M2L" presynapticPopulation="NSMR" postsynapticPopulation="M2L" synapse="Serotonin_Glutamate">
      <connection id="115" preCellId="../NSMR/1/NSMR" postCellId="../M2L/0/M2L" preSegmentId="4" postSegmentId="5" preFractionAlong="0.385" postFractionAlong="0.962"/>
    </projection>
    <projection id="NCXLS_NSML_I2R" presynapticPopulation="NSML" postsynapticPopulation="I2R" synapse="Serotonin_Glutamate">
      <connection id="119" preCellId="../NSML/2/NSML" postCellId="../I2R/2/I2R" preSegmentId="9" postSegmentId="2" preFractionAlong="0.211" postFractionAlong="0.625"/>
      <connection id="121" preCellId="../NSML/2/NSML" postCellId="../I2R/4/I2R" preSegmentId="9" postSegmentId="3" preFractionAlong="0.211" postFractionAlong="0.105"/>
    </projection>
  </network>
</neuroml>
