<?xml version='1.0' encoding='UTF-8'?>
<neuroml xmlns="http://www.neuroml.org/schema/neuroml2" xmlns:xsi="http://www.w3.org/2001/XMLSchema-instance" xsi:schemaLocation="http://www.neuroml.org/schema/neuroml2 https://raw.githubusercontent.com/NeuroML/NeuroML2/development/Schemas/NeuroML2/NeuroML_v2beta4.xsd" id="gvft_network_bio_prior_lamW_0.278_DF_0.037_t50.net">
  <notes>NeuroML2 network generated from GVFT simulation on 2025-05-04 11:19:06
</notes>
  <include href="I1L.cell.nml"/>
  <include href="I1R.cell.nml"/>
  <include href="I2L.cell.nml"/>
  <include href="I2R.cell.nml"/>
  <include href="M1.cell.nml"/>
  <include href="M2L.cell.nml"/>
  <include href="M2R.cell.nml"/>
  <include href="M3L.cell.nml"/>
  <include href="M3R.cell.nml"/>
  <include href="NSML.cell.nml"/>
  <include href="NSMR.cell.nml"/>
  <include href="Acetylcholine.synapse.nml"/>
  <include href="Generic_GJ.nml"/>
  <include href="Glutamate.synapse.nml"/>
  <include href="Serotonin_Glutamate.synapse.nml"/>
  <network id="gvft_network_bio_prior_lamW_0.278_DF_0.037_t50.net" type="networkWithTemperature" temperature="20.0 degC">
    <population id="I1L" component="I1L" type="populationList" size="1">
      <instance id="0">
        <location x="-0.005025136284530163" y="-0.025125637650489807" z="0.0"/>
      </instance>
    </population>
    <population id="I1R" component="I1R" type="populationList" size="1">
      <instance id="0">
        <location x="-0.03517588973045349" y="-0.03517588973045349" z="0.0"/>
      </instance>
    </population>
    <population id="I2L" component="I2L" type="populationList" size="3">
      <instance id="0">
        <location x="0.3366834223270416" y="0.12562814354896545" z="0.0"/>
      </instance>
      <instance id="1">
        <location x="0.8693467378616333" y="0.44723618030548096" z="0.0"/>
      </instance>
      <instance id="2">
        <location x="0.9899497628211975" y="-0.2864321768283844" z="0.0"/>
      </instance>
    </population>
    <population id="I2R" component="I2R" type="populationList" size="3">
      <instance id="0">
        <location x="0.31658291816711426" y="-0.7788944840431213" z="0.0"/>
      </instance>
      <instance id="1">
        <location x="-0.909547746181488" y="-0.8190954923629761" z="0.0"/>
      </instance>
      <instance id="2">
        <location x="0.6783919334411621" y="-0.19597990810871124" z="0.0"/>
      </instance>
    </population>
    <population id="M1" component="M1" type="populationList" size="3">
      <instance id="0">
        <location x="0.2864321768283844" y="-0.7085427045822144" z="0.0"/>
      </instance>
      <instance id="1">
        <location x="0.9597989916801453" y="-0.6482412219047546" z="0.0"/>
      </instance>
      <instance id="2">
        <location x="-0.929648220539093" y="0.6582914590835571" z="0.0"/>
      </instance>
    </population>
    <population id="M2L" component="M2L" type="populationList" size="1">
      <instance id="0">
        <location x="-0.045226141810417175" y="0.3467336893081665" z="0.0"/>
      </instance>
    </population>
    <population id="M2R" component="M2R" type="populationList" size="1">
      <instance id="0">
        <location x="-0.30653268098831177" y="0.4773869514465332" z="0.0"/>
      </instance>
    </population>
    <population id="M3L" component="M3L" type="populationList" size="1">
      <instance id="0">
        <location x="0.8492462038993835" y="0.9597989916801453" z="0.0"/>
      </instance>
    </population>
    <population id="M3R" component="M3R" type="populationList" size="1">
      <instance id="0">
        <location x="-0.6482412219047546" y="0.06532664597034454" z="0.0"/>
      </instance>
    </population>
    <population id="NSML" component="NSML" type="populationList" size="3">
      <instance id="0">
        <location x="-0.7989949584007263" y="0.045226141810417175" z="0.0"/>
      </instance>
      <instance id="1">
        <location x="-0.5376884341239929" y="0.44723618030548096" z="0.0"/>
      </instance>
      <instance id="2">
        <location x="-0.6783919334411621" y="-0.6582914590835571" z="0.0"/>
      </instance>
    </population>
    <population id="NSMR" component="NSMR" type="populationList" size="2">
      <instance id="0">
        <location x="-1.0" y="0.45728644728660583" z="0.0"/>
      </instance>
      <instance id="1">
        <location x="0.5175879597663879" y="0.3668341636657715" z="0.0"/>
      </instance>
    </population>
    <projection id="NCXLS_M1_I2L" presynapticPopulation="M1" postsynapticPopulation="I2L" synapse="Acetylcholine">
      <connection id="0" preCellId="../M1/0/M1" postCellId="../I2L/0/I2L" preSegmentId="2" postSegmentId="6" preFractionAlong="0.44892670926889444" postFractionAlong="0.06110295648660358"/>
      <connection id="9" preCellId="../M1/0/M1" postCellId="../I2L/1/I2L" preSegmentId="3" postSegmentId="4" preFractionAlong="0.9012087358416124" postFractionAlong="0.8307927228390741"/>
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    </projection>
    <electricalProjection id="NCXLS_M1_NSML_GJ" presynapticPopulation="M1" postsynapticPopulation="NSML">
      <electricalConnection id="1" preCell="0" postCell="0" synapse="Generic_GJ" preSegment="6" postSegment="2" preFractionAlong="0.6739812723165507" postFractionAlong="0.8492586264996466"/>
      <electricalConnection id="14" preCell="0" postCell="1" synapse="Generic_GJ" preSegment="6" postSegment="4" preFractionAlong="0.8254369156049984" postFractionAlong="0.45059712910359984"/>
      <electricalConnection id="22" preCell="1" postCell="2" synapse="Generic_GJ" preSegment="8" postSegment="1" preFractionAlong="0.4177606716245422" postFractionAlong="0.15946009778676717"/>
      <electricalConnection id="85" preCell="2" postCell="1" synapse="Generic_GJ" preSegment="7" postSegment="1" preFractionAlong="0.9576043711161709" postFractionAlong="0.14778413347831776"/>
    </electricalProjection>
    <electricalProjection id="NCXLS_M1_NSMR_GJ" presynapticPopulation="M1" postsynapticPopulation="NSMR">
      <electricalConnection id="2" preCell="0" postCell="0" synapse="Generic_GJ" preSegment="7" postSegment="4" preFractionAlong="0.03075294050971633" postFractionAlong="0.9343745403825013"/>
      <electricalConnection id="13" preCell="0" postCell="1" synapse="Generic_GJ" preSegment="2" postSegment="5" preFractionAlong="0.46777626498603475" postFractionAlong="0.6817284370551343"/>
      <electricalConnection id="21" preCell="1" postCell="0" synapse="Generic_GJ" preSegment="4" postSegment="2" preFractionAlong="0.6227611923401886" postFractionAlong="0.11183980484161238"/>
      <electricalConnection id="74" preCell="2" postCell="0" synapse="Generic_GJ" preSegment="5" postSegment="5" preFractionAlong="0.5485389920711888" postFractionAlong="0.7878331881854967"/>
    </electricalProjection>
    <electricalProjection id="NCXLS_M1_M1_GJ" presynapticPopulation="M1" postsynapticPopulation="M1">
      <electricalConnection id="3" preCell="0" postCell="1" synapse="Generic_GJ" preSegment="5" postSegment="5" preFractionAlong="0.8096523320704518" postFractionAlong="0.8232099421806358"/>
      <electricalConnection id="11" preCell="0" postCell="2" synapse="Generic_GJ" preSegment="3" postSegment="8" preFractionAlong="0.8459619526959559" postFractionAlong="0.6074783945031181"/>
      <electricalConnection id="19" preCell="1" postCell="0" synapse="Generic_GJ" preSegment="1" postSegment="3" preFractionAlong="0.01618466893189119" postFractionAlong="0.07644400895028247"/>
      <electricalConnection id="77" preCell="2" postCell="1" synapse="Generic_GJ" preSegment="5" postSegment="6" preFractionAlong="0.7822290004721234" postFractionAlong="0.6850451757086196"/>
    </electricalProjection>
    <projection id="NCXLS_M1_I1L" presynapticPopulation="M1" postsynapticPopulation="I1L" synapse="Acetylcholine">
      <connection id="4" preCellId="../M1/0/M1" postCellId="../I1L/0/I1L" preSegmentId="7" postSegmentId="8" preFractionAlong="0.13126221109287095" postFractionAlong="0.6673986245608076"/>
      <connection id="24" preCellId="../M1/1/M1" postCellId="../I1L/0/I1L" preSegmentId="8" postSegmentId="6" preFractionAlong="0.24789697275087563" postFractionAlong="0.09537380789802752"/>
      <connection id="78" preCellId="../M1/2/M1" postCellId="../I1L/0/I1L" preSegmentId="8" postSegmentId="3" preFractionAlong="0.1490422091752075" postFractionAlong="0.3461285400715879"/>
    </projection>
    <projection id="NCXLS_M1_M2L" presynapticPopulation="M1" postsynapticPopulation="M2L" synapse="Acetylcholine">
      <connection id="5" preCellId="../M1/0/M1" postCellId="../M2L/0/M2L" preSegmentId="6" postSegmentId="3" preFractionAlong="0.42553164480088324" postFractionAlong="0.41351685437859886"/>
    </projection>
    <projection id="NCXLS_M1_I2R" presynapticPopulation="M1" postsynapticPopulation="I2R" synapse="Acetylcholine">
      <connection id="6" preCellId="../M1/0/M1" postCellId="../I2R/2/I2R" preSegmentId="2" postSegmentId="5" preFractionAlong="0.08227189067620644" postFractionAlong="0.8920255690299734"/>
      <connection id="23" preCellId="../M1/1/M1" postCellId="../I2R/0/I2R" preSegmentId="5" postSegmentId="3" preFractionAlong="0.0852140869017709" postFractionAlong="0.04651849634506866"/>
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    </projection>
    <electricalProjection id="NCXLS_M1_M2R_GJ" presynapticPopulation="M1" postsynapticPopulation="M2R">
      <electricalConnection id="7" preCell="0" postCell="0" synapse="Generic_GJ" preSegment="3" postSegment="2" preFractionAlong="0.9979093217902862" postFractionAlong="0.5851831414984134"/>
      <electricalConnection id="27" preCell="1" postCell="0" synapse="Generic_GJ" preSegment="1" postSegment="4" preFractionAlong="0.6084079219394797" postFractionAlong="0.3654258803022472"/>
      <electricalConnection id="82" preCell="2" postCell="0" synapse="Generic_GJ" preSegment="7" postSegment="5" preFractionAlong="0.8286499099626007" postFractionAlong="0.13159407705151016"/>
    </electricalProjection>
    <electricalProjection id="NCXLS_M1_M3R_GJ" presynapticPopulation="M1" postsynapticPopulation="M3R">
      <electricalConnection id="8" preCell="0" postCell="0" synapse="Generic_GJ" preSegment="5" postSegment="8" preFractionAlong="0.2026719063073047" postFractionAlong="0.6675288182241695"/>
    </electricalProjection>
    <projection id="NCXLS_M1_M3L" presynapticPopulation="M1" postsynapticPopulation="M3L" synapse="Acetylcholine">
      <connection id="10" preCellId="../M1/0/M1" postCellId="../M3L/0/M3L" preSegmentId="7" postSegmentId="4" preFractionAlong="0.8688334727016075" postFractionAlong="0.868693894898852"/>
    </projection>
    <projection id="NCXLS_M1_I1R" presynapticPopulation="M1" postsynapticPopulation="I1R" synapse="Acetylcholine">
      <connection id="15" preCellId="../M1/0/M1" postCellId="../I1R/0/I1R" preSegmentId="3" postSegmentId="1" preFractionAlong="0.23977973884404746" postFractionAlong="0.37242675117596824"/>
      <connection id="31" preCellId="../M1/1/M1" postCellId="../I1R/0/I1R" preSegmentId="5" postSegmentId="8" preFractionAlong="0.7487733218218078" postFractionAlong="0.8742720265915166"/>
      <connection id="86" preCellId="../M1/2/M1" postCellId="../I1R/0/I1R" preSegmentId="3" postSegmentId="1" preFractionAlong="0.636136530428131" postFractionAlong="0.18752804794656086"/>
    </projection>
    <projection id="NCXLS_NSML_NSMR" presynapticPopulation="NSML" postsynapticPopulation="NSMR" synapse="Serotonin_Glutamate">
      <connection id="16" preCellId="../NSML/0/NSML" postCellId="../NSMR/0/NSMR" preSegmentId="8" postSegmentId="5" preFractionAlong="0.9711055083647545" postFractionAlong="0.5739174439595789"/>
    </projection>
    <electricalProjection id="NCXLS_NSML_M1_GJ" presynapticPopulation="NSML" postsynapticPopulation="M1">
      <electricalConnection id="17" preCell="0" postCell="2" synapse="Generic_GJ" preSegment="8" postSegment="4" preFractionAlong="0.3528060092659058" postFractionAlong="0.547039143620656"/>
    </electricalProjection>
    <electricalProjection id="NCXLS_I2R_I2R_GJ" presynapticPopulation="I2R" postsynapticPopulation="I2R">
      <electricalConnection id="18" preCell="0" postCell="1" synapse="Generic_GJ" preSegment="8" postSegment="1" preFractionAlong="0.035503368718632355" postFractionAlong="0.9508410342291114"/>
    </electricalProjection>
    <projection id="NCXLS_M1_NSML" presynapticPopulation="M1" postsynapticPopulation="NSML" synapse="Acetylcholine">
      <connection id="20" preCellId="../M1/1/M1" postCellId="../NSML/0/NSML" preSegmentId="3" postSegmentId="2" preFractionAlong="0.13778552067509686" postFractionAlong="0.04172479285350328"/>
      <connection id="30" preCellId="../M1/1/M1" postCellId="../NSML/1/NSML" preSegmentId="7" postSegmentId="3" preFractionAlong="0.4103056135599151" postFractionAlong="0.5046246829316976"/>
      <connection id="73" preCellId="../M1/2/M1" postCellId="../NSML/0/NSML" preSegmentId="7" postSegmentId="5" preFractionAlong="0.30160356629716456" postFractionAlong="0.08022429180102997"/>
      <connection id="75" preCellId="../M1/2/M1" postCellId="../NSML/2/NSML" preSegmentId="8" postSegmentId="8" preFractionAlong="0.5142542790619751" postFractionAlong="0.08967825665938012"/>
    </projection>
    <electricalProjection id="NCXLS_M1_M2L_GJ" presynapticPopulation="M1" postsynapticPopulation="M2L">
      <electricalConnection id="26" preCell="1" postCell="0" synapse="Generic_GJ" preSegment="1" postSegment="8" preFractionAlong="0.8719139887586365" postFractionAlong="0.9726277413964189"/>
      <electricalConnection id="80" preCell="2" postCell="0" synapse="Generic_GJ" preSegment="1" postSegment="6" preFractionAlong="0.08769670916230932" postFractionAlong="0.4755700767536536"/>
    </electricalProjection>
    <projection id="NCXLS_M1_M3R" presynapticPopulation="M1" postsynapticPopulation="M3R" synapse="Acetylcholine">
      <connection id="28" preCellId="../M1/1/M1" postCellId="../M3R/0/M3R" preSegmentId="4" postSegmentId="4" preFractionAlong="0.6866598739832943" postFractionAlong="0.9949499861219419"/>
      <connection id="83" preCellId="../M1/2/M1" postCellId="../M3R/0/M3R" preSegmentId="1" postSegmentId="5" preFractionAlong="0.4506882886051886" postFractionAlong="0.3718979905749412"/>
    </projection>
    <projection id="NCXLS_M1_M1" presynapticPopulation="M1" postsynapticPopulation="M1" synapse="Acetylcholine">
      <connection id="29" preCellId="../M1/1/M1" postCellId="../M1/2/M1" preSegmentId="4" postSegmentId="5" preFractionAlong="0.7236793680928076" postFractionAlong="0.49509244999315616"/>
      <connection id="71" preCellId="../M1/2/M1" postCellId="../M1/0/M1" preSegmentId="7" postSegmentId="7" preFractionAlong="0.09889083998231696" postFractionAlong="0.14473293333807224"/>
    </projection>
    <projection id="NCXLS_M2L_M1" presynapticPopulation="M2L" postsynapticPopulation="M1" synapse="Glutamate">
      <connection id="32" preCellId="../M2L/0/M2L" postCellId="../M1/0/M1" preSegmentId="4" postSegmentId="8" preFractionAlong="0.22769871342582593" postFractionAlong="0.8959091387314908"/>
      <connection id="35" preCellId="../M2L/0/M2L" postCellId="../M1/1/M1" preSegmentId="8" postSegmentId="8" preFractionAlong="0.3269584202701765" postFractionAlong="0.6295590559951465"/>
    </projection>
    <projection id="NCXLS_M2L_I2L" presynapticPopulation="M2L" postsynapticPopulation="I2L" synapse="Acetylcholine">
      <connection id="33" preCellId="../M2L/0/M2L" postCellId="../I2L/0/I2L" preSegmentId="2" postSegmentId="6" preFractionAlong="0.30930766548529764" postFractionAlong="0.7267560573982359"/>
      <connection id="38" preCellId="../M2L/0/M2L" postCellId="../I2L/1/I2L" preSegmentId="8" postSegmentId="1" preFractionAlong="0.7138914693281131" postFractionAlong="0.013122125561633502"/>
      <connection id="40" preCellId="../M2L/0/M2L" postCellId="../I2L/2/I2L" preSegmentId="5" postSegmentId="5" preFractionAlong="0.8118107694391947" postFractionAlong="0.7832357188779623"/>
    </projection>
    <projection id="NCXLS_M2L_I2R" presynapticPopulation="M2L" postsynapticPopulation="I2R" synapse="Acetylcholine">
      <connection id="34" preCellId="../M2L/0/M2L" postCellId="../I2R/0/I2R" preSegmentId="5" postSegmentId="5" preFractionAlong="0.05296640560971011" postFractionAlong="0.373617772310308"/>
      <connection id="37" preCellId="../M2L/0/M2L" postCellId="../I2R/2/I2R" preSegmentId="7" postSegmentId="6" preFractionAlong="0.16643207666245707" postFractionAlong="0.3189257154318894"/>
    </projection>
    <projection id="NCXLS_M2L_I1L" presynapticPopulation="M2L" postsynapticPopulation="I1L" synapse="Acetylcholine">
      <connection id="36" preCellId="../M2L/0/M2L" postCellId="../I1L/0/I1L" preSegmentId="3" postSegmentId="6" preFractionAlong="0.7337360117263562" postFractionAlong="0.8971304663109364"/>
    </projection>
    <projection id="NCXLS_M2L_M3L" presynapticPopulation="M2L" postsynapticPopulation="M3L" synapse="Acetylcholine">
      <connection id="39" preCellId="../M2L/0/M2L" postCellId="../M3L/0/M3L" preSegmentId="2" postSegmentId="5" preFractionAlong="0.7798425810193168" postFractionAlong="0.6708577033306954"/>
    </projection>
    <projection id="NCXLS_M2L_NSMR" presynapticPopulation="M2L" postsynapticPopulation="NSMR" synapse="Acetylcholine">
      <connection id="41" preCellId="../M2L/0/M2L" postCellId="../NSMR/1/NSMR" preSegmentId="2" postSegmentId="4" preFractionAlong="0.4396615323705906" postFractionAlong="0.9835983288781539"/>
    </projection>
    <projection id="NCXLS_M2L_I1R" presynapticPopulation="M2L" postsynapticPopulation="I1R" synapse="Acetylcholine">
      <connection id="42" preCellId="../M2L/0/M2L" postCellId="../I1R/0/I1R" preSegmentId="4" postSegmentId="5" preFractionAlong="0.20276920936883913" postFractionAlong="0.2928128551047844"/>
    </projection>
    <projection id="NCXLS_M2R_I2L" presynapticPopulation="M2R" postsynapticPopulation="I2L" synapse="Acetylcholine">
      <connection id="43" preCellId="../M2R/0/M2R" postCellId="../I2L/1/I2L" preSegmentId="8" postSegmentId="1" preFractionAlong="0.9247395651994635" postFractionAlong="0.17872012920589753"/>
    </projection>
    <electricalProjection id="NCXLS_M2R_M3L_GJ" presynapticPopulation="M2R" postsynapticPopulation="M3L">
      <electricalConnection id="44" preCell="0" postCell="0" synapse="Generic_GJ" preSegment="8" postSegment="6" preFractionAlong="0.8815310480420061" postFractionAlong="0.9152779789128344"/>
    </electricalProjection>
    <electricalProjection id="NCXLS_M2R_NSMR_GJ" presynapticPopulation="M2R" postsynapticPopulation="NSMR">
      <electricalConnection id="45" preCell="0" postCell="1" synapse="Generic_GJ" preSegment="4" postSegment="1" preFractionAlong="0.37728572437123986" postFractionAlong="0.6601879974978584"/>
    </electricalProjection>
    <electricalProjection id="NCXLS_M3R_M1_GJ" presynapticPopulation="M3R" postsynapticPopulation="M1">
      <electricalConnection id="46" preCell="0" postCell="0" synapse="Generic_GJ" preSegment="6" postSegment="1" preFractionAlong="0.8771587082700529" postFractionAlong="0.10757870271386272"/>
      <electricalConnection id="50" preCell="0" postCell="1" synapse="Generic_GJ" preSegment="7" postSegment="2" preFractionAlong="0.22540211476880023" postFractionAlong="0.24032276849186684"/>
    </electricalProjection>
    <projection id="NCXLS_M3R_I2L" presynapticPopulation="M3R" postsynapticPopulation="I2L" synapse="Acetylcholine">
      <connection id="47" preCellId="../M3R/0/M3R" postCellId="../I2L/0/I2L" preSegmentId="8" postSegmentId="7" preFractionAlong="0.2084862067427895" postFractionAlong="0.286087778204969"/>
      <connection id="55" preCellId="../M3R/0/M3R" postCellId="../I2L/1/I2L" preSegmentId="1" postSegmentId="5" preFractionAlong="0.7214695378714872" postFractionAlong="0.5503364977619415"/>
      <connection id="56" preCellId="../M3R/0/M3R" postCellId="../I2L/2/I2L" preSegmentId="5" postSegmentId="4" preFractionAlong="0.2826556527573446" postFractionAlong="0.18391205123282506"/>
    </projection>
    <electricalProjection id="NCXLS_M3R_NSML_GJ" presynapticPopulation="M3R" postsynapticPopulation="NSML">
      <electricalConnection id="48" preCell="0" postCell="2" synapse="Generic_GJ" preSegment="8" postSegment="5" preFractionAlong="0.06569042934064673" postFractionAlong="0.7556077135017982"/>
    </electricalProjection>
    <projection id="NCXLS_M3R_I2R" presynapticPopulation="M3R" postsynapticPopulation="I2R" synapse="Acetylcholine">
      <connection id="49" preCellId="../M3R/0/M3R" postCellId="../I2R/0/I2R" preSegmentId="4" postSegmentId="4" preFractionAlong="0.913922199066304" postFractionAlong="0.36799966144809604"/>
      <connection id="52" preCellId="../M3R/0/M3R" postCellId="../I2R/1/I2R" preSegmentId="5" postSegmentId="3" preFractionAlong="0.6706877646636611" postFractionAlong="0.449130565893491"/>
      <connection id="54" preCellId="../M3R/0/M3R" postCellId="../I2R/2/I2R" preSegmentId="5" postSegmentId="3" preFractionAlong="0.044309811238326224" postFractionAlong="0.32059390708031776"/>
    </projection>
    <projection id="NCXLS_M3R_I1L" presynapticPopulation="M3R" postsynapticPopulation="I1L" synapse="Acetylcholine">
      <connection id="51" preCellId="../M3R/0/M3R" postCellId="../I1L/0/I1L" preSegmentId="8" postSegmentId="3" preFractionAlong="0.5606429251459861" postFractionAlong="0.7687292280120813"/>
    </projection>
    <projection id="NCXLS_M3R_M2L" presynapticPopulation="M3R" postsynapticPopulation="M2L" synapse="Acetylcholine">
      <connection id="53" preCellId="../M3R/0/M3R" postCellId="../M2L/0/M2L" preSegmentId="4" postSegmentId="4" preFractionAlong="0.6225784902212987" postFractionAlong="0.9901984904623572"/>
    </projection>
    <projection id="NCXLS_M3R_NSMR" presynapticPopulation="M3R" postsynapticPopulation="NSMR" synapse="Acetylcholine">
      <connection id="57" preCellId="../M3R/0/M3R" postCellId="../NSMR/1/NSMR" preSegmentId="2" postSegmentId="2" preFractionAlong="0.5733137445715221" postFractionAlong="0.6885995206754952"/>
    </projection>
    <projection id="NCXLS_M3R_I1R" presynapticPopulation="M3R" postsynapticPopulation="I1R" synapse="Acetylcholine">
      <connection id="58" preCellId="../M3R/0/M3R" postCellId="../I1R/0/I1R" preSegmentId="5" postSegmentId="7" preFractionAlong="0.6135841848558766" postFractionAlong="0.05215723085332924"/>
    </projection>
    <electricalProjection id="NCXLS_M3L_M1_GJ" presynapticPopulation="M3L" postsynapticPopulation="M1">
      <electricalConnection id="59" preCell="0" postCell="0" synapse="Generic_GJ" preSegment="4" postSegment="5" preFractionAlong="0.7017547722584984" postFractionAlong="0.36806970521729876"/>
      <electricalConnection id="63" preCell="0" postCell="1" synapse="Generic_GJ" preSegment="8" postSegment="8" preFractionAlong="0.5900124682736959" postFractionAlong="0.7410857977382197"/>
    </electricalProjection>
    <projection id="NCXLS_M3L_I2L" presynapticPopulation="M3L" postsynapticPopulation="I2L" synapse="Acetylcholine">
      <connection id="60" preCellId="../M3L/0/M3L" postCellId="../I2L/0/I2L" preSegmentId="4" postSegmentId="8" preFractionAlong="0.8317211202799181" postFractionAlong="0.8526224374761169"/>
      <connection id="67" preCellId="../M3L/0/M3L" postCellId="../I2L/1/I2L" preSegmentId="7" postSegmentId="5" preFractionAlong="0.09690843467781107" postFractionAlong="0.2905032471986191"/>
      <connection id="68" preCellId="../M3L/0/M3L" postCellId="../I2L/2/I2L" preSegmentId="7" postSegmentId="2" preFractionAlong="0.09851507346853383" postFractionAlong="0.5606568535006818"/>
    </projection>
    <projection id="NCXLS_M3L_NSML" presynapticPopulation="M3L" postsynapticPopulation="NSML" synapse="Acetylcholine">
      <connection id="61" preCellId="../M3L/0/M3L" postCellId="../NSML/2/NSML" preSegmentId="8" postSegmentId="3" preFractionAlong="0.4862855723513465" postFractionAlong="0.7339267236324865"/>
    </projection>
    <projection id="NCXLS_M3L_I2R" presynapticPopulation="M3L" postsynapticPopulation="I2R" synapse="Acetylcholine">
      <connection id="62" preCellId="../M3L/0/M3L" postCellId="../I2R/0/I2R" preSegmentId="7" postSegmentId="1" preFractionAlong="0.7846759807288776" postFractionAlong="0.22816733438058445"/>
      <connection id="65" preCellId="../M3L/0/M3L" postCellId="../I2R/1/I2R" preSegmentId="8" postSegmentId="4" preFractionAlong="0.16636272431172183" postFractionAlong="0.14772352839713165"/>
      <connection id="66" preCellId="../M3L/0/M3L" postCellId="../I2R/2/I2R" preSegmentId="4" postSegmentId="3" preFractionAlong="0.5926780659137455" postFractionAlong="0.3584022386938166"/>
    </projection>
    <projection id="NCXLS_M3L_I1L" presynapticPopulation="M3L" postsynapticPopulation="I1L" synapse="Acetylcholine">
      <connection id="64" preCellId="../M3L/0/M3L" postCellId="../I1L/0/I1L" preSegmentId="7" postSegmentId="1" preFractionAlong="0.10470515686242154" postFractionAlong="0.7167463829100775"/>
    </projection>
    <electricalProjection id="NCXLS_M3L_NSMR_GJ" presynapticPopulation="M3L" postsynapticPopulation="NSMR">
      <electricalConnection id="69" preCell="0" postCell="1" synapse="Generic_GJ" preSegment="3" postSegment="3" preFractionAlong="0.2116153273493815" postFractionAlong="0.17218852755576275"/>
    </electricalProjection>
    <projection id="NCXLS_M3L_I1R" presynapticPopulation="M3L" postsynapticPopulation="I1R" synapse="Acetylcholine">
      <connection id="70" preCellId="../M3L/0/M3L" postCellId="../I1R/0/I1R" preSegmentId="4" postSegmentId="7" preFractionAlong="0.6713298173865903" postFractionAlong="0.4634035473860345"/>
    </projection>
  </network>
</neuroml>
