<?xml version='1.0' encoding='UTF-8'?>
<neuroml xmlns="http://www.neuroml.org/schema/neuroml2" xmlns:xsi="http://www.w3.org/2001/XMLSchema-instance" xsi:schemaLocation="http://www.neuroml.org/schema/neuroml2 https://raw.githubusercontent.com/NeuroML/NeuroML2/development/Schemas/NeuroML2/NeuroML_v2beta4.xsd" id="gvft_network_bio_prior_lamW_0.278_DF_0.037_t80.net">
  <notes>NeuroML2 network generated from GVFT simulation on 2025-05-04 11:19:13
</notes>
  <include href="I1L.cell.nml"/>
  <include href="I1R.cell.nml"/>
  <include href="I2L.cell.nml"/>
  <include href="M1.cell.nml"/>
  <include href="M2L.cell.nml"/>
  <include href="M2R.cell.nml"/>
  <include href="M3L.cell.nml"/>
  <include href="M3R.cell.nml"/>
  <include href="NSML.cell.nml"/>
  <include href="NSMR.cell.nml"/>
  <include href="Acetylcholine.synapse.nml"/>
  <include href="Generic_GJ.nml"/>
  <include href="Glutamate.synapse.nml"/>
  <include href="Serotonin_Glutamate.synapse.nml"/>
  <network id="gvft_network_bio_prior_lamW_0.278_DF_0.037_t80.net" type="networkWithTemperature" temperature="20.0 degC">
    <population id="I1L" component="I1L" type="populationList" size="3">
      <instance id="0">
        <location x="0.025125637650489807" y="-0.32663318514823914" z="0.0"/>
      </instance>
      <instance id="1">
        <location x="-0.9396985173225403" y="0.7587939500808716" z="0.0"/>
      </instance>
      <instance id="2">
        <location x="-0.37688443064689636" y="-0.5376884341239929" z="0.0"/>
      </instance>
    </population>
    <population id="I1R" component="I1R" type="populationList" size="4">
      <instance id="0">
        <location x="1.0" y="-0.8291457295417786" z="0.0"/>
      </instance>
      <instance id="1">
        <location x="0.17587940394878387" y="-0.8190954923629761" z="0.0"/>
      </instance>
      <instance id="2">
        <location x="0.2160804122686386" y="-0.6381909847259521" z="0.0"/>
      </instance>
      <instance id="3">
        <location x="0.6884422302246094" y="-0.5879396796226501" z="0.0"/>
      </instance>
    </population>
    <population id="I2L" component="I2L" type="populationList" size="1">
      <instance id="0">
        <location x="0.17587940394878387" y="0.7889447212219238" z="0.0"/>
      </instance>
    </population>
    <population id="M1" component="M1" type="populationList" size="1">
      <instance id="0">
        <location x="-0.26633167266845703" y="-0.8994975090026855" z="0.0"/>
      </instance>
    </population>
    <population id="M2L" component="M2L" type="populationList" size="1">
      <instance id="0">
        <location x="0.03517588973045349" y="0.5879396796226501" z="0.0"/>
      </instance>
    </population>
    <population id="M2R" component="M2R" type="populationList" size="1">
      <instance id="0">
        <location x="0.10552764683961868" y="1.0" z="0.0"/>
      </instance>
    </population>
    <population id="M3L" component="M3L" type="populationList" size="1">
      <instance id="0">
        <location x="-0.9195979833602905" y="-0.07537689805030823" z="0.0"/>
      </instance>
    </population>
    <population id="M3R" component="M3R" type="populationList" size="3">
      <instance id="0">
        <location x="0.18592965602874756" y="0.005025136284530163" z="0.0"/>
      </instance>
      <instance id="1">
        <location x="-0.2964824140071869" y="0.7085427045822144" z="0.0"/>
      </instance>
      <instance id="2">
        <location x="0.2160804122686386" y="-0.07537689805030823" z="0.0"/>
      </instance>
    </population>
    <population id="NSML" component="NSML" type="populationList" size="3">
      <instance id="0">
        <location x="-0.1557788997888565" y="-0.2160804122686386" z="0.0"/>
      </instance>
      <instance id="1">
        <location x="0.23618091642856598" y="-0.10552764683961868" z="0.0"/>
      </instance>
      <instance id="2">
        <location x="-0.14572864770889282" y="0.8693467378616333" z="0.0"/>
      </instance>
    </population>
    <population id="NSMR" component="NSMR" type="populationList" size="2">
      <instance id="0">
        <location x="-0.7286432385444641" y="0.5276381969451904" z="0.0"/>
      </instance>
      <instance id="1">
        <location x="0.8492462038993835" y="-0.356783926486969" z="0.0"/>
      </instance>
    </population>
    <projection id="NCXLS_NSML_M3R" presynapticPopulation="NSML" postsynapticPopulation="M3R" synapse="Serotonin_Glutamate">
      <connection id="0" preCellId="../NSML/0/NSML" postCellId="../M3R/1/M3R" preSegmentId="7" postSegmentId="1" preFractionAlong="0.6824061619553177" postFractionAlong="0.8452517957571815"/>
    </projection>
    <electricalProjection id="NCXLS_NSML_NSMR_GJ" presynapticPopulation="NSML" postsynapticPopulation="NSMR">
      <electricalConnection id="1" preCell="0" postCell="0" synapse="Generic_GJ" preSegment="3" postSegment="1" preFractionAlong="0.22024694043137183" postFractionAlong="0.665534000170014"/>
      <electricalConnection id="6" preCell="1" postCell="1" synapse="Generic_GJ" preSegment="6" postSegment="2" preFractionAlong="0.8745795163873424" postFractionAlong="0.050107029939968406"/>
    </electricalProjection>
    <electricalProjection id="NCXLS_NSML_M1_GJ" presynapticPopulation="NSML" postsynapticPopulation="M1">
      <electricalConnection id="2" preCell="0" postCell="0" synapse="Generic_GJ" preSegment="3" postSegment="1" preFractionAlong="0.6853387819213562" postFractionAlong="0.41349129149368014"/>
    </electricalProjection>
    <projection id="NCXLS_NSML_I1L" presynapticPopulation="NSML" postsynapticPopulation="I1L" synapse="Serotonin_Glutamate">
      <connection id="3" preCellId="../NSML/0/NSML" postCellId="../I1L/1/I1L" preSegmentId="4" postSegmentId="7" preFractionAlong="0.7379480082833204" postFractionAlong="0.7412376971371935"/>
      <connection id="4" preCellId="../NSML/0/NSML" postCellId="../I1L/2/I1L" preSegmentId="5" postSegmentId="5" preFractionAlong="0.29146702409733705" postFractionAlong="0.9251548183905436"/>
    </projection>
    <electricalProjection id="NCXLS_NSML_M3L_GJ" presynapticPopulation="NSML" postsynapticPopulation="M3L">
      <electricalConnection id="5" preCell="0" postCell="0" synapse="Generic_GJ" preSegment="8" postSegment="3" preFractionAlong="0.7904923562483306" postFractionAlong="0.21430826216183163"/>
    </electricalProjection>
    <projection id="NCXLS_NSML_I1R" presynapticPopulation="NSML" postsynapticPopulation="I1R" synapse="Serotonin_Glutamate">
      <connection id="7" preCellId="../NSML/1/NSML" postCellId="../I1R/0/I1R" preSegmentId="3" postSegmentId="6" preFractionAlong="0.481705479844009" postFractionAlong="0.7512301889080821"/>
      <connection id="8" preCellId="../NSML/1/NSML" postCellId="../I1R/1/I1R" preSegmentId="3" postSegmentId="5" preFractionAlong="0.21906682185959947" postFractionAlong="0.9261328387732337"/>
      <connection id="9" preCellId="../NSML/1/NSML" postCellId="../I1R/2/I1R" preSegmentId="8" postSegmentId="6" preFractionAlong="0.1046895682836545" postFractionAlong="0.19303616221432107"/>
      <connection id="10" preCellId="../NSML/1/NSML" postCellId="../I1R/3/I1R" preSegmentId="8" postSegmentId="2" preFractionAlong="0.1956089962521924" postFractionAlong="0.6104755113536787"/>
    </projection>
    <projection id="NCXLS_NSMR_I1R" presynapticPopulation="NSMR" postsynapticPopulation="I1R" synapse="Serotonin_Glutamate">
      <connection id="11" preCellId="../NSMR/1/NSMR" postCellId="../I1R/0/I1R" preSegmentId="2" postSegmentId="2" preFractionAlong="0.8855990948498353" postFractionAlong="0.7551685922953277"/>
      <connection id="12" preCellId="../NSMR/1/NSMR" postCellId="../I1R/1/I1R" preSegmentId="2" postSegmentId="3" preFractionAlong="0.010738981797982494" postFractionAlong="0.8797952074934596"/>
      <connection id="15" preCellId="../NSMR/1/NSMR" postCellId="../I1R/2/I1R" preSegmentId="7" postSegmentId="2" preFractionAlong="0.35135901433178085" postFractionAlong="0.11865584470938995"/>
      <connection id="16" preCellId="../NSMR/1/NSMR" postCellId="../I1R/3/I1R" preSegmentId="2" postSegmentId="8" preFractionAlong="0.18575905620621014" postFractionAlong="0.3282061685714224"/>
    </projection>
    <electricalProjection id="NCXLS_NSMR_M1_GJ" presynapticPopulation="NSMR" postsynapticPopulation="M1">
      <electricalConnection id="13" preCell="1" postCell="0" synapse="Generic_GJ" preSegment="5" postSegment="8" preFractionAlong="0.9315776530185765" postFractionAlong="0.4955390128542012"/>
    </electricalProjection>
    <projection id="NCXLS_NSMR_I1L" presynapticPopulation="NSMR" postsynapticPopulation="I1L" synapse="Serotonin_Glutamate">
      <connection id="14" preCellId="../NSMR/1/NSMR" postCellId="../I1L/2/I1L" preSegmentId="3" postSegmentId="6" preFractionAlong="0.06929264946664215" postFractionAlong="0.7451516535267858"/>
      <connection id="40" preCellId="../NSMR/0/NSMR" postCellId="../I1L/1/I1L" preSegmentId="5" postSegmentId="1" preFractionAlong="0.5888248932482932" postFractionAlong="0.19279043581910582"/>
    </projection>
    <electricalProjection id="NCXLS_M3R_NSMR_GJ" presynapticPopulation="M3R" postsynapticPopulation="NSMR">
      <electricalConnection id="17" preCell="0" postCell="1" synapse="Generic_GJ" preSegment="2" postSegment="7" preFractionAlong="0.36826023823008047" postFractionAlong="0.7243627065632184"/>
      <electricalConnection id="26" preCell="1" postCell="1" synapse="Generic_GJ" preSegment="6" postSegment="5" preFractionAlong="0.07088550580912611" postFractionAlong="0.31991363514030147"/>
      <electricalConnection id="98" preCell="2" postCell="1" synapse="Generic_GJ" preSegment="1" postSegment="5" preFractionAlong="0.4914782344184464" postFractionAlong="0.19602920170350768"/>
    </electricalProjection>
    <electricalProjection id="NCXLS_M3R_M3R_GJ" presynapticPopulation="M3R" postsynapticPopulation="M3R">
      <electricalConnection id="18" preCell="0" postCell="1" synapse="Generic_GJ" preSegment="2" postSegment="6" preFractionAlong="0.5910987992719926" postFractionAlong="0.48189123127043954"/>
      <electricalConnection id="27" preCell="1" postCell="0" synapse="Generic_GJ" preSegment="5" postSegment="8" preFractionAlong="0.9978978527542169" postFractionAlong="0.4309933420681695"/>
      <electricalConnection id="38" preCell="1" postCell="2" synapse="Generic_GJ" preSegment="8" postSegment="5" preFractionAlong="0.652509992786753" postFractionAlong="0.4156014668646678"/>
    </electricalProjection>
    <electricalProjection id="NCXLS_M3R_NSML_GJ" presynapticPopulation="M3R" postsynapticPopulation="NSML">
      <electricalConnection id="19" preCell="0" postCell="2" synapse="Generic_GJ" preSegment="5" postSegment="4" preFractionAlong="0.846207769878963" postFractionAlong="0.45482977243864975"/>
      <electricalConnection id="24" preCell="1" postCell="0" synapse="Generic_GJ" preSegment="8" postSegment="8" preFractionAlong="0.9035312259127926" postFractionAlong="0.5719919453067082"/>
      <electricalConnection id="25" preCell="1" postCell="1" synapse="Generic_GJ" preSegment="6" postSegment="5" preFractionAlong="0.7520443368826271" postFractionAlong="0.15574975979894434"/>
    </electricalProjection>
    <projection id="NCXLS_M3R_I1R" presynapticPopulation="M3R" postsynapticPopulation="I1R" synapse="Acetylcholine">
      <connection id="20" preCellId="../M3R/0/M3R" postCellId="../I1R/0/I1R" preSegmentId="4" postSegmentId="4" preFractionAlong="0.19303874129377752" postFractionAlong="0.5623363273917781"/>
      <connection id="28" preCellId="../M3R/1/M3R" postCellId="../I1R/0/I1R" preSegmentId="2" postSegmentId="7" preFractionAlong="0.6933970262725346" postFractionAlong="0.20448195025057958"/>
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    </projection>
    <projection id="NCXLS_M3R_I2L" presynapticPopulation="M3R" postsynapticPopulation="I2L" synapse="Acetylcholine">
      <connection id="21" preCellId="../M3R/0/M3R" postCellId="../I2L/0/I2L" preSegmentId="2" postSegmentId="2" preFractionAlong="0.3480890322516831" postFractionAlong="0.2258621816221703"/>
      <connection id="31" preCellId="../M3R/1/M3R" postCellId="../I2L/0/I2L" preSegmentId="5" postSegmentId="4" preFractionAlong="0.6894117084305128" postFractionAlong="0.598252930517052"/>
      <connection id="102" preCellId="../M3R/2/M3R" postCellId="../I2L/0/I2L" preSegmentId="6" postSegmentId="1" preFractionAlong="0.3965785613115773" postFractionAlong="0.9384218520987698"/>
    </projection>
    <projection id="NCXLS_M3R_M2R" presynapticPopulation="M3R" postsynapticPopulation="M2R" synapse="Acetylcholine">
      <connection id="22" preCellId="../M3R/0/M3R" postCellId="../M2R/0/M2R" preSegmentId="8" postSegmentId="8" preFractionAlong="0.49009069121436144" postFractionAlong="0.7510704788480105"/>
    </projection>
    <projection id="NCXLS_M3R_M2L" presynapticPopulation="M3R" postsynapticPopulation="M2L" synapse="Acetylcholine">
      <connection id="23" preCellId="../M3R/0/M3R" postCellId="../M2L/0/M2L" preSegmentId="1" postSegmentId="8" preFractionAlong="0.08648444215163853" postFractionAlong="0.7353676497325268"/>
    </projection>
    <projection id="NCXLS_M3R_I1L" presynapticPopulation="M3R" postsynapticPopulation="I1L" synapse="Acetylcholine">
      <connection id="30" preCellId="../M3R/1/M3R" postCellId="../I1L/0/I1L" preSegmentId="8" postSegmentId="5" preFractionAlong="0.35861105228117074" postFractionAlong="0.8963645620810967"/>
      <connection id="33" preCellId="../M3R/1/M3R" postCellId="../I1L/2/I1L" preSegmentId="7" postSegmentId="6" preFractionAlong="0.7458010487660107" postFractionAlong="0.1727553939907227"/>
    </projection>
    <electricalProjection id="NCXLS_M3R_M1_GJ" presynapticPopulation="M3R" postsynapticPopulation="M1">
      <electricalConnection id="32" preCell="1" postCell="0" synapse="Generic_GJ" preSegment="8" postSegment="3" preFractionAlong="0.0783884269702585" postFractionAlong="0.020764089724460977"/>
    </electricalProjection>
    <electricalProjection id="NCXLS_M3R_M2L_GJ" presynapticPopulation="M3R" postsynapticPopulation="M2L">
      <electricalConnection id="35" preCell="1" postCell="0" synapse="Generic_GJ" preSegment="1" postSegment="4" preFractionAlong="0.7754145149664236" postFractionAlong="0.5248335138013768"/>
      <electricalConnection id="104" preCell="2" postCell="0" synapse="Generic_GJ" preSegment="3" postSegment="2" preFractionAlong="0.32479287078831576" postFractionAlong="0.9320458362386227"/>
    </electricalProjection>
    <electricalProjection id="NCXLS_M3R_M3L_GJ" presynapticPopulation="M3R" postsynapticPopulation="M3L">
      <electricalConnection id="37" preCell="1" postCell="0" synapse="Generic_GJ" preSegment="7" postSegment="3" preFractionAlong="0.18394770616062162" postFractionAlong="0.6742101603876477"/>
    </electricalProjection>
    <projection id="NCXLS_I1R_M1" presynapticPopulation="I1R" postsynapticPopulation="M1" synapse="Acetylcholine">
      <connection id="39" preCellId="../I1R/1/I1R" postCellId="../M1/0/M1" preSegmentId="1" postSegmentId="7" preFractionAlong="0.9111695845150212" postFractionAlong="0.5077309640122382"/>
    </projection>
    <electricalProjection id="NCXLS_M1_NSML_GJ" presynapticPopulation="M1" postsynapticPopulation="NSML">
      <electricalConnection id="41" preCell="0" postCell="0" synapse="Generic_GJ" preSegment="6" postSegment="2" preFractionAlong="0.40552522145794356" postFractionAlong="0.22722069409991053"/>
      <electricalConnection id="42" preCell="0" postCell="1" synapse="Generic_GJ" preSegment="2" postSegment="6" preFractionAlong="0.8925114877785294" postFractionAlong="0.5307591771858249"/>
    </electricalProjection>
    <electricalProjection id="NCXLS_M1_NSMR_GJ" presynapticPopulation="M1" postsynapticPopulation="NSMR">
      <electricalConnection id="43" preCell="0" postCell="1" synapse="Generic_GJ" preSegment="7" postSegment="7" preFractionAlong="0.6894795937285974" postFractionAlong="0.9515481136767396"/>
      <electricalConnection id="50" preCell="0" postCell="0" synapse="Generic_GJ" preSegment="4" postSegment="6" preFractionAlong="0.6292001574496608" postFractionAlong="0.4764457362938286"/>
    </electricalProjection>
    <electricalProjection id="NCXLS_M1_M3R_GJ" presynapticPopulation="M1" postsynapticPopulation="M3R">
      <electricalConnection id="44" preCell="0" postCell="0" synapse="Generic_GJ" preSegment="8" postSegment="4" preFractionAlong="0.8335345671092572" postFractionAlong="0.5840191798678459"/>
      <electricalConnection id="45" preCell="0" postCell="1" synapse="Generic_GJ" preSegment="1" postSegment="3" preFractionAlong="0.29714931868899164" postFractionAlong="0.4823614164647395"/>
    </electricalProjection>
    <projection id="NCXLS_M1_NSML" presynapticPopulation="M1" postsynapticPopulation="NSML" synapse="Acetylcholine">
      <connection id="46" preCellId="../M1/0/M1" postCellId="../NSML/2/NSML" preSegmentId="3" postSegmentId="2" preFractionAlong="0.24260701695345221" postFractionAlong="0.5348788154675899"/>
    </projection>
    <projection id="NCXLS_M1_I1R" presynapticPopulation="M1" postsynapticPopulation="I1R" synapse="Acetylcholine">
      <connection id="47" preCellId="../M1/0/M1" postCellId="../I1R/0/I1R" preSegmentId="6" postSegmentId="7" preFractionAlong="0.4487407508475062" postFractionAlong="0.8630259611201758"/>
      <connection id="48" preCellId="../M1/0/M1" postCellId="../I1R/1/I1R" preSegmentId="5" postSegmentId="8" preFractionAlong="0.47069121764044575" postFractionAlong="0.9729257104088996"/>
      <connection id="54" preCellId="../M1/0/M1" postCellId="../I1R/2/I1R" preSegmentId="6" postSegmentId="6" preFractionAlong="0.5372522720033387" postFractionAlong="0.01858033405509918"/>
      <connection id="57" preCellId="../M1/0/M1" postCellId="../I1R/3/I1R" preSegmentId="2" postSegmentId="6" preFractionAlong="0.4562430258462945" postFractionAlong="0.4102050052835323"/>
    </projection>
    <projection id="NCXLS_M1_I1L" presynapticPopulation="M1" postsynapticPopulation="I1L" synapse="Acetylcholine">
      <connection id="49" preCellId="../M1/0/M1" postCellId="../I1L/0/I1L" preSegmentId="6" postSegmentId="5" preFractionAlong="0.003362378322936621" postFractionAlong="0.38066826380391905"/>
      <connection id="52" preCellId="../M1/0/M1" postCellId="../I1L/1/I1L" preSegmentId="3" postSegmentId="6" preFractionAlong="0.6738985378607202" postFractionAlong="0.6642179722788824"/>
      <connection id="53" preCellId="../M1/0/M1" postCellId="../I1L/2/I1L" preSegmentId="6" postSegmentId="7" preFractionAlong="0.20292588570198822" postFractionAlong="0.4282507002599032"/>
    </projection>
    <projection id="NCXLS_M1_I2L" presynapticPopulation="M1" postsynapticPopulation="I2L" synapse="Acetylcholine">
      <connection id="51" preCellId="../M1/0/M1" postCellId="../I2L/0/I2L" preSegmentId="4" postSegmentId="6" preFractionAlong="0.17049752178789424" postFractionAlong="0.8521479838520092"/>
    </projection>
    <electricalProjection id="NCXLS_M1_M2R_GJ" presynapticPopulation="M1" postsynapticPopulation="M2R">
      <electricalConnection id="55" preCell="0" postCell="0" synapse="Generic_GJ" preSegment="1" postSegment="6" preFractionAlong="0.8448160525721434" postFractionAlong="0.26054501410973785"/>
    </electricalProjection>
    <electricalProjection id="NCXLS_M1_M2L_GJ" presynapticPopulation="M1" postsynapticPopulation="M2L">
      <electricalConnection id="56" preCell="0" postCell="0" synapse="Generic_GJ" preSegment="7" postSegment="8" preFractionAlong="0.9232393837281877" postFractionAlong="0.09601101211365137"/>
    </electricalProjection>
    <projection id="NCXLS_M1_M3L" presynapticPopulation="M1" postsynapticPopulation="M3L" synapse="Glutamate">
      <connection id="58" preCellId="../M1/0/M1" postCellId="../M3L/0/M3L" preSegmentId="7" postSegmentId="8" preFractionAlong="0.38064614669745733" postFractionAlong="0.06366333324100759"/>
    </projection>
    <projection id="NCXLS_M1_M3R" presynapticPopulation="M1" postsynapticPopulation="M3R" synapse="Acetylcholine">
      <connection id="59" preCellId="../M1/0/M1" postCellId="../M3R/2/M3R" preSegmentId="4" postSegmentId="1" preFractionAlong="0.042744606524608986" postFractionAlong="0.40914542187403724"/>
    </projection>
    <electricalProjection id="NCXLS_M2R_NSML_GJ" presynapticPopulation="M2R" postsynapticPopulation="NSML">
      <electricalConnection id="60" preCell="0" postCell="1" synapse="Generic_GJ" preSegment="6" postSegment="6" preFractionAlong="0.20372246193051546" postFractionAlong="0.6464685204315495"/>
    </electricalProjection>
    <projection id="NCXLS_M2R_NSMR" presynapticPopulation="M2R" postsynapticPopulation="NSMR" synapse="Acetylcholine">
      <connection id="61" preCellId="../M2R/0/M2R" postCellId="../NSMR/1/NSMR" preSegmentId="5" postSegmentId="8" preFractionAlong="0.25520212401559794" postFractionAlong="0.6005576560606293"/>
    </projection>
    <electricalProjection id="NCXLS_M2R_M3R_GJ" presynapticPopulation="M2R" postsynapticPopulation="M3R">
      <electricalConnection id="62" preCell="0" postCell="0" synapse="Generic_GJ" preSegment="6" postSegment="8" preFractionAlong="0.4666136228021257" postFractionAlong="0.33671659728009506"/>
      <electricalConnection id="68" preCell="0" postCell="2" synapse="Generic_GJ" preSegment="7" postSegment="2" preFractionAlong="0.20767464835910665" postFractionAlong="0.5392982638342613"/>
    </electricalProjection>
    <projection id="NCXLS_M2R_I1R" presynapticPopulation="M2R" postsynapticPopulation="I1R" synapse="Acetylcholine">
      <connection id="63" preCellId="../M2R/0/M2R" postCellId="../I1R/0/I1R" preSegmentId="4" postSegmentId="6" preFractionAlong="0.9778470873280569" postFractionAlong="0.4268414093689781"/>
      <connection id="64" preCellId="../M2R/0/M2R" postCellId="../I1R/1/I1R" preSegmentId="6" postSegmentId="8" preFractionAlong="0.46426690242611335" postFractionAlong="0.07621839344504822"/>
      <connection id="66" preCellId="../M2R/0/M2R" postCellId="../I1R/2/I1R" preSegmentId="2" postSegmentId="4" preFractionAlong="0.0033839865739774266" postFractionAlong="0.40178524516275893"/>
      <connection id="67" preCellId="../M2R/0/M2R" postCellId="../I1R/3/I1R" preSegmentId="5" postSegmentId="4" preFractionAlong="0.02429270339978029" postFractionAlong="0.8244750462445021"/>
    </projection>
    <projection id="NCXLS_M2R_I2L" presynapticPopulation="M2R" postsynapticPopulation="I2L" synapse="Acetylcholine">
      <connection id="65" preCellId="../M2R/0/M2R" postCellId="../I2L/0/I2L" preSegmentId="8" postSegmentId="5" preFractionAlong="0.3286973872172636" postFractionAlong="0.12142212233126248"/>
    </projection>
    <electricalProjection id="NCXLS_M2L_NSML_GJ" presynapticPopulation="M2L" postsynapticPopulation="NSML">
      <electricalConnection id="69" preCell="0" postCell="0" synapse="Generic_GJ" preSegment="5" postSegment="4" preFractionAlong="0.4935774386721822" postFractionAlong="0.43663132089416024"/>
      <electricalConnection id="70" preCell="0" postCell="1" synapse="Generic_GJ" preSegment="7" postSegment="5" preFractionAlong="0.7003935796352977" postFractionAlong="0.12649095932025423"/>
    </electricalProjection>
    <electricalProjection id="NCXLS_M2L_NSMR_GJ" presynapticPopulation="M2L" postsynapticPopulation="NSMR">
      <electricalConnection id="71" preCell="0" postCell="1" synapse="Generic_GJ" preSegment="8" postSegment="8" preFractionAlong="0.7676754330372791" postFractionAlong="0.6659300312206798"/>
    </electricalProjection>
    <electricalProjection id="NCXLS_M2L_M3R_GJ" presynapticPopulation="M2L" postsynapticPopulation="M3R">
      <electricalConnection id="72" preCell="0" postCell="0" synapse="Generic_GJ" preSegment="3" postSegment="7" preFractionAlong="0.46778977047254156" postFractionAlong="0.4974113794914262"/>
      <electricalConnection id="73" preCell="0" postCell="1" synapse="Generic_GJ" preSegment="6" postSegment="7" preFractionAlong="0.39289229583117913" postFractionAlong="0.4996906028861203"/>
    </electricalProjection>
    <projection id="NCXLS_M2L_I1R" presynapticPopulation="M2L" postsynapticPopulation="I1R" synapse="Acetylcholine">
      <connection id="74" preCellId="../M2L/0/M2L" postCellId="../I1R/0/I1R" preSegmentId="7" postSegmentId="1" preFractionAlong="0.6919023140836209" postFractionAlong="0.7112071607340226"/>
      <connection id="75" preCellId="../M2L/0/M2L" postCellId="../I1R/1/I1R" preSegmentId="7" postSegmentId="1" preFractionAlong="0.41354052274348874" postFractionAlong="0.373697169736223"/>
      <connection id="81" preCellId="../M2L/0/M2L" postCellId="../I1R/2/I1R" preSegmentId="4" postSegmentId="6" preFractionAlong="0.6487986245788886" postFractionAlong="0.31517869551588895"/>
      <connection id="82" preCellId="../M2L/0/M2L" postCellId="../I1R/3/I1R" preSegmentId="2" postSegmentId="2" preFractionAlong="0.9751145070457258" postFractionAlong="0.8969631217106169"/>
    </projection>
    <projection id="NCXLS_M2L_I1L" presynapticPopulation="M2L" postsynapticPopulation="I1L" synapse="Acetylcholine">
      <connection id="76" preCellId="../M2L/0/M2L" postCellId="../I1L/0/I1L" preSegmentId="8" postSegmentId="4" preFractionAlong="0.4533535379141953" postFractionAlong="0.8895964631361936"/>
      <connection id="79" preCellId="../M2L/0/M2L" postCellId="../I1L/1/I1L" preSegmentId="1" postSegmentId="2" preFractionAlong="0.05247768082940385" postFractionAlong="0.5791251852038592"/>
      <connection id="80" preCellId="../M2L/0/M2L" postCellId="../I1L/2/I1L" preSegmentId="8" postSegmentId="1" preFractionAlong="0.4176052473023968" postFractionAlong="0.2120433621929596"/>
    </projection>
    <projection id="NCXLS_M2L_NSMR" presynapticPopulation="M2L" postsynapticPopulation="NSMR" synapse="Acetylcholine">
      <connection id="77" preCellId="../M2L/0/M2L" postCellId="../NSMR/0/NSMR" preSegmentId="4" postSegmentId="2" preFractionAlong="0.8986563837544456" postFractionAlong="0.7091369915594256"/>
    </projection>
    <electricalProjection id="NCXLS_M2L_M1_GJ" presynapticPopulation="M2L" postsynapticPopulation="M1">
      <electricalConnection id="78" preCell="0" postCell="0" synapse="Generic_GJ" preSegment="1" postSegment="3" preFractionAlong="0.6357367782552691" postFractionAlong="0.9635501381630547"/>
    </electricalProjection>
    <electricalProjection id="NCXLS_M2L_M3L_GJ" presynapticPopulation="M2L" postsynapticPopulation="M3L">
      <electricalConnection id="83" preCell="0" postCell="0" synapse="Generic_GJ" preSegment="3" postSegment="2" preFractionAlong="0.3267236831445983" postFractionAlong="0.3715412244495886"/>
    </electricalProjection>
    <projection id="NCXLS_M2L_M3R" presynapticPopulation="M2L" postsynapticPopulation="M3R" synapse="Glutamate">
      <connection id="84" preCellId="../M2L/0/M2L" postCellId="../M3R/2/M3R" preSegmentId="6" postSegmentId="7" preFractionAlong="0.10031949919327943" postFractionAlong="0.7619628388892893"/>
    </projection>
    <projection id="NCXLS_I1R_NSMR" presynapticPopulation="I1R" postsynapticPopulation="NSMR" synapse="Acetylcholine">
      <connection id="85" preCellId="../I1R/3/I1R" postCellId="../NSMR/1/NSMR" preSegmentId="7" postSegmentId="7" preFractionAlong="0.8798199767054522" postFractionAlong="0.9269406231201087"/>
    </projection>
    <electricalProjection id="NCXLS_I1R_I1R_GJ" presynapticPopulation="I1R" postsynapticPopulation="I1R">
      <electricalConnection id="86" preCell="3" postCell="0" synapse="Generic_GJ" preSegment="7" postSegment="6" preFractionAlong="0.9885030699282062" postFractionAlong="0.7100227315001846"/>
    </electricalProjection>
    <electricalProjection id="NCXLS_M3L_NSML_GJ" presynapticPopulation="M3L" postsynapticPopulation="NSML">
      <electricalConnection id="87" preCell="0" postCell="0" synapse="Generic_GJ" preSegment="2" postSegment="2" preFractionAlong="0.3895276083725533" postFractionAlong="0.5185181326097129"/>
      <electricalConnection id="88" preCell="0" postCell="1" synapse="Generic_GJ" preSegment="5" postSegment="7" preFractionAlong="0.6226878136965482" postFractionAlong="0.09298027644479123"/>
    </electricalProjection>
    <projection id="NCXLS_M3L_NSMR" presynapticPopulation="M3L" postsynapticPopulation="NSMR" synapse="Acetylcholine">
      <connection id="89" preCellId="../M3L/0/M3L" postCellId="../NSMR/1/NSMR" preSegmentId="8" postSegmentId="6" preFractionAlong="0.2753448501384441" postFractionAlong="0.017634829052346368"/>
    </projection>
    <projection id="NCXLS_M3L_I1R" presynapticPopulation="M3L" postsynapticPopulation="I1R" synapse="Acetylcholine">
      <connection id="90" preCellId="../M3L/0/M3L" postCellId="../I1R/0/I1R" preSegmentId="1" postSegmentId="6" preFractionAlong="0.5784477558526964" postFractionAlong="0.426569004711536"/>
      <connection id="91" preCellId="../M3L/0/M3L" postCellId="../I1R/1/I1R" preSegmentId="4" postSegmentId="8" preFractionAlong="0.8933429528041915" postFractionAlong="0.6114308072278889"/>
      <connection id="95" preCellId="../M3L/0/M3L" postCellId="../I1R/2/I1R" preSegmentId="6" postSegmentId="5" preFractionAlong="0.9465083782919413" postFractionAlong="0.07174796422571372"/>
      <connection id="96" preCellId="../M3L/0/M3L" postCellId="../I1R/3/I1R" preSegmentId="6" postSegmentId="1" preFractionAlong="0.5971243771775492" postFractionAlong="0.24765009847460473"/>
    </projection>
    <projection id="NCXLS_M3L_I1L" presynapticPopulation="M3L" postsynapticPopulation="I1L" synapse="Acetylcholine">
      <connection id="92" preCellId="../M3L/0/M3L" postCellId="../I1L/0/I1L" preSegmentId="4" postSegmentId="1" preFractionAlong="0.5109305765941476" postFractionAlong="0.49725431594847147"/>
      <connection id="94" preCellId="../M3L/0/M3L" postCellId="../I1L/2/I1L" preSegmentId="3" postSegmentId="5" preFractionAlong="0.20296941416418335" postFractionAlong="0.8622925295542114"/>
    </projection>
    <projection id="NCXLS_M3L_M1" presynapticPopulation="M3L" postsynapticPopulation="M1" synapse="Acetylcholine">
      <connection id="93" preCellId="../M3L/0/M3L" postCellId="../M1/0/M1" preSegmentId="8" postSegmentId="2" preFractionAlong="0.6068597036029475" postFractionAlong="0.8083263989215644"/>
    </projection>
    <projection id="NCXLS_M3L_M3R" presynapticPopulation="M3L" postsynapticPopulation="M3R" synapse="Glutamate">
      <connection id="97" preCellId="../M3L/0/M3L" postCellId="../M3R/2/M3R" preSegmentId="4" postSegmentId="2" preFractionAlong="0.626895679810717" postFractionAlong="0.018109437287955554"/>
    </projection>
    <projection id="NCXLS_M3R_M3R" presynapticPopulation="M3R" postsynapticPopulation="M3R" synapse="Glutamate">
      <connection id="99" preCellId="../M3R/2/M3R" postCellId="../M3R/0/M3R" preSegmentId="8" postSegmentId="5" preFractionAlong="0.897162194827615" postFractionAlong="0.2925076950290635"/>
    </projection>
    <projection id="NCXLS_M3R_NSML" presynapticPopulation="M3R" postsynapticPopulation="NSML" synapse="Acetylcholine">
      <connection id="100" preCellId="../M3R/2/M3R" postCellId="../NSML/2/NSML" preSegmentId="2" postSegmentId="8" preFractionAlong="0.31650213991029075" postFractionAlong="0.7754957516360781"/>
    </projection>
    <electricalProjection id="NCXLS_M3R_M2R_GJ" presynapticPopulation="M3R" postsynapticPopulation="M2R">
      <electricalConnection id="103" preCell="2" postCell="0" synapse="Generic_GJ" preSegment="1" postSegment="5" preFractionAlong="0.4674105002574649" postFractionAlong="0.672434401962343"/>
    </electricalProjection>
  </network>
</neuroml>
