<?xml version='1.0' encoding='UTF-8'?>
<neuroml xmlns="http://www.neuroml.org/schema/neuroml2" xmlns:xsi="http://www.w3.org/2001/XMLSchema-instance" xsi:schemaLocation="http://www.neuroml.org/schema/neuroml2 https://raw.githubusercontent.com/NeuroML/NeuroML2/development/Schemas/NeuroML2/NeuroML_v2beta4.xsd" id="gvft_network_bio_prior_lamW_0.278_DF_0.037_t90.net">
  <notes>NeuroML2 network generated from GVFT simulation on 2025-05-04 11:19:16
</notes>
  <include href="I1L.cell.nml"/>
  <include href="I1R.cell.nml"/>
  <include href="I2L.cell.nml"/>
  <include href="I2R.cell.nml"/>
  <include href="M1.cell.nml"/>
  <include href="M2L.cell.nml"/>
  <include href="M2R.cell.nml"/>
  <include href="M3L.cell.nml"/>
  <include href="NSML.cell.nml"/>
  <include href="NSMR.cell.nml"/>
  <include href="Acetylcholine.synapse.nml"/>
  <include href="Generic_GJ.nml"/>
  <include href="Glutamate.synapse.nml"/>
  <include href="Serotonin_Glutamate.synapse.nml"/>
  <network id="gvft_network_bio_prior_lamW_0.278_DF_0.037_t90.net" type="networkWithTemperature" temperature="20.0 degC">
    <population id="I1L" component="I1L" type="populationList" size="5">
      <instance id="0">
        <location x="-0.5276381969451904" y="0.979899525642395" z="0.0"/>
      </instance>
      <instance id="1">
        <location x="0.7085427045822144" y="0.25628140568733215" z="0.0"/>
      </instance>
      <instance id="2">
        <location x="-0.44723618030548096" y="0.7185929417610168" z="0.0"/>
      </instance>
      <instance id="3">
        <location x="0.8994975090026855" y="0.7587939500808716" z="0.0"/>
      </instance>
      <instance id="4">
        <location x="-0.7286432385444641" y="0.6281406879425049" z="0.0"/>
      </instance>
    </population>
    <population id="I1R" component="I1R" type="populationList" size="1">
      <instance id="0">
        <location x="0.11557789891958237" y="-0.356783926486969" z="0.0"/>
      </instance>
    </population>
    <population id="I2L" component="I2L" type="populationList" size="1">
      <instance id="0">
        <location x="0.08542714267969131" y="-0.4170854389667511" z="0.0"/>
      </instance>
    </population>
    <population id="I2R" component="I2R" type="populationList" size="1">
      <instance id="0">
        <location x="0.045226141810417175" y="-0.7688442468643188" z="0.0"/>
      </instance>
    </population>
    <population id="M1" component="M1" type="populationList" size="1">
      <instance id="0">
        <location x="-0.909547746181488" y="-0.5577889680862427" z="0.0"/>
      </instance>
    </population>
    <population id="M2L" component="M2L" type="populationList" size="1">
      <instance id="0">
        <location x="-0.3467336893081665" y="0.7688442468643188" z="0.0"/>
      </instance>
    </population>
    <population id="M2R" component="M2R" type="populationList" size="1">
      <instance id="0">
        <location x="0.18592965602874756" y="-0.4070351719856262" z="0.0"/>
      </instance>
    </population>
    <population id="M3L" component="M3L" type="populationList" size="4">
      <instance id="0">
        <location x="0.7688442468643188" y="-0.4170854389667511" z="0.0"/>
      </instance>
      <instance id="1">
        <location x="-0.08542714267969131" y="0.3366834223270416" z="0.0"/>
      </instance>
      <instance id="2">
        <location x="-0.1658291518688202" y="0.7587939500808716" z="0.0"/>
      </instance>
      <instance id="3">
        <location x="-0.6884422302246094" y="-0.015075387433171272" z="0.0"/>
      </instance>
    </population>
    <population id="NSML" component="NSML" type="populationList" size="3">
      <instance id="0">
        <location x="-0.7386934757232666" y="-0.2864321768283844" z="0.0"/>
      </instance>
      <instance id="1">
        <location x="0.8894472122192383" y="-0.7487437129020691" z="0.0"/>
      </instance>
      <instance id="2">
        <location x="-0.3366834223270416" y="-0.9195979833602905" z="0.0"/>
      </instance>
    </population>
    <population id="NSMR" component="NSMR" type="populationList" size="2">
      <instance id="0">
        <location x="0.31658291816711426" y="0.6582914590835571" z="0.0"/>
      </instance>
      <instance id="1">
        <location x="-0.08542714267969131" y="-0.8492462038993835" z="0.0"/>
      </instance>
    </population>
    <projection id="NCXLS_NSML_I1L" presynapticPopulation="NSML" postsynapticPopulation="I1L" synapse="Serotonin_Glutamate">
      <connection id="0" preCellId="../NSML/0/NSML" postCellId="../I1L/0/I1L" preSegmentId="2" postSegmentId="1" preFractionAlong="0.4675402622668692" postFractionAlong="0.8497130445803941"/>
      <connection id="1" preCellId="../NSML/0/NSML" postCellId="../I1L/1/I1L" preSegmentId="4" postSegmentId="2" preFractionAlong="0.3395700728052524" postFractionAlong="0.8955617303268776"/>
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    </projection>
    <projection id="NCXLS_NSML_NSMR" presynapticPopulation="NSML" postsynapticPopulation="NSMR" synapse="Serotonin_Glutamate">
      <connection id="2" preCellId="../NSML/0/NSML" postCellId="../NSMR/0/NSMR" preSegmentId="4" postSegmentId="4" preFractionAlong="0.7897654877946664" postFractionAlong="0.23664354788190134"/>
      <connection id="12" preCellId="../NSML/1/NSML" postCellId="../NSMR/1/NSMR" preSegmentId="8" postSegmentId="3" preFractionAlong="0.9721829681870411" postFractionAlong="0.5990715103352405"/>
    </projection>
    <electricalProjection id="NCXLS_NSML_M3L_GJ" presynapticPopulation="NSML" postsynapticPopulation="M3L">
      <electricalConnection id="3" preCell="0" postCell="1" synapse="Generic_GJ" preSegment="4" postSegment="8" preFractionAlong="0.5745782465305711" postFractionAlong="0.7593235685784019"/>
      <electricalConnection id="4" preCell="0" postCell="2" synapse="Generic_GJ" preSegment="3" postSegment="3" preFractionAlong="0.4926642258305287" postFractionAlong="0.9010384977340232"/>
      <electricalConnection id="8" preCell="0" postCell="3" synapse="Generic_GJ" preSegment="6" postSegment="1" preFractionAlong="0.7385710386348938" postFractionAlong="0.9612079012228597"/>
    </electricalProjection>
    <electricalProjection id="NCXLS_NSML_M2L_GJ" presynapticPopulation="NSML" postsynapticPopulation="M2L">
      <electricalConnection id="6" preCell="0" postCell="0" synapse="Generic_GJ" preSegment="4" postSegment="7" preFractionAlong="0.17226481435578822" postFractionAlong="0.7299983109899704"/>
    </electricalProjection>
    <projection id="NCXLS_NSML_NSML" presynapticPopulation="NSML" postsynapticPopulation="NSML" synapse="Serotonin_Glutamate">
      <connection id="10" preCellId="../NSML/1/NSML" postCellId="../NSML/0/NSML" preSegmentId="2" postSegmentId="2" preFractionAlong="0.032862725795139824" postFractionAlong="0.13590738229269894"/>
      <connection id="14" preCellId="../NSML/1/NSML" postCellId="../NSML/2/NSML" preSegmentId="6" postSegmentId="1" preFractionAlong="0.6729641731118157" postFractionAlong="0.5308079280904162"/>
      <connection id="102" preCellId="../NSML/2/NSML" postCellId="../NSML/1/NSML" preSegmentId="3" postSegmentId="1" preFractionAlong="0.2561310909621153" postFractionAlong="0.42051035807653225"/>
    </projection>
    <projection id="NCXLS_NSML_M1" presynapticPopulation="NSML" postsynapticPopulation="M1" synapse="Serotonin_Glutamate">
      <connection id="11" preCellId="../NSML/1/NSML" postCellId="../M1/0/M1" preSegmentId="7" postSegmentId="5" preFractionAlong="0.34198580528798495" postFractionAlong="0.8995852164620958"/>
    </projection>
    <projection id="NCXLS_NSML_I2R" presynapticPopulation="NSML" postsynapticPopulation="I2R" synapse="Serotonin_Glutamate">
      <connection id="13" preCellId="../NSML/1/NSML" postCellId="../I2R/0/I2R" preSegmentId="3" postSegmentId="1" preFractionAlong="0.32765502992164286" postFractionAlong="0.3198359232919671"/>
      <connection id="109" preCellId="../NSML/2/NSML" postCellId="../I2R/0/I2R" preSegmentId="2" postSegmentId="4" preFractionAlong="0.537630676603545" postFractionAlong="0.8331908044356465"/>
    </projection>
    <electricalProjection id="NCXLS_M1_NSML_GJ" presynapticPopulation="M1" postsynapticPopulation="NSML">
      <electricalConnection id="15" preCell="0" postCell="0" synapse="Generic_GJ" preSegment="6" postSegment="6" preFractionAlong="0.1490897687287166" postFractionAlong="0.022139162942145907"/>
      <electricalConnection id="16" preCell="0" postCell="1" synapse="Generic_GJ" preSegment="1" postSegment="3" preFractionAlong="0.10747140396868127" postFractionAlong="0.7854450308522394"/>
    </electricalProjection>
    <projection id="NCXLS_M1_I1R" presynapticPopulation="M1" postsynapticPopulation="I1R" synapse="Acetylcholine">
      <connection id="17" preCellId="../M1/0/M1" postCellId="../I1R/0/I1R" preSegmentId="8" postSegmentId="6" preFractionAlong="0.7242282373068362" postFractionAlong="0.38565868977608264"/>
    </projection>
    <electricalProjection id="NCXLS_M1_M3L_GJ" presynapticPopulation="M1" postsynapticPopulation="M3L">
      <electricalConnection id="18" preCell="0" postCell="0" synapse="Generic_GJ" preSegment="3" postSegment="1" preFractionAlong="0.8127300494315858" postFractionAlong="0.5796305702366134"/>
      <electricalConnection id="23" preCell="0" postCell="1" synapse="Generic_GJ" preSegment="4" postSegment="7" preFractionAlong="0.043546577843375345" postFractionAlong="0.7658040880308877"/>
      <electricalConnection id="24" preCell="0" postCell="2" synapse="Generic_GJ" preSegment="2" postSegment="3" preFractionAlong="0.42544911655181694" postFractionAlong="0.74408044410506"/>
    </electricalProjection>
    <projection id="NCXLS_M1_I2L" presynapticPopulation="M1" postsynapticPopulation="I2L" synapse="Acetylcholine">
      <connection id="19" preCellId="../M1/0/M1" postCellId="../I2L/0/I2L" preSegmentId="3" postSegmentId="8" preFractionAlong="0.8946811743326679" postFractionAlong="0.04525831387055146"/>
    </projection>
    <projection id="NCXLS_M1_I1L" presynapticPopulation="M1" postsynapticPopulation="I1L" synapse="Acetylcholine">
      <connection id="20" preCellId="../M1/0/M1" postCellId="../I1L/0/I1L" preSegmentId="8" postSegmentId="1" preFractionAlong="0.752046927805861" postFractionAlong="0.7093779303098892"/>
      <connection id="21" preCellId="../M1/0/M1" postCellId="../I1L/1/I1L" preSegmentId="6" postSegmentId="8" preFractionAlong="0.062024875352783115" postFractionAlong="0.8580780722249438"/>
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    </projection>
    <electricalProjection id="NCXLS_M1_NSMR_GJ" presynapticPopulation="M1" postsynapticPopulation="NSMR">
      <electricalConnection id="22" preCell="0" postCell="0" synapse="Generic_GJ" preSegment="6" postSegment="8" preFractionAlong="0.19571341492826522" postFractionAlong="0.5160618223609771"/>
    </electricalProjection>
    <projection id="NCXLS_M1_M2L" presynapticPopulation="M1" postsynapticPopulation="M2L" synapse="Acetylcholine">
      <connection id="26" preCellId="../M1/0/M1" postCellId="../M2L/0/M2L" preSegmentId="4" postSegmentId="8" preFractionAlong="0.6689530774573037" postFractionAlong="0.437986021561966"/>
    </projection>
    <projection id="NCXLS_M1_I2R" presynapticPopulation="M1" postsynapticPopulation="I2R" synapse="Acetylcholine">
      <connection id="28" preCellId="../M1/0/M1" postCellId="../I2R/0/I2R" preSegmentId="2" postSegmentId="6" preFractionAlong="0.42684278889562266" postFractionAlong="0.293410910019395"/>
    </projection>
    <electricalProjection id="NCXLS_M1_M2R_GJ" presynapticPopulation="M1" postsynapticPopulation="M2R">
      <electricalConnection id="29" preCell="0" postCell="0" synapse="Generic_GJ" preSegment="8" postSegment="5" preFractionAlong="0.41572789927953036" postFractionAlong="0.5945984539489779"/>
    </electricalProjection>
    <projection id="NCXLS_M1_M3L" presynapticPopulation="M1" postsynapticPopulation="M3L" synapse="Acetylcholine">
      <connection id="30" preCellId="../M1/0/M1" postCellId="../M3L/3/M3L" preSegmentId="6" postSegmentId="3" preFractionAlong="0.15299578667817448" postFractionAlong="0.4694267516589584"/>
    </projection>
    <electricalProjection id="NCXLS_M3L_NSML_GJ" presynapticPopulation="M3L" postsynapticPopulation="NSML">
      <electricalConnection id="32" preCell="0" postCell="0" synapse="Generic_GJ" preSegment="7" postSegment="6" preFractionAlong="0.4146877096494316" postFractionAlong="0.7862939288416982"/>
      <electricalConnection id="33" preCell="0" postCell="1" synapse="Generic_GJ" preSegment="3" postSegment="1" preFractionAlong="0.6965307936042223" postFractionAlong="0.5072136816780898"/>
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    </electricalProjection>
    <projection id="NCXLS_M3L_M1" presynapticPopulation="M3L" postsynapticPopulation="M1" synapse="Acetylcholine">
      <connection id="34" preCellId="../M3L/0/M3L" postCellId="../M1/0/M1" preSegmentId="5" postSegmentId="7" preFractionAlong="0.7961505080230743" postFractionAlong="0.08421345407068703"/>
      <connection id="49" preCellId="../M3L/1/M3L" postCellId="../M1/0/M1" preSegmentId="3" postSegmentId="1" preFractionAlong="0.28468568579944453" postFractionAlong="0.6683633472854422"/>
    </projection>
    <projection id="NCXLS_M3L_I1R" presynapticPopulation="M3L" postsynapticPopulation="I1R" synapse="Acetylcholine">
      <connection id="35" preCellId="../M3L/0/M3L" postCellId="../I1R/0/I1R" preSegmentId="8" postSegmentId="2" preFractionAlong="0.20889103424340494" postFractionAlong="0.06706562854137565"/>
      <connection id="50" preCellId="../M3L/1/M3L" postCellId="../I1R/0/I1R" preSegmentId="5" postSegmentId="3" preFractionAlong="0.04984687411445432" postFractionAlong="0.8318704093509638"/>
      <connection id="62" preCellId="../M3L/2/M3L" postCellId="../I1R/0/I1R" preSegmentId="2" postSegmentId="5" preFractionAlong="0.8071328287116737" postFractionAlong="0.4562996417905558"/>
      <connection id="114" preCellId="../M3L/3/M3L" postCellId="../I1R/0/I1R" preSegmentId="6" postSegmentId="2" preFractionAlong="0.8986727555636379" postFractionAlong="0.24396348141856328"/>
    </projection>
    <projection id="NCXLS_M3L_I2L" presynapticPopulation="M3L" postsynapticPopulation="I2L" synapse="Acetylcholine">
      <connection id="36" preCellId="../M3L/0/M3L" postCellId="../I2L/0/I2L" preSegmentId="7" postSegmentId="2" preFractionAlong="0.4995621559349236" postFractionAlong="0.7069009016757208"/>
      <connection id="52" preCellId="../M3L/1/M3L" postCellId="../I2L/0/I2L" preSegmentId="8" postSegmentId="4" preFractionAlong="0.17801594722152625" postFractionAlong="0.7743001177801508"/>
      <connection id="64" preCellId="../M3L/2/M3L" postCellId="../I2L/0/I2L" preSegmentId="1" postSegmentId="7" preFractionAlong="0.14958970291336182" postFractionAlong="0.3843696757343462"/>
      <connection id="116" preCellId="../M3L/3/M3L" postCellId="../I2L/0/I2L" preSegmentId="6" postSegmentId="1" preFractionAlong="0.6090661692544983" postFractionAlong="0.21847043101946362"/>
    </projection>
    <electricalProjection id="NCXLS_M3L_NSMR_GJ" presynapticPopulation="M3L" postsynapticPopulation="NSMR">
      <electricalConnection id="37" preCell="0" postCell="1" synapse="Generic_GJ" preSegment="2" postSegment="2" preFractionAlong="0.7277914886928968" postFractionAlong="0.40955873291675504"/>
      <electricalConnection id="53" preCell="1" postCell="1" synapse="Generic_GJ" preSegment="7" postSegment="5" preFractionAlong="0.8046957850398325" postFractionAlong="0.1738459978231528"/>
      <electricalConnection id="119" preCell="3" postCell="0" synapse="Generic_GJ" preSegment="3" postSegment="4" preFractionAlong="0.5511646014736526" postFractionAlong="0.9695265606398866"/>
    </electricalProjection>
    <projection id="NCXLS_M3L_I2R" presynapticPopulation="M3L" postsynapticPopulation="I2R" synapse="Acetylcholine">
      <connection id="38" preCellId="../M3L/0/M3L" postCellId="../I2R/0/I2R" preSegmentId="6" postSegmentId="6" preFractionAlong="0.5769452426439603" postFractionAlong="0.4215617561169196"/>
      <connection id="54" preCellId="../M3L/1/M3L" postCellId="../I2R/0/I2R" preSegmentId="6" postSegmentId="2" preFractionAlong="0.6880371335531288" postFractionAlong="0.6519908538658549"/>
      <connection id="70" preCellId="../M3L/2/M3L" postCellId="../I2R/0/I2R" preSegmentId="7" postSegmentId="7" preFractionAlong="0.60814294238315" postFractionAlong="0.6420571467374065"/>
      <connection id="122" preCellId="../M3L/3/M3L" postCellId="../I2R/0/I2R" preSegmentId="1" postSegmentId="7" preFractionAlong="0.11277055848915307" postFractionAlong="0.9467672854968892"/>
    </projection>
    <electricalProjection id="NCXLS_M3L_M2R_GJ" presynapticPopulation="M3L" postsynapticPopulation="M2R">
      <electricalConnection id="39" preCell="0" postCell="0" synapse="Generic_GJ" preSegment="1" postSegment="3" preFractionAlong="0.9472478767062625" postFractionAlong="0.19289374368137735"/>
      <electricalConnection id="55" preCell="1" postCell="0" synapse="Generic_GJ" preSegment="8" postSegment="2" preFractionAlong="0.9248216019311698" postFractionAlong="0.22852514770674437"/>
      <electricalConnection id="123" preCell="3" postCell="0" synapse="Generic_GJ" preSegment="3" postSegment="6" preFractionAlong="0.2829279290829039" postFractionAlong="0.3502151301315095"/>
    </electricalProjection>
    <electricalProjection id="NCXLS_M3L_M3L_GJ" presynapticPopulation="M3L" postsynapticPopulation="M3L">
      <electricalConnection id="41" preCell="0" postCell="3" synapse="Generic_GJ" preSegment="2" postSegment="1" preFractionAlong="0.6263651078809057" postFractionAlong="0.13122495177729032"/>
      <electricalConnection id="57" preCell="1" postCell="3" synapse="Generic_GJ" preSegment="8" postSegment="3" preFractionAlong="0.2333022875582914" postFractionAlong="0.6330212195380185"/>
      <electricalConnection id="73" preCell="2" postCell="3" synapse="Generic_GJ" preSegment="3" postSegment="6" preFractionAlong="0.06003631300235868" postFractionAlong="0.3913513387005799"/>
    </electricalProjection>
    <projection id="NCXLS_NSMR_NSML" presynapticPopulation="NSMR" postsynapticPopulation="NSML" synapse="Serotonin_Glutamate">
      <connection id="42" preCellId="../NSMR/1/NSMR" postCellId="../NSML/0/NSML" preSegmentId="6" postSegmentId="1" preFractionAlong="0.8285514084650413" postFractionAlong="0.6520658196852778"/>
    </projection>
    <projection id="NCXLS_NSMR_M1" presynapticPopulation="NSMR" postsynapticPopulation="M1" synapse="Serotonin_Glutamate">
      <connection id="43" preCellId="../NSMR/1/NSMR" postCellId="../M1/0/M1" preSegmentId="2" postSegmentId="7" preFractionAlong="0.9329560421420784" postFractionAlong="0.8307465547205559"/>
    </projection>
    <electricalProjection id="NCXLS_NSMR_NSML_GJ" presynapticPopulation="NSMR" postsynapticPopulation="NSML">
      <electricalConnection id="44" preCell="1" postCell="2" synapse="Generic_GJ" preSegment="3" postSegment="6" preFractionAlong="0.7018733544543112" postFractionAlong="0.5669299521796846"/>
    </electricalProjection>
    <projection id="NCXLS_NSMR_M3L" presynapticPopulation="NSMR" postsynapticPopulation="M3L" synapse="Serotonin_Glutamate">
      <connection id="45" preCellId="../NSMR/1/NSMR" postCellId="../M3L/3/M3L" preSegmentId="5" postSegmentId="4" preFractionAlong="0.33097606943747127" postFractionAlong="0.46208460462489676"/>
    </projection>
    <projection id="NCXLS_NSMR_I1L" presynapticPopulation="NSMR" postsynapticPopulation="I1L" synapse="Serotonin_Glutamate">
      <connection id="46" preCellId="../NSMR/1/NSMR" postCellId="../I1L/4/I1L" preSegmentId="8" postSegmentId="8" preFractionAlong="0.3573486916645925" postFractionAlong="0.695828515362152"/>
    </projection>
    <projection id="NCXLS_M3L_NSML" presynapticPopulation="M3L" postsynapticPopulation="NSML" synapse="Acetylcholine">
      <connection id="48" preCellId="../M3L/1/M3L" postCellId="../NSML/1/NSML" preSegmentId="7" postSegmentId="4" preFractionAlong="0.1857211855009675" postFractionAlong="0.6953081080935307"/>
      <connection id="56" preCellId="../M3L/1/M3L" postCellId="../NSML/2/NSML" preSegmentId="1" postSegmentId="3" preFractionAlong="0.8839925500724087" postFractionAlong="0.07789376559515704"/>
      <connection id="72" preCellId="../M3L/2/M3L" postCellId="../NSML/2/NSML" preSegmentId="6" postSegmentId="8" preFractionAlong="0.10546563000941944" postFractionAlong="0.7970993070673452"/>
      <connection id="112" preCellId="../M3L/3/M3L" postCellId="../NSML/1/NSML" preSegmentId="6" postSegmentId="1" preFractionAlong="0.6992747953353902" postFractionAlong="0.12856826460296888"/>
    </projection>
    <projection id="NCXLS_M3L_M3L" presynapticPopulation="M3L" postsynapticPopulation="M3L" synapse="Glutamate">
      <connection id="51" preCellId="../M3L/1/M3L" postCellId="../M3L/0/M3L" preSegmentId="2" postSegmentId="6" preFractionAlong="0.06310522485867842" postFractionAlong="0.07478816450286518"/>
      <connection id="63" preCellId="../M3L/2/M3L" postCellId="../M3L/0/M3L" preSegmentId="7" postSegmentId="2" preFractionAlong="0.9887719806951271" postFractionAlong="0.07202666573033634"/>
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    </projection>
    <projection id="NCXLS_M3L_I1L" presynapticPopulation="M3L" postsynapticPopulation="I1L" synapse="Acetylcholine">
      <connection id="58" preCellId="../M3L/1/M3L" postCellId="../I1L/4/I1L" preSegmentId="5" postSegmentId="4" preFractionAlong="0.19023988380879897" postFractionAlong="0.4588023153582921"/>
      <connection id="66" preCellId="../M3L/2/M3L" postCellId="../I1L/0/I1L" preSegmentId="7" postSegmentId="8" preFractionAlong="0.18469462949420534" postFractionAlong="0.9315393301575323"/>
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    </projection>
    <electricalProjection id="NCXLS_M3L_M1_GJ" presynapticPopulation="M3L" postsynapticPopulation="M1">
      <electricalConnection id="61" preCell="2" postCell="0" synapse="Generic_GJ" preSegment="7" postSegment="5" preFractionAlong="0.3668100947554688" postFractionAlong="0.27225435938446607"/>
      <electricalConnection id="113" preCell="3" postCell="0" synapse="Generic_GJ" preSegment="3" postSegment="6" preFractionAlong="0.6080622853051112" postFractionAlong="0.5007794909406015"/>
    </electricalProjection>
    <projection id="NCXLS_M3L_NSMR" presynapticPopulation="M3L" postsynapticPopulation="NSMR" synapse="Acetylcholine">
      <connection id="65" preCellId="../M3L/2/M3L" postCellId="../NSMR/1/NSMR" preSegmentId="7" postSegmentId="7" preFractionAlong="0.870664477618756" postFractionAlong="0.023146251027063802"/>
      <connection id="117" preCellId="../M3L/3/M3L" postCellId="../NSMR/1/NSMR" preSegmentId="7" postSegmentId="3" preFractionAlong="0.765458447246864" postFractionAlong="0.35788853072568927"/>
    </projection>
    <projection id="NCXLS_M3L_M2L" presynapticPopulation="M3L" postsynapticPopulation="M2L" synapse="Glutamate">
      <connection id="69" preCellId="../M3L/2/M3L" postCellId="../M2L/0/M2L" preSegmentId="8" postSegmentId="5" preFractionAlong="0.7085933076220029" postFractionAlong="0.040445728123000735"/>
    </projection>
    <projection id="NCXLS_M3L_M2R" presynapticPopulation="M3L" postsynapticPopulation="M2R" synapse="Glutamate">
      <connection id="71" preCellId="../M3L/2/M3L" postCellId="../M2R/0/M2R" preSegmentId="6" postSegmentId="5" preFractionAlong="0.37188050458859123" postFractionAlong="0.8059448887141532"/>
    </projection>
    <projection id="NCXLS_M2L_NSML" presynapticPopulation="M2L" postsynapticPopulation="NSML" synapse="Acetylcholine">
      <connection id="75" preCellId="../M2L/0/M2L" postCellId="../NSML/0/NSML" preSegmentId="3" postSegmentId="1" preFractionAlong="0.7830085399381601" postFractionAlong="0.670994482028316"/>
      <connection id="85" preCellId="../M2L/0/M2L" postCellId="../NSML/2/NSML" preSegmentId="2" postSegmentId="8" preFractionAlong="0.1181626385339496" postFractionAlong="0.8773061903120576"/>
    </projection>
    <projection id="NCXLS_M2L_M1" presynapticPopulation="M2L" postsynapticPopulation="M1" synapse="Glutamate">
      <connection id="76" preCellId="../M2L/0/M2L" postCellId="../M1/0/M1" preSegmentId="8" postSegmentId="3" preFractionAlong="0.1921428486965544" postFractionAlong="0.2207035205509057"/>
    </projection>
    <projection id="NCXLS_M2L_I1R" presynapticPopulation="M2L" postsynapticPopulation="I1R" synapse="Acetylcholine">
      <connection id="77" preCellId="../M2L/0/M2L" postCellId="../I1R/0/I1R" preSegmentId="4" postSegmentId="2" preFractionAlong="0.24071242978226637" postFractionAlong="0.3454436094605141"/>
    </projection>
    <projection id="NCXLS_M2L_I2L" presynapticPopulation="M2L" postsynapticPopulation="I2L" synapse="Acetylcholine">
      <connection id="78" preCellId="../M2L/0/M2L" postCellId="../I2L/0/I2L" preSegmentId="4" postSegmentId="8" preFractionAlong="0.3663926667148053" postFractionAlong="0.7546217827656064"/>
    </projection>
    <electricalProjection id="NCXLS_M2L_NSMR_GJ" presynapticPopulation="M2L" postsynapticPopulation="NSMR">
      <electricalConnection id="79" preCell="0" postCell="1" synapse="Generic_GJ" preSegment="7" postSegment="6" preFractionAlong="0.7848683119938884" postFractionAlong="0.9762716004370399"/>
    </electricalProjection>
    <projection id="NCXLS_M2L_I1L" presynapticPopulation="M2L" postsynapticPopulation="I1L" synapse="Acetylcholine">
      <connection id="80" preCellId="../M2L/0/M2L" postCellId="../I1L/0/I1L" preSegmentId="4" postSegmentId="8" preFractionAlong="0.8623416119638762" postFractionAlong="0.6218240863057747"/>
      <connection id="82" preCellId="../M2L/0/M2L" postCellId="../I1L/2/I1L" preSegmentId="4" postSegmentId="1" preFractionAlong="0.07003522533116502" postFractionAlong="0.535518364460717"/>
      <connection id="87" preCellId="../M2L/0/M2L" postCellId="../I1L/4/I1L" preSegmentId="2" postSegmentId="2" preFractionAlong="0.9377374698954221" postFractionAlong="0.7791372567975999"/>
    </projection>
    <electricalProjection id="NCXLS_M2L_M3L_GJ" presynapticPopulation="M2L" postsynapticPopulation="M3L">
      <electricalConnection id="81" preCell="0" postCell="1" synapse="Generic_GJ" preSegment="6" postSegment="7" preFractionAlong="0.6515859022678052" postFractionAlong="0.42394950727415015"/>
    </electricalProjection>
    <projection id="NCXLS_M2L_I2R" presynapticPopulation="M2L" postsynapticPopulation="I2R" synapse="Acetylcholine">
      <connection id="83" preCellId="../M2L/0/M2L" postCellId="../I2R/0/I2R" preSegmentId="4" postSegmentId="4" preFractionAlong="0.7380418050142062" postFractionAlong="0.3273455413990166"/>
    </projection>
    <projection id="NCXLS_M2L_M2R" presynapticPopulation="M2L" postsynapticPopulation="M2R" synapse="Acetylcholine">
      <connection id="84" preCellId="../M2L/0/M2L" postCellId="../M2R/0/M2R" preSegmentId="7" postSegmentId="2" preFractionAlong="0.7689840001764066" postFractionAlong="0.2816357933534568"/>
    </projection>
    <projection id="NCXLS_M2L_M3L" presynapticPopulation="M2L" postsynapticPopulation="M3L" synapse="Glutamate">
      <connection id="86" preCellId="../M2L/0/M2L" postCellId="../M3L/3/M3L" preSegmentId="5" postSegmentId="4" preFractionAlong="0.29520900087836244" postFractionAlong="0.2851954262844204"/>
    </projection>
    <electricalProjection id="NCXLS_M2R_NSML_GJ" presynapticPopulation="M2R" postsynapticPopulation="NSML">
      <electricalConnection id="88" preCell="0" postCell="0" synapse="Generic_GJ" preSegment="8" postSegment="5" preFractionAlong="0.24267135033180454" postFractionAlong="0.5257479140952607"/>
    </electricalProjection>
    <electricalProjection id="NCXLS_M2R_M1_GJ" presynapticPopulation="M2R" postsynapticPopulation="M1">
      <electricalConnection id="89" preCell="0" postCell="0" synapse="Generic_GJ" preSegment="3" postSegment="7" preFractionAlong="0.8080114200967736" postFractionAlong="0.3869610795177373"/>
    </electricalProjection>
    <projection id="NCXLS_M2R_I1R" presynapticPopulation="M2R" postsynapticPopulation="I1R" synapse="Acetylcholine">
      <connection id="90" preCellId="../M2R/0/M2R" postCellId="../I1R/0/I1R" preSegmentId="1" postSegmentId="4" preFractionAlong="0.3816092179827253" postFractionAlong="0.8241494051998913"/>
    </projection>
    <projection id="NCXLS_M2R_I2L" presynapticPopulation="M2R" postsynapticPopulation="I2L" synapse="Acetylcholine">
      <connection id="91" preCellId="../M2R/0/M2R" postCellId="../I2L/0/I2L" preSegmentId="4" postSegmentId="1" preFractionAlong="0.44013270461766985" postFractionAlong="0.6154884193426575"/>
    </projection>
    <projection id="NCXLS_M2R_I1L" presynapticPopulation="M2R" postsynapticPopulation="I1L" synapse="Acetylcholine">
      <connection id="92" preCellId="../M2R/0/M2R" postCellId="../I1L/0/I1L" preSegmentId="5" postSegmentId="6" preFractionAlong="0.9482070618154644" postFractionAlong="0.5736057861238032"/>
      <connection id="93" preCellId="../M2R/0/M2R" postCellId="../I1L/1/I1L" preSegmentId="7" postSegmentId="6" preFractionAlong="0.8393939711199121" postFractionAlong="0.8657627298968276"/>
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    </projection>
    <projection id="NCXLS_M2R_NSMR" presynapticPopulation="M2R" postsynapticPopulation="NSMR" synapse="Acetylcholine">
      <connection id="94" preCellId="../M2R/0/M2R" postCellId="../NSMR/0/NSMR" preSegmentId="1" postSegmentId="3" preFractionAlong="0.9272623257936373" postFractionAlong="0.06473776607648063"/>
    </projection>
    <electricalProjection id="NCXLS_M2R_M3L_GJ" presynapticPopulation="M2R" postsynapticPopulation="M3L">
      <electricalConnection id="95" preCell="0" postCell="1" synapse="Generic_GJ" preSegment="2" postSegment="3" preFractionAlong="0.5967882300144401" postFractionAlong="0.3540658617935837"/>
      <electricalConnection id="96" preCell="0" postCell="2" synapse="Generic_GJ" preSegment="2" postSegment="5" preFractionAlong="0.32807921789716654" postFractionAlong="0.4047253114449356"/>
      <electricalConnection id="100" preCell="0" postCell="3" synapse="Generic_GJ" preSegment="6" postSegment="5" preFractionAlong="0.904918420344267" postFractionAlong="0.639896436083252"/>
    </electricalProjection>
    <projection id="NCXLS_M2R_M2L" presynapticPopulation="M2R" postsynapticPopulation="M2L" synapse="Acetylcholine">
      <connection id="98" preCellId="../M2R/0/M2R" postCellId="../M2L/0/M2L" preSegmentId="2" postSegmentId="4" preFractionAlong="0.27366625410182666" postFractionAlong="0.2643451177266962"/>
    </projection>
    <projection id="NCXLS_NSML_I1R" presynapticPopulation="NSML" postsynapticPopulation="I1R" synapse="Serotonin_Glutamate">
      <connection id="103" preCellId="../NSML/2/NSML" postCellId="../I1R/0/I1R" preSegmentId="5" postSegmentId="4" preFractionAlong="0.7710074386098854" postFractionAlong="0.8139161065660845"/>
    </projection>
    <projection id="NCXLS_NSML_M3L" presynapticPopulation="NSML" postsynapticPopulation="M3L" synapse="Serotonin_Glutamate">
      <connection id="104" preCellId="../NSML/2/NSML" postCellId="../M3L/0/M3L" preSegmentId="8" postSegmentId="2" preFractionAlong="0.9115490483051731" postFractionAlong="0.32595154395443526"/>
    </projection>
    <projection id="NCXLS_NSML_I2L" presynapticPopulation="NSML" postsynapticPopulation="I2L" synapse="Serotonin_Glutamate">
      <connection id="105" preCellId="../NSML/2/NSML" postCellId="../I2L/0/I2L" preSegmentId="5" postSegmentId="6" preFractionAlong="0.7087323325648648" postFractionAlong="0.5393544160068964"/>
    </projection>
    <electricalProjection id="NCXLS_NSML_NSMR_GJ" presynapticPopulation="NSML" postsynapticPopulation="NSMR">
      <electricalConnection id="106" preCell="2" postCell="1" synapse="Generic_GJ" preSegment="4" postSegment="6" preFractionAlong="0.08115924912471495" postFractionAlong="0.8436924034380668"/>
    </electricalProjection>
    <electricalProjection id="NCXLS_NSML_M2R_GJ" presynapticPopulation="NSML" postsynapticPopulation="M2R">
      <electricalConnection id="110" preCell="2" postCell="0" synapse="Generic_GJ" preSegment="2" postSegment="2" preFractionAlong="0.25246929752127956" postFractionAlong="0.2789353086376877"/>
    </electricalProjection>
    <electricalProjection id="NCXLS_I1L_I1L_GJ" presynapticPopulation="I1L" postsynapticPopulation="I1L">
      <electricalConnection id="125" preCell="4" postCell="0" synapse="Generic_GJ" preSegment="2" postSegment="1" preFractionAlong="0.4603808754259775" postFractionAlong="0.8264993623010078"/>
    </electricalProjection>
  </network>
</neuroml>
