<?xml version='1.0' encoding='UTF-8'?>
<neuroml xmlns="http://www.neuroml.org/schema/neuroml2" xmlns:xsi="http://www.w3.org/2001/XMLSchema-instance" xsi:schemaLocation="http://www.neuroml.org/schema/neuroml2 https://raw.githubusercontent.com/NeuroML/NeuroML2/development/Schemas/NeuroML2/NeuroML_v2beta4.xsd" id="gvft_network_bio_prior_lamW_0.278_DF_0.044_t40.net">
  <notes>NeuroML2 network generated from GVFT simulation on 2025-05-04 10:21:49
</notes>
  <include href="I1L.cell.nml"/>
  <include href="I1R.cell.nml"/>
  <include href="I2L.cell.nml"/>
  <include href="I2R.cell.nml"/>
  <include href="M1.cell.nml"/>
  <include href="M2L.cell.nml"/>
  <include href="M2R.cell.nml"/>
  <include href="M3L.cell.nml"/>
  <include href="M3R.cell.nml"/>
  <include href="M4.cell.nml"/>
  <include href="NSML.cell.nml"/>
  <include href="NSMR.cell.nml"/>
  <include href="Acetylcholine.synapse.nml"/>
  <include href="Generic_GJ.nml"/>
  <include href="Glutamate.synapse.nml"/>
  <include href="Serotonin_Glutamate.synapse.nml"/>
  <network id="gvft_network_bio_prior_lamW_0.278_DF_0.044_t40.net" type="networkWithTemperature" temperature="20.0 degC">
    <population id="I1L" component="I1L" type="populationList" size="4">
      <instance id="0">
        <location x="0.6482412219047546" y="0.6180904507637024" z="0.0"/>
      </instance>
      <instance id="1">
        <location x="-0.11557789891958237" y="0.9396985173225403" z="0.0"/>
      </instance>
      <instance id="2">
        <location x="0.7889447212219238" y="0.1557788997888565" z="0.0"/>
      </instance>
      <instance id="3">
        <location x="-0.5276381969451904" y="0.8190954923629761" z="0.0"/>
      </instance>
    </population>
    <population id="I1R" component="I1R" type="populationList" size="1">
      <instance id="0">
        <location x="-0.9899497628211975" y="-0.6482412219047546" z="0.0"/>
      </instance>
    </population>
    <population id="I2L" component="I2L" type="populationList" size="1">
      <instance id="0">
        <location x="-0.5477386713027954" y="-0.9195979833602905" z="0.0"/>
      </instance>
    </population>
    <population id="I2R" component="I2R" type="populationList" size="2">
      <instance id="0">
        <location x="0.8492462038993835" y="0.015075387433171272" z="0.0"/>
      </instance>
      <instance id="1">
        <location x="0.9698492288589478" y="0.39698493480682373" z="0.0"/>
      </instance>
    </population>
    <population id="M1" component="M1" type="populationList" size="1">
      <instance id="0">
        <location x="-0.13567839562892914" y="-0.5175879597663879" z="0.0"/>
      </instance>
    </population>
    <population id="M2L" component="M2L" type="populationList" size="1">
      <instance id="0">
        <location x="-0.2964824140071869" y="0.8090452551841736" z="0.0"/>
      </instance>
    </population>
    <population id="M2R" component="M2R" type="populationList" size="1">
      <instance id="0">
        <location x="-0.356783926486969" y="0.7788944840431213" z="0.0"/>
      </instance>
    </population>
    <population id="M3L" component="M3L" type="populationList" size="1">
      <instance id="0">
        <location x="-0.9497487545013428" y="0.6783919334411621" z="0.0"/>
      </instance>
    </population>
    <population id="M3R" component="M3R" type="populationList" size="2">
      <instance id="0">
        <location x="-0.25628140568733215" y="-0.5778894424438477" z="0.0"/>
      </instance>
      <instance id="1">
        <location x="0.5376884341239929" y="0.17587940394878387" z="0.0"/>
      </instance>
    </population>
    <population id="M4" component="M4" type="populationList" size="1">
      <instance id="0">
        <location x="-0.30653268098831177" y="-0.03517588973045349" z="0.0"/>
      </instance>
    </population>
    <population id="NSML" component="NSML" type="populationList" size="3">
      <instance id="0">
        <location x="-0.8492462038993835" y="-0.025125637650489807" z="0.0"/>
      </instance>
      <instance id="1">
        <location x="-0.43718594312667847" y="-0.8592965006828308" z="0.0"/>
      </instance>
      <instance id="2">
        <location x="0.37688443064689636" y="-0.5075377225875854" z="0.0"/>
      </instance>
    </population>
    <population id="NSMR" component="NSMR" type="populationList" size="2">
      <instance id="0">
        <location x="0.5376884341239929" y="0.7286432385444641" z="0.0"/>
      </instance>
      <instance id="1">
        <location x="-0.23618091642856598" y="-0.7286432385444641" z="0.0"/>
      </instance>
    </population>
    <projection id="NCXLS_NSML_M3L" presynapticPopulation="NSML" postsynapticPopulation="M3L" synapse="Serotonin_Glutamate">
      <connection id="0" preCellId="../NSML/0/NSML" postCellId="../M3L/0/M3L" preSegmentId="7" postSegmentId="1" preFractionAlong="0.302" postFractionAlong="0.675"/>
    </projection>
    <projection id="NCXLS_M1_I1L" presynapticPopulation="M1" postsynapticPopulation="I1L" synapse="Acetylcholine">
      <connection id="1" preCellId="../M1/0/M1" postCellId="../I1L/0/I1L" preSegmentId="1" postSegmentId="2" preFractionAlong="0.864" postFractionAlong="0.217"/>
      <connection id="6" preCellId="../M1/0/M1" postCellId="../I1L/1/I1L" preSegmentId="1" postSegmentId="6" preFractionAlong="0.864" postFractionAlong="0.752"/>
      <connection id="9" preCellId="../M1/0/M1" postCellId="../I1L/2/I1L" preSegmentId="1" postSegmentId="8" preFractionAlong="0.864" postFractionAlong="0.948"/>
      <connection id="10" preCellId="../M1/0/M1" postCellId="../I1L/3/I1L" preSegmentId="1" postSegmentId="5" preFractionAlong="0.864" postFractionAlong="0.91"/>
    </projection>
    <projection id="NCXLS_M1_NSML" presynapticPopulation="M1" postsynapticPopulation="NSML" synapse="Acetylcholine">
      <connection id="2" preCellId="../M1/0/M1" postCellId="../NSML/0/NSML" preSegmentId="1" postSegmentId="10" preFractionAlong="0.864" postFractionAlong="0.544"/>
    </projection>
    <projection id="NCXLS_M1_M2L" presynapticPopulation="M1" postsynapticPopulation="M2L" synapse="Glutamate">
      <connection id="3" preCellId="../M1/0/M1" postCellId="../M2L/0/M2L" preSegmentId="1" postSegmentId="5" preFractionAlong="0.864" postFractionAlong="0.962"/>
    </projection>
    <projection id="NCXLS_M1_I2R" presynapticPopulation="M1" postsynapticPopulation="I2R" synapse="Acetylcholine">
      <connection id="4" preCellId="../M1/0/M1" postCellId="../I2R/0/I2R" preSegmentId="1" postSegmentId="9" preFractionAlong="0.864" postFractionAlong="0.207"/>
      <connection id="8" preCellId="../M1/0/M1" postCellId="../I2R/1/I2R" preSegmentId="1" postSegmentId="5" preFractionAlong="0.864" postFractionAlong="0.781"/>
    </projection>
    <projection id="NCXLS_M1_M2R" presynapticPopulation="M1" postsynapticPopulation="M2R" synapse="Acetylcholine">
      <connection id="5" preCellId="../M1/0/M1" postCellId="../M2R/0/M2R" preSegmentId="1" postSegmentId="1" preFractionAlong="0.864" postFractionAlong="0.469"/>
    </projection>
    <projection id="NCXLS_M1_NSMR" presynapticPopulation="M1" postsynapticPopulation="NSMR" synapse="Acetylcholine">
      <connection id="7" preCellId="../M1/0/M1" postCellId="../NSMR/0/NSMR" preSegmentId="1" postSegmentId="1" preFractionAlong="0.864" postFractionAlong="0.995"/>
    </projection>
    <projection id="NCXLS_M1_M3L" presynapticPopulation="M1" postsynapticPopulation="M3L" synapse="Acetylcholine">
      <connection id="11" preCellId="../M1/0/M1" postCellId="../M3L/0/M3L" preSegmentId="1" postSegmentId="1" preFractionAlong="0.864" postFractionAlong="0.675"/>
    </projection>
    <projection id="NCXLS_M1_M3R" presynapticPopulation="M1" postsynapticPopulation="M3R" synapse="Glutamate">
      <connection id="12" preCellId="../M1/0/M1" postCellId="../M3R/1/M3R" preSegmentId="1" postSegmentId="5" preFractionAlong="0.864" postFractionAlong="0.202"/>
    </projection>
    <projection id="NCXLS_M1_M4" presynapticPopulation="M1" postsynapticPopulation="M4" synapse="Acetylcholine">
      <connection id="13" preCellId="../M1/0/M1" postCellId="../M4/0/M4" preSegmentId="1" postSegmentId="2" preFractionAlong="0.864" postFractionAlong="0.687"/>
    </projection>
    <projection id="NCXLS_M3R_NSML" presynapticPopulation="M3R" postsynapticPopulation="NSML" synapse="Acetylcholine">
      <connection id="14" preCellId="../M3R/0/M3R" postCellId="../NSML/1/NSML" preSegmentId="10" postSegmentId="5" preFractionAlong="0.782" postFractionAlong="0.554"/>
      <connection id="52" preCellId="../M3R/1/M3R" postCellId="../NSML/0/NSML" preSegmentId="4" postSegmentId="10" preFractionAlong="0.955" postFractionAlong="0.544"/>
      <connection id="56" preCellId="../M3R/1/M3R" postCellId="../NSML/1/NSML" preSegmentId="4" postSegmentId="5" preFractionAlong="0.955" postFractionAlong="0.554"/>
      <connection id="62" preCellId="../M3R/1/M3R" postCellId="../NSML/2/NSML" preSegmentId="4" postSegmentId="10" preFractionAlong="0.955" postFractionAlong="0.724"/>
    </projection>
    <projection id="NCXLS_M3R_I1R" presynapticPopulation="M3R" postsynapticPopulation="I1R" synapse="Acetylcholine">
      <connection id="15" preCellId="../M3R/0/M3R" postCellId="../I1R/0/I1R" preSegmentId="10" postSegmentId="6" preFractionAlong="0.782" postFractionAlong="0.459"/>
      <connection id="57" preCellId="../M3R/1/M3R" postCellId="../I1R/0/I1R" preSegmentId="4" postSegmentId="6" preFractionAlong="0.955" postFractionAlong="0.459"/>
    </projection>
    <projection id="NCXLS_M3R_I2L" presynapticPopulation="M3R" postsynapticPopulation="I2L" synapse="Acetylcholine">
      <connection id="16" preCellId="../M3R/0/M3R" postCellId="../I2L/0/I2L" preSegmentId="10" postSegmentId="8" preFractionAlong="0.782" postFractionAlong="0.031"/>
      <connection id="58" preCellId="../M3R/1/M3R" postCellId="../I2L/0/I2L" preSegmentId="4" postSegmentId="8" preFractionAlong="0.955" postFractionAlong="0.031"/>
    </projection>
    <projection id="NCXLS_M3R_NSMR" presynapticPopulation="M3R" postsynapticPopulation="NSMR" synapse="Acetylcholine">
      <connection id="17" preCellId="../M3R/0/M3R" postCellId="../NSMR/1/NSMR" preSegmentId="10" postSegmentId="4" preFractionAlong="0.782" postFractionAlong="0.183"/>
      <connection id="64" preCellId="../M3R/1/M3R" postCellId="../NSMR/1/NSMR" preSegmentId="4" postSegmentId="4" preFractionAlong="0.955" postFractionAlong="0.183"/>
    </projection>
    <projection id="NCXLS_M2L_I1L" presynapticPopulation="M2L" postsynapticPopulation="I1L" synapse="Acetylcholine">
      <connection id="18" preCellId="../M2L/0/M2L" postCellId="../I1L/1/I1L" preSegmentId="8" postSegmentId="6" preFractionAlong="0.001" postFractionAlong="0.752"/>
      <connection id="19" preCellId="../M2L/0/M2L" postCellId="../I1L/3/I1L" preSegmentId="8" postSegmentId="5" preFractionAlong="0.001" postFractionAlong="0.91"/>
    </projection>
    <projection id="NCXLS_I2R_I2R" presynapticPopulation="I2R" postsynapticPopulation="I2R" synapse="Acetylcholine">
      <connection id="20" preCellId="../I2R/0/I2R" postCellId="../I2R/1/I2R" preSegmentId="7" postSegmentId="5" preFractionAlong="0.037" postFractionAlong="0.781"/>
    </projection>
    <projection id="NCXLS_NSML_I1R" presynapticPopulation="NSML" postsynapticPopulation="I1R" synapse="Serotonin_Glutamate">
      <connection id="21" preCellId="../NSML/1/NSML" postCellId="../I1R/0/I1R" preSegmentId="5" postSegmentId="6" preFractionAlong="0.574" postFractionAlong="0.459"/>
    </projection>
    <projection id="NCXLS_NSML_I2L" presynapticPopulation="NSML" postsynapticPopulation="I2L" synapse="Serotonin_Glutamate">
      <connection id="22" preCellId="../NSML/1/NSML" postCellId="../I2L/0/I2L" preSegmentId="5" postSegmentId="8" preFractionAlong="0.574" postFractionAlong="0.031"/>
    </projection>
    <projection id="NCXLS_M2R_I1L" presynapticPopulation="M2R" postsynapticPopulation="I1L" synapse="Acetylcholine">
      <connection id="23" preCellId="../M2R/0/M2R" postCellId="../I1L/0/I1L" preSegmentId="6" postSegmentId="2" preFractionAlong="0.854" postFractionAlong="0.217"/>
      <connection id="27" preCellId="../M2R/0/M2R" postCellId="../I1L/1/I1L" preSegmentId="6" postSegmentId="6" preFractionAlong="0.854" postFractionAlong="0.752"/>
      <connection id="30" preCellId="../M2R/0/M2R" postCellId="../I1L/2/I1L" preSegmentId="6" postSegmentId="8" preFractionAlong="0.854" postFractionAlong="0.948"/>
    </projection>
    <projection id="NCXLS_M2R_M1" presynapticPopulation="M2R" postsynapticPopulation="M1" synapse="Acetylcholine">
      <connection id="24" preCellId="../M2R/0/M2R" postCellId="../M1/0/M1" preSegmentId="6" postSegmentId="8" preFractionAlong="0.854" postFractionAlong="0.291"/>
    </projection>
    <projection id="NCXLS_M2R_M2L" presynapticPopulation="M2R" postsynapticPopulation="M2L" synapse="Acetylcholine">
      <connection id="25" preCellId="../M2R/0/M2R" postCellId="../M2L/0/M2L" preSegmentId="6" postSegmentId="5" preFractionAlong="0.854" postFractionAlong="0.962"/>
    </projection>
    <projection id="NCXLS_M2R_I2R" presynapticPopulation="M2R" postsynapticPopulation="I2R" synapse="Acetylcholine">
      <connection id="26" preCellId="../M2R/0/M2R" postCellId="../I2R/0/I2R" preSegmentId="6" postSegmentId="9" preFractionAlong="0.854" postFractionAlong="0.207"/>
      <connection id="29" preCellId="../M2R/0/M2R" postCellId="../I2R/1/I2R" preSegmentId="6" postSegmentId="5" preFractionAlong="0.854" postFractionAlong="0.781"/>
    </projection>
    <projection id="NCXLS_M2R_NSMR" presynapticPopulation="M2R" postsynapticPopulation="NSMR" synapse="Acetylcholine">
      <connection id="28" preCellId="../M2R/0/M2R" postCellId="../NSMR/0/NSMR" preSegmentId="6" postSegmentId="1" preFractionAlong="0.854" postFractionAlong="0.995"/>
    </projection>
    <projection id="NCXLS_M2R_NSML" presynapticPopulation="M2R" postsynapticPopulation="NSML" synapse="Acetylcholine">
      <connection id="31" preCellId="../M2R/0/M2R" postCellId="../NSML/2/NSML" preSegmentId="6" postSegmentId="10" preFractionAlong="0.854" postFractionAlong="0.724"/>
    </projection>
    <electricalProjection id="NCXLS_M2R_M3R_GJ" presynapticPopulation="M2R" postsynapticPopulation="M3R">
      <electricalConnection id="32" preCell="0" postCell="1" synapse="Generic_GJ" preSegment="6" postSegment="5" preFractionAlong="0.854" postFractionAlong="0.202"/>
    </electricalProjection>
    <projection id="NCXLS_M3L_I1L" presynapticPopulation="M3L" postsynapticPopulation="I1L" synapse="Acetylcholine">
      <connection id="33" preCellId="../M3L/0/M3L" postCellId="../I1L/0/I1L" preSegmentId="4" postSegmentId="2" preFractionAlong="0.699" postFractionAlong="0.217"/>
      <connection id="43" preCellId="../M3L/0/M3L" postCellId="../I1L/1/I1L" preSegmentId="4" postSegmentId="6" preFractionAlong="0.699" postFractionAlong="0.752"/>
      <connection id="46" preCellId="../M3L/0/M3L" postCellId="../I1L/2/I1L" preSegmentId="4" postSegmentId="8" preFractionAlong="0.699" postFractionAlong="0.948"/>
      <connection id="47" preCellId="../M3L/0/M3L" postCellId="../I1L/3/I1L" preSegmentId="4" postSegmentId="5" preFractionAlong="0.699" postFractionAlong="0.91"/>
    </projection>
    <projection id="NCXLS_M3L_NSML" presynapticPopulation="M3L" postsynapticPopulation="NSML" synapse="Acetylcholine">
      <connection id="34" preCellId="../M3L/0/M3L" postCellId="../NSML/0/NSML" preSegmentId="4" postSegmentId="10" preFractionAlong="0.699" postFractionAlong="0.544"/>
      <connection id="39" preCellId="../M3L/0/M3L" postCellId="../NSML/1/NSML" preSegmentId="4" postSegmentId="5" preFractionAlong="0.699" postFractionAlong="0.554"/>
      <connection id="48" preCellId="../M3L/0/M3L" postCellId="../NSML/2/NSML" preSegmentId="4" postSegmentId="10" preFractionAlong="0.699" postFractionAlong="0.724"/>
    </projection>
    <projection id="NCXLS_M3L_M1" presynapticPopulation="M3L" postsynapticPopulation="M1" synapse="Glutamate">
      <connection id="35" preCellId="../M3L/0/M3L" postCellId="../M1/0/M1" preSegmentId="4" postSegmentId="8" preFractionAlong="0.699" postFractionAlong="0.291"/>
    </projection>
    <electricalProjection id="NCXLS_M3L_M3R_GJ" presynapticPopulation="M3L" postsynapticPopulation="M3R">
      <electricalConnection id="36" preCell="0" postCell="0" synapse="Generic_GJ" preSegment="4" postSegment="9" preFractionAlong="0.699" postFractionAlong="0.48"/>
    </electricalProjection>
    <electricalProjection id="NCXLS_M3L_M2L_GJ" presynapticPopulation="M3L" postsynapticPopulation="M2L">
      <electricalConnection id="37" preCell="0" postCell="0" synapse="Generic_GJ" preSegment="4" postSegment="5" preFractionAlong="0.699" postFractionAlong="0.962"/>
    </electricalProjection>
    <projection id="NCXLS_M3L_I2R" presynapticPopulation="M3L" postsynapticPopulation="I2R" synapse="Acetylcholine">
      <connection id="38" preCellId="../M3L/0/M3L" postCellId="../I2R/0/I2R" preSegmentId="4" postSegmentId="9" preFractionAlong="0.699" postFractionAlong="0.207"/>
      <connection id="45" preCellId="../M3L/0/M3L" postCellId="../I2R/1/I2R" preSegmentId="4" postSegmentId="5" preFractionAlong="0.699" postFractionAlong="0.781"/>
    </projection>
    <projection id="NCXLS_M3L_I1R" presynapticPopulation="M3L" postsynapticPopulation="I1R" synapse="Acetylcholine">
      <connection id="40" preCellId="../M3L/0/M3L" postCellId="../I1R/0/I1R" preSegmentId="4" postSegmentId="6" preFractionAlong="0.699" postFractionAlong="0.459"/>
    </projection>
    <projection id="NCXLS_M3L_I2L" presynapticPopulation="M3L" postsynapticPopulation="I2L" synapse="Acetylcholine">
      <connection id="41" preCellId="../M3L/0/M3L" postCellId="../I2L/0/I2L" preSegmentId="4" postSegmentId="8" preFractionAlong="0.699" postFractionAlong="0.031"/>
    </projection>
    <projection id="NCXLS_M3L_M2R" presynapticPopulation="M3L" postsynapticPopulation="M2R" synapse="Glutamate">
      <connection id="42" preCellId="../M3L/0/M3L" postCellId="../M2R/0/M2R" preSegmentId="4" postSegmentId="1" preFractionAlong="0.699" postFractionAlong="0.469"/>
    </projection>
    <projection id="NCXLS_M3L_NSMR" presynapticPopulation="M3L" postsynapticPopulation="NSMR" synapse="Acetylcholine">
      <connection id="44" preCellId="../M3L/0/M3L" postCellId="../NSMR/0/NSMR" preSegmentId="4" postSegmentId="1" preFractionAlong="0.699" postFractionAlong="0.995"/>
      <connection id="49" preCellId="../M3L/0/M3L" postCellId="../NSMR/1/NSMR" preSegmentId="4" postSegmentId="4" preFractionAlong="0.699" postFractionAlong="0.183"/>
    </projection>
    <projection id="NCXLS_M3L_M3R" presynapticPopulation="M3L" postsynapticPopulation="M3R" synapse="Acetylcholine">
      <connection id="50" preCellId="../M3L/0/M3L" postCellId="../M3R/1/M3R" preSegmentId="4" postSegmentId="5" preFractionAlong="0.699" postFractionAlong="0.202"/>
    </projection>
    <electricalProjection id="NCXLS_M3L_M4_GJ" presynapticPopulation="M3L" postsynapticPopulation="M4">
      <electricalConnection id="51" preCell="0" postCell="0" synapse="Generic_GJ" preSegment="4" postSegment="2" preFractionAlong="0.699" postFractionAlong="0.687"/>
    </electricalProjection>
    <projection id="NCXLS_M3R_M1" presynapticPopulation="M3R" postsynapticPopulation="M1" synapse="Acetylcholine">
      <connection id="53" preCellId="../M3R/1/M3R" postCellId="../M1/0/M1" preSegmentId="4" postSegmentId="8" preFractionAlong="0.955" postFractionAlong="0.291"/>
    </projection>
    <projection id="NCXLS_M3R_M3R" presynapticPopulation="M3R" postsynapticPopulation="M3R" synapse="Glutamate">
      <connection id="54" preCellId="../M3R/1/M3R" postCellId="../M3R/0/M3R" preSegmentId="4" postSegmentId="9" preFractionAlong="0.955" postFractionAlong="0.48"/>
    </projection>
    <projection id="NCXLS_M3R_M2L" presynapticPopulation="M3R" postsynapticPopulation="M2L" synapse="Acetylcholine">
      <connection id="55" preCellId="../M3R/1/M3R" postCellId="../M2L/0/M2L" preSegmentId="4" postSegmentId="5" preFractionAlong="0.955" postFractionAlong="0.962"/>
    </projection>
    <projection id="NCXLS_M3R_M2R" presynapticPopulation="M3R" postsynapticPopulation="M2R" synapse="Acetylcholine">
      <connection id="59" preCellId="../M3R/1/M3R" postCellId="../M2R/0/M2R" preSegmentId="4" postSegmentId="1" preFractionAlong="0.955" postFractionAlong="0.469"/>
    </projection>
    <projection id="NCXLS_M3R_I1L" presynapticPopulation="M3R" postsynapticPopulation="I1L" synapse="Acetylcholine">
      <connection id="60" preCellId="../M3R/1/M3R" postCellId="../I1L/1/I1L" preSegmentId="4" postSegmentId="6" preFractionAlong="0.955" postFractionAlong="0.752"/>
      <connection id="61" preCellId="../M3R/1/M3R" postCellId="../I1L/3/I1L" preSegmentId="4" postSegmentId="5" preFractionAlong="0.955" postFractionAlong="0.91"/>
    </projection>
    <projection id="NCXLS_M3R_M3L" presynapticPopulation="M3R" postsynapticPopulation="M3L" synapse="Glutamate">
      <connection id="63" preCellId="../M3R/1/M3R" postCellId="../M3L/0/M3L" preSegmentId="4" postSegmentId="1" preFractionAlong="0.955" postFractionAlong="0.675"/>
    </projection>
    <projection id="NCXLS_M3R_M4" presynapticPopulation="M3R" postsynapticPopulation="M4" synapse="Glutamate">
      <connection id="65" preCellId="../M3R/1/M3R" postCellId="../M4/0/M4" preSegmentId="4" postSegmentId="2" preFractionAlong="0.955" postFractionAlong="0.687"/>
    </projection>
    <projection id="NCXLS_M4_I1L" presynapticPopulation="M4" postsynapticPopulation="I1L" synapse="Acetylcholine">
      <connection id="66" preCellId="../M4/0/M4" postCellId="../I1L/0/I1L" preSegmentId="8" postSegmentId="2" preFractionAlong="0.777" postFractionAlong="0.217"/>
      <connection id="73" preCellId="../M4/0/M4" postCellId="../I1L/2/I1L" preSegmentId="8" postSegmentId="8" preFractionAlong="0.777" postFractionAlong="0.948"/>
    </projection>
    <projection id="NCXLS_M4_M1" presynapticPopulation="M4" postsynapticPopulation="M1" synapse="Acetylcholine">
      <connection id="67" preCellId="../M4/0/M4" postCellId="../M1/0/M1" preSegmentId="8" postSegmentId="8" preFractionAlong="0.777" postFractionAlong="0.291"/>
    </projection>
    <electricalProjection id="NCXLS_M4_M3R_GJ" presynapticPopulation="M4" postsynapticPopulation="M3R">
      <electricalConnection id="68" preCell="0" postCell="0" synapse="Generic_GJ" preSegment="8" postSegment="9" preFractionAlong="0.777" postFractionAlong="0.48"/>
      <electricalConnection id="76" preCell="0" postCell="1" synapse="Generic_GJ" preSegment="8" postSegment="5" preFractionAlong="0.777" postFractionAlong="0.202"/>
    </electricalProjection>
    <projection id="NCXLS_M4_I2R" presynapticPopulation="M4" postsynapticPopulation="I2R" synapse="Acetylcholine">
      <connection id="69" preCellId="../M4/0/M4" postCellId="../I2R/0/I2R" preSegmentId="8" postSegmentId="9" preFractionAlong="0.777" postFractionAlong="0.207"/>
      <connection id="72" preCellId="../M4/0/M4" postCellId="../I2R/1/I2R" preSegmentId="8" postSegmentId="5" preFractionAlong="0.777" postFractionAlong="0.781"/>
    </projection>
    <projection id="NCXLS_M4_NSML" presynapticPopulation="M4" postsynapticPopulation="NSML" synapse="Acetylcholine">
      <connection id="70" preCellId="../M4/0/M4" postCellId="../NSML/1/NSML" preSegmentId="8" postSegmentId="5" preFractionAlong="0.777" postFractionAlong="0.554"/>
      <connection id="74" preCellId="../M4/0/M4" postCellId="../NSML/2/NSML" preSegmentId="8" postSegmentId="10" preFractionAlong="0.777" postFractionAlong="0.724"/>
    </projection>
    <projection id="NCXLS_M4_I2L" presynapticPopulation="M4" postsynapticPopulation="I2L" synapse="Acetylcholine">
      <connection id="71" preCellId="../M4/0/M4" postCellId="../I2L/0/I2L" preSegmentId="8" postSegmentId="8" preFractionAlong="0.777" postFractionAlong="0.031"/>
    </projection>
    <projection id="NCXLS_M4_NSMR" presynapticPopulation="M4" postsynapticPopulation="NSMR" synapse="Acetylcholine">
      <connection id="75" preCellId="../M4/0/M4" postCellId="../NSMR/1/NSMR" preSegmentId="8" postSegmentId="4" preFractionAlong="0.777" postFractionAlong="0.183"/>
    </projection>
  </network>
</neuroml>
