<?xml version='1.0' encoding='UTF-8'?>
<neuroml xmlns="http://www.neuroml.org/schema/neuroml2" xmlns:xsi="http://www.w3.org/2001/XMLSchema-instance" xsi:schemaLocation="http://www.neuroml.org/schema/neuroml2 https://raw.githubusercontent.com/NeuroML/NeuroML2/development/Schemas/NeuroML2/NeuroML_v2beta4.xsd" id="gvft_network_bio_prior_lamW_0.278_DF_0.044_t60.net">
  <notes>NeuroML2 network generated from GVFT simulation on 2025-05-04 10:21:53
</notes>
  <include href="I1L.cell.nml"/>
  <include href="I1R.cell.nml"/>
  <include href="I2L.cell.nml"/>
  <include href="I2R.cell.nml"/>
  <include href="I3.cell.nml"/>
  <include href="M1.cell.nml"/>
  <include href="M2L.cell.nml"/>
  <include href="M2R.cell.nml"/>
  <include href="NSML.cell.nml"/>
  <include href="NSMR.cell.nml"/>
  <include href="Acetylcholine.synapse.nml"/>
  <include href="Generic_GJ.nml"/>
  <include href="Glutamate.synapse.nml"/>
  <include href="Serotonin_Glutamate.synapse.nml"/>
  <network id="gvft_network_bio_prior_lamW_0.278_DF_0.044_t60.net" type="networkWithTemperature" temperature="20.0 degC">
    <population id="I1L" component="I1L" type="populationList" size="4">
      <instance id="0">
        <location x="0.4070351719856262" y="0.18592965602874756" z="0.0"/>
      </instance>
      <instance id="1">
        <location x="0.8592965006828308" y="0.7085427045822144" z="0.0"/>
      </instance>
      <instance id="2">
        <location x="-0.5678392052650452" y="0.8291457295417786" z="0.0"/>
      </instance>
      <instance id="3">
        <location x="0.6482412219047546" y="0.4874371886253357" z="0.0"/>
      </instance>
    </population>
    <population id="I1R" component="I1R" type="populationList" size="1">
      <instance id="0">
        <location x="0.6683416962623596" y="-0.7587939500808716" z="0.0"/>
      </instance>
    </population>
    <population id="I2L" component="I2L" type="populationList" size="1">
      <instance id="0">
        <location x="0.31658291816711426" y="-0.49748745560646057" z="0.0"/>
      </instance>
    </population>
    <population id="I2R" component="I2R" type="populationList" size="1">
      <instance id="0">
        <location x="0.44723618030548096" y="-0.9396985173225403" z="0.0"/>
      </instance>
    </population>
    <population id="I3" component="I3" type="populationList" size="1">
      <instance id="0">
        <location x="-0.8894472122192383" y="-0.5075377225875854" z="0.0"/>
      </instance>
    </population>
    <population id="M1" component="M1" type="populationList" size="1">
      <instance id="0">
        <location x="-0.6683416962623596" y="-0.3467336893081665" z="0.0"/>
      </instance>
    </population>
    <population id="M2L" component="M2L" type="populationList" size="1">
      <instance id="0">
        <location x="0.8793969750404358" y="0.2160804122686386" z="0.0"/>
      </instance>
    </population>
    <population id="M2R" component="M2R" type="populationList" size="5">
      <instance id="0">
        <location x="-0.045226141810417175" y="-0.5075377225875854" z="0.0"/>
      </instance>
      <instance id="1">
        <location x="-0.979899525642395" y="-0.06532664597034454" z="0.0"/>
      </instance>
      <instance id="2">
        <location x="0.5778894424438477" y="0.25628140568733215" z="0.0"/>
      </instance>
      <instance id="3">
        <location x="0.7487437129020691" y="-0.31658291816711426" z="0.0"/>
      </instance>
      <instance id="4">
        <location x="-0.6381909847259521" y="0.7788944840431213" z="0.0"/>
      </instance>
    </population>
    <population id="NSML" component="NSML" type="populationList" size="3">
      <instance id="0">
        <location x="-0.979899525642395" y="-1.0" z="0.0"/>
      </instance>
      <instance id="1">
        <location x="0.07537689805030823" y="-0.25628140568733215" z="0.0"/>
      </instance>
      <instance id="2">
        <location x="0.839195966720581" y="-0.39698493480682373" z="0.0"/>
      </instance>
    </population>
    <population id="NSMR" component="NSMR" type="populationList" size="2">
      <instance id="0">
        <location x="0.045226141810417175" y="-0.1658291518688202" z="0.0"/>
      </instance>
      <instance id="1">
        <location x="0.8291457295417786" y="-0.9899497628211975" z="0.0"/>
      </instance>
    </population>
    <projection id="NCXLS_M1_M2L" presynapticPopulation="M1" postsynapticPopulation="M2L" synapse="Acetylcholine">
      <connection id="0" preCellId="../M1/0/M1" postCellId="../M2L/0/M2L" preSegmentId="1" postSegmentId="5" preFractionAlong="0.864" postFractionAlong="0.962"/>
    </projection>
    <projection id="NCXLS_M1_I1L" presynapticPopulation="M1" postsynapticPopulation="I1L" synapse="Acetylcholine">
      <connection id="1" preCellId="../M1/0/M1" postCellId="../I1L/0/I1L" preSegmentId="1" postSegmentId="2" preFractionAlong="0.864" postFractionAlong="0.217"/>
      <connection id="3" preCellId="../M1/0/M1" postCellId="../I1L/1/I1L" preSegmentId="1" postSegmentId="6" preFractionAlong="0.864" postFractionAlong="0.752"/>
      <connection id="4" preCellId="../M1/0/M1" postCellId="../I1L/2/I1L" preSegmentId="1" postSegmentId="8" preFractionAlong="0.864" postFractionAlong="0.948"/>
      <connection id="10" preCellId="../M1/0/M1" postCellId="../I1L/3/I1L" preSegmentId="1" postSegmentId="5" preFractionAlong="0.864" postFractionAlong="0.91"/>
    </projection>
    <projection id="NCXLS_M1_I2L" presynapticPopulation="M1" postsynapticPopulation="I2L" synapse="Acetylcholine">
      <connection id="2" preCellId="../M1/0/M1" postCellId="../I2L/0/I2L" preSegmentId="1" postSegmentId="8" preFractionAlong="0.864" postFractionAlong="0.031"/>
    </projection>
    <projection id="NCXLS_M1_NSMR" presynapticPopulation="M1" postsynapticPopulation="NSMR" synapse="Acetylcholine">
      <connection id="5" preCellId="../M1/0/M1" postCellId="../NSMR/0/NSMR" preSegmentId="1" postSegmentId="1" preFractionAlong="0.864" postFractionAlong="0.995"/>
    </projection>
    <projection id="NCXLS_M1_M2R" presynapticPopulation="M1" postsynapticPopulation="M2R" synapse="Glutamate">
      <connection id="6" preCellId="../M1/0/M1" postCellId="../M2R/1/M2R" preSegmentId="1" postSegmentId="10" preFractionAlong="0.864" postFractionAlong="0.348"/>
      <connection id="8" preCellId="../M1/0/M1" postCellId="../M2R/2/M2R" preSegmentId="1" postSegmentId="7" preFractionAlong="0.864" postFractionAlong="0.184"/>
    </projection>
    <projection id="NCXLS_M1_NSML" presynapticPopulation="M1" postsynapticPopulation="NSML" synapse="Acetylcholine">
      <connection id="7" preCellId="../M1/0/M1" postCellId="../NSML/1/NSML" preSegmentId="1" postSegmentId="5" preFractionAlong="0.864" postFractionAlong="0.554"/>
      <connection id="11" preCellId="../M1/0/M1" postCellId="../NSML/2/NSML" preSegmentId="1" postSegmentId="10" preFractionAlong="0.864" postFractionAlong="0.724"/>
    </projection>
    <electricalProjection id="NCXLS_M1_M2R_GJ" presynapticPopulation="M1" postsynapticPopulation="M2R">
      <electricalConnection id="9" preCell="0" postCell="3" synapse="Generic_GJ" preSegment="1" postSegment="6" preFractionAlong="0.864" postFractionAlong="0.249"/>
    </electricalProjection>
    <projection id="NCXLS_M1_M2R" presynapticPopulation="M1" postsynapticPopulation="M2R" synapse="Acetylcholine">
      <connection id="12" preCellId="../M1/0/M1" postCellId="../M2R/4/M2R" preSegmentId="1" postSegmentId="3" preFractionAlong="0.864" postFractionAlong="0.825"/>
    </projection>
    <electricalProjection id="NCXLS_M2R_M2L_GJ" presynapticPopulation="M2R" postsynapticPopulation="M2L">
      <electricalConnection id="13" preCell="0" postCell="0" synapse="Generic_GJ" preSegment="6" postSegment="5" preFractionAlong="0.854" postFractionAlong="0.962"/>
      <electricalConnection id="82" preCell="2" postCell="0" synapse="Generic_GJ" preSegment="1" postSegment="5" preFractionAlong="0.863" postFractionAlong="0.962"/>
    </electricalProjection>
    <projection id="NCXLS_M2R_I1L" presynapticPopulation="M2R" postsynapticPopulation="I1L" synapse="Acetylcholine">
      <connection id="14" preCellId="../M2R/0/M2R" postCellId="../I1L/0/I1L" preSegmentId="6" postSegmentId="2" preFractionAlong="0.854" postFractionAlong="0.217"/>
      <connection id="17" preCellId="../M2R/0/M2R" postCellId="../I1L/1/I1L" preSegmentId="6" postSegmentId="6" preFractionAlong="0.854" postFractionAlong="0.752"/>
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    </projection>
    <projection id="NCXLS_M2R_I1R" presynapticPopulation="M2R" postsynapticPopulation="I1R" synapse="Acetylcholine">
      <connection id="15" preCellId="../M2R/0/M2R" postCellId="../I1R/0/I1R" preSegmentId="6" postSegmentId="6" preFractionAlong="0.854" postFractionAlong="0.459"/>
      <connection id="62" preCellId="../M2R/1/M2R" postCellId="../I1R/0/I1R" preSegmentId="9" postSegmentId="6" preFractionAlong="0.163" postFractionAlong="0.459"/>
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    </projection>
    <projection id="NCXLS_M2R_I2L" presynapticPopulation="M2R" postsynapticPopulation="I2L" synapse="Acetylcholine">
      <connection id="16" preCellId="../M2R/0/M2R" postCellId="../I2L/0/I2L" preSegmentId="6" postSegmentId="8" preFractionAlong="0.854" postFractionAlong="0.031"/>
      <connection id="63" preCellId="../M2R/1/M2R" postCellId="../I2L/0/I2L" preSegmentId="9" postSegmentId="8" preFractionAlong="0.163" postFractionAlong="0.031"/>
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    </projection>
    <projection id="NCXLS_M2R_NSMR" presynapticPopulation="M2R" postsynapticPopulation="NSMR" synapse="Acetylcholine">
      <connection id="19" preCellId="../M2R/0/M2R" postCellId="../NSMR/0/NSMR" preSegmentId="6" postSegmentId="1" preFractionAlong="0.854" postFractionAlong="0.995"/>
      <connection id="66" preCellId="../M2R/1/M2R" postCellId="../NSMR/0/NSMR" preSegmentId="9" postSegmentId="1" preFractionAlong="0.163" postFractionAlong="0.995"/>
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    </projection>
    <projection id="NCXLS_M2R_NSML" presynapticPopulation="M2R" postsynapticPopulation="NSML" synapse="Acetylcholine">
      <connection id="20" preCellId="../M2R/0/M2R" postCellId="../NSML/1/NSML" preSegmentId="6" postSegmentId="5" preFractionAlong="0.854" postFractionAlong="0.554"/>
      <connection id="24" preCellId="../M2R/0/M2R" postCellId="../NSML/2/NSML" preSegmentId="6" postSegmentId="10" preFractionAlong="0.854" postFractionAlong="0.724"/>
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    </projection>
    <projection id="NCXLS_M2R_M2R" presynapticPopulation="M2R" postsynapticPopulation="M2R" synapse="Glutamate">
      <connection id="21" preCellId="../M2R/0/M2R" postCellId="../M2R/2/M2R" preSegmentId="6" postSegmentId="7" preFractionAlong="0.854" postFractionAlong="0.184"/>
      <connection id="25" preCellId="../M2R/0/M2R" postCellId="../M2R/4/M2R" preSegmentId="6" postSegmentId="3" preFractionAlong="0.854" postFractionAlong="0.825"/>
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    </projection>
    <projection id="NCXLS_M2R_M2R" presynapticPopulation="M2R" postsynapticPopulation="M2R" synapse="Acetylcholine">
      <connection id="22" preCellId="../M2R/0/M2R" postCellId="../M2R/3/M2R" preSegmentId="6" postSegmentId="6" preFractionAlong="0.854" postFractionAlong="0.249"/>
      <connection id="103" preCellId="../M2R/3/M2R" postCellId="../M2R/1/M2R" preSegmentId="5" postSegmentId="10" preFractionAlong="0.081" postFractionAlong="0.348"/>
      <connection id="118" preCellId="../M2R/4/M2R" postCellId="../M2R/0/M2R" preSegmentId="7" postSegmentId="1" preFractionAlong="0.939" postFractionAlong="0.469"/>
      <connection id="129" preCellId="../M2R/4/M2R" postCellId="../M2R/2/M2R" preSegmentId="7" postSegmentId="7" preFractionAlong="0.939" postFractionAlong="0.184"/>
    </projection>
    <projection id="NCXLS_M2L_M1" presynapticPopulation="M2L" postsynapticPopulation="M1" synapse="Acetylcholine">
      <connection id="26" preCellId="../M2L/0/M2L" postCellId="../M1/0/M1" preSegmentId="8" postSegmentId="8" preFractionAlong="0.001" postFractionAlong="0.291"/>
    </projection>
    <projection id="NCXLS_M2L_M2R" presynapticPopulation="M2L" postsynapticPopulation="M2R" synapse="Glutamate">
      <connection id="27" preCellId="../M2L/0/M2L" postCellId="../M2R/0/M2R" preSegmentId="8" postSegmentId="1" preFractionAlong="0.001" postFractionAlong="0.469"/>
      <connection id="36" preCellId="../M2L/0/M2L" postCellId="../M2R/2/M2R" preSegmentId="8" postSegmentId="7" preFractionAlong="0.001" postFractionAlong="0.184"/>
    </projection>
    <projection id="NCXLS_M2L_I1L" presynapticPopulation="M2L" postsynapticPopulation="I1L" synapse="Acetylcholine">
      <connection id="28" preCellId="../M2L/0/M2L" postCellId="../I1L/0/I1L" preSegmentId="8" postSegmentId="2" preFractionAlong="0.001" postFractionAlong="0.217"/>
      <connection id="30" preCellId="../M2L/0/M2L" postCellId="../I1L/1/I1L" preSegmentId="8" postSegmentId="6" preFractionAlong="0.001" postFractionAlong="0.752"/>
      <connection id="31" preCellId="../M2L/0/M2L" postCellId="../I1L/2/I1L" preSegmentId="8" postSegmentId="8" preFractionAlong="0.001" postFractionAlong="0.948"/>
      <connection id="37" preCellId="../M2L/0/M2L" postCellId="../I1L/3/I1L" preSegmentId="8" postSegmentId="5" preFractionAlong="0.001" postFractionAlong="0.91"/>
    </projection>
    <projection id="NCXLS_M2L_I2L" presynapticPopulation="M2L" postsynapticPopulation="I2L" synapse="Acetylcholine">
      <connection id="29" preCellId="../M2L/0/M2L" postCellId="../I2L/0/I2L" preSegmentId="8" postSegmentId="8" preFractionAlong="0.001" postFractionAlong="0.031"/>
    </projection>
    <projection id="NCXLS_M2L_NSML" presynapticPopulation="M2L" postsynapticPopulation="NSML" synapse="Acetylcholine">
      <connection id="32" preCellId="../M2L/0/M2L" postCellId="../NSML/0/NSML" preSegmentId="8" postSegmentId="10" preFractionAlong="0.001" postFractionAlong="0.544"/>
      <connection id="35" preCellId="../M2L/0/M2L" postCellId="../NSML/1/NSML" preSegmentId="8" postSegmentId="5" preFractionAlong="0.001" postFractionAlong="0.554"/>
    </projection>
    <projection id="NCXLS_M2L_NSMR" presynapticPopulation="M2L" postsynapticPopulation="NSMR" synapse="Acetylcholine">
      <connection id="33" preCellId="../M2L/0/M2L" postCellId="../NSMR/0/NSMR" preSegmentId="8" postSegmentId="1" preFractionAlong="0.001" postFractionAlong="0.995"/>
    </projection>
    <projection id="NCXLS_M2L_M2R" presynapticPopulation="M2L" postsynapticPopulation="M2R" synapse="Acetylcholine">
      <connection id="34" preCellId="../M2L/0/M2L" postCellId="../M2R/1/M2R" preSegmentId="8" postSegmentId="10" preFractionAlong="0.001" postFractionAlong="0.348"/>
    </projection>
    <projection id="NCXLS_M2L_I3" presynapticPopulation="M2L" postsynapticPopulation="I3" synapse="Acetylcholine">
      <connection id="38" preCellId="../M2L/0/M2L" postCellId="../I3/0/I3" preSegmentId="8" postSegmentId="7" preFractionAlong="0.001" postFractionAlong="0.388"/>
    </projection>
    <electricalProjection id="NCXLS_M2L_M2R_GJ" presynapticPopulation="M2L" postsynapticPopulation="M2R">
      <electricalConnection id="39" preCell="0" postCell="4" synapse="Generic_GJ" preSegment="8" postSegment="3" preFractionAlong="0.001" postFractionAlong="0.825"/>
    </electricalProjection>
    <projection id="NCXLS_NSML_M1" presynapticPopulation="NSML" postsynapticPopulation="M1" synapse="Serotonin_Glutamate">
      <connection id="40" preCellId="../NSML/0/NSML" postCellId="../M1/0/M1" preSegmentId="7" postSegmentId="8" preFractionAlong="0.302" postFractionAlong="0.291"/>
      <connection id="75" preCellId="../NSML/1/NSML" postCellId="../M1/0/M1" preSegmentId="5" postSegmentId="8" preFractionAlong="0.574" postFractionAlong="0.291"/>
    </projection>
    <projection id="NCXLS_NSML_I1L" presynapticPopulation="NSML" postsynapticPopulation="I1L" synapse="Serotonin_Glutamate">
      <connection id="41" preCellId="../NSML/0/NSML" postCellId="../I1L/0/I1L" preSegmentId="7" postSegmentId="2" preFractionAlong="0.302" postFractionAlong="0.217"/>
      <connection id="42" preCellId="../NSML/0/NSML" postCellId="../I1L/1/I1L" preSegmentId="7" postSegmentId="6" preFractionAlong="0.302" postFractionAlong="0.752"/>
      <connection id="43" preCellId="../NSML/0/NSML" postCellId="../I1L/2/I1L" preSegmentId="7" postSegmentId="8" preFractionAlong="0.302" postFractionAlong="0.948"/>
      <connection id="47" preCellId="../NSML/0/NSML" postCellId="../I1L/3/I1L" preSegmentId="7" postSegmentId="5" preFractionAlong="0.302" postFractionAlong="0.91"/>
    </projection>
    <projection id="NCXLS_NSML_NSMR" presynapticPopulation="NSML" postsynapticPopulation="NSMR" synapse="Serotonin_Glutamate">
      <connection id="44" preCellId="../NSML/0/NSML" postCellId="../NSMR/0/NSMR" preSegmentId="7" postSegmentId="1" preFractionAlong="0.302" postFractionAlong="0.995"/>
    </projection>
    <projection id="NCXLS_NSML_M2R" presynapticPopulation="NSML" postsynapticPopulation="M2R" synapse="Serotonin_Glutamate">
      <connection id="45" preCellId="../NSML/0/NSML" postCellId="../M2R/1/M2R" preSegmentId="7" postSegmentId="10" preFractionAlong="0.302" postFractionAlong="0.348"/>
      <connection id="46" preCellId="../NSML/0/NSML" postCellId="../M2R/2/M2R" preSegmentId="7" postSegmentId="7" preFractionAlong="0.302" postFractionAlong="0.184"/>
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    </projection>
    <projection id="NCXLS_NSML_I3" presynapticPopulation="NSML" postsynapticPopulation="I3" synapse="Serotonin_Glutamate">
      <connection id="48" preCellId="../NSML/0/NSML" postCellId="../I3/0/I3" preSegmentId="7" postSegmentId="7" preFractionAlong="0.302" postFractionAlong="0.388"/>
      <connection id="79" preCellId="../NSML/1/NSML" postCellId="../I3/0/I3" preSegmentId="5" postSegmentId="7" preFractionAlong="0.574" postFractionAlong="0.388"/>
    </projection>
    <projection id="NCXLS_NSMR_M2L" presynapticPopulation="NSMR" postsynapticPopulation="M2L" synapse="Serotonin_Glutamate">
      <connection id="50" preCellId="../NSMR/0/NSMR" postCellId="../M2L/0/M2L" preSegmentId="10" postSegmentId="5" preFractionAlong="0.339" postFractionAlong="0.962"/>
    </projection>
    <projection id="NCXLS_NSMR_I1L" presynapticPopulation="NSMR" postsynapticPopulation="I1L" synapse="Serotonin_Glutamate">
      <connection id="51" preCellId="../NSMR/0/NSMR" postCellId="../I1L/0/I1L" preSegmentId="10" postSegmentId="2" preFractionAlong="0.339" postFractionAlong="0.217"/>
      <connection id="52" preCellId="../NSMR/0/NSMR" postCellId="../I1L/1/I1L" preSegmentId="10" postSegmentId="6" preFractionAlong="0.339" postFractionAlong="0.752"/>
      <connection id="53" preCellId="../NSMR/0/NSMR" postCellId="../I1L/2/I1L" preSegmentId="10" postSegmentId="8" preFractionAlong="0.339" postFractionAlong="0.948"/>
      <connection id="56" preCellId="../NSMR/0/NSMR" postCellId="../I1L/3/I1L" preSegmentId="10" postSegmentId="5" preFractionAlong="0.339" postFractionAlong="0.91"/>
    </projection>
    <projection id="NCXLS_NSMR_M2R" presynapticPopulation="NSMR" postsynapticPopulation="M2R" synapse="Serotonin_Glutamate">
      <connection id="54" preCellId="../NSMR/0/NSMR" postCellId="../M2R/1/M2R" preSegmentId="10" postSegmentId="10" preFractionAlong="0.339" postFractionAlong="0.348"/>
      <connection id="55" preCellId="../NSMR/0/NSMR" postCellId="../M2R/2/M2R" preSegmentId="10" postSegmentId="7" preFractionAlong="0.339" postFractionAlong="0.184"/>
      <connection id="57" preCellId="../NSMR/0/NSMR" postCellId="../M2R/4/M2R" preSegmentId="10" postSegmentId="3" preFractionAlong="0.339" postFractionAlong="0.825"/>
    </projection>
    <electricalProjection id="NCXLS_M2R_M1_GJ" presynapticPopulation="M2R" postsynapticPopulation="M1">
      <electricalConnection id="58" preCell="1" postCell="0" synapse="Generic_GJ" preSegment="9" postSegment="8" preFractionAlong="0.163" postFractionAlong="0.291"/>
      <electricalConnection id="117" preCell="4" postCell="0" synapse="Generic_GJ" preSegment="7" postSegment="8" preFractionAlong="0.939" postFractionAlong="0.291"/>
    </electricalProjection>
    <projection id="NCXLS_M2R_M2L" presynapticPopulation="M2R" postsynapticPopulation="M2L" synapse="Glutamate">
      <connection id="60" preCellId="../M2R/1/M2R" postCellId="../M2L/0/M2L" preSegmentId="9" postSegmentId="5" preFractionAlong="0.163" postFractionAlong="0.962"/>
    </projection>
    <projection id="NCXLS_M2R_I2R" presynapticPopulation="M2R" postsynapticPopulation="I2R" synapse="Acetylcholine">
      <connection id="67" preCellId="../M2R/1/M2R" postCellId="../I2R/0/I2R" preSegmentId="9" postSegmentId="9" preFractionAlong="0.163" postFractionAlong="0.207"/>
      <connection id="88" preCellId="../M2R/2/M2R" postCellId="../I2R/0/I2R" preSegmentId="1" postSegmentId="9" preFractionAlong="0.863" postFractionAlong="0.207"/>
      <connection id="102" preCellId="../M2R/3/M2R" postCellId="../I2R/0/I2R" preSegmentId="5" postSegmentId="9" preFractionAlong="0.081" postFractionAlong="0.207"/>
      <connection id="126" preCellId="../M2R/4/M2R" postCellId="../I2R/0/I2R" preSegmentId="7" postSegmentId="9" preFractionAlong="0.939" postFractionAlong="0.207"/>
    </projection>
    <projection id="NCXLS_M2R_I3" presynapticPopulation="M2R" postsynapticPopulation="I3" synapse="Acetylcholine">
      <connection id="73" preCellId="../M2R/1/M2R" postCellId="../I3/0/I3" preSegmentId="9" postSegmentId="7" preFractionAlong="0.163" postFractionAlong="0.388"/>
      <connection id="92" preCellId="../M2R/2/M2R" postCellId="../I3/0/I3" preSegmentId="1" postSegmentId="7" preFractionAlong="0.863" postFractionAlong="0.388"/>
      <connection id="105" preCellId="../M2R/3/M2R" postCellId="../I3/0/I3" preSegmentId="5" postSegmentId="7" preFractionAlong="0.081" postFractionAlong="0.388"/>
      <connection id="133" preCellId="../M2R/4/M2R" postCellId="../I3/0/I3" preSegmentId="7" postSegmentId="7" preFractionAlong="0.939" postFractionAlong="0.388"/>
    </projection>
    <projection id="NCXLS_NSML_NSML" presynapticPopulation="NSML" postsynapticPopulation="NSML" synapse="Serotonin_Glutamate">
      <connection id="77" preCellId="../NSML/1/NSML" postCellId="../NSML/0/NSML" preSegmentId="5" postSegmentId="10" preFractionAlong="0.574" postFractionAlong="0.544"/>
    </projection>
    <projection id="NCXLS_M2R_M1" presynapticPopulation="M2R" postsynapticPopulation="M1" synapse="Acetylcholine">
      <connection id="80" preCellId="../M2R/2/M2R" postCellId="../M1/0/M1" preSegmentId="1" postSegmentId="8" preFractionAlong="0.863" postFractionAlong="0.291"/>
      <connection id="94" preCellId="../M2R/3/M2R" postCellId="../M1/0/M1" preSegmentId="5" postSegmentId="8" preFractionAlong="0.081" postFractionAlong="0.291"/>
    </projection>
    <electricalProjection id="NCXLS_M2R_M2R_GJ" presynapticPopulation="M2R" postsynapticPopulation="M2R">
      <electricalConnection id="95" preCell="3" postCell="0" synapse="Generic_GJ" preSegment="5" postSegment="1" preFractionAlong="0.081" postFractionAlong="0.469"/>
      <electricalConnection id="106" preCell="3" postCell="4" synapse="Generic_GJ" preSegment="5" postSegment="3" preFractionAlong="0.081" postFractionAlong="0.825"/>
      <electricalConnection id="127" preCell="4" postCell="1" synapse="Generic_GJ" preSegment="7" postSegment="10" preFractionAlong="0.939" postFractionAlong="0.348"/>
      <electricalConnection id="130" preCell="4" postCell="3" synapse="Generic_GJ" preSegment="7" postSegment="6" preFractionAlong="0.939" postFractionAlong="0.249"/>
    </electricalProjection>
    <projection id="NCXLS_I1L_I1L" presynapticPopulation="I1L" postsynapticPopulation="I1L" synapse="Glutamate">
      <connection id="107" preCellId="../I1L/3/I1L" postCellId="../I1L/1/I1L" preSegmentId="10" postSegmentId="6" preFractionAlong="0.121" postFractionAlong="0.752"/>
    </projection>
    <electricalProjection id="NCXLS_I1L_I1L_GJ" presynapticPopulation="I1L" postsynapticPopulation="I1L">
      <electricalConnection id="108" preCell="3" postCell="2" synapse="Generic_GJ" preSegment="10" postSegment="8" preFractionAlong="0.121" postFractionAlong="0.948"/>
    </electricalProjection>
    <projection id="NCXLS_I1L_M2R" presynapticPopulation="I1L" postsynapticPopulation="M2R" synapse="Acetylcholine">
      <connection id="109" preCellId="../I1L/3/I1L" postCellId="../M2R/4/M2R" preSegmentId="10" postSegmentId="3" preFractionAlong="0.121" postFractionAlong="0.825"/>
    </projection>
    <projection id="NCXLS_NSMR_M1" presynapticPopulation="NSMR" postsynapticPopulation="M1" synapse="Serotonin_Glutamate">
      <connection id="110" preCellId="../NSMR/1/NSMR" postCellId="../M1/0/M1" preSegmentId="4" postSegmentId="8" preFractionAlong="0.385" postFractionAlong="0.291"/>
    </projection>
    <projection id="NCXLS_NSMR_NSML" presynapticPopulation="NSMR" postsynapticPopulation="NSML" synapse="Serotonin_Glutamate">
      <connection id="111" preCellId="../NSMR/1/NSMR" postCellId="../NSML/0/NSML" preSegmentId="4" postSegmentId="10" preFractionAlong="0.385" postFractionAlong="0.544"/>
    </projection>
    <projection id="NCXLS_NSMR_I2R" presynapticPopulation="NSMR" postsynapticPopulation="I2R" synapse="Serotonin_Glutamate">
      <connection id="112" preCellId="../NSMR/1/NSMR" postCellId="../I2R/0/I2R" preSegmentId="4" postSegmentId="9" preFractionAlong="0.385" postFractionAlong="0.207"/>
    </projection>
    <projection id="NCXLS_NSMR_I3" presynapticPopulation="NSMR" postsynapticPopulation="I3" synapse="Serotonin_Glutamate">
      <connection id="113" preCellId="../NSMR/1/NSMR" postCellId="../I3/0/I3" preSegmentId="4" postSegmentId="7" preFractionAlong="0.385" postFractionAlong="0.388"/>
    </projection>
    <projection id="NCXLS_NSML_I1R" presynapticPopulation="NSML" postsynapticPopulation="I1R" synapse="Serotonin_Glutamate">
      <connection id="114" preCellId="../NSML/2/NSML" postCellId="../I1R/0/I1R" preSegmentId="9" postSegmentId="6" preFractionAlong="0.211" postFractionAlong="0.459"/>
    </projection>
    <projection id="NCXLS_NSML_I2R" presynapticPopulation="NSML" postsynapticPopulation="I2R" synapse="Serotonin_Glutamate">
      <connection id="115" preCellId="../NSML/2/NSML" postCellId="../I2R/0/I2R" preSegmentId="9" postSegmentId="9" preFractionAlong="0.211" postFractionAlong="0.207"/>
    </projection>
    <electricalProjection id="NCXLS_NSML_NSMR_GJ" presynapticPopulation="NSML" postsynapticPopulation="NSMR">
      <electricalConnection id="116" preCell="2" postCell="1" synapse="Generic_GJ" preSegment="9" postSegment="4" preFractionAlong="0.211" postFractionAlong="0.183"/>
    </electricalProjection>
    <projection id="NCXLS_M2R_M2L" presynapticPopulation="M2R" postsynapticPopulation="M2L" synapse="Acetylcholine">
      <connection id="119" preCellId="../M2R/4/M2R" postCellId="../M2L/0/M2L" preSegmentId="7" postSegmentId="5" preFractionAlong="0.939" postFractionAlong="0.962"/>
    </projection>
  </network>
</neuroml>
