<?xml version='1.0' encoding='UTF-8'?>
<neuroml xmlns="http://www.neuroml.org/schema/neuroml2" xmlns:xsi="http://www.w3.org/2001/XMLSchema-instance" xsi:schemaLocation="http://www.neuroml.org/schema/neuroml2 https://raw.githubusercontent.com/NeuroML/NeuroML2/development/Schemas/NeuroML2/NeuroML_v2beta4.xsd" id="gvft_network_bio_prior_lamW_0.278_DF_0.044_t80.net">
  <notes>NeuroML2 network generated from GVFT simulation on 2025-05-04 10:21:56
</notes>
  <include href="I1L.cell.nml"/>
  <include href="I1R.cell.nml"/>
  <include href="I2L.cell.nml"/>
  <include href="I2R.cell.nml"/>
  <include href="I3.cell.nml"/>
  <include href="I4.cell.nml"/>
  <include href="M1.cell.nml"/>
  <include href="M2L.cell.nml"/>
  <include href="M2R.cell.nml"/>
  <include href="MI.cell.nml"/>
  <include href="NSML.cell.nml"/>
  <include href="NSMR.cell.nml"/>
  <include href="Acetylcholine.synapse.nml"/>
  <include href="Generic_GJ.nml"/>
  <include href="Glutamate.synapse.nml"/>
  <include href="Serotonin_Glutamate.synapse.nml"/>
  <network id="gvft_network_bio_prior_lamW_0.278_DF_0.044_t80.net" type="networkWithTemperature" temperature="20.0 degC">
    <population id="I1L" component="I1L" type="populationList" size="1">
      <instance id="0">
        <location x="-0.8492462038993835" y="-0.4170854389667511" z="0.0"/>
      </instance>
    </population>
    <population id="I1R" component="I1R" type="populationList" size="1">
      <instance id="0">
        <location x="-1.0" y="-0.6482412219047546" z="0.0"/>
      </instance>
    </population>
    <population id="I2L" component="I2L" type="populationList" size="3">
      <instance id="0">
        <location x="0.26633167266845703" y="0.9396985173225403" z="0.0"/>
      </instance>
      <instance id="1">
        <location x="-0.5276381969451904" y="0.979899525642395" z="0.0"/>
      </instance>
      <instance id="2">
        <location x="-0.7889447212219238" y="0.5979899764060974" z="0.0"/>
      </instance>
    </population>
    <population id="I2R" component="I2R" type="populationList" size="1">
      <instance id="0">
        <location x="0.6984924674034119" y="-0.06532664597034454" z="0.0"/>
      </instance>
    </population>
    <population id="I3" component="I3" type="populationList" size="1">
      <instance id="0">
        <location x="0.8592965006828308" y="0.6381909847259521" z="0.0"/>
      </instance>
    </population>
    <population id="I4" component="I4" type="populationList" size="1">
      <instance id="0">
        <location x="0.7286432385444641" y="-0.4874371886253357" z="0.0"/>
      </instance>
    </population>
    <population id="M1" component="M1" type="populationList" size="1">
      <instance id="0">
        <location x="-0.8894472122192383" y="-0.6281406879425049" z="0.0"/>
      </instance>
    </population>
    <population id="M2L" component="M2L" type="populationList" size="1">
      <instance id="0">
        <location x="-0.7688442468643188" y="-0.7286432385444641" z="0.0"/>
      </instance>
    </population>
    <population id="M2R" component="M2R" type="populationList" size="3">
      <instance id="0">
        <location x="0.7386934757232666" y="-0.3366834223270416" z="0.0"/>
      </instance>
      <instance id="1">
        <location x="-0.12562814354896545" y="0.4070351719856262" z="0.0"/>
      </instance>
      <instance id="2">
        <location x="0.05527639389038086" y="-0.7788944840431213" z="0.0"/>
      </instance>
    </population>
    <population id="MI" component="MI" type="populationList" size="2">
      <instance id="0">
        <location x="0.979899525642395" y="0.6080402135848999" z="0.0"/>
      </instance>
      <instance id="1">
        <location x="0.43718594312667847" y="-0.1658291518688202" z="0.0"/>
      </instance>
    </population>
    <population id="NSML" component="NSML" type="populationList" size="3">
      <instance id="0">
        <location x="-0.6582914590835571" y="-0.7587939500808716" z="0.0"/>
      </instance>
      <instance id="1">
        <location x="-0.8291457295417786" y="-0.7889447212219238" z="0.0"/>
      </instance>
      <instance id="2">
        <location x="-0.6281406879425049" y="0.1658291518688202" z="0.0"/>
      </instance>
    </population>
    <population id="NSMR" component="NSMR" type="populationList" size="2">
      <instance id="0">
        <location x="0.005025136284530163" y="-0.12562814354896545" z="0.0"/>
      </instance>
      <instance id="1">
        <location x="0.7889447212219238" y="0.5778894424438477" z="0.0"/>
      </instance>
    </population>
    <projection id="NCXLS_MI_I2L" presynapticPopulation="MI" postsynapticPopulation="I2L" synapse="Acetylcholine">
      <connection id="0" preCellId="../MI/0/MI" postCellId="../I2L/0/I2L" preSegmentId="5" postSegmentId="8" preFractionAlong="0.5" postFractionAlong="0.031"/>
      <connection id="3" preCellId="../MI/0/MI" postCellId="../I2L/1/I2L" preSegmentId="5" postSegmentId="2" preFractionAlong="0.5" postFractionAlong="0.204"/>
      <connection id="7" preCellId="../MI/0/MI" postCellId="../I2L/2/I2L" preSegmentId="5" postSegmentId="4" preFractionAlong="0.5" postFractionAlong="0.568"/>
    </projection>
    <projection id="NCXLS_MI_NSML" presynapticPopulation="MI" postsynapticPopulation="NSML" synapse="Acetylcholine">
      <connection id="1" preCellId="../MI/0/MI" postCellId="../NSML/0/NSML" preSegmentId="5" postSegmentId="10" preFractionAlong="0.5" postFractionAlong="0.544"/>
      <connection id="12" preCellId="../MI/0/MI" postCellId="../NSML/1/NSML" preSegmentId="5" postSegmentId="5" preFractionAlong="0.5" postFractionAlong="0.554"/>
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    </projection>
    <electricalProjection id="NCXLS_MI_M1_GJ" presynapticPopulation="MI" postsynapticPopulation="M1">
      <electricalConnection id="2" preCell="0" postCell="0" synapse="Generic_GJ" preSegment="5" postSegment="8" preFractionAlong="0.5" postFractionAlong="0.291"/>
    </electricalProjection>
    <electricalProjection id="NCXLS_MI_MI_GJ" presynapticPopulation="MI" postsynapticPopulation="MI">
      <electricalConnection id="4" preCell="0" postCell="1" synapse="Generic_GJ" preSegment="5" postSegment="3" preFractionAlong="0.5" postFractionAlong="0.384"/>
    </electricalProjection>
    <projection id="NCXLS_MI_M2R" presynapticPopulation="MI" postsynapticPopulation="M2R" synapse="Glutamate">
      <connection id="5" preCellId="../MI/0/MI" postCellId="../M2R/1/M2R" preSegmentId="5" postSegmentId="10" preFractionAlong="0.5" postFractionAlong="0.348"/>
      <connection id="9" preCellId="../MI/0/MI" postCellId="../M2R/2/M2R" preSegmentId="5" postSegmentId="7" preFractionAlong="0.5" postFractionAlong="0.184"/>
    </projection>
    <projection id="NCXLS_MI_I1L" presynapticPopulation="MI" postsynapticPopulation="I1L" synapse="Acetylcholine">
      <connection id="6" preCellId="../MI/0/MI" postCellId="../I1L/0/I1L" preSegmentId="5" postSegmentId="2" preFractionAlong="0.5" postFractionAlong="0.217"/>
      <connection id="37" preCellId="../MI/1/MI" postCellId="../I1L/0/I1L" preSegmentId="6" postSegmentId="2" preFractionAlong="0.858" postFractionAlong="0.217"/>
    </projection>
    <projection id="NCXLS_MI_I3" presynapticPopulation="MI" postsynapticPopulation="I3" synapse="Acetylcholine">
      <connection id="8" preCellId="../MI/0/MI" postCellId="../I3/0/I3" preSegmentId="5" postSegmentId="7" preFractionAlong="0.5" postFractionAlong="0.388"/>
    </projection>
    <projection id="NCXLS_MI_M2L" presynapticPopulation="MI" postsynapticPopulation="M2L" synapse="Acetylcholine">
      <connection id="10" preCellId="../MI/0/MI" postCellId="../M2L/0/M2L" preSegmentId="5" postSegmentId="5" preFractionAlong="0.5" postFractionAlong="0.962"/>
    </projection>
    <projection id="NCXLS_MI_NSMR" presynapticPopulation="MI" postsynapticPopulation="NSMR" synapse="Acetylcholine">
      <connection id="11" preCellId="../MI/0/MI" postCellId="../NSMR/0/NSMR" preSegmentId="5" postSegmentId="1" preFractionAlong="0.5" postFractionAlong="0.995"/>
      <connection id="13" preCellId="../MI/0/MI" postCellId="../NSMR/1/NSMR" preSegmentId="5" postSegmentId="4" preFractionAlong="0.5" postFractionAlong="0.183"/>
      <connection id="41" preCellId="../MI/1/MI" postCellId="../NSMR/0/NSMR" preSegmentId="6" postSegmentId="1" preFractionAlong="0.858" postFractionAlong="0.995"/>
    </projection>
    <projection id="NCXLS_MI_I1R" presynapticPopulation="MI" postsynapticPopulation="I1R" synapse="Acetylcholine">
      <connection id="14" preCellId="../MI/0/MI" postCellId="../I1R/0/I1R" preSegmentId="5" postSegmentId="6" preFractionAlong="0.5" postFractionAlong="0.459"/>
      <connection id="43" preCellId="../MI/1/MI" postCellId="../I1R/0/I1R" preSegmentId="6" postSegmentId="6" preFractionAlong="0.858" postFractionAlong="0.459"/>
    </projection>
    <electricalProjection id="NCXLS_M2R_MI_GJ" presynapticPopulation="M2R" postsynapticPopulation="MI">
      <electricalConnection id="16" preCell="0" postCell="0" synapse="Generic_GJ" preSegment="6" postSegment="2" preFractionAlong="0.854" postFractionAlong="0.685"/>
      <electricalConnection id="59" preCell="2" postCell="0" synapse="Generic_GJ" preSegment="1" postSegment="2" preFractionAlong="0.863" postFractionAlong="0.685"/>
    </electricalProjection>
    <projection id="NCXLS_M2R_I2L" presynapticPopulation="M2R" postsynapticPopulation="I2L" synapse="Acetylcholine">
      <connection id="17" preCellId="../M2R/0/M2R" postCellId="../I2L/0/I2L" preSegmentId="6" postSegmentId="8" preFractionAlong="0.854" postFractionAlong="0.031"/>
      <connection id="18" preCellId="../M2R/0/M2R" postCellId="../I2L/1/I2L" preSegmentId="6" postSegmentId="2" preFractionAlong="0.854" postFractionAlong="0.204"/>
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    </projection>
    <projection id="NCXLS_M2R_I2R" presynapticPopulation="M2R" postsynapticPopulation="I2R" synapse="Acetylcholine">
      <connection id="19" preCellId="../M2R/0/M2R" postCellId="../I2R/0/I2R" preSegmentId="6" postSegmentId="9" preFractionAlong="0.854" postFractionAlong="0.207"/>
      <connection id="47" preCellId="../M2R/1/M2R" postCellId="../I2R/0/I2R" preSegmentId="9" postSegmentId="9" preFractionAlong="0.163" postFractionAlong="0.207"/>
      <connection id="64" preCellId="../M2R/2/M2R" postCellId="../I2R/0/I2R" preSegmentId="1" postSegmentId="9" preFractionAlong="0.863" postFractionAlong="0.207"/>
    </projection>
    <projection id="NCXLS_M2R_M2R" presynapticPopulation="M2R" postsynapticPopulation="M2R" synapse="Glutamate">
      <connection id="20" preCellId="../M2R/0/M2R" postCellId="../M2R/1/M2R" preSegmentId="6" postSegmentId="10" preFractionAlong="0.854" postFractionAlong="0.348"/>
    </projection>
    <projection id="NCXLS_M2R_I3" presynapticPopulation="M2R" postsynapticPopulation="I3" synapse="Acetylcholine">
      <connection id="21" preCellId="../M2R/0/M2R" postCellId="../I3/0/I3" preSegmentId="6" postSegmentId="7" preFractionAlong="0.854" postFractionAlong="0.388"/>
      <connection id="49" preCellId="../M2R/1/M2R" postCellId="../I3/0/I3" preSegmentId="9" postSegmentId="7" preFractionAlong="0.163" postFractionAlong="0.388"/>
      <connection id="69" preCellId="../M2R/2/M2R" postCellId="../I3/0/I3" preSegmentId="1" postSegmentId="7" preFractionAlong="0.863" postFractionAlong="0.388"/>
    </projection>
    <projection id="NCXLS_M2R_NSMR" presynapticPopulation="M2R" postsynapticPopulation="NSMR" synapse="Acetylcholine">
      <connection id="22" preCellId="../M2R/0/M2R" postCellId="../NSMR/1/NSMR" preSegmentId="6" postSegmentId="4" preFractionAlong="0.854" postFractionAlong="0.183"/>
      <connection id="51" preCellId="../M2R/1/M2R" postCellId="../NSMR/0/NSMR" preSegmentId="9" postSegmentId="1" preFractionAlong="0.163" postFractionAlong="0.995"/>
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    </projection>
    <electricalProjection id="NCXLS_M1_MI_GJ" presynapticPopulation="M1" postsynapticPopulation="MI">
      <electricalConnection id="23" preCell="0" postCell="0" synapse="Generic_GJ" preSegment="1" postSegment="2" preFractionAlong="0.864" postFractionAlong="0.685"/>
      <electricalConnection id="27" preCell="0" postCell="1" synapse="Generic_GJ" preSegment="1" postSegment="3" preFractionAlong="0.864" postFractionAlong="0.384"/>
    </electricalProjection>
    <projection id="NCXLS_M1_I2L" presynapticPopulation="M1" postsynapticPopulation="I2L" synapse="Acetylcholine">
      <connection id="24" preCellId="../M1/0/M1" postCellId="../I2L/0/I2L" preSegmentId="1" postSegmentId="8" preFractionAlong="0.864" postFractionAlong="0.031"/>
      <connection id="25" preCellId="../M1/0/M1" postCellId="../I2L/1/I2L" preSegmentId="1" postSegmentId="2" preFractionAlong="0.864" postFractionAlong="0.204"/>
      <connection id="30" preCellId="../M1/0/M1" postCellId="../I2L/2/I2L" preSegmentId="1" postSegmentId="4" preFractionAlong="0.864" postFractionAlong="0.568"/>
    </projection>
    <projection id="NCXLS_M1_I2R" presynapticPopulation="M1" postsynapticPopulation="I2R" synapse="Acetylcholine">
      <connection id="26" preCellId="../M1/0/M1" postCellId="../I2R/0/I2R" preSegmentId="1" postSegmentId="9" preFractionAlong="0.864" postFractionAlong="0.207"/>
    </projection>
    <projection id="NCXLS_M1_M2R" presynapticPopulation="M1" postsynapticPopulation="M2R" synapse="Acetylcholine">
      <connection id="28" preCellId="../M1/0/M1" postCellId="../M2R/1/M2R" preSegmentId="1" postSegmentId="10" preFractionAlong="0.864" postFractionAlong="0.348"/>
    </projection>
    <projection id="NCXLS_M1_I1L" presynapticPopulation="M1" postsynapticPopulation="I1L" synapse="Acetylcholine">
      <connection id="29" preCellId="../M1/0/M1" postCellId="../I1L/0/I1L" preSegmentId="1" postSegmentId="2" preFractionAlong="0.864" postFractionAlong="0.217"/>
    </projection>
    <projection id="NCXLS_M1_I3" presynapticPopulation="M1" postsynapticPopulation="I3" synapse="Acetylcholine">
      <connection id="31" preCellId="../M1/0/M1" postCellId="../I3/0/I3" preSegmentId="1" postSegmentId="7" preFractionAlong="0.864" postFractionAlong="0.388"/>
    </projection>
    <projection id="NCXLS_M1_NSMR" presynapticPopulation="M1" postsynapticPopulation="NSMR" synapse="Acetylcholine">
      <connection id="32" preCellId="../M1/0/M1" postCellId="../NSMR/0/NSMR" preSegmentId="1" postSegmentId="1" preFractionAlong="0.864" postFractionAlong="0.995"/>
      <connection id="33" preCellId="../M1/0/M1" postCellId="../NSMR/1/NSMR" preSegmentId="1" postSegmentId="4" preFractionAlong="0.864" postFractionAlong="0.183"/>
    </projection>
    <projection id="NCXLS_M1_NSML" presynapticPopulation="M1" postsynapticPopulation="NSML" synapse="Acetylcholine">
      <connection id="34" preCellId="../M1/0/M1" postCellId="../NSML/2/NSML" preSegmentId="1" postSegmentId="10" preFractionAlong="0.864" postFractionAlong="0.724"/>
    </projection>
    <projection id="NCXLS_MI_M1" presynapticPopulation="MI" postsynapticPopulation="M1" synapse="Acetylcholine">
      <connection id="36" preCellId="../MI/1/MI" postCellId="../M1/0/M1" preSegmentId="6" postSegmentId="8" preFractionAlong="0.858" postFractionAlong="0.291"/>
    </projection>
    <projection id="NCXLS_MI_M2R" presynapticPopulation="MI" postsynapticPopulation="M2R" synapse="Acetylcholine">
      <connection id="38" preCellId="../MI/1/MI" postCellId="../M2R/2/M2R" preSegmentId="6" postSegmentId="7" preFractionAlong="0.858" postFractionAlong="0.184"/>
    </projection>
    <electricalProjection id="NCXLS_MI_M2L_GJ" presynapticPopulation="MI" postsynapticPopulation="M2L">
      <electricalConnection id="39" preCell="1" postCell="0" synapse="Generic_GJ" preSegment="6" postSegment="5" preFractionAlong="0.858" postFractionAlong="0.962"/>
    </electricalProjection>
    <projection id="NCXLS_MI_I4" presynapticPopulation="MI" postsynapticPopulation="I4" synapse="Acetylcholine">
      <connection id="40" preCellId="../MI/1/MI" postCellId="../I4/0/I4" preSegmentId="6" postSegmentId="10" preFractionAlong="0.858" postFractionAlong="0.486"/>
    </projection>
    <projection id="NCXLS_M2R_MI" presynapticPopulation="M2R" postsynapticPopulation="MI" synapse="Acetylcholine">
      <connection id="44" preCellId="../M2R/1/M2R" postCellId="../MI/0/MI" preSegmentId="9" postSegmentId="2" preFractionAlong="0.163" postFractionAlong="0.685"/>
      <connection id="48" preCellId="../M2R/1/M2R" postCellId="../MI/1/MI" preSegmentId="9" postSegmentId="3" preFractionAlong="0.163" postFractionAlong="0.384"/>
      <connection id="65" preCellId="../M2R/2/M2R" postCellId="../MI/1/MI" preSegmentId="1" postSegmentId="3" preFractionAlong="0.863" postFractionAlong="0.384"/>
    </projection>
    <projection id="NCXLS_M2R_M2R" presynapticPopulation="M2R" postsynapticPopulation="M2R" synapse="Acetylcholine">
      <connection id="46" preCellId="../M2R/1/M2R" postCellId="../M2R/0/M2R" preSegmentId="9" postSegmentId="1" preFractionAlong="0.163" postFractionAlong="0.469"/>
      <connection id="61" preCellId="../M2R/2/M2R" postCellId="../M2R/0/M2R" preSegmentId="1" postSegmentId="1" preFractionAlong="0.863" postFractionAlong="0.469"/>
      <connection id="66" preCellId="../M2R/2/M2R" postCellId="../M2R/1/M2R" preSegmentId="1" postSegmentId="10" preFractionAlong="0.863" postFractionAlong="0.348"/>
    </projection>
    <projection id="NCXLS_M2R_I4" presynapticPopulation="M2R" postsynapticPopulation="I4" synapse="Acetylcholine">
      <connection id="50" preCellId="../M2R/1/M2R" postCellId="../I4/0/I4" preSegmentId="9" postSegmentId="10" preFractionAlong="0.163" postFractionAlong="0.486"/>
      <connection id="70" preCellId="../M2R/2/M2R" postCellId="../I4/0/I4" preSegmentId="1" postSegmentId="10" preFractionAlong="0.863" postFractionAlong="0.486"/>
    </projection>
    <projection id="NCXLS_I1L_NSML" presynapticPopulation="I1L" postsynapticPopulation="NSML" synapse="Acetylcholine">
      <connection id="53" preCellId="../I1L/0/I1L" postCellId="../NSML/0/NSML" preSegmentId="6" postSegmentId="10" preFractionAlong="0.644" postFractionAlong="0.544"/>
      <connection id="56" preCellId="../I1L/0/I1L" postCellId="../NSML/1/NSML" preSegmentId="6" postSegmentId="5" preFractionAlong="0.644" postFractionAlong="0.554"/>
    </projection>
    <projection id="NCXLS_I1L_M1" presynapticPopulation="I1L" postsynapticPopulation="M1" synapse="Glutamate">
      <connection id="54" preCellId="../I1L/0/I1L" postCellId="../M1/0/M1" preSegmentId="6" postSegmentId="8" preFractionAlong="0.644" postFractionAlong="0.291"/>
    </projection>
    <projection id="NCXLS_I1L_M2L" presynapticPopulation="I1L" postsynapticPopulation="M2L" synapse="Acetylcholine">
      <connection id="55" preCellId="../I1L/0/I1L" postCellId="../M2L/0/M2L" preSegmentId="6" postSegmentId="5" preFractionAlong="0.644" postFractionAlong="0.962"/>
    </projection>
    <electricalProjection id="NCXLS_I1L_I1R_GJ" presynapticPopulation="I1L" postsynapticPopulation="I1R">
      <electricalConnection id="57" preCell="0" postCell="0" synapse="Generic_GJ" preSegment="6" postSegment="6" preFractionAlong="0.644" postFractionAlong="0.459"/>
    </electricalProjection>
    <projection id="NCXLS_I3_MI" presynapticPopulation="I3" postsynapticPopulation="MI" synapse="Acetylcholine">
      <connection id="58" preCellId="../I3/0/I3" postCellId="../MI/0/MI" preSegmentId="2" postSegmentId="2" preFractionAlong="0.583" postFractionAlong="0.685"/>
    </projection>
    <projection id="NCXLS_M2R_M1" presynapticPopulation="M2R" postsynapticPopulation="M1" synapse="Glutamate">
      <connection id="62" preCellId="../M2R/2/M2R" postCellId="../M1/0/M1" preSegmentId="1" postSegmentId="8" preFractionAlong="0.863" postFractionAlong="0.291"/>
    </projection>
    <projection id="NCXLS_M2R_I1L" presynapticPopulation="M2R" postsynapticPopulation="I1L" synapse="Acetylcholine">
      <connection id="67" preCellId="../M2R/2/M2R" postCellId="../I1L/0/I1L" preSegmentId="1" postSegmentId="2" preFractionAlong="0.863" postFractionAlong="0.217"/>
    </projection>
    <projection id="NCXLS_M2R_I1R" presynapticPopulation="M2R" postsynapticPopulation="I1R" synapse="Acetylcholine">
      <connection id="73" preCellId="../M2R/2/M2R" postCellId="../I1R/0/I1R" preSegmentId="1" postSegmentId="6" preFractionAlong="0.863" postFractionAlong="0.459"/>
    </projection>
    <projection id="NCXLS_M2R_NSML" presynapticPopulation="M2R" postsynapticPopulation="NSML" synapse="Acetylcholine">
      <connection id="74" preCellId="../M2R/2/M2R" postCellId="../NSML/2/NSML" preSegmentId="1" postSegmentId="10" preFractionAlong="0.863" postFractionAlong="0.724"/>
    </projection>
    <projection id="NCXLS_M2L_MI" presynapticPopulation="M2L" postsynapticPopulation="MI" synapse="Glutamate">
      <connection id="75" preCellId="../M2L/0/M2L" postCellId="../MI/0/MI" preSegmentId="8" postSegmentId="2" preFractionAlong="0.001" postFractionAlong="0.685"/>
      <connection id="80" preCellId="../M2L/0/M2L" postCellId="../MI/1/MI" preSegmentId="8" postSegmentId="3" preFractionAlong="0.001" postFractionAlong="0.384"/>
    </projection>
    <projection id="NCXLS_M2L_I2L" presynapticPopulation="M2L" postsynapticPopulation="I2L" synapse="Acetylcholine">
      <connection id="76" preCellId="../M2L/0/M2L" postCellId="../I2L/0/I2L" preSegmentId="8" postSegmentId="8" preFractionAlong="0.001" postFractionAlong="0.031"/>
      <connection id="78" preCellId="../M2L/0/M2L" postCellId="../I2L/1/I2L" preSegmentId="8" postSegmentId="2" preFractionAlong="0.001" postFractionAlong="0.204"/>
      <connection id="83" preCellId="../M2L/0/M2L" postCellId="../I2L/2/I2L" preSegmentId="8" postSegmentId="4" preFractionAlong="0.001" postFractionAlong="0.568"/>
    </projection>
    <projection id="NCXLS_M2L_M1" presynapticPopulation="M2L" postsynapticPopulation="M1" synapse="Acetylcholine">
      <connection id="77" preCellId="../M2L/0/M2L" postCellId="../M1/0/M1" preSegmentId="8" postSegmentId="8" preFractionAlong="0.001" postFractionAlong="0.291"/>
    </projection>
    <projection id="NCXLS_M2L_I2R" presynapticPopulation="M2L" postsynapticPopulation="I2R" synapse="Acetylcholine">
      <connection id="79" preCellId="../M2L/0/M2L" postCellId="../I2R/0/I2R" preSegmentId="8" postSegmentId="9" preFractionAlong="0.001" postFractionAlong="0.207"/>
    </projection>
    <electricalProjection id="NCXLS_M2L_M2R_GJ" presynapticPopulation="M2L" postsynapticPopulation="M2R">
      <electricalConnection id="81" preCell="0" postCell="1" synapse="Generic_GJ" preSegment="8" postSegment="10" preFractionAlong="0.001" postFractionAlong="0.348"/>
    </electricalProjection>
    <projection id="NCXLS_M2L_I1L" presynapticPopulation="M2L" postsynapticPopulation="I1L" synapse="Acetylcholine">
      <connection id="82" preCellId="../M2L/0/M2L" postCellId="../I1L/0/I1L" preSegmentId="8" postSegmentId="2" preFractionAlong="0.001" postFractionAlong="0.217"/>
    </projection>
    <projection id="NCXLS_M2L_I3" presynapticPopulation="M2L" postsynapticPopulation="I3" synapse="Acetylcholine">
      <connection id="84" preCellId="../M2L/0/M2L" postCellId="../I3/0/I3" preSegmentId="8" postSegmentId="7" preFractionAlong="0.001" postFractionAlong="0.388"/>
    </projection>
    <projection id="NCXLS_M2L_NSMR" presynapticPopulation="M2L" postsynapticPopulation="NSMR" synapse="Acetylcholine">
      <connection id="85" preCellId="../M2L/0/M2L" postCellId="../NSMR/0/NSMR" preSegmentId="8" postSegmentId="1" preFractionAlong="0.001" postFractionAlong="0.995"/>
      <connection id="86" preCellId="../M2L/0/M2L" postCellId="../NSMR/1/NSMR" preSegmentId="8" postSegmentId="4" preFractionAlong="0.001" postFractionAlong="0.183"/>
    </projection>
    <projection id="NCXLS_M2L_I1R" presynapticPopulation="M2L" postsynapticPopulation="I1R" synapse="Acetylcholine">
      <connection id="87" preCellId="../M2L/0/M2L" postCellId="../I1R/0/I1R" preSegmentId="8" postSegmentId="6" preFractionAlong="0.001" postFractionAlong="0.459"/>
    </projection>
    <projection id="NCXLS_M2L_NSML" presynapticPopulation="M2L" postsynapticPopulation="NSML" synapse="Acetylcholine">
      <connection id="88" preCellId="../M2L/0/M2L" postCellId="../NSML/2/NSML" preSegmentId="8" postSegmentId="10" preFractionAlong="0.001" postFractionAlong="0.724"/>
    </projection>
    <projection id="NCXLS_NSMR_MI" presynapticPopulation="NSMR" postsynapticPopulation="MI" synapse="Serotonin_Glutamate">
      <connection id="89" preCellId="../NSMR/0/NSMR" postCellId="../MI/0/MI" preSegmentId="10" postSegmentId="2" preFractionAlong="0.339" postFractionAlong="0.685"/>
      <connection id="93" preCellId="../NSMR/0/NSMR" postCellId="../MI/1/MI" preSegmentId="10" postSegmentId="3" preFractionAlong="0.339" postFractionAlong="0.384"/>
      <connection id="99" preCellId="../NSMR/1/NSMR" postCellId="../MI/0/MI" preSegmentId="4" postSegmentId="2" preFractionAlong="0.385" postFractionAlong="0.685"/>
      <connection id="102" preCellId="../NSMR/1/NSMR" postCellId="../MI/1/MI" preSegmentId="4" postSegmentId="3" preFractionAlong="0.385" postFractionAlong="0.384"/>
    </projection>
    <projection id="NCXLS_NSMR_I2L" presynapticPopulation="NSMR" postsynapticPopulation="I2L" synapse="Serotonin_Glutamate">
      <connection id="90" preCellId="../NSMR/0/NSMR" postCellId="../I2L/0/I2L" preSegmentId="10" postSegmentId="8" preFractionAlong="0.339" postFractionAlong="0.031"/>
      <connection id="91" preCellId="../NSMR/0/NSMR" postCellId="../I2L/1/I2L" preSegmentId="10" postSegmentId="2" preFractionAlong="0.339" postFractionAlong="0.204"/>
      <connection id="95" preCellId="../NSMR/0/NSMR" postCellId="../I2L/2/I2L" preSegmentId="10" postSegmentId="4" preFractionAlong="0.339" postFractionAlong="0.568"/>
    </projection>
    <projection id="NCXLS_NSMR_I2R" presynapticPopulation="NSMR" postsynapticPopulation="I2R" synapse="Serotonin_Glutamate">
      <connection id="92" preCellId="../NSMR/0/NSMR" postCellId="../I2R/0/I2R" preSegmentId="10" postSegmentId="9" preFractionAlong="0.339" postFractionAlong="0.207"/>
      <connection id="101" preCellId="../NSMR/1/NSMR" postCellId="../I2R/0/I2R" preSegmentId="4" postSegmentId="9" preFractionAlong="0.385" postFractionAlong="0.207"/>
    </projection>
    <projection id="NCXLS_NSMR_M2R" presynapticPopulation="NSMR" postsynapticPopulation="M2R" synapse="Serotonin_Glutamate">
      <connection id="94" preCellId="../NSMR/0/NSMR" postCellId="../M2R/1/M2R" preSegmentId="10" postSegmentId="10" preFractionAlong="0.339" postFractionAlong="0.348"/>
      <connection id="100" preCellId="../NSMR/1/NSMR" postCellId="../M2R/0/M2R" preSegmentId="4" postSegmentId="1" preFractionAlong="0.385" postFractionAlong="0.469"/>
      <connection id="103" preCellId="../NSMR/1/NSMR" postCellId="../M2R/2/M2R" preSegmentId="4" postSegmentId="7" preFractionAlong="0.385" postFractionAlong="0.184"/>
    </projection>
    <projection id="NCXLS_NSMR_I3" presynapticPopulation="NSMR" postsynapticPopulation="I3" synapse="Serotonin_Glutamate">
      <connection id="96" preCellId="../NSMR/0/NSMR" postCellId="../I3/0/I3" preSegmentId="10" postSegmentId="7" preFractionAlong="0.339" postFractionAlong="0.388"/>
    </projection>
    <electricalProjection id="NCXLS_NSMR_NSMR_GJ" presynapticPopulation="NSMR" postsynapticPopulation="NSMR">
      <electricalConnection id="97" preCell="0" postCell="1" synapse="Generic_GJ" preSegment="10" postSegment="4" preFractionAlong="0.339" postFractionAlong="0.183"/>
    </electricalProjection>
    <projection id="NCXLS_NSML_I1R" presynapticPopulation="NSML" postsynapticPopulation="I1R" synapse="Serotonin_Glutamate">
      <connection id="98" preCellId="../NSML/1/NSML" postCellId="../I1R/0/I1R" preSegmentId="5" postSegmentId="6" preFractionAlong="0.574" postFractionAlong="0.459"/>
      <connection id="111" preCellId="../NSML/2/NSML" postCellId="../I1R/0/I1R" preSegmentId="9" postSegmentId="6" preFractionAlong="0.211" postFractionAlong="0.459"/>
    </projection>
    <projection id="NCXLS_NSMR_I4" presynapticPopulation="NSMR" postsynapticPopulation="I4" synapse="Serotonin_Glutamate">
      <connection id="104" preCellId="../NSMR/1/NSMR" postCellId="../I4/0/I4" preSegmentId="4" postSegmentId="10" preFractionAlong="0.385" postFractionAlong="0.486"/>
    </projection>
    <projection id="NCXLS_NSML_NSML" presynapticPopulation="NSML" postsynapticPopulation="NSML" synapse="Serotonin_Glutamate">
      <connection id="105" preCellId="../NSML/2/NSML" postCellId="../NSML/0/NSML" preSegmentId="9" postSegmentId="10" preFractionAlong="0.211" postFractionAlong="0.544"/>
      <connection id="110" preCellId="../NSML/2/NSML" postCellId="../NSML/1/NSML" preSegmentId="9" postSegmentId="5" preFractionAlong="0.211" postFractionAlong="0.554"/>
    </projection>
    <projection id="NCXLS_NSML_M1" presynapticPopulation="NSML" postsynapticPopulation="M1" synapse="Serotonin_Glutamate">
      <connection id="106" preCellId="../NSML/2/NSML" postCellId="../M1/0/M1" preSegmentId="9" postSegmentId="8" preFractionAlong="0.211" postFractionAlong="0.291"/>
    </projection>
    <projection id="NCXLS_NSML_I1L" presynapticPopulation="NSML" postsynapticPopulation="I1L" synapse="Serotonin_Glutamate">
      <connection id="107" preCellId="../NSML/2/NSML" postCellId="../I1L/0/I1L" preSegmentId="9" postSegmentId="2" preFractionAlong="0.211" postFractionAlong="0.217"/>
    </projection>
    <projection id="NCXLS_NSML_M2R" presynapticPopulation="NSML" postsynapticPopulation="M2R" synapse="Serotonin_Glutamate">
      <connection id="108" preCellId="../NSML/2/NSML" postCellId="../M2R/2/M2R" preSegmentId="9" postSegmentId="7" preFractionAlong="0.211" postFractionAlong="0.184"/>
    </projection>
    <projection id="NCXLS_NSML_M2L" presynapticPopulation="NSML" postsynapticPopulation="M2L" synapse="Serotonin_Glutamate">
      <connection id="109" preCellId="../NSML/2/NSML" postCellId="../M2L/0/M2L" preSegmentId="9" postSegmentId="5" preFractionAlong="0.211" postFractionAlong="0.962"/>
    </projection>
  </network>
</neuroml>
