<?xml version='1.0' encoding='UTF-8'?>
<neuroml xmlns="http://www.neuroml.org/schema/neuroml2" xmlns:xsi="http://www.w3.org/2001/XMLSchema-instance" xsi:schemaLocation="http://www.neuroml.org/schema/neuroml2 https://raw.githubusercontent.com/NeuroML/NeuroML2/development/Schemas/NeuroML2/NeuroML_v2beta4.xsd" id="gvft_network_bio_prior_lamW_0.322_DF_0.013_t10.net">
  <notes>NeuroML2 network generated from GVFT simulation on 2025-05-04 10:22:12
</notes>
  <include href="I1L.cell.nml"/>
  <include href="I1R.cell.nml"/>
  <include href="I2L.cell.nml"/>
  <include href="I2R.cell.nml"/>
  <include href="M1.cell.nml"/>
  <include href="M2L.cell.nml"/>
  <include href="M2R.cell.nml"/>
  <include href="M3L.cell.nml"/>
  <include href="M3R.cell.nml"/>
  <include href="MI.cell.nml"/>
  <include href="NSML.cell.nml"/>
  <include href="NSMR.cell.nml"/>
  <include href="Acetylcholine.synapse.nml"/>
  <include href="Generic_GJ.nml"/>
  <include href="Glutamate.synapse.nml"/>
  <include href="Serotonin_Glutamate.synapse.nml"/>
  <network id="gvft_network_bio_prior_lamW_0.322_DF_0.013_t10.net" type="networkWithTemperature" temperature="20.0 degC">
    <population id="I1L" component="I1L" type="populationList" size="1">
      <instance id="0">
        <location x="-0.6281406879425049" y="0.24623116850852966" z="0.0"/>
      </instance>
    </population>
    <population id="I1R" component="I1R" type="populationList" size="1">
      <instance id="0">
        <location x="-0.6281406879425049" y="0.25628140568733215" z="0.0"/>
      </instance>
    </population>
    <population id="I2L" component="I2L" type="populationList" size="3">
      <instance id="0">
        <location x="-0.4874371886253357" y="-0.7185929417610168" z="0.0"/>
      </instance>
      <instance id="1">
        <location x="0.7185929417610168" y="-0.3668341636657715" z="0.0"/>
      </instance>
      <instance id="2">
        <location x="-0.05527639389038086" y="-0.7989949584007263" z="0.0"/>
      </instance>
    </population>
    <population id="I2R" component="I2R" type="populationList" size="3">
      <instance id="0">
        <location x="-0.8190954923629761" y="-0.6582914590835571" z="0.0"/>
      </instance>
      <instance id="1">
        <location x="-0.8793969750404358" y="-0.8894472122192383" z="0.0"/>
      </instance>
      <instance id="2">
        <location x="-0.979899525642395" y="-0.7688442468643188" z="0.0"/>
      </instance>
    </population>
    <population id="M1" component="M1" type="populationList" size="1">
      <instance id="0">
        <location x="0.6683416962623596" y="-0.9698492288589478" z="0.0"/>
      </instance>
    </population>
    <population id="M2L" component="M2L" type="populationList" size="1">
      <instance id="0">
        <location x="-0.2261306643486023" y="-0.3467336893081665" z="0.0"/>
      </instance>
    </population>
    <population id="M2R" component="M2R" type="populationList" size="1">
      <instance id="0">
        <location x="0.43718594312667847" y="-0.3366834223270416" z="0.0"/>
      </instance>
    </population>
    <population id="M3L" component="M3L" type="populationList" size="1">
      <instance id="0">
        <location x="-0.6180904507637024" y="-0.5276381969451904" z="0.0"/>
      </instance>
    </population>
    <population id="M3R" component="M3R" type="populationList" size="1">
      <instance id="0">
        <location x="-0.025125637650489807" y="-0.095477394759655" z="0.0"/>
      </instance>
    </population>
    <population id="MI" component="MI" type="populationList" size="2">
      <instance id="0">
        <location x="-0.6482412219047546" y="0.5376884341239929" z="0.0"/>
      </instance>
      <instance id="1">
        <location x="-0.2864321768283844" y="0.37688443064689636" z="0.0"/>
      </instance>
    </population>
    <population id="NSML" component="NSML" type="populationList" size="3">
      <instance id="0">
        <location x="-0.3366834223270416" y="0.4673366844654083" z="0.0"/>
      </instance>
      <instance id="1">
        <location x="-0.6281406879425049" y="-0.32663318514823914" z="0.0"/>
      </instance>
      <instance id="2">
        <location x="0.12562814354896545" y="0.23618091642856598" z="0.0"/>
      </instance>
    </population>
    <population id="NSMR" component="NSMR" type="populationList" size="2">
      <instance id="0">
        <location x="-0.07537689805030823" y="-0.49748745560646057" z="0.0"/>
      </instance>
      <instance id="1">
        <location x="0.7989949584007263" y="0.07537689805030823" z="0.0"/>
      </instance>
    </population>
    <projection id="NCXLS_NSML_MI" presynapticPopulation="NSML" postsynapticPopulation="MI" synapse="Serotonin_Glutamate">
      <connection id="0" preCellId="../NSML/0/NSML" postCellId="../MI/0/MI" preSegmentId="7" postSegmentId="2" preFractionAlong="0.302" postFractionAlong="0.685"/>
      <connection id="38" preCellId="../NSML/1/NSML" postCellId="../MI/0/MI" preSegmentId="5" postSegmentId="2" preFractionAlong="0.574" postFractionAlong="0.685"/>
      <connection id="39" preCellId="../NSML/1/NSML" postCellId="../MI/1/MI" preSegmentId="5" postSegmentId="3" preFractionAlong="0.574" postFractionAlong="0.384"/>
    </projection>
    <projection id="NCXLS_MI_I2L" presynapticPopulation="MI" postsynapticPopulation="I2L" synapse="Acetylcholine">
      <connection id="1" preCellId="../MI/0/MI" postCellId="../I2L/0/I2L" preSegmentId="5" postSegmentId="8" preFractionAlong="0.5" postFractionAlong="0.031"/>
    </projection>
    <projection id="NCXLS_MI_I2R" presynapticPopulation="MI" postsynapticPopulation="I2R" synapse="Acetylcholine">
      <connection id="2" preCellId="../MI/0/MI" postCellId="../I2R/0/I2R" preSegmentId="5" postSegmentId="9" preFractionAlong="0.5" postFractionAlong="0.207"/>
      <connection id="3" preCellId="../MI/0/MI" postCellId="../I2R/1/I2R" preSegmentId="5" postSegmentId="5" preFractionAlong="0.5" postFractionAlong="0.781"/>
      <connection id="4" preCellId="../MI/0/MI" postCellId="../I2R/2/I2R" preSegmentId="5" postSegmentId="2" preFractionAlong="0.5" postFractionAlong="0.625"/>
    </projection>
    <projection id="NCXLS_MI_I1L" presynapticPopulation="MI" postsynapticPopulation="I1L" synapse="Acetylcholine">
      <connection id="5" preCellId="../MI/0/MI" postCellId="../I1L/0/I1L" preSegmentId="5" postSegmentId="2" preFractionAlong="0.5" postFractionAlong="0.217"/>
      <connection id="22" preCellId="../MI/1/MI" postCellId="../I1L/0/I1L" preSegmentId="6" postSegmentId="2" preFractionAlong="0.858" postFractionAlong="0.217"/>
    </projection>
    <projection id="NCXLS_MI_M3L" presynapticPopulation="MI" postsynapticPopulation="M3L" synapse="Glutamate">
      <connection id="6" preCellId="../MI/0/MI" postCellId="../M3L/0/M3L" preSegmentId="5" postSegmentId="1" preFractionAlong="0.5" postFractionAlong="0.675"/>
    </projection>
    <projection id="NCXLS_MI_NSML" presynapticPopulation="MI" postsynapticPopulation="NSML" synapse="Acetylcholine">
      <connection id="7" preCellId="../MI/0/MI" postCellId="../NSML/1/NSML" preSegmentId="5" postSegmentId="5" preFractionAlong="0.5" postFractionAlong="0.554"/>
      <connection id="20" preCellId="../MI/1/MI" postCellId="../NSML/0/NSML" preSegmentId="6" postSegmentId="10" preFractionAlong="0.858" postFractionAlong="0.544"/>
    </projection>
    <projection id="NCXLS_MI_I1R" presynapticPopulation="MI" postsynapticPopulation="I1R" synapse="Acetylcholine">
      <connection id="8" preCellId="../MI/0/MI" postCellId="../I1R/0/I1R" preSegmentId="5" postSegmentId="6" preFractionAlong="0.5" postFractionAlong="0.459"/>
      <connection id="23" preCellId="../MI/1/MI" postCellId="../I1R/0/I1R" preSegmentId="6" postSegmentId="6" preFractionAlong="0.858" postFractionAlong="0.459"/>
    </projection>
    <projection id="NCXLS_I2L_I2L" presynapticPopulation="I2L" postsynapticPopulation="I2L" synapse="Acetylcholine">
      <connection id="9" preCellId="../I2L/0/I2L" postCellId="../I2L/2/I2L" preSegmentId="10" postSegmentId="4" preFractionAlong="0.838" postFractionAlong="0.568"/>
    </projection>
    <electricalProjection id="NCXLS_I2L_I2R_GJ" presynapticPopulation="I2L" postsynapticPopulation="I2R">
      <electricalConnection id="10" preCell="0" postCell="1" synapse="Generic_GJ" preSegment="10" postSegment="5" preFractionAlong="0.838" postFractionAlong="0.781"/>
    </electricalProjection>
    <projection id="NCXLS_I2L_M1" presynapticPopulation="I2L" postsynapticPopulation="M1" synapse="Acetylcholine">
      <connection id="11" preCellId="../I2L/0/I2L" postCellId="../M1/0/M1" preSegmentId="10" postSegmentId="8" preFractionAlong="0.838" postFractionAlong="0.291"/>
    </projection>
    <projection id="NCXLS_M1_I2L" presynapticPopulation="M1" postsynapticPopulation="I2L" synapse="Acetylcholine">
      <connection id="12" preCellId="../M1/0/M1" postCellId="../I2L/0/I2L" preSegmentId="1" postSegmentId="8" preFractionAlong="0.864" postFractionAlong="0.031"/>
      <connection id="14" preCellId="../M1/0/M1" postCellId="../I2L/2/I2L" preSegmentId="1" postSegmentId="4" preFractionAlong="0.864" postFractionAlong="0.568"/>
    </projection>
    <projection id="NCXLS_M1_I2R" presynapticPopulation="M1" postsynapticPopulation="I2R" synapse="Acetylcholine">
      <connection id="13" preCellId="../M1/0/M1" postCellId="../I2R/0/I2R" preSegmentId="1" postSegmentId="9" preFractionAlong="0.864" postFractionAlong="0.207"/>
      <connection id="15" preCellId="../M1/0/M1" postCellId="../I2R/1/I2R" preSegmentId="1" postSegmentId="5" preFractionAlong="0.864" postFractionAlong="0.781"/>
      <connection id="17" preCellId="../M1/0/M1" postCellId="../I2R/2/I2R" preSegmentId="1" postSegmentId="2" preFractionAlong="0.864" postFractionAlong="0.625"/>
    </projection>
    <projection id="NCXLS_M1_NSMR" presynapticPopulation="M1" postsynapticPopulation="NSMR" synapse="Acetylcholine">
      <connection id="16" preCellId="../M1/0/M1" postCellId="../NSMR/0/NSMR" preSegmentId="1" postSegmentId="1" preFractionAlong="0.864" postFractionAlong="0.995"/>
    </projection>
    <projection id="NCXLS_M1_M3L" presynapticPopulation="M1" postsynapticPopulation="M3L" synapse="Acetylcholine">
      <connection id="18" preCellId="../M1/0/M1" postCellId="../M3L/0/M3L" preSegmentId="1" postSegmentId="1" preFractionAlong="0.864" postFractionAlong="0.675"/>
    </projection>
    <projection id="NCXLS_M1_NSML" presynapticPopulation="M1" postsynapticPopulation="NSML" synapse="Acetylcholine">
      <connection id="19" preCellId="../M1/0/M1" postCellId="../NSML/1/NSML" preSegmentId="1" postSegmentId="5" preFractionAlong="0.864" postFractionAlong="0.554"/>
    </projection>
    <projection id="NCXLS_MI_MI" presynapticPopulation="MI" postsynapticPopulation="MI" synapse="Acetylcholine">
      <connection id="21" preCellId="../MI/1/MI" postCellId="../MI/0/MI" preSegmentId="6" postSegmentId="2" preFractionAlong="0.858" postFractionAlong="0.685"/>
    </projection>
    <projection id="NCXLS_NSMR_I2L" presynapticPopulation="NSMR" postsynapticPopulation="I2L" synapse="Serotonin_Glutamate">
      <connection id="24" preCellId="../NSMR/0/NSMR" postCellId="../I2L/0/I2L" preSegmentId="10" postSegmentId="8" preFractionAlong="0.339" postFractionAlong="0.031"/>
      <connection id="25" preCellId="../NSMR/0/NSMR" postCellId="../I2L/2/I2L" preSegmentId="10" postSegmentId="4" preFractionAlong="0.339" postFractionAlong="0.568"/>
    </projection>
    <projection id="NCXLS_NSMR_I2R" presynapticPopulation="NSMR" postsynapticPopulation="I2R" synapse="Serotonin_Glutamate">
      <connection id="26" preCellId="../NSMR/0/NSMR" postCellId="../I2R/1/I2R" preSegmentId="10" postSegmentId="5" preFractionAlong="0.339" postFractionAlong="0.781"/>
    </projection>
    <projection id="NCXLS_NSMR_M1" presynapticPopulation="NSMR" postsynapticPopulation="M1" synapse="Serotonin_Glutamate">
      <connection id="27" preCellId="../NSMR/0/NSMR" postCellId="../M1/0/M1" preSegmentId="10" postSegmentId="8" preFractionAlong="0.339" postFractionAlong="0.291"/>
    </projection>
    <projection id="NCXLS_I2R_I2R" presynapticPopulation="I2R" postsynapticPopulation="I2R" synapse="Glutamate">
      <connection id="28" preCellId="../I2R/2/I2R" postCellId="../I2R/1/I2R" preSegmentId="7" postSegmentId="5" preFractionAlong="0.423" postFractionAlong="0.781"/>
    </projection>
    <projection id="NCXLS_I1L_MI" presynapticPopulation="I1L" postsynapticPopulation="MI" synapse="Acetylcholine">
      <connection id="29" preCellId="../I1L/0/I1L" postCellId="../MI/0/MI" preSegmentId="6" postSegmentId="2" preFractionAlong="0.644" postFractionAlong="0.685"/>
    </projection>
    <projection id="NCXLS_I1L_I1R" presynapticPopulation="I1L" postsynapticPopulation="I1R" synapse="Acetylcholine">
      <connection id="30" preCellId="../I1L/0/I1L" postCellId="../I1R/0/I1R" preSegmentId="6" postSegmentId="6" preFractionAlong="0.644" postFractionAlong="0.459"/>
    </projection>
    <projection id="NCXLS_M3L_I2L" presynapticPopulation="M3L" postsynapticPopulation="I2L" synapse="Acetylcholine">
      <connection id="31" preCellId="../M3L/0/M3L" postCellId="../I2L/0/I2L" preSegmentId="4" postSegmentId="8" preFractionAlong="0.699" postFractionAlong="0.031"/>
      <connection id="33" preCellId="../M3L/0/M3L" postCellId="../I2L/2/I2L" preSegmentId="4" postSegmentId="4" preFractionAlong="0.699" postFractionAlong="0.568"/>
    </projection>
    <projection id="NCXLS_M3L_I2R" presynapticPopulation="M3L" postsynapticPopulation="I2R" synapse="Acetylcholine">
      <connection id="32" preCellId="../M3L/0/M3L" postCellId="../I2R/0/I2R" preSegmentId="4" postSegmentId="9" preFractionAlong="0.699" postFractionAlong="0.207"/>
      <connection id="34" preCellId="../M3L/0/M3L" postCellId="../I2R/1/I2R" preSegmentId="4" postSegmentId="5" preFractionAlong="0.699" postFractionAlong="0.781"/>
      <connection id="36" preCellId="../M3L/0/M3L" postCellId="../I2R/2/I2R" preSegmentId="4" postSegmentId="2" preFractionAlong="0.699" postFractionAlong="0.625"/>
    </projection>
    <projection id="NCXLS_M3L_M1" presynapticPopulation="M3L" postsynapticPopulation="M1" synapse="Glutamate">
      <connection id="35" preCellId="../M3L/0/M3L" postCellId="../M1/0/M1" preSegmentId="4" postSegmentId="8" preFractionAlong="0.699" postFractionAlong="0.291"/>
    </projection>
    <projection id="NCXLS_NSML_NSML" presynapticPopulation="NSML" postsynapticPopulation="NSML" synapse="Serotonin_Glutamate">
      <connection id="37" preCellId="../NSML/1/NSML" postCellId="../NSML/0/NSML" preSegmentId="5" postSegmentId="10" preFractionAlong="0.574" postFractionAlong="0.544"/>
    </projection>
    <projection id="NCXLS_NSML_I1L" presynapticPopulation="NSML" postsynapticPopulation="I1L" synapse="Serotonin_Glutamate">
      <connection id="40" preCellId="../NSML/1/NSML" postCellId="../I1L/0/I1L" preSegmentId="5" postSegmentId="2" preFractionAlong="0.574" postFractionAlong="0.217"/>
    </projection>
    <projection id="NCXLS_NSML_I1R" presynapticPopulation="NSML" postsynapticPopulation="I1R" synapse="Serotonin_Glutamate">
      <connection id="41" preCellId="../NSML/1/NSML" postCellId="../I1R/0/I1R" preSegmentId="5" postSegmentId="6" preFractionAlong="0.574" postFractionAlong="0.459"/>
    </projection>
    <projection id="NCXLS_M3R_MI" presynapticPopulation="M3R" postsynapticPopulation="MI" synapse="Acetylcholine">
      <connection id="42" preCellId="../M3R/0/M3R" postCellId="../MI/0/MI" preSegmentId="10" postSegmentId="2" preFractionAlong="0.782" postFractionAlong="0.685"/>
    </projection>
    <projection id="NCXLS_M3R_I2L" presynapticPopulation="M3R" postsynapticPopulation="I2L" synapse="Acetylcholine">
      <connection id="43" preCellId="../M3R/0/M3R" postCellId="../I2L/0/I2L" preSegmentId="10" postSegmentId="8" preFractionAlong="0.782" postFractionAlong="0.031"/>
      <connection id="45" preCellId="../M3R/0/M3R" postCellId="../I2L/2/I2L" preSegmentId="10" postSegmentId="4" preFractionAlong="0.782" postFractionAlong="0.568"/>
    </projection>
    <projection id="NCXLS_M3R_I2R" presynapticPopulation="M3R" postsynapticPopulation="I2R" synapse="Acetylcholine">
      <connection id="44" preCellId="../M3R/0/M3R" postCellId="../I2R/0/I2R" preSegmentId="10" postSegmentId="9" preFractionAlong="0.782" postFractionAlong="0.207"/>
      <connection id="46" preCellId="../M3R/0/M3R" postCellId="../I2R/1/I2R" preSegmentId="10" postSegmentId="5" preFractionAlong="0.782" postFractionAlong="0.781"/>
      <connection id="48" preCellId="../M3R/0/M3R" postCellId="../I2R/2/I2R" preSegmentId="10" postSegmentId="2" preFractionAlong="0.782" postFractionAlong="0.625"/>
    </projection>
    <projection id="NCXLS_M3R_NSMR" presynapticPopulation="M3R" postsynapticPopulation="NSMR" synapse="Acetylcholine">
      <connection id="47" preCellId="../M3R/0/M3R" postCellId="../NSMR/0/NSMR" preSegmentId="10" postSegmentId="1" preFractionAlong="0.782" postFractionAlong="0.995"/>
    </projection>
    <projection id="NCXLS_M3R_I1L" presynapticPopulation="M3R" postsynapticPopulation="I1L" synapse="Acetylcholine">
      <connection id="49" preCellId="../M3R/0/M3R" postCellId="../I1L/0/I1L" preSegmentId="10" postSegmentId="2" preFractionAlong="0.782" postFractionAlong="0.217"/>
    </projection>
    <projection id="NCXLS_M3R_M3L" presynapticPopulation="M3R" postsynapticPopulation="M3L" synapse="Acetylcholine">
      <connection id="50" preCellId="../M3R/0/M3R" postCellId="../M3L/0/M3L" preSegmentId="10" postSegmentId="1" preFractionAlong="0.782" postFractionAlong="0.675"/>
    </projection>
    <projection id="NCXLS_M3R_NSML" presynapticPopulation="M3R" postsynapticPopulation="NSML" synapse="Acetylcholine">
      <connection id="51" preCellId="../M3R/0/M3R" postCellId="../NSML/1/NSML" preSegmentId="10" postSegmentId="5" preFractionAlong="0.782" postFractionAlong="0.554"/>
    </projection>
    <projection id="NCXLS_M3R_M2L" presynapticPopulation="M3R" postsynapticPopulation="M2L" synapse="Acetylcholine">
      <connection id="52" preCellId="../M3R/0/M3R" postCellId="../M2L/0/M2L" preSegmentId="10" postSegmentId="5" preFractionAlong="0.782" postFractionAlong="0.962"/>
    </projection>
    <projection id="NCXLS_M3R_I1R" presynapticPopulation="M3R" postsynapticPopulation="I1R" synapse="Acetylcholine">
      <connection id="53" preCellId="../M3R/0/M3R" postCellId="../I1R/0/I1R" preSegmentId="10" postSegmentId="6" preFractionAlong="0.782" postFractionAlong="0.459"/>
    </projection>
    <projection id="NCXLS_M2L_I2L" presynapticPopulation="M2L" postsynapticPopulation="I2L" synapse="Acetylcholine">
      <connection id="54" preCellId="../M2L/0/M2L" postCellId="../I2L/0/I2L" preSegmentId="8" postSegmentId="8" preFractionAlong="0.001" postFractionAlong="0.031"/>
      <connection id="55" preCellId="../M2L/0/M2L" postCellId="../I2L/1/I2L" preSegmentId="8" postSegmentId="2" preFractionAlong="0.001" postFractionAlong="0.204"/>
      <connection id="56" preCellId="../M2L/0/M2L" postCellId="../I2L/2/I2L" preSegmentId="8" postSegmentId="4" preFractionAlong="0.001" postFractionAlong="0.568"/>
    </projection>
    <electricalProjection id="NCXLS_M2L_M1_GJ" presynapticPopulation="M2L" postsynapticPopulation="M1">
      <electricalConnection id="57" preCell="0" postCell="0" synapse="Generic_GJ" preSegment="8" postSegment="8" preFractionAlong="0.001" postFractionAlong="0.291"/>
    </electricalProjection>
    <projection id="NCXLS_M2L_NSMR" presynapticPopulation="M2L" postsynapticPopulation="NSMR" synapse="Acetylcholine">
      <connection id="58" preCellId="../M2L/0/M2L" postCellId="../NSMR/0/NSMR" preSegmentId="8" postSegmentId="1" preFractionAlong="0.001" postFractionAlong="0.995"/>
      <connection id="59" preCellId="../M2L/0/M2L" postCellId="../NSMR/1/NSMR" preSegmentId="8" postSegmentId="4" preFractionAlong="0.001" postFractionAlong="0.183"/>
    </projection>
    <projection id="NCXLS_M2L_M2R" presynapticPopulation="M2L" postsynapticPopulation="M2R" synapse="Glutamate">
      <connection id="60" preCellId="../M2L/0/M2L" postCellId="../M2R/0/M2R" preSegmentId="8" postSegmentId="1" preFractionAlong="0.001" postFractionAlong="0.469"/>
    </projection>
    <projection id="NCXLS_I1R_MI" presynapticPopulation="I1R" postsynapticPopulation="MI" synapse="Glutamate">
      <connection id="61" preCellId="../I1R/0/I1R" postCellId="../MI/0/MI" preSegmentId="3" postSegmentId="2" preFractionAlong="0.075" postFractionAlong="0.685"/>
    </projection>
    <projection id="NCXLS_M2R_I2L" presynapticPopulation="M2R" postsynapticPopulation="I2L" synapse="Acetylcholine">
      <connection id="62" preCellId="../M2R/0/M2R" postCellId="../I2L/1/I2L" preSegmentId="6" postSegmentId="2" preFractionAlong="0.854" postFractionAlong="0.204"/>
      <connection id="63" preCellId="../M2R/0/M2R" postCellId="../I2L/2/I2L" preSegmentId="6" postSegmentId="4" preFractionAlong="0.854" postFractionAlong="0.568"/>
    </projection>
    <projection id="NCXLS_M2R_M1" presynapticPopulation="M2R" postsynapticPopulation="M1" synapse="Glutamate">
      <connection id="64" preCellId="../M2R/0/M2R" postCellId="../M1/0/M1" preSegmentId="6" postSegmentId="8" preFractionAlong="0.854" postFractionAlong="0.291"/>
    </projection>
  </network>
</neuroml>
