<?xml version='1.0' encoding='UTF-8'?>
<neuroml xmlns="http://www.neuroml.org/schema/neuroml2" xmlns:xsi="http://www.w3.org/2001/XMLSchema-instance" xsi:schemaLocation="http://www.neuroml.org/schema/neuroml2 https://raw.githubusercontent.com/NeuroML/NeuroML2/development/Schemas/NeuroML2/NeuroML_v2beta4.xsd" id="gvft_network_bio_prior_lamW_0.322_DF_0.013_t20.net">
  <notes>NeuroML2 network generated from GVFT simulation on 2025-05-04 10:22:13
</notes>
  <include href="I1L.cell.nml"/>
  <include href="I1R.cell.nml"/>
  <include href="I2L.cell.nml"/>
  <include href="M1.cell.nml"/>
  <include href="M2L.cell.nml"/>
  <include href="M2R.cell.nml"/>
  <include href="M3L.cell.nml"/>
  <include href="M3R.cell.nml"/>
  <include href="M4.cell.nml"/>
  <include href="NSML.cell.nml"/>
  <include href="NSMR.cell.nml"/>
  <include href="Acetylcholine.synapse.nml"/>
  <include href="Generic_GJ.nml"/>
  <include href="Glutamate.synapse.nml"/>
  <include href="Serotonin_Glutamate.synapse.nml"/>
  <network id="gvft_network_bio_prior_lamW_0.322_DF_0.013_t20.net" type="networkWithTemperature" temperature="20.0 degC">
    <population id="I1L" component="I1L" type="populationList" size="3">
      <instance id="0">
        <location x="0.26633167266845703" y="0.8994975090026855" z="0.0"/>
      </instance>
      <instance id="1">
        <location x="0.08542714267969131" y="0.7386934757232666" z="0.0"/>
      </instance>
      <instance id="2">
        <location x="-0.19597990810871124" y="0.9899497628211975" z="0.0"/>
      </instance>
    </population>
    <population id="I1R" component="I1R" type="populationList" size="4">
      <instance id="0">
        <location x="-0.4070351719856262" y="-0.45728644728660583" z="0.0"/>
      </instance>
      <instance id="1">
        <location x="-0.7386934757232666" y="0.08542714267969131" z="0.0"/>
      </instance>
      <instance id="2">
        <location x="-0.37688443064689636" y="-0.45728644728660583" z="0.0"/>
      </instance>
      <instance id="3">
        <location x="-0.015075387433171272" y="0.4070351719856262" z="0.0"/>
      </instance>
    </population>
    <population id="I2L" component="I2L" type="populationList" size="1">
      <instance id="0">
        <location x="0.49748745560646057" y="-0.7185929417610168" z="0.0"/>
      </instance>
    </population>
    <population id="M1" component="M1" type="populationList" size="1">
      <instance id="0">
        <location x="0.10552764683961868" y="0.5778894424438477" z="0.0"/>
      </instance>
    </population>
    <population id="M2L" component="M2L" type="populationList" size="1">
      <instance id="0">
        <location x="0.005025136284530163" y="0.025125637650489807" z="0.0"/>
      </instance>
    </population>
    <population id="M2R" component="M2R" type="populationList" size="1">
      <instance id="0">
        <location x="0.30653268098831177" y="0.7487437129020691" z="0.0"/>
      </instance>
    </population>
    <population id="M3L" component="M3L" type="populationList" size="1">
      <instance id="0">
        <location x="0.24623116850852966" y="0.8090452551841736" z="0.0"/>
      </instance>
    </population>
    <population id="M3R" component="M3R" type="populationList" size="1">
      <instance id="0">
        <location x="-0.07537689805030823" y="0.07537689805030823" z="0.0"/>
      </instance>
    </population>
    <population id="M4" component="M4" type="populationList" size="2">
      <instance id="0">
        <location x="0.8090452551841736" y="-0.14572864770889282" z="0.0"/>
      </instance>
      <instance id="1">
        <location x="0.7989949584007263" y="-0.25628140568733215" z="0.0"/>
      </instance>
    </population>
    <population id="NSML" component="NSML" type="populationList" size="3">
      <instance id="0">
        <location x="0.30653268098831177" y="0.8693467378616333" z="0.0"/>
      </instance>
      <instance id="1">
        <location x="-0.3467336893081665" y="0.03517588973045349" z="0.0"/>
      </instance>
      <instance id="2">
        <location x="0.8190954923629761" y="-0.356783926486969" z="0.0"/>
      </instance>
    </population>
    <population id="NSMR" component="NSMR" type="populationList" size="2">
      <instance id="0">
        <location x="0.6783919334411621" y="0.8090452551841736" z="0.0"/>
      </instance>
      <instance id="1">
        <location x="-0.37688443064689636" y="-0.17587940394878387" z="0.0"/>
      </instance>
    </population>
    <projection id="NCXLS_M1_NSML" presynapticPopulation="M1" postsynapticPopulation="NSML" synapse="Acetylcholine">
      <connection id="0" preCellId="../M1/0/M1" postCellId="../NSML/0/NSML" preSegmentId="1" postSegmentId="10" preFractionAlong="0.864" postFractionAlong="0.544"/>
    </projection>
    <projection id="NCXLS_M1_I1L" presynapticPopulation="M1" postsynapticPopulation="I1L" synapse="Acetylcholine">
      <connection id="1" preCellId="../M1/0/M1" postCellId="../I1L/0/I1L" preSegmentId="1" postSegmentId="2" preFractionAlong="0.864" postFractionAlong="0.217"/>
      <connection id="2" preCellId="../M1/0/M1" postCellId="../I1L/1/I1L" preSegmentId="1" postSegmentId="6" preFractionAlong="0.864" postFractionAlong="0.752"/>
      <connection id="4" preCellId="../M1/0/M1" postCellId="../I1L/2/I1L" preSegmentId="1" postSegmentId="8" preFractionAlong="0.864" postFractionAlong="0.948"/>
    </projection>
    <projection id="NCXLS_M1_M3L" presynapticPopulation="M1" postsynapticPopulation="M3L" synapse="Glutamate">
      <connection id="3" preCellId="../M1/0/M1" postCellId="../M3L/0/M3L" preSegmentId="1" postSegmentId="1" preFractionAlong="0.864" postFractionAlong="0.675"/>
    </projection>
    <electricalProjection id="NCXLS_M2R_M1_GJ" presynapticPopulation="M2R" postsynapticPopulation="M1">
      <electricalConnection id="5" preCell="0" postCell="0" synapse="Generic_GJ" preSegment="6" postSegment="8" preFractionAlong="0.854" postFractionAlong="0.291"/>
    </electricalProjection>
    <projection id="NCXLS_M2R_I1R" presynapticPopulation="M2R" postsynapticPopulation="I1R" synapse="Acetylcholine">
      <connection id="6" preCellId="../M2R/0/M2R" postCellId="../I1R/0/I1R" preSegmentId="6" postSegmentId="6" preFractionAlong="0.854" postFractionAlong="0.459"/>
      <connection id="13" preCellId="../M2R/0/M2R" postCellId="../I1R/1/I1R" preSegmentId="6" postSegmentId="7" preFractionAlong="0.854" postFractionAlong="0.59"/>
      <connection id="14" preCellId="../M2R/0/M2R" postCellId="../I1R/2/I1R" preSegmentId="6" postSegmentId="5" preFractionAlong="0.854" postFractionAlong="0.203"/>
      <connection id="17" preCellId="../M2R/0/M2R" postCellId="../I1R/3/I1R" preSegmentId="6" postSegmentId="4" preFractionAlong="0.854" postFractionAlong="0.541"/>
    </projection>
    <projection id="NCXLS_M2R_NSML" presynapticPopulation="M2R" postsynapticPopulation="NSML" synapse="Acetylcholine">
      <connection id="7" preCellId="../M2R/0/M2R" postCellId="../NSML/1/NSML" preSegmentId="6" postSegmentId="5" preFractionAlong="0.854" postFractionAlong="0.554"/>
    </projection>
    <electricalProjection id="NCXLS_M2R_M2L_GJ" presynapticPopulation="M2R" postsynapticPopulation="M2L">
      <electricalConnection id="8" preCell="0" postCell="0" synapse="Generic_GJ" preSegment="6" postSegment="5" preFractionAlong="0.854" postFractionAlong="0.962"/>
    </electricalProjection>
    <projection id="NCXLS_M2R_I1L" presynapticPopulation="M2R" postsynapticPopulation="I1L" synapse="Acetylcholine">
      <connection id="9" preCellId="../M2R/0/M2R" postCellId="../I1L/0/I1L" preSegmentId="6" postSegmentId="2" preFractionAlong="0.854" postFractionAlong="0.217"/>
      <connection id="11" preCellId="../M2R/0/M2R" postCellId="../I1L/1/I1L" preSegmentId="6" postSegmentId="6" preFractionAlong="0.854" postFractionAlong="0.752"/>
      <connection id="16" preCellId="../M2R/0/M2R" postCellId="../I1L/2/I1L" preSegmentId="6" postSegmentId="8" preFractionAlong="0.854" postFractionAlong="0.948"/>
    </projection>
    <projection id="NCXLS_M2R_NSMR" presynapticPopulation="M2R" postsynapticPopulation="NSMR" synapse="Acetylcholine">
      <connection id="10" preCellId="../M2R/0/M2R" postCellId="../NSMR/1/NSMR" preSegmentId="6" postSegmentId="4" preFractionAlong="0.854" postFractionAlong="0.183"/>
    </projection>
    <projection id="NCXLS_M2R_M3L" presynapticPopulation="M2R" postsynapticPopulation="M3L" synapse="Glutamate">
      <connection id="12" preCellId="../M2R/0/M2R" postCellId="../M3L/0/M3L" preSegmentId="6" postSegmentId="1" preFractionAlong="0.854" postFractionAlong="0.675"/>
    </projection>
    <projection id="NCXLS_M2R_M3R" presynapticPopulation="M2R" postsynapticPopulation="M3R" synapse="Acetylcholine">
      <connection id="15" preCellId="../M2R/0/M2R" postCellId="../M3R/0/M3R" preSegmentId="6" postSegmentId="9" preFractionAlong="0.854" postFractionAlong="0.48"/>
    </projection>
    <projection id="NCXLS_NSML_I1R" presynapticPopulation="NSML" postsynapticPopulation="I1R" synapse="Serotonin_Glutamate">
      <connection id="18" preCellId="../NSML/1/NSML" postCellId="../I1R/1/I1R" preSegmentId="5" postSegmentId="7" preFractionAlong="0.574" postFractionAlong="0.59"/>
    </projection>
    <projection id="NCXLS_NSML_I1L" presynapticPopulation="NSML" postsynapticPopulation="I1L" synapse="Serotonin_Glutamate">
      <connection id="19" preCellId="../NSML/1/NSML" postCellId="../I1L/2/I1L" preSegmentId="5" postSegmentId="8" preFractionAlong="0.574" postFractionAlong="0.948"/>
      <connection id="20" preCellId="../NSML/0/NSML" postCellId="../I1L/0/I1L" preSegmentId="7" postSegmentId="2" preFractionAlong="0.302" postFractionAlong="0.217"/>
      <connection id="21" preCellId="../NSML/0/NSML" postCellId="../I1L/2/I1L" preSegmentId="7" postSegmentId="8" preFractionAlong="0.302" postFractionAlong="0.948"/>
    </projection>
    <projection id="NCXLS_M2L_M1" presynapticPopulation="M2L" postsynapticPopulation="M1" synapse="Glutamate">
      <connection id="22" preCellId="../M2L/0/M2L" postCellId="../M1/0/M1" preSegmentId="8" postSegmentId="8" preFractionAlong="0.001" postFractionAlong="0.291"/>
    </projection>
    <electricalProjection id="NCXLS_M2L_M2R_GJ" presynapticPopulation="M2L" postsynapticPopulation="M2R">
      <electricalConnection id="23" preCell="0" postCell="0" synapse="Generic_GJ" preSegment="8" postSegment="1" preFractionAlong="0.001" postFractionAlong="0.469"/>
    </electricalProjection>
    <projection id="NCXLS_M2L_NSML" presynapticPopulation="M2L" postsynapticPopulation="NSML" synapse="Acetylcholine">
      <connection id="24" preCellId="../M2L/0/M2L" postCellId="../NSML/1/NSML" preSegmentId="8" postSegmentId="5" preFractionAlong="0.001" postFractionAlong="0.554"/>
      <connection id="25" preCellId="../M2L/0/M2L" postCellId="../NSML/0/NSML" preSegmentId="8" postSegmentId="10" preFractionAlong="0.001" postFractionAlong="0.544"/>
    </projection>
    <projection id="NCXLS_M2L_I1L" presynapticPopulation="M2L" postsynapticPopulation="I1L" synapse="Acetylcholine">
      <connection id="26" preCellId="../M2L/0/M2L" postCellId="../I1L/0/I1L" preSegmentId="8" postSegmentId="2" preFractionAlong="0.001" postFractionAlong="0.217"/>
      <connection id="27" preCellId="../M2L/0/M2L" postCellId="../I1L/1/I1L" preSegmentId="8" postSegmentId="6" preFractionAlong="0.001" postFractionAlong="0.752"/>
      <connection id="31" preCellId="../M2L/0/M2L" postCellId="../I1L/2/I1L" preSegmentId="8" postSegmentId="8" preFractionAlong="0.001" postFractionAlong="0.948"/>
    </projection>
    <electricalProjection id="NCXLS_M2L_M3L_GJ" presynapticPopulation="M2L" postsynapticPopulation="M3L">
      <electricalConnection id="28" preCell="0" postCell="0" synapse="Generic_GJ" preSegment="8" postSegment="1" preFractionAlong="0.001" postFractionAlong="0.675"/>
    </electricalProjection>
    <projection id="NCXLS_M2L_I1R" presynapticPopulation="M2L" postsynapticPopulation="I1R" synapse="Acetylcholine">
      <connection id="29" preCellId="../M2L/0/M2L" postCellId="../I1R/1/I1R" preSegmentId="8" postSegmentId="7" preFractionAlong="0.001" postFractionAlong="0.59"/>
      <connection id="32" preCellId="../M2L/0/M2L" postCellId="../I1R/3/I1R" preSegmentId="8" postSegmentId="4" preFractionAlong="0.001" postFractionAlong="0.541"/>
    </projection>
    <projection id="NCXLS_M2L_M3R" presynapticPopulation="M2L" postsynapticPopulation="M3R" synapse="Glutamate">
      <connection id="30" preCellId="../M2L/0/M2L" postCellId="../M3R/0/M3R" preSegmentId="8" postSegmentId="9" preFractionAlong="0.001" postFractionAlong="0.48"/>
    </projection>
    <projection id="NCXLS_M4_I2L" presynapticPopulation="M4" postsynapticPopulation="I2L" synapse="Acetylcholine">
      <connection id="33" preCellId="../M4/0/M4" postCellId="../I2L/0/I2L" preSegmentId="8" postSegmentId="8" preFractionAlong="0.777" postFractionAlong="0.031"/>
      <connection id="36" preCellId="../M4/1/M4" postCellId="../I2L/0/I2L" preSegmentId="4" postSegmentId="8" preFractionAlong="0.986" postFractionAlong="0.031"/>
    </projection>
    <projection id="NCXLS_M4_M4" presynapticPopulation="M4" postsynapticPopulation="M4" synapse="Glutamate">
      <connection id="34" preCellId="../M4/0/M4" postCellId="../M4/1/M4" preSegmentId="8" postSegmentId="1" preFractionAlong="0.777" postFractionAlong="0.795"/>
    </projection>
    <projection id="NCXLS_M4_NSML" presynapticPopulation="M4" postsynapticPopulation="NSML" synapse="Acetylcholine">
      <connection id="35" preCellId="../M4/0/M4" postCellId="../NSML/2/NSML" preSegmentId="8" postSegmentId="10" preFractionAlong="0.777" postFractionAlong="0.724"/>
      <connection id="37" preCellId="../M4/1/M4" postCellId="../NSML/2/NSML" preSegmentId="4" postSegmentId="10" preFractionAlong="0.986" postFractionAlong="0.724"/>
    </projection>
    <projection id="NCXLS_NSMR_I1R" presynapticPopulation="NSMR" postsynapticPopulation="I1R" synapse="Serotonin_Glutamate">
      <connection id="38" preCellId="../NSMR/1/NSMR" postCellId="../I1R/0/I1R" preSegmentId="4" postSegmentId="6" preFractionAlong="0.385" postFractionAlong="0.459"/>
      <connection id="39" preCellId="../NSMR/1/NSMR" postCellId="../I1R/1/I1R" preSegmentId="4" postSegmentId="7" preFractionAlong="0.385" postFractionAlong="0.59"/>
      <connection id="40" preCellId="../NSMR/1/NSMR" postCellId="../I1R/2/I1R" preSegmentId="4" postSegmentId="5" preFractionAlong="0.385" postFractionAlong="0.203"/>
    </projection>
    <electricalProjection id="NCXLS_M3L_M1_GJ" presynapticPopulation="M3L" postsynapticPopulation="M1">
      <electricalConnection id="41" preCell="0" postCell="0" synapse="Generic_GJ" preSegment="4" postSegment="8" preFractionAlong="0.699" postFractionAlong="0.291"/>
    </electricalProjection>
    <projection id="NCXLS_M3L_I1R" presynapticPopulation="M3L" postsynapticPopulation="I1R" synapse="Acetylcholine">
      <connection id="42" preCellId="../M3L/0/M3L" postCellId="../I1R/0/I1R" preSegmentId="4" postSegmentId="6" preFractionAlong="0.699" postFractionAlong="0.459"/>
      <connection id="47" preCellId="../M3L/0/M3L" postCellId="../I1R/1/I1R" preSegmentId="4" postSegmentId="7" preFractionAlong="0.699" postFractionAlong="0.59"/>
      <connection id="48" preCellId="../M3L/0/M3L" postCellId="../I1R/2/I1R" preSegmentId="4" postSegmentId="5" preFractionAlong="0.699" postFractionAlong="0.203"/>
      <connection id="51" preCellId="../M3L/0/M3L" postCellId="../I1R/3/I1R" preSegmentId="4" postSegmentId="4" preFractionAlong="0.699" postFractionAlong="0.541"/>
    </projection>
    <projection id="NCXLS_M3L_NSML" presynapticPopulation="M3L" postsynapticPopulation="NSML" synapse="Acetylcholine">
      <connection id="43" preCellId="../M3L/0/M3L" postCellId="../NSML/1/NSML" preSegmentId="4" postSegmentId="5" preFractionAlong="0.699" postFractionAlong="0.554"/>
    </projection>
    <electricalProjection id="NCXLS_M3L_M2L_GJ" presynapticPopulation="M3L" postsynapticPopulation="M2L">
      <electricalConnection id="44" preCell="0" postCell="0" synapse="Generic_GJ" preSegment="4" postSegment="5" preFractionAlong="0.699" postFractionAlong="0.962"/>
    </electricalProjection>
    <projection id="NCXLS_M3L_NSMR" presynapticPopulation="M3L" postsynapticPopulation="NSMR" synapse="Acetylcholine">
      <connection id="45" preCellId="../M3L/0/M3L" postCellId="../NSMR/1/NSMR" preSegmentId="4" postSegmentId="4" preFractionAlong="0.699" postFractionAlong="0.183"/>
    </projection>
    <projection id="NCXLS_M3L_I1L" presynapticPopulation="M3L" postsynapticPopulation="I1L" synapse="Acetylcholine">
      <connection id="46" preCellId="../M3L/0/M3L" postCellId="../I1L/1/I1L" preSegmentId="4" postSegmentId="6" preFractionAlong="0.699" postFractionAlong="0.752"/>
      <connection id="50" preCellId="../M3L/0/M3L" postCellId="../I1L/2/I1L" preSegmentId="4" postSegmentId="8" preFractionAlong="0.699" postFractionAlong="0.948"/>
    </projection>
    <projection id="NCXLS_M3L_M3R" presynapticPopulation="M3L" postsynapticPopulation="M3R" synapse="Acetylcholine">
      <connection id="49" preCellId="../M3L/0/M3L" postCellId="../M3R/0/M3R" preSegmentId="4" postSegmentId="9" preFractionAlong="0.699" postFractionAlong="0.48"/>
    </projection>
    <projection id="NCXLS_NSML_I2L" presynapticPopulation="NSML" postsynapticPopulation="I2L" synapse="Serotonin_Glutamate">
      <connection id="52" preCellId="../NSML/2/NSML" postCellId="../I2L/0/I2L" preSegmentId="9" postSegmentId="8" preFractionAlong="0.211" postFractionAlong="0.031"/>
    </projection>
    <projection id="NCXLS_M3R_I1R" presynapticPopulation="M3R" postsynapticPopulation="I1R" synapse="Acetylcholine">
      <connection id="53" preCellId="../M3R/0/M3R" postCellId="../I1R/0/I1R" preSegmentId="10" postSegmentId="6" preFractionAlong="0.782" postFractionAlong="0.459"/>
      <connection id="56" preCellId="../M3R/0/M3R" postCellId="../I1R/1/I1R" preSegmentId="10" postSegmentId="7" preFractionAlong="0.782" postFractionAlong="0.59"/>
      <connection id="57" preCellId="../M3R/0/M3R" postCellId="../I1R/2/I1R" preSegmentId="10" postSegmentId="5" preFractionAlong="0.782" postFractionAlong="0.203"/>
    </projection>
    <projection id="NCXLS_M3R_NSML" presynapticPopulation="M3R" postsynapticPopulation="NSML" synapse="Acetylcholine">
      <connection id="54" preCellId="../M3R/0/M3R" postCellId="../NSML/1/NSML" preSegmentId="10" postSegmentId="5" preFractionAlong="0.782" postFractionAlong="0.554"/>
    </projection>
    <projection id="NCXLS_M3R_NSMR" presynapticPopulation="M3R" postsynapticPopulation="NSMR" synapse="Acetylcholine">
      <connection id="55" preCellId="../M3R/0/M3R" postCellId="../NSMR/1/NSMR" preSegmentId="10" postSegmentId="4" preFractionAlong="0.782" postFractionAlong="0.183"/>
    </projection>
    <projection id="NCXLS_I1L_I1L" presynapticPopulation="I1L" postsynapticPopulation="I1L" synapse="Glutamate">
      <connection id="58" preCellId="../I1L/2/I1L" postCellId="../I1L/0/I1L" preSegmentId="8" postSegmentId="2" preFractionAlong="0.466" postFractionAlong="0.217"/>
    </projection>
    <projection id="NCXLS_I1L_NSMR" presynapticPopulation="I1L" postsynapticPopulation="NSMR" synapse="Acetylcholine">
      <connection id="59" preCellId="../I1L/2/I1L" postCellId="../NSMR/0/NSMR" preSegmentId="8" postSegmentId="1" preFractionAlong="0.466" postFractionAlong="0.995"/>
    </projection>
  </network>
</neuroml>
