<?xml version='1.0' encoding='UTF-8'?>
<neuroml xmlns="http://www.neuroml.org/schema/neuroml2" xmlns:xsi="http://www.w3.org/2001/XMLSchema-instance" xsi:schemaLocation="http://www.neuroml.org/schema/neuroml2 https://raw.githubusercontent.com/NeuroML/NeuroML2/development/Schemas/NeuroML2/NeuroML_v2beta4.xsd" id="gvft_network_bio_prior_lamW_0.367_DF_0.013_t40.net">
  <notes>NeuroML2 network generated from GVFT simulation on 2025-05-04 11:15:14
</notes>
  <include href="I1L.cell.nml"/>
  <include href="I1R.cell.nml"/>
  <include href="M1.cell.nml"/>
  <include href="M2L.cell.nml"/>
  <include href="M2R.cell.nml"/>
  <include href="M3L.cell.nml"/>
  <include href="M3R.cell.nml"/>
  <include href="M4.cell.nml"/>
  <include href="M5.cell.nml"/>
  <include href="NSML.cell.nml"/>
  <include href="NSMR.cell.nml"/>
  <include href="Acetylcholine.synapse.nml"/>
  <include href="Generic_GJ.nml"/>
  <include href="Glutamate.synapse.nml"/>
  <include href="Serotonin_Glutamate.synapse.nml"/>
  <network id="gvft_network_bio_prior_lamW_0.367_DF_0.013_t40.net" type="networkWithTemperature" temperature="20.0 degC">
    <population id="I1L" component="I1L" type="populationList" size="4">
      <instance id="0">
        <location x="0.6482412219047546" y="-0.20603016018867493" z="0.0"/>
      </instance>
      <instance id="1">
        <location x="0.8793969750404358" y="0.4070351719856262" z="0.0"/>
      </instance>
      <instance id="2">
        <location x="0.839195966720581" y="0.6884422302246094" z="0.0"/>
      </instance>
      <instance id="3">
        <location x="0.2261306643486023" y="-0.5678392052650452" z="0.0"/>
      </instance>
    </population>
    <population id="I1R" component="I1R" type="populationList" size="4">
      <instance id="0">
        <location x="-0.43718594312667847" y="0.6482412219047546" z="0.0"/>
      </instance>
      <instance id="1">
        <location x="-0.7989949584007263" y="0.979899525642395" z="0.0"/>
      </instance>
      <instance id="2">
        <location x="-0.9396985173225403" y="0.5979899764060974" z="0.0"/>
      </instance>
      <instance id="3">
        <location x="-0.7185929417610168" y="0.4070351719856262" z="0.0"/>
      </instance>
    </population>
    <population id="M1" component="M1" type="populationList" size="1">
      <instance id="0">
        <location x="-0.30653268098831177" y="-0.356783926486969" z="0.0"/>
      </instance>
    </population>
    <population id="M2L" component="M2L" type="populationList" size="1">
      <instance id="0">
        <location x="0.2261306643486023" y="0.3467336893081665" z="0.0"/>
      </instance>
    </population>
    <population id="M2R" component="M2R" type="populationList" size="1">
      <instance id="0">
        <location x="-0.045226141810417175" y="0.2261306643486023" z="0.0"/>
      </instance>
    </population>
    <population id="M3L" component="M3L" type="populationList" size="1">
      <instance id="0">
        <location x="-0.10552764683961868" y="-0.7989949584007263" z="0.0"/>
      </instance>
    </population>
    <population id="M3R" component="M3R" type="populationList" size="1">
      <instance id="0">
        <location x="-0.4170854389667511" y="-0.015075387433171272" z="0.0"/>
      </instance>
    </population>
    <population id="M4" component="M4" type="populationList" size="1">
      <instance id="0">
        <location x="-0.13567839562892914" y="-0.23618091642856598" z="0.0"/>
      </instance>
    </population>
    <population id="M5" component="M5" type="populationList" size="1">
      <instance id="0">
        <location x="0.39698493480682373" y="-0.06532664597034454" z="0.0"/>
      </instance>
    </population>
    <population id="NSML" component="NSML" type="populationList" size="3">
      <instance id="0">
        <location x="-0.25628140568733215" y="0.23618091642856598" z="0.0"/>
      </instance>
      <instance id="1">
        <location x="0.6080402135848999" y="0.5577889680862427" z="0.0"/>
      </instance>
      <instance id="2">
        <location x="0.10552764683961868" y="0.5477386713027954" z="0.0"/>
      </instance>
    </population>
    <population id="NSMR" component="NSMR" type="populationList" size="2">
      <instance id="0">
        <location x="0.839195966720581" y="-0.6180904507637024" z="0.0"/>
      </instance>
      <instance id="1">
        <location x="-0.43718594312667847" y="-0.03517588973045349" z="0.0"/>
      </instance>
    </population>
    <projection id="NCXLS_M3R_I1R" presynapticPopulation="M3R" postsynapticPopulation="I1R" synapse="Acetylcholine">
      <connection id="0" preCellId="../M3R/0/M3R" postCellId="../I1R/0/I1R" preSegmentId="4" postSegmentId="3" preFractionAlong="0.24534910968132095" postFractionAlong="0.38929561404197655"/>
      <connection id="1" preCellId="../M3R/0/M3R" postCellId="../I1R/1/I1R" preSegmentId="8" postSegmentId="3" preFractionAlong="0.35567271646494913" postFractionAlong="0.7190459051842455"/>
      <connection id="3" preCellId="../M3R/0/M3R" postCellId="../I1R/2/I1R" preSegmentId="7" postSegmentId="8" preFractionAlong="0.936829739324758" postFractionAlong="0.7325720972102503"/>
      <connection id="4" preCellId="../M3R/0/M3R" postCellId="../I1R/3/I1R" preSegmentId="1" postSegmentId="2" preFractionAlong="0.031183135061284672" postFractionAlong="0.2622640442998251"/>
    </projection>
    <electricalProjection id="NCXLS_M3R_NSMR_GJ" presynapticPopulation="M3R" postsynapticPopulation="NSMR">
      <electricalConnection id="2" preCell="0" postCell="1" synapse="Generic_GJ" preSegment="7" postSegment="8" preFractionAlong="0.5664046402968972" postFractionAlong="0.47605040219909966"/>
    </electricalProjection>
    <projection id="NCXLS_NSMR_I1R" presynapticPopulation="NSMR" postsynapticPopulation="I1R" synapse="Serotonin_Glutamate">
      <connection id="5" preCellId="../NSMR/1/NSMR" postCellId="../I1R/0/I1R" preSegmentId="3" postSegmentId="4" preFractionAlong="0.05142581348425035" postFractionAlong="0.49636624720123634"/>
      <connection id="6" preCellId="../NSMR/1/NSMR" postCellId="../I1R/1/I1R" preSegmentId="5" postSegmentId="3" preFractionAlong="0.3342438908169608" postFractionAlong="0.7709122037458219"/>
      <connection id="7" preCellId="../NSMR/1/NSMR" postCellId="../I1R/2/I1R" preSegmentId="5" postSegmentId="1" preFractionAlong="0.07513778173580876" postFractionAlong="0.7281887562036033"/>
      <connection id="8" preCellId="../NSMR/1/NSMR" postCellId="../I1R/3/I1R" preSegmentId="1" postSegmentId="5" preFractionAlong="0.688402396427736" postFractionAlong="0.4348273386037462"/>
    </projection>
    <projection id="NCXLS_M1_I1L" presynapticPopulation="M1" postsynapticPopulation="I1L" synapse="Acetylcholine">
      <connection id="9" preCellId="../M1/0/M1" postCellId="../I1L/0/I1L" preSegmentId="7" postSegmentId="3" preFractionAlong="0.8191023176741997" postFractionAlong="0.7994158789689793"/>
      <connection id="11" preCellId="../M1/0/M1" postCellId="../I1L/1/I1L" preSegmentId="3" postSegmentId="5" preFractionAlong="0.09158207332663415" postFractionAlong="0.9173135754622428"/>
      <connection id="12" preCellId="../M1/0/M1" postCellId="../I1L/2/I1L" preSegmentId="5" postSegmentId="1" preFractionAlong="0.9502373538208024" postFractionAlong="0.44600577295795574"/>
      <connection id="14" preCellId="../M1/0/M1" postCellId="../I1L/3/I1L" preSegmentId="8" postSegmentId="7" preFractionAlong="0.8065611478614497" postFractionAlong="0.6587833667107174"/>
    </projection>
    <projection id="NCXLS_M1_I1R" presynapticPopulation="M1" postsynapticPopulation="I1R" synapse="Acetylcholine">
      <connection id="10" preCellId="../M1/0/M1" postCellId="../I1R/0/I1R" preSegmentId="4" postSegmentId="3" preFractionAlong="0.2721451372299627" postFractionAlong="0.5902306668690871"/>
    </projection>
    <projection id="NCXLS_M1_M3R" presynapticPopulation="M1" postsynapticPopulation="M3R" synapse="Glutamate">
      <connection id="13" preCellId="../M1/0/M1" postCellId="../M3R/0/M3R" preSegmentId="7" postSegmentId="4" preFractionAlong="0.5419009473783581" postFractionAlong="0.8729458358764083"/>
    </projection>
    <projection id="NCXLS_M1_NSML" presynapticPopulation="M1" postsynapticPopulation="NSML" synapse="Acetylcholine">
      <connection id="15" preCellId="../M1/0/M1" postCellId="../NSML/0/NSML" preSegmentId="6" postSegmentId="8" preFractionAlong="0.8491956515653193" postFractionAlong="0.24966800885918594"/>
      <connection id="17" preCellId="../M1/0/M1" postCellId="../NSML/2/NSML" preSegmentId="5" postSegmentId="2" preFractionAlong="0.0394268113685059" postFractionAlong="0.7055751725156885"/>
    </projection>
    <electricalProjection id="NCXLS_M1_M4_GJ" presynapticPopulation="M1" postsynapticPopulation="M4">
      <electricalConnection id="16" preCell="0" postCell="0" synapse="Generic_GJ" preSegment="1" postSegment="4" preFractionAlong="0.22120944181960223" postFractionAlong="0.987668007996647"/>
    </electricalProjection>
    <projection id="NCXLS_M1_M2L" presynapticPopulation="M1" postsynapticPopulation="M2L" synapse="Glutamate">
      <connection id="18" preCellId="../M1/0/M1" postCellId="../M2L/0/M2L" preSegmentId="7" postSegmentId="1" preFractionAlong="0.18057534512733353" postFractionAlong="0.5679452305526295"/>
    </projection>
    <electricalProjection id="NCXLS_M1_NSMR_GJ" presynapticPopulation="M1" postsynapticPopulation="NSMR">
      <electricalConnection id="19" preCell="0" postCell="0" synapse="Generic_GJ" preSegment="2" postSegment="7" preFractionAlong="0.03394597858579884" postFractionAlong="0.6974202672468399"/>
    </electricalProjection>
    <electricalProjection id="NCXLS_M1_M2R_GJ" presynapticPopulation="M1" postsynapticPopulation="M2R">
      <electricalConnection id="20" preCell="0" postCell="0" synapse="Generic_GJ" preSegment="1" postSegment="3" preFractionAlong="0.9243961953765304" postFractionAlong="0.9710582451653678"/>
    </electricalProjection>
    <electricalProjection id="NCXLS_M1_NSML_GJ" presynapticPopulation="M1" postsynapticPopulation="NSML">
      <electricalConnection id="21" preCell="0" postCell="1" synapse="Generic_GJ" preSegment="7" postSegment="5" preFractionAlong="0.47421421665746377" postFractionAlong="0.8620426509893134"/>
    </electricalProjection>
    <projection id="NCXLS_M1_M5" presynapticPopulation="M1" postsynapticPopulation="M5" synapse="Acetylcholine">
      <connection id="22" preCellId="../M1/0/M1" postCellId="../M5/0/M5" preSegmentId="7" postSegmentId="3" preFractionAlong="0.31910047324325563" postFractionAlong="0.8289154741506773"/>
    </projection>
    <electricalProjection id="NCXLS_M4_M3R_GJ" presynapticPopulation="M4" postsynapticPopulation="M3R">
      <electricalConnection id="23" preCell="0" postCell="0" synapse="Generic_GJ" preSegment="1" postSegment="6" preFractionAlong="0.596269878482053" postFractionAlong="0.23000883728770305"/>
    </electricalProjection>
    <electricalProjection id="NCXLS_M4_NSMR_GJ" presynapticPopulation="M4" postsynapticPopulation="NSMR">
      <electricalConnection id="24" preCell="0" postCell="1" synapse="Generic_GJ" preSegment="4" postSegment="5" preFractionAlong="0.07695320162920916" postFractionAlong="0.6962887758781398"/>
    </electricalProjection>
    <electricalProjection id="NCXLS_M4_M1_GJ" presynapticPopulation="M4" postsynapticPopulation="M1">
      <electricalConnection id="25" preCell="0" postCell="0" synapse="Generic_GJ" preSegment="8" postSegment="2" preFractionAlong="0.7247667715287615" postFractionAlong="0.06535634079894237"/>
    </electricalProjection>
    <projection id="NCXLS_M4_I1R" presynapticPopulation="M4" postsynapticPopulation="I1R" synapse="Acetylcholine">
      <connection id="26" preCellId="../M4/0/M4" postCellId="../I1R/2/I1R" preSegmentId="7" postSegmentId="8" preFractionAlong="0.5394912923753372" postFractionAlong="0.7907231648389635"/>
      <connection id="27" preCellId="../M4/0/M4" postCellId="../I1R/3/I1R" preSegmentId="1" postSegmentId="5" preFractionAlong="0.6258913764370091" postFractionAlong="0.8859777482361871"/>
    </projection>
    <electricalProjection id="NCXLS_M4_M3L_GJ" presynapticPopulation="M4" postsynapticPopulation="M3L">
      <electricalConnection id="28" preCell="0" postCell="0" synapse="Generic_GJ" preSegment="2" postSegment="4" preFractionAlong="0.23295947475363377" postFractionAlong="0.02440078155653802"/>
    </electricalProjection>
    <projection id="NCXLS_NSML_I1R" presynapticPopulation="NSML" postsynapticPopulation="I1R" synapse="Serotonin_Glutamate">
      <connection id="29" preCellId="../NSML/2/NSML" postCellId="../I1R/0/I1R" preSegmentId="2" postSegmentId="2" preFractionAlong="0.021269410850387138" postFractionAlong="0.8747016726841994"/>
      <connection id="31" preCellId="../NSML/2/NSML" postCellId="../I1R/1/I1R" preSegmentId="7" postSegmentId="6" preFractionAlong="0.35071181545171015" postFractionAlong="0.7671882889311269"/>
      <connection id="32" preCellId="../NSML/2/NSML" postCellId="../I1R/2/I1R" preSegmentId="5" postSegmentId="6" preFractionAlong="0.47987562030390885" postFractionAlong="0.6275054632183701"/>
    </projection>
    <projection id="NCXLS_NSML_I1L" presynapticPopulation="NSML" postsynapticPopulation="I1L" synapse="Serotonin_Glutamate">
      <connection id="30" preCellId="../NSML/2/NSML" postCellId="../I1L/2/I1L" preSegmentId="5" postSegmentId="2" preFractionAlong="0.9390676985128962" postFractionAlong="0.7987832357736654"/>
    </projection>
    <projection id="NCXLS_M2L_I1L" presynapticPopulation="M2L" postsynapticPopulation="I1L" synapse="Acetylcholine">
      <connection id="33" preCellId="../M2L/0/M2L" postCellId="../I1L/0/I1L" preSegmentId="8" postSegmentId="4" preFractionAlong="0.9840834691992951" postFractionAlong="0.7682734138645182"/>
      <connection id="34" preCellId="../M2L/0/M2L" postCellId="../I1L/1/I1L" preSegmentId="1" postSegmentId="7" preFractionAlong="0.4213570022770702" postFractionAlong="0.7375823015888915"/>
      <connection id="35" preCellId="../M2L/0/M2L" postCellId="../I1L/2/I1L" preSegmentId="6" postSegmentId="1" preFractionAlong="0.11047411313139466" postFractionAlong="0.35462215764077654"/>
    </projection>
    <electricalProjection id="NCXLS_M2L_NSMR_GJ" presynapticPopulation="M2L" postsynapticPopulation="NSMR">
      <electricalConnection id="36" preCell="0" postCell="0" synapse="Generic_GJ" preSegment="6" postSegment="2" preFractionAlong="0.2963081204559901" postFractionAlong="0.23360775104990994"/>
    </electricalProjection>
    <electricalProjection id="NCXLS_M2L_NSML_GJ" presynapticPopulation="M2L" postsynapticPopulation="NSML">
      <electricalConnection id="37" preCell="0" postCell="1" synapse="Generic_GJ" preSegment="1" postSegment="8" preFractionAlong="0.01787393473341381" postFractionAlong="0.9877223897360315"/>
    </electricalProjection>
    <electricalProjection id="NCXLS_M2L_M5_GJ" presynapticPopulation="M2L" postsynapticPopulation="M5">
      <electricalConnection id="38" preCell="0" postCell="0" synapse="Generic_GJ" preSegment="1" postSegment="7" preFractionAlong="0.3843266471596817" postFractionAlong="0.6796472826930698"/>
    </electricalProjection>
    <projection id="NCXLS_M2R_I1L" presynapticPopulation="M2R" postsynapticPopulation="I1L" synapse="Acetylcholine">
      <connection id="39" preCellId="../M2R/0/M2R" postCellId="../I1L/0/I1L" preSegmentId="4" postSegmentId="3" preFractionAlong="0.9499611839502253" postFractionAlong="0.786345014415552"/>
      <connection id="40" preCellId="../M2R/0/M2R" postCellId="../I1L/1/I1L" preSegmentId="3" postSegmentId="4" preFractionAlong="0.41758077578492836" postFractionAlong="0.8791183075621647"/>
      <connection id="41" preCellId="../M2R/0/M2R" postCellId="../I1L/2/I1L" preSegmentId="6" postSegmentId="8" preFractionAlong="0.4674015112498697" postFractionAlong="0.6134113892107077"/>
      <connection id="42" preCellId="../M2R/0/M2R" postCellId="../I1L/3/I1L" preSegmentId="1" postSegmentId="7" preFractionAlong="0.9911686261369765" postFractionAlong="0.2316717013834434"/>
    </projection>
    <electricalProjection id="NCXLS_M2R_NSML_GJ" presynapticPopulation="M2R" postsynapticPopulation="NSML">
      <electricalConnection id="43" preCell="0" postCell="2" synapse="Generic_GJ" preSegment="4" postSegment="5" preFractionAlong="0.6496466489923685" postFractionAlong="0.6077367948788591"/>
      <electricalConnection id="46" preCell="0" postCell="1" synapse="Generic_GJ" preSegment="6" postSegment="5" preFractionAlong="0.05784267656339637" postFractionAlong="0.9691026301408113"/>
    </electricalProjection>
    <electricalProjection id="NCXLS_M2R_M2L_GJ" presynapticPopulation="M2R" postsynapticPopulation="M2L">
      <electricalConnection id="44" preCell="0" postCell="0" synapse="Generic_GJ" preSegment="5" postSegment="6" preFractionAlong="0.2306698117177587" postFractionAlong="0.17652803200550826"/>
    </electricalProjection>
    <projection id="NCXLS_M2R_NSMR" presynapticPopulation="M2R" postsynapticPopulation="NSMR" synapse="Acetylcholine">
      <connection id="45" preCellId="../M2R/0/M2R" postCellId="../NSMR/0/NSMR" preSegmentId="2" postSegmentId="1" preFractionAlong="0.18643826214425452" postFractionAlong="0.7795844735667533"/>
    </projection>
    <electricalProjection id="NCXLS_M2R_M5_GJ" presynapticPopulation="M2R" postsynapticPopulation="M5">
      <electricalConnection id="47" preCell="0" postCell="0" synapse="Generic_GJ" preSegment="1" postSegment="1" preFractionAlong="0.927752283195213" postFractionAlong="0.9949078226464353"/>
    </electricalProjection>
    <projection id="NCXLS_M3L_I1L" presynapticPopulation="M3L" postsynapticPopulation="I1L" synapse="Acetylcholine">
      <connection id="48" preCellId="../M3L/0/M3L" postCellId="../I1L/0/I1L" preSegmentId="5" postSegmentId="3" preFractionAlong="0.39624201890265875" postFractionAlong="0.7582384757040913"/>
      <connection id="50" preCellId="../M3L/0/M3L" postCellId="../I1L/1/I1L" preSegmentId="6" postSegmentId="5" preFractionAlong="0.22381761482262308" postFractionAlong="0.5369744228934136"/>
      <connection id="51" preCellId="../M3L/0/M3L" postCellId="../I1L/2/I1L" preSegmentId="1" postSegmentId="4" preFractionAlong="0.5800862078378112" postFractionAlong="0.09148683739775487"/>
      <connection id="57" preCellId="../M3L/0/M3L" postCellId="../I1L/3/I1L" preSegmentId="6" postSegmentId="5" preFractionAlong="0.22018320194981134" postFractionAlong="0.6832587636595959"/>
    </projection>
    <projection id="NCXLS_M3L_I1R" presynapticPopulation="M3L" postsynapticPopulation="I1R" synapse="Acetylcholine">
      <connection id="49" preCellId="../M3L/0/M3L" postCellId="../I1R/0/I1R" preSegmentId="6" postSegmentId="1" preFractionAlong="0.15389590633985506" postFractionAlong="0.8158331249906178"/>
      <connection id="53" preCellId="../M3L/0/M3L" postCellId="../I1R/1/I1R" preSegmentId="1" postSegmentId="3" preFractionAlong="0.9556514982297534" postFractionAlong="0.8621276172654506"/>
      <connection id="56" preCellId="../M3L/0/M3L" postCellId="../I1R/2/I1R" preSegmentId="8" postSegmentId="3" preFractionAlong="0.7234201136885849" postFractionAlong="0.4958757350787708"/>
      <connection id="60" preCellId="../M3L/0/M3L" postCellId="../I1R/3/I1R" preSegmentId="8" postSegmentId="8" preFractionAlong="0.6780161525590636" postFractionAlong="0.5657319639957911"/>
    </projection>
    <electricalProjection id="NCXLS_M3L_M3R_GJ" presynapticPopulation="M3L" postsynapticPopulation="M3R">
      <electricalConnection id="52" preCell="0" postCell="0" synapse="Generic_GJ" preSegment="1" postSegment="8" preFractionAlong="0.26560004258870606" postFractionAlong="0.12951492128280417"/>
    </electricalProjection>
    <projection id="NCXLS_M3L_NSMR" presynapticPopulation="M3L" postsynapticPopulation="NSMR" synapse="Acetylcholine">
      <connection id="54" preCellId="../M3L/0/M3L" postCellId="../NSMR/1/NSMR" preSegmentId="1" postSegmentId="7" preFractionAlong="0.6552419806390217" postFractionAlong="0.5508573706091393"/>
      <connection id="63" preCellId="../M3L/0/M3L" postCellId="../NSMR/0/NSMR" preSegmentId="1" postSegmentId="5" preFractionAlong="0.837013328363672" postFractionAlong="0.6974714616692836"/>
    </projection>
    <projection id="NCXLS_M3L_M1" presynapticPopulation="M3L" postsynapticPopulation="M1" synapse="Acetylcholine">
      <connection id="55" preCellId="../M3L/0/M3L" postCellId="../M1/0/M1" preSegmentId="3" postSegmentId="2" preFractionAlong="0.4084532130706987" postFractionAlong="0.372688517012314"/>
    </projection>
    <electricalProjection id="NCXLS_M3L_NSML_GJ" presynapticPopulation="M3L" postsynapticPopulation="NSML">
      <electricalConnection id="58" preCell="0" postCell="0" synapse="Generic_GJ" preSegment="5" postSegment="5" preFractionAlong="0.8512069140487687" postFractionAlong="0.4951465270139743"/>
      <electricalConnection id="65" preCell="0" postCell="1" synapse="Generic_GJ" preSegment="7" postSegment="5" preFractionAlong="0.8808707591989284" postFractionAlong="0.871843527745232"/>
    </electricalProjection>
    <electricalProjection id="NCXLS_M3L_M4_GJ" presynapticPopulation="M3L" postsynapticPopulation="M4">
      <electricalConnection id="59" preCell="0" postCell="0" synapse="Generic_GJ" preSegment="8" postSegment="6" preFractionAlong="0.5924077846595176" postFractionAlong="0.8246809659251492"/>
    </electricalProjection>
    <projection id="NCXLS_M3L_NSML" presynapticPopulation="M3L" postsynapticPopulation="NSML" synapse="Acetylcholine">
      <connection id="61" preCellId="../M3L/0/M3L" postCellId="../NSML/2/NSML" preSegmentId="5" postSegmentId="1" preFractionAlong="0.878629986355158" postFractionAlong="0.7974260216069281"/>
    </projection>
    <projection id="NCXLS_M3L_M2L" presynapticPopulation="M3L" postsynapticPopulation="M2L" synapse="Glutamate">
      <connection id="62" preCellId="../M3L/0/M3L" postCellId="../M2L/0/M2L" preSegmentId="8" postSegmentId="4" preFractionAlong="0.8505817290942419" postFractionAlong="0.8672942009598024"/>
    </projection>
    <electricalProjection id="NCXLS_M3L_M2R_GJ" presynapticPopulation="M3L" postsynapticPopulation="M2R">
      <electricalConnection id="64" preCell="0" postCell="0" synapse="Generic_GJ" preSegment="2" postSegment="4" preFractionAlong="0.6186113782151843" postFractionAlong="0.7527166395576412"/>
    </electricalProjection>
    <electricalProjection id="NCXLS_M3L_M5_GJ" presynapticPopulation="M3L" postsynapticPopulation="M5">
      <electricalConnection id="66" preCell="0" postCell="0" synapse="Generic_GJ" preSegment="3" postSegment="7" preFractionAlong="0.8258167505647627" postFractionAlong="0.1288698674734452"/>
    </electricalProjection>
    <projection id="NCXLS_M5_I1R" presynapticPopulation="M5" postsynapticPopulation="I1R" synapse="Acetylcholine">
      <connection id="67" preCellId="../M5/0/M5" postCellId="../I1R/0/I1R" preSegmentId="3" postSegmentId="5" preFractionAlong="0.7435082562916078" postFractionAlong="0.1607598960483082"/>
      <connection id="69" preCellId="../M5/0/M5" postCellId="../I1R/1/I1R" preSegmentId="7" postSegmentId="2" preFractionAlong="0.2870381331749128" postFractionAlong="0.6169269183757422"/>
      <connection id="72" preCellId="../M5/0/M5" postCellId="../I1R/2/I1R" preSegmentId="6" postSegmentId="3" preFractionAlong="0.761027902502028" postFractionAlong="0.5412665786761103"/>
      <connection id="76" preCellId="../M5/0/M5" postCellId="../I1R/3/I1R" preSegmentId="1" postSegmentId="4" preFractionAlong="0.0673506014687717" postFractionAlong="0.5821704601762733"/>
    </projection>
    <projection id="NCXLS_M5_M3R" presynapticPopulation="M5" postsynapticPopulation="M3R" synapse="Glutamate">
      <connection id="68" preCellId="../M5/0/M5" postCellId="../M3R/0/M3R" preSegmentId="4" postSegmentId="2" preFractionAlong="0.8321341779577419" postFractionAlong="0.5074677337608362"/>
    </projection>
    <projection id="NCXLS_M5_NSMR" presynapticPopulation="M5" postsynapticPopulation="NSMR" synapse="Acetylcholine">
      <connection id="70" preCellId="../M5/0/M5" postCellId="../NSMR/1/NSMR" preSegmentId="1" postSegmentId="1" preFractionAlong="0.6318135270166684" postFractionAlong="0.2598035810641598"/>
    </projection>
    <electricalProjection id="NCXLS_M5_M1_GJ" presynapticPopulation="M5" postsynapticPopulation="M1">
      <electricalConnection id="71" preCell="0" postCell="0" synapse="Generic_GJ" preSegment="4" postSegment="8" preFractionAlong="0.5399853797158555" postFractionAlong="0.7798453951511436"/>
    </electricalProjection>
    <projection id="NCXLS_M5_I1L" presynapticPopulation="M5" postsynapticPopulation="I1L" synapse="Acetylcholine">
      <connection id="73" preCellId="../M5/0/M5" postCellId="../I1L/3/I1L" preSegmentId="8" postSegmentId="2" preFractionAlong="0.3418721660386861" postFractionAlong="0.6326218931339481"/>
    </projection>
    <projection id="NCXLS_M5_NSML" presynapticPopulation="M5" postsynapticPopulation="NSML" synapse="Acetylcholine">
      <connection id="74" preCellId="../M5/0/M5" postCellId="../NSML/0/NSML" preSegmentId="6" postSegmentId="5" preFractionAlong="0.10250972799067926" postFractionAlong="0.9372284872364511"/>
      <connection id="77" preCellId="../M5/0/M5" postCellId="../NSML/2/NSML" preSegmentId="1" postSegmentId="6" preFractionAlong="0.6209155177674771" postFractionAlong="0.04574203381251285"/>
    </projection>
    <projection id="NCXLS_M5_M4" presynapticPopulation="M5" postsynapticPopulation="M4" synapse="Acetylcholine">
      <connection id="75" preCellId="../M5/0/M5" postCellId="../M4/0/M4" preSegmentId="8" postSegmentId="4" preFractionAlong="0.0678370591051719" postFractionAlong="0.30096356694681625"/>
    </projection>
    <electricalProjection id="NCXLS_M5_M2L_GJ" presynapticPopulation="M5" postsynapticPopulation="M2L">
      <electricalConnection id="78" preCell="0" postCell="0" synapse="Generic_GJ" preSegment="2" postSegment="6" preFractionAlong="0.9734889691773969" postFractionAlong="0.9688778552856915"/>
    </electricalProjection>
    <electricalProjection id="NCXLS_M5_M2R_GJ" presynapticPopulation="M5" postsynapticPopulation="M2R">
      <electricalConnection id="79" preCell="0" postCell="0" synapse="Generic_GJ" preSegment="4" postSegment="3" preFractionAlong="0.13008624013063197" postFractionAlong="0.7582631959290226"/>
    </electricalProjection>
    <electricalProjection id="NCXLS_M5_M3L_GJ" presynapticPopulation="M5" postsynapticPopulation="M3L">
      <electricalConnection id="80" preCell="0" postCell="0" synapse="Generic_GJ" preSegment="7" postSegment="5" preFractionAlong="0.022123551528997254" postFractionAlong="0.32361021914954125"/>
    </electricalProjection>
  </network>
</neuroml>
