<?xml version='1.0' encoding='UTF-8'?>
<neuroml xmlns="http://www.neuroml.org/schema/neuroml2" xmlns:xsi="http://www.w3.org/2001/XMLSchema-instance" xsi:schemaLocation="http://www.neuroml.org/schema/neuroml2 https://raw.githubusercontent.com/NeuroML/NeuroML2/development/Schemas/NeuroML2/NeuroML_v2beta4.xsd" id="gvft_network_bio_prior_lamW_0.367_DF_0.013_t50.net">
  <notes>NeuroML2 network generated from GVFT simulation on 2025-05-04 11:15:18
</notes>
  <include href="I1L.cell.nml"/>
  <include href="I1R.cell.nml"/>
  <include href="I2L.cell.nml"/>
  <include href="I2R.cell.nml"/>
  <include href="I3.cell.nml"/>
  <include href="M1.cell.nml"/>
  <include href="M2L.cell.nml"/>
  <include href="M2R.cell.nml"/>
  <include href="M3L.cell.nml"/>
  <include href="NSML.cell.nml"/>
  <include href="NSMR.cell.nml"/>
  <include href="Acetylcholine.synapse.nml"/>
  <include href="Generic_GJ.nml"/>
  <include href="Glutamate.synapse.nml"/>
  <include href="Serotonin_Glutamate.synapse.nml"/>
  <network id="gvft_network_bio_prior_lamW_0.367_DF_0.013_t50.net" type="networkWithTemperature" temperature="20.0 degC">
    <population id="I1L" component="I1L" type="populationList" size="1">
      <instance id="0">
        <location x="-0.23618091642856598" y="-0.9597989916801453" z="0.0"/>
      </instance>
    </population>
    <population id="I1R" component="I1R" type="populationList" size="1">
      <instance id="0">
        <location x="-0.5778894424438477" y="-0.32663318514823914" z="0.0"/>
      </instance>
    </population>
    <population id="I2L" component="I2L" type="populationList" size="1">
      <instance id="0">
        <location x="-0.839195966720581" y="-0.8994975090026855" z="0.0"/>
      </instance>
    </population>
    <population id="I2R" component="I2R" type="populationList" size="4">
      <instance id="0">
        <location x="0.6582914590835571" y="0.10552764683961868" z="0.0"/>
      </instance>
      <instance id="1">
        <location x="0.929648220539093" y="0.2160804122686386" z="0.0"/>
      </instance>
      <instance id="2">
        <location x="0.3467336893081665" y="0.8592965006828308" z="0.0"/>
      </instance>
      <instance id="3">
        <location x="-0.095477394759655" y="0.929648220539093" z="0.0"/>
      </instance>
    </population>
    <population id="I3" component="I3" type="populationList" size="1">
      <instance id="0">
        <location x="-0.7185929417610168" y="0.26633167266845703" z="0.0"/>
      </instance>
    </population>
    <population id="M1" component="M1" type="populationList" size="4">
      <instance id="0">
        <location x="0.7386934757232666" y="-0.19597990810871124" z="0.0"/>
      </instance>
      <instance id="1">
        <location x="-0.4170854389667511" y="-0.8592965006828308" z="0.0"/>
      </instance>
      <instance id="2">
        <location x="-0.37688443064689636" y="0.38693466782569885" z="0.0"/>
      </instance>
      <instance id="3">
        <location x="-0.7386934757232666" y="-0.9698492288589478" z="0.0"/>
      </instance>
    </population>
    <population id="M2L" component="M2L" type="populationList" size="1">
      <instance id="0">
        <location x="-0.6281406879425049" y="0.8793969750404358" z="0.0"/>
      </instance>
    </population>
    <population id="M2R" component="M2R" type="populationList" size="1">
      <instance id="0">
        <location x="-0.7085427045822144" y="-0.8994975090026855" z="0.0"/>
      </instance>
    </population>
    <population id="M3L" component="M3L" type="populationList" size="1">
      <instance id="0">
        <location x="-0.3668341636657715" y="-0.26633167266845703" z="0.0"/>
      </instance>
    </population>
    <population id="NSML" component="NSML" type="populationList" size="3">
      <instance id="0">
        <location x="0.44723618030548096" y="-0.2864321768283844" z="0.0"/>
      </instance>
      <instance id="1">
        <location x="-0.12562814354896545" y="0.6984924674034119" z="0.0"/>
      </instance>
      <instance id="2">
        <location x="-0.7286432385444641" y="0.11557789891958237" z="0.0"/>
      </instance>
    </population>
    <population id="NSMR" component="NSMR" type="populationList" size="2">
      <instance id="0">
        <location x="0.49748745560646057" y="-0.24623116850852966" z="0.0"/>
      </instance>
      <instance id="1">
        <location x="0.1557788997888565" y="0.6381909847259521" z="0.0"/>
      </instance>
    </population>
    <electricalProjection id="NCXLS_NSML_M1_GJ" presynapticPopulation="NSML" postsynapticPopulation="M1">
      <electricalConnection id="0" preCell="0" postCell="0" synapse="Generic_GJ" preSegment="2" postSegment="4" preFractionAlong="0.8017280830697918" postFractionAlong="0.33945019254280606"/>
    </electricalProjection>
    <projection id="NCXLS_NSML_I1L" presynapticPopulation="NSML" postsynapticPopulation="I1L" synapse="Serotonin_Glutamate">
      <connection id="1" preCellId="../NSML/0/NSML" postCellId="../I1L/0/I1L" preSegmentId="3" postSegmentId="7" preFractionAlong="0.08011484638467514" postFractionAlong="0.8948166560605276"/>
    </projection>
    <projection id="NCXLS_M2L_I2R" presynapticPopulation="M2L" postsynapticPopulation="I2R" synapse="Acetylcholine">
      <connection id="2" preCellId="../M2L/0/M2L" postCellId="../I2R/0/I2R" preSegmentId="4" postSegmentId="6" preFractionAlong="0.8172977699624937" postFractionAlong="0.45231828451830014"/>
      <connection id="3" preCellId="../M2L/0/M2L" postCellId="../I2R/1/I2R" preSegmentId="3" postSegmentId="7" preFractionAlong="0.5264026609361132" postFractionAlong="0.7315895217553319"/>
      <connection id="5" preCellId="../M2L/0/M2L" postCellId="../I2R/2/I2R" preSegmentId="5" postSegmentId="1" preFractionAlong="0.8717835665922017" postFractionAlong="0.21921398735804432"/>
      <connection id="7" preCellId="../M2L/0/M2L" postCellId="../I2R/3/I2R" preSegmentId="7" postSegmentId="5" preFractionAlong="0.6587077755008761" postFractionAlong="0.498195716453139"/>
    </projection>
    <projection id="NCXLS_M2L_NSML" presynapticPopulation="M2L" postsynapticPopulation="NSML" synapse="Acetylcholine">
      <connection id="4" preCellId="../M2L/0/M2L" postCellId="../NSML/1/NSML" preSegmentId="3" postSegmentId="2" preFractionAlong="0.0603520839905638" postFractionAlong="0.24710323401014644"/>
    </projection>
    <projection id="NCXLS_M2L_NSMR" presynapticPopulation="M2L" postsynapticPopulation="NSMR" synapse="Acetylcholine">
      <connection id="6" preCellId="../M2L/0/M2L" postCellId="../NSMR/1/NSMR" preSegmentId="7" postSegmentId="6" preFractionAlong="0.33689579177110685" postFractionAlong="0.18211791568869928"/>
    </projection>
    <electricalProjection id="NCXLS_M1_NSML_GJ" presynapticPopulation="M1" postsynapticPopulation="NSML">
      <electricalConnection id="8" preCell="0" postCell="0" synapse="Generic_GJ" preSegment="2" postSegment="6" preFractionAlong="0.7192017782722638" postFractionAlong="0.22845474133129873"/>
      <electricalConnection id="54" preCell="2" postCell="0" synapse="Generic_GJ" preSegment="8" postSegment="5" preFractionAlong="0.7823854840582735" postFractionAlong="0.5670162609866678"/>
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    </electricalProjection>
    <electricalProjection id="NCXLS_M1_M2R_GJ" presynapticPopulation="M1" postsynapticPopulation="M2R">
      <electricalConnection id="9" preCell="0" postCell="0" synapse="Generic_GJ" preSegment="8" postSegment="8" preFractionAlong="0.9747931621467831" postFractionAlong="0.6503256863469369"/>
      <electricalConnection id="79" preCell="3" postCell="0" synapse="Generic_GJ" preSegment="2" postSegment="8" preFractionAlong="0.9629268752375798" postFractionAlong="0.4835456467199247"/>
    </electricalProjection>
    <projection id="NCXLS_M1_M1" presynapticPopulation="M1" postsynapticPopulation="M1" synapse="Acetylcholine">
      <connection id="10" preCellId="../M1/0/M1" postCellId="../M1/1/M1" preSegmentId="2" postSegmentId="3" preFractionAlong="0.6802282424312913" postFractionAlong="0.07219840897917584"/>
      <connection id="16" preCellId="../M1/0/M1" postCellId="../M1/3/M1" preSegmentId="8" postSegmentId="4" preFractionAlong="0.8734232380816606" postFractionAlong="0.9007018640112585"/>
      <connection id="60" preCellId="../M1/2/M1" postCellId="../M1/1/M1" preSegmentId="7" postSegmentId="7" preFractionAlong="0.6954672066898622" postFractionAlong="0.38855810127034573"/>
    </projection>
    <projection id="NCXLS_M1_NSMR" presynapticPopulation="M1" postsynapticPopulation="NSMR" synapse="Acetylcholine">
      <connection id="11" preCellId="../M1/0/M1" postCellId="../NSMR/0/NSMR" preSegmentId="7" postSegmentId="7" preFractionAlong="0.2576828885112137" postFractionAlong="0.4626229567393163"/>
      <connection id="61" preCellId="../M1/2/M1" postCellId="../NSMR/0/NSMR" preSegmentId="1" postSegmentId="1" preFractionAlong="0.23754413087432746" postFractionAlong="0.3732517916293401"/>
      <connection id="91" preCellId="../M1/3/M1" postCellId="../NSMR/1/NSMR" preSegmentId="8" postSegmentId="3" preFractionAlong="0.23194709611597542" postFractionAlong="0.39090599590551467"/>
    </projection>
    <projection id="NCXLS_M1_M3L" presynapticPopulation="M1" postsynapticPopulation="M3L" synapse="Glutamate">
      <connection id="12" preCellId="../M1/0/M1" postCellId="../M3L/0/M3L" preSegmentId="6" postSegmentId="5" preFractionAlong="0.727169069766308" postFractionAlong="0.742706521199981"/>
    </projection>
    <projection id="NCXLS_M1_I1L" presynapticPopulation="M1" postsynapticPopulation="I1L" synapse="Acetylcholine">
      <connection id="13" preCellId="../M1/0/M1" postCellId="../I1L/0/I1L" preSegmentId="4" postSegmentId="5" preFractionAlong="0.3459349925469629" postFractionAlong="0.3710387629846027"/>
      <connection id="35" preCellId="../M1/1/M1" postCellId="../I1L/0/I1L" preSegmentId="5" postSegmentId="4" preFractionAlong="0.2697496115169896" postFractionAlong="0.05708685608931485"/>
      <connection id="63" preCellId="../M1/2/M1" postCellId="../I1L/0/I1L" preSegmentId="6" postSegmentId="6" preFractionAlong="0.6194903460096145" postFractionAlong="0.46349404380057235"/>
      <connection id="86" preCellId="../M1/3/M1" postCellId="../I1L/0/I1L" preSegmentId="3" postSegmentId="4" preFractionAlong="0.42373825364876283" postFractionAlong="0.6675498992914705"/>
    </projection>
    <projection id="NCXLS_M1_I1R" presynapticPopulation="M1" postsynapticPopulation="I1R" synapse="Acetylcholine">
      <connection id="14" preCellId="../M1/0/M1" postCellId="../I1R/0/I1R" preSegmentId="4" postSegmentId="4" preFractionAlong="0.04010919141248248" postFractionAlong="0.8670314961224486"/>
      <connection id="64" preCellId="../M1/2/M1" postCellId="../I1R/0/I1R" preSegmentId="3" postSegmentId="5" preFractionAlong="0.8633336495718252" postFractionAlong="0.519081785136218"/>
      <connection id="87" preCellId="../M1/3/M1" postCellId="../I1R/0/I1R" preSegmentId="2" postSegmentId="3" preFractionAlong="0.623859324676573" postFractionAlong="0.4517676787372291"/>
    </projection>
    <projection id="NCXLS_M1_I2L" presynapticPopulation="M1" postsynapticPopulation="I2L" synapse="Acetylcholine">
      <connection id="15" preCellId="../M1/0/M1" postCellId="../I2L/0/I2L" preSegmentId="8" postSegmentId="1" preFractionAlong="0.43861541918959046" postFractionAlong="0.7252576604151365"/>
      <connection id="36" preCellId="../M1/1/M1" postCellId="../I2L/0/I2L" preSegmentId="7" postSegmentId="5" preFractionAlong="0.9366056922949615" postFractionAlong="0.03934354066850965"/>
      <connection id="66" preCellId="../M1/2/M1" postCellId="../I2L/0/I2L" preSegmentId="4" postSegmentId="5" preFractionAlong="0.3988227808969005" postFractionAlong="0.5801723692273323"/>
      <connection id="90" preCellId="../M1/3/M1" postCellId="../I2L/0/I2L" preSegmentId="8" postSegmentId="5" preFractionAlong="0.641971500443266" postFractionAlong="0.6070940360887808"/>
    </projection>
    <electricalProjection id="NCXLS_M2R_NSML_GJ" presynapticPopulation="M2R" postsynapticPopulation="NSML">
      <electricalConnection id="17" preCell="0" postCell="0" synapse="Generic_GJ" preSegment="6" postSegment="7" preFractionAlong="0.2768277972350516" postFractionAlong="0.5923503285933622"/>
      <electricalConnection id="24" preCell="0" postCell="1" synapse="Generic_GJ" preSegment="1" postSegment="4" preFractionAlong="0.5929508514349274" postFractionAlong="0.16352387258502277"/>
      <electricalConnection id="31" preCell="0" postCell="2" synapse="Generic_GJ" preSegment="1" postSegment="1" preFractionAlong="0.16704190790094986" postFractionAlong="0.16761921628831766"/>
    </electricalProjection>
    <electricalProjection id="NCXLS_M2R_M2L_GJ" presynapticPopulation="M2R" postsynapticPopulation="M2L">
      <electricalConnection id="18" preCell="0" postCell="0" synapse="Generic_GJ" preSegment="6" postSegment="5" preFractionAlong="0.21066218900566658" postFractionAlong="0.6229665835634828"/>
    </electricalProjection>
    <projection id="NCXLS_M2R_I3" presynapticPopulation="M2R" postsynapticPopulation="I3" synapse="Acetylcholine">
      <connection id="19" preCellId="../M2R/0/M2R" postCellId="../I3/0/I3" preSegmentId="8" postSegmentId="5" preFractionAlong="0.733113022415281" postFractionAlong="0.1315676851272598"/>
    </projection>
    <electricalProjection id="NCXLS_M2R_M1_GJ" presynapticPopulation="M2R" postsynapticPopulation="M1">
      <electricalConnection id="20" preCell="0" postCell="0" synapse="Generic_GJ" preSegment="8" postSegment="4" preFractionAlong="0.909032520665641" postFractionAlong="0.17968310887024197"/>
    </electricalProjection>
    <projection id="NCXLS_M2R_I2R" presynapticPopulation="M2R" postsynapticPopulation="I2R" synapse="Acetylcholine">
      <connection id="21" preCellId="../M2R/0/M2R" postCellId="../I2R/0/I2R" preSegmentId="4" postSegmentId="6" preFractionAlong="0.9713950940416396" postFractionAlong="0.18097695270948977"/>
      <connection id="22" preCellId="../M2R/0/M2R" postCellId="../I2R/1/I2R" preSegmentId="5" postSegmentId="6" preFractionAlong="0.4922778564480348" postFractionAlong="0.24723107440317704"/>
      <connection id="30" preCellId="../M2R/0/M2R" postCellId="../I2R/2/I2R" preSegmentId="1" postSegmentId="5" preFractionAlong="0.2487142725876299" postFractionAlong="0.61714498660403"/>
      <connection id="33" preCellId="../M2R/0/M2R" postCellId="../I2R/3/I2R" preSegmentId="5" postSegmentId="1" preFractionAlong="0.8441704489691971" postFractionAlong="0.8056701529500532"/>
    </projection>
    <projection id="NCXLS_M2R_M1" presynapticPopulation="M2R" postsynapticPopulation="M1" synapse="Acetylcholine">
      <connection id="23" preCellId="../M2R/0/M2R" postCellId="../M1/1/M1" preSegmentId="4" postSegmentId="5" preFractionAlong="0.4453052550026655" postFractionAlong="0.5148173539296902"/>
      <connection id="27" preCellId="../M2R/0/M2R" postCellId="../M1/2/M1" preSegmentId="8" postSegmentId="4" preFractionAlong="0.9698210450785447" postFractionAlong="0.45378954138363925"/>
    </projection>
    <electricalProjection id="NCXLS_M2R_NSMR_GJ" presynapticPopulation="M2R" postsynapticPopulation="NSMR">
      <electricalConnection id="25" preCell="0" postCell="0" synapse="Generic_GJ" preSegment="3" postSegment="1" preFractionAlong="0.9694123223352875" postFractionAlong="0.25813343270112754"/>
    </electricalProjection>
    <electricalProjection id="NCXLS_M2R_M3L_GJ" presynapticPopulation="M2R" postsynapticPopulation="M3L">
      <electricalConnection id="26" preCell="0" postCell="0" synapse="Generic_GJ" preSegment="5" postSegment="5" preFractionAlong="0.3251900642246949" postFractionAlong="0.7734731256866006"/>
    </electricalProjection>
    <projection id="NCXLS_M2R_I1L" presynapticPopulation="M2R" postsynapticPopulation="I1L" synapse="Acetylcholine">
      <connection id="28" preCellId="../M2R/0/M2R" postCellId="../I1L/0/I1L" preSegmentId="3" postSegmentId="2" preFractionAlong="0.07349674733001266" postFractionAlong="0.16975790508754074"/>
    </projection>
    <projection id="NCXLS_M2R_I1R" presynapticPopulation="M2R" postsynapticPopulation="I1R" synapse="Acetylcholine">
      <connection id="29" preCellId="../M2R/0/M2R" postCellId="../I1R/0/I1R" preSegmentId="2" postSegmentId="5" preFractionAlong="0.3370031764312863" postFractionAlong="0.8288833658826095"/>
    </projection>
    <projection id="NCXLS_M2R_NSMR" presynapticPopulation="M2R" postsynapticPopulation="NSMR" synapse="Acetylcholine">
      <connection id="32" preCellId="../M2R/0/M2R" postCellId="../NSMR/1/NSMR" preSegmentId="1" postSegmentId="3" preFractionAlong="0.7364020150656405" postFractionAlong="0.6638045276218051"/>
    </projection>
    <projection id="NCXLS_M1_M2R" presynapticPopulation="M1" postsynapticPopulation="M2R" synapse="Acetylcholine">
      <connection id="34" preCellId="../M1/1/M1" postCellId="../M2R/0/M2R" preSegmentId="4" postSegmentId="7" preFractionAlong="0.8682712805132586" postFractionAlong="0.20584121003676825"/>
      <connection id="58" preCellId="../M1/2/M1" postCellId="../M2R/0/M2R" preSegmentId="3" postSegmentId="1" preFractionAlong="0.12020905537060844" postFractionAlong="0.5444890979608495"/>
    </projection>
    <electricalProjection id="NCXLS_M1_M1_GJ" presynapticPopulation="M1" postsynapticPopulation="M1">
      <electricalConnection id="37" preCell="1" postCell="3" synapse="Generic_GJ" preSegment="7" postSegment="3" preFractionAlong="0.4521990282834353" postFractionAlong="0.9338750175279049"/>
      <electricalConnection id="56" preCell="2" postCell="0" synapse="Generic_GJ" preSegment="6" postSegment="4" preFractionAlong="0.6675933855635847" postFractionAlong="0.8078459419412586"/>
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    </electricalProjection>
    <electricalProjection id="NCXLS_NSML_M2L_GJ" presynapticPopulation="NSML" postsynapticPopulation="M2L">
      <electricalConnection id="38" preCell="1" postCell="0" synapse="Generic_GJ" preSegment="5" postSegment="1" preFractionAlong="0.5072348086883924" postFractionAlong="0.0415728590503921"/>
      <electricalConnection id="69" preCell="2" postCell="0" synapse="Generic_GJ" preSegment="5" postSegment="5" preFractionAlong="0.1957779856835461" postFractionAlong="0.00756287497814212"/>
    </electricalProjection>
    <projection id="NCXLS_NSML_I2R" presynapticPopulation="NSML" postsynapticPopulation="I2R" synapse="Serotonin_Glutamate">
      <connection id="39" preCellId="../NSML/1/NSML" postCellId="../I2R/2/I2R" preSegmentId="2" postSegmentId="4" preFractionAlong="0.9866301229588469" postFractionAlong="0.9651186964360455"/>
      <connection id="40" preCellId="../NSML/1/NSML" postCellId="../I2R/3/I2R" preSegmentId="3" postSegmentId="6" preFractionAlong="0.951811785423239" postFractionAlong="0.6391199378155004"/>
    </projection>
    <projection id="NCXLS_NSMR_M1" presynapticPopulation="NSMR" postsynapticPopulation="M1" synapse="Serotonin_Glutamate">
      <connection id="41" preCellId="../NSMR/0/NSMR" postCellId="../M1/0/M1" preSegmentId="1" postSegmentId="7" preFractionAlong="0.4547398556338591" postFractionAlong="0.5155960285792502"/>
    </projection>
    <projection id="NCXLS_NSMR_I2R" presynapticPopulation="NSMR" postsynapticPopulation="I2R" synapse="Serotonin_Glutamate">
      <connection id="42" preCellId="../NSMR/0/NSMR" postCellId="../I2R/1/I2R" preSegmentId="2" postSegmentId="7" preFractionAlong="0.6668642575461043" postFractionAlong="0.1396512547563129"/>
      <connection id="71" preCellId="../NSMR/1/NSMR" postCellId="../I2R/1/I2R" preSegmentId="3" postSegmentId="3" preFractionAlong="0.06026739028956085" postFractionAlong="0.9344360268055143"/>
      <connection id="72" preCellId="../NSMR/1/NSMR" postCellId="../I2R/2/I2R" preSegmentId="6" postSegmentId="3" preFractionAlong="0.10142082844921652" postFractionAlong="0.48587175918632564"/>
      <connection id="73" preCellId="../NSMR/1/NSMR" postCellId="../I2R/3/I2R" preSegmentId="8" postSegmentId="5" preFractionAlong="0.28487290196192283" postFractionAlong="0.3072899649262866"/>
    </projection>
    <projection id="NCXLS_M3L_NSML" presynapticPopulation="M3L" postsynapticPopulation="NSML" synapse="Acetylcholine">
      <connection id="43" preCellId="../M3L/0/M3L" postCellId="../NSML/0/NSML" preSegmentId="8" postSegmentId="6" preFractionAlong="0.3079299415911909" postFractionAlong="0.7046807627366467"/>
    </projection>
    <electricalProjection id="NCXLS_M3L_M2L_GJ" presynapticPopulation="M3L" postsynapticPopulation="M2L">
      <electricalConnection id="44" preCell="0" postCell="0" synapse="Generic_GJ" preSegment="2" postSegment="4" preFractionAlong="0.6734324333249173" postFractionAlong="0.9699120461072704"/>
    </electricalProjection>
    <electricalProjection id="NCXLS_M3L_M1_GJ" presynapticPopulation="M3L" postsynapticPopulation="M1">
      <electricalConnection id="45" preCell="0" postCell="0" synapse="Generic_GJ" preSegment="1" postSegment="7" preFractionAlong="0.6726021182251263" postFractionAlong="0.44375021930457115"/>
      <electricalConnection id="50" preCell="0" postCell="2" synapse="Generic_GJ" preSegment="6" postSegment="4" preFractionAlong="0.6765133857772465" postFractionAlong="0.21567515239771717"/>
    </electricalProjection>
    <projection id="NCXLS_M3L_I2R" presynapticPopulation="M3L" postsynapticPopulation="I2R" synapse="Acetylcholine">
      <connection id="46" preCellId="../M3L/0/M3L" postCellId="../I2R/0/I2R" preSegmentId="5" postSegmentId="7" preFractionAlong="0.1771497894473859" postFractionAlong="0.6926259522261645"/>
      <connection id="47" preCellId="../M3L/0/M3L" postCellId="../I2R/1/I2R" preSegmentId="7" postSegmentId="7" preFractionAlong="0.9446142194740232" postFractionAlong="0.6832480282896458"/>
      <connection id="51" preCellId="../M3L/0/M3L" postCellId="../I2R/2/I2R" preSegmentId="8" postSegmentId="6" preFractionAlong="0.3938644056541585" postFractionAlong="0.6512329770414921"/>
      <connection id="53" preCellId="../M3L/0/M3L" postCellId="../I2R/3/I2R" preSegmentId="6" postSegmentId="7" preFractionAlong="0.9771741842213173" postFractionAlong="0.4069079607228706"/>
    </projection>
    <electricalProjection id="NCXLS_M3L_NSML_GJ" presynapticPopulation="M3L" postsynapticPopulation="NSML">
      <electricalConnection id="48" preCell="0" postCell="1" synapse="Generic_GJ" preSegment="2" postSegment="2" preFractionAlong="0.6178472402012138" postFractionAlong="0.8689049844787182"/>
    </electricalProjection>
    <electricalProjection id="NCXLS_M3L_NSMR_GJ" presynapticPopulation="M3L" postsynapticPopulation="NSMR">
      <electricalConnection id="49" preCell="0" postCell="0" synapse="Generic_GJ" preSegment="8" postSegment="1" preFractionAlong="0.03038705969683686" postFractionAlong="0.9309486955069778"/>
    </electricalProjection>
    <projection id="NCXLS_M3L_NSMR" presynapticPopulation="M3L" postsynapticPopulation="NSMR" synapse="Acetylcholine">
      <connection id="52" preCellId="../M3L/0/M3L" postCellId="../NSMR/1/NSMR" preSegmentId="2" postSegmentId="6" preFractionAlong="0.657845304603036" postFractionAlong="0.9994137257706666"/>
    </projection>
    <projection id="NCXLS_M1_I3" presynapticPopulation="M1" postsynapticPopulation="I3" synapse="Acetylcholine">
      <connection id="55" preCellId="../M1/2/M1" postCellId="../I3/0/I3" preSegmentId="1" postSegmentId="3" preFractionAlong="0.8785155613013479" postFractionAlong="0.404140321651033"/>
      <connection id="76" preCellId="../M1/3/M1" postCellId="../I3/0/I3" preSegmentId="4" postSegmentId="2" preFractionAlong="0.12188609333694755" postFractionAlong="0.18114934953468032"/>
    </projection>
    <projection id="NCXLS_M1_I2R" presynapticPopulation="M1" postsynapticPopulation="I2R" synapse="Acetylcholine">
      <connection id="57" preCellId="../M1/2/M1" postCellId="../I2R/0/I2R" preSegmentId="2" postSegmentId="5" preFractionAlong="0.7978136488586345" postFractionAlong="0.435583314812933"/>
      <connection id="59" preCellId="../M1/2/M1" postCellId="../I2R/1/I2R" preSegmentId="1" postSegmentId="5" preFractionAlong="0.3245858299002703" postFractionAlong="0.3664615348713979"/>
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    </projection>
    <electricalProjection id="NCXLS_M1_M3L_GJ" presynapticPopulation="M1" postsynapticPopulation="M3L">
      <electricalConnection id="62" preCell="2" postCell="0" synapse="Generic_GJ" preSegment="4" postSegment="6" preFractionAlong="0.07319592376844364" postFractionAlong="0.6034485933813779"/>
      <electricalConnection id="84" preCell="3" postCell="0" synapse="Generic_GJ" preSegment="5" postSegment="2" preFractionAlong="0.9000231233980112" postFractionAlong="0.3534213793027181"/>
    </electricalProjection>
    <projection id="NCXLS_I2R_I2R" presynapticPopulation="I2R" postsynapticPopulation="I2R" synapse="Acetylcholine">
      <connection id="68" preCellId="../I2R/2/I2R" postCellId="../I2R/3/I2R" preSegmentId="6" postSegmentId="6" preFractionAlong="0.7181230762264944" postFractionAlong="0.9555236959549347"/>
    </projection>
    <projection id="NCXLS_NSML_I3" presynapticPopulation="NSML" postsynapticPopulation="I3" synapse="Serotonin_Glutamate">
      <connection id="70" preCellId="../NSML/2/NSML" postCellId="../I3/0/I3" preSegmentId="7" postSegmentId="5" preFractionAlong="0.8980305489499869" postFractionAlong="0.24348229657629927"/>
    </projection>
    <electricalProjection id="NCXLS_M1_M2L_GJ" presynapticPopulation="M1" postsynapticPopulation="M2L">
      <electricalConnection id="75" preCell="3" postCell="0" synapse="Generic_GJ" preSegment="4" postSegment="6" preFractionAlong="0.7161506742231936" postFractionAlong="0.27262400073353377"/>
    </electricalProjection>
    <electricalProjection id="NCXLS_M1_NSMR_GJ" presynapticPopulation="M1" postsynapticPopulation="NSMR">
      <electricalConnection id="83" preCell="3" postCell="0" synapse="Generic_GJ" preSegment="1" postSegment="7" preFractionAlong="0.6109809888509917" postFractionAlong="0.4110284698067047"/>
    </electricalProjection>
    <projection id="NCXLS_M1_NSML" presynapticPopulation="M1" postsynapticPopulation="NSML" synapse="Acetylcholine">
      <connection id="89" preCellId="../M1/3/M1" postCellId="../NSML/2/NSML" preSegmentId="2" postSegmentId="1" preFractionAlong="0.21673980009077565" postFractionAlong="0.09571455552016173"/>
    </projection>
  </network>
</neuroml>
