<?xml version='1.0' encoding='UTF-8'?>
<neuroml xmlns="http://www.neuroml.org/schema/neuroml2" xmlns:xsi="http://www.w3.org/2001/XMLSchema-instance" xsi:schemaLocation="http://www.neuroml.org/schema/neuroml2 https://raw.githubusercontent.com/NeuroML/NeuroML2/development/Schemas/NeuroML2/NeuroML_v2beta4.xsd" id="gvft_network_bio_prior_lamW_0.367_DF_0.013_t60.net">
  <notes>NeuroML2 network generated from GVFT simulation on 2025-05-04 10:22:57
</notes>
  <include href="I1L.cell.nml"/>
  <include href="I1R.cell.nml"/>
  <include href="I2L.cell.nml"/>
  <include href="I2R.cell.nml"/>
  <include href="I3.cell.nml"/>
  <include href="M1.cell.nml"/>
  <include href="M2L.cell.nml"/>
  <include href="M2R.cell.nml"/>
  <include href="M3L.cell.nml"/>
  <include href="MI.cell.nml"/>
  <include href="NSML.cell.nml"/>
  <include href="NSMR.cell.nml"/>
  <include href="Acetylcholine.synapse.nml"/>
  <include href="Generic_GJ.nml"/>
  <include href="Glutamate.synapse.nml"/>
  <include href="Serotonin_Glutamate.synapse.nml"/>
  <network id="gvft_network_bio_prior_lamW_0.367_DF_0.013_t60.net" type="networkWithTemperature" temperature="20.0 degC">
    <population id="I1L" component="I1L" type="populationList" size="1">
      <instance id="0">
        <location x="0.31658291816711426" y="-0.8894472122192383" z="0.0"/>
      </instance>
    </population>
    <population id="I1R" component="I1R" type="populationList" size="4">
      <instance id="0">
        <location x="-0.5477386713027954" y="-0.979899525642395" z="0.0"/>
      </instance>
      <instance id="1">
        <location x="-0.45728644728660583" y="-0.08542714267969131" z="0.0"/>
      </instance>
      <instance id="2">
        <location x="-0.31658291816711426" y="-0.8994975090026855" z="0.0"/>
      </instance>
      <instance id="3">
        <location x="-0.9597989916801453" y="-0.6582914590835571" z="0.0"/>
      </instance>
    </population>
    <population id="I2L" component="I2L" type="populationList" size="1">
      <instance id="0">
        <location x="0.839195966720581" y="-0.6180904507637024" z="0.0"/>
      </instance>
    </population>
    <population id="I2R" component="I2R" type="populationList" size="1">
      <instance id="0">
        <location x="1.0" y="-0.18592965602874756" z="0.0"/>
      </instance>
    </population>
    <population id="I3" component="I3" type="populationList" size="1">
      <instance id="0">
        <location x="0.1658291518688202" y="-0.8894472122192383" z="0.0"/>
      </instance>
    </population>
    <population id="M1" component="M1" type="populationList" size="1">
      <instance id="0">
        <location x="0.4271356761455536" y="-0.1658291518688202" z="0.0"/>
      </instance>
    </population>
    <population id="M2L" component="M2L" type="populationList" size="1">
      <instance id="0">
        <location x="-0.095477394759655" y="0.095477394759655" z="0.0"/>
      </instance>
    </population>
    <population id="M2R" component="M2R" type="populationList" size="1">
      <instance id="0">
        <location x="0.11557789891958237" y="0.025125637650489807" z="0.0"/>
      </instance>
    </population>
    <population id="M3L" component="M3L" type="populationList" size="3">
      <instance id="0">
        <location x="0.5477386713027954" y="-0.095477394759655" z="0.0"/>
      </instance>
      <instance id="1">
        <location x="0.30653268098831177" y="0.18592965602874756" z="0.0"/>
      </instance>
      <instance id="2">
        <location x="-0.37688443064689636" y="-0.24623116850852966" z="0.0"/>
      </instance>
    </population>
    <population id="MI" component="MI" type="populationList" size="1">
      <instance id="0">
        <location x="0.7688442468643188" y="0.03517588973045349" z="0.0"/>
      </instance>
    </population>
    <population id="NSML" component="NSML" type="populationList" size="3">
      <instance id="0">
        <location x="0.045226141810417175" y="0.6482412219047546" z="0.0"/>
      </instance>
      <instance id="1">
        <location x="0.2261306643486023" y="0.7889447212219238" z="0.0"/>
      </instance>
      <instance id="2">
        <location x="0.6984924674034119" y="0.9899497628211975" z="0.0"/>
      </instance>
    </population>
    <population id="NSMR" component="NSMR" type="populationList" size="2">
      <instance id="0">
        <location x="-0.17587940394878387" y="0.1658291518688202" z="0.0"/>
      </instance>
      <instance id="1">
        <location x="0.8190954923629761" y="0.909547746181488" z="0.0"/>
      </instance>
    </population>
    <projection id="NCXLS_NSMR_I1R" presynapticPopulation="NSMR" postsynapticPopulation="I1R" synapse="Serotonin_Glutamate">
      <connection id="0" preCellId="../NSMR/0/NSMR" postCellId="../I1R/1/I1R" preSegmentId="10" postSegmentId="7" preFractionAlong="0.339" postFractionAlong="0.59"/>
    </projection>
    <projection id="NCXLS_M3L_I2L" presynapticPopulation="M3L" postsynapticPopulation="I2L" synapse="Acetylcholine">
      <connection id="1" preCellId="../M3L/0/M3L" postCellId="../I2L/0/I2L" preSegmentId="4" postSegmentId="8" preFractionAlong="0.699" postFractionAlong="0.031"/>
      <connection id="47" preCellId="../M3L/1/M3L" postCellId="../I2L/0/I2L" preSegmentId="4" postSegmentId="8" preFractionAlong="0.34" postFractionAlong="0.031"/>
      <connection id="65" preCellId="../M3L/2/M3L" postCellId="../I2L/0/I2L" preSegmentId="8" postSegmentId="8" preFractionAlong="0.932" postFractionAlong="0.031"/>
    </projection>
    <projection id="NCXLS_M3L_MI" presynapticPopulation="M3L" postsynapticPopulation="MI" synapse="Acetylcholine">
      <connection id="2" preCellId="../M3L/0/M3L" postCellId="../MI/0/MI" preSegmentId="4" postSegmentId="2" preFractionAlong="0.699" postFractionAlong="0.685"/>
      <connection id="48" preCellId="../M3L/1/M3L" postCellId="../MI/0/MI" preSegmentId="4" postSegmentId="2" preFractionAlong="0.34" postFractionAlong="0.685"/>
    </projection>
    <projection id="NCXLS_M3L_I2R" presynapticPopulation="M3L" postsynapticPopulation="I2R" synapse="Acetylcholine">
      <connection id="3" preCellId="../M3L/0/M3L" postCellId="../I2R/0/I2R" preSegmentId="4" postSegmentId="9" preFractionAlong="0.699" postFractionAlong="0.207"/>
      <connection id="49" preCellId="../M3L/1/M3L" postCellId="../I2R/0/I2R" preSegmentId="4" postSegmentId="9" preFractionAlong="0.34" postFractionAlong="0.207"/>
      <connection id="68" preCellId="../M3L/2/M3L" postCellId="../I2R/0/I2R" preSegmentId="8" postSegmentId="9" preFractionAlong="0.932" postFractionAlong="0.207"/>
    </projection>
    <projection id="NCXLS_M1_I1L" presynapticPopulation="M1" postsynapticPopulation="I1L" synapse="Acetylcholine">
      <connection id="4" preCellId="../M1/0/M1" postCellId="../I1L/0/I1L" preSegmentId="1" postSegmentId="2" preFractionAlong="0.864" postFractionAlong="0.217"/>
    </projection>
    <projection id="NCXLS_M1_I1R" presynapticPopulation="M1" postsynapticPopulation="I1R" synapse="Acetylcholine">
      <connection id="5" preCellId="../M1/0/M1" postCellId="../I1R/0/I1R" preSegmentId="1" postSegmentId="6" preFractionAlong="0.864" postFractionAlong="0.459"/>
      <connection id="7" preCellId="../M1/0/M1" postCellId="../I1R/2/I1R" preSegmentId="1" postSegmentId="5" preFractionAlong="0.864" postFractionAlong="0.203"/>
      <connection id="8" preCellId="../M1/0/M1" postCellId="../I1R/3/I1R" preSegmentId="1" postSegmentId="4" preFractionAlong="0.864" postFractionAlong="0.541"/>
    </projection>
    <projection id="NCXLS_M1_I2L" presynapticPopulation="M1" postsynapticPopulation="I2L" synapse="Acetylcholine">
      <connection id="6" preCellId="../M1/0/M1" postCellId="../I2L/0/I2L" preSegmentId="1" postSegmentId="8" preFractionAlong="0.864" postFractionAlong="0.031"/>
    </projection>
    <projection id="NCXLS_M1_I3" presynapticPopulation="M1" postsynapticPopulation="I3" synapse="Acetylcholine">
      <connection id="9" preCellId="../M1/0/M1" postCellId="../I3/0/I3" preSegmentId="1" postSegmentId="7" preFractionAlong="0.864" postFractionAlong="0.388"/>
    </projection>
    <projection id="NCXLS_I2L_I2R" presynapticPopulation="I2L" postsynapticPopulation="I2R" synapse="Acetylcholine">
      <connection id="10" preCellId="../I2L/0/I2L" postCellId="../I2R/0/I2R" preSegmentId="10" postSegmentId="9" preFractionAlong="0.838" postFractionAlong="0.207"/>
    </projection>
    <projection id="NCXLS_NSML_NSML" presynapticPopulation="NSML" postsynapticPopulation="NSML" synapse="Serotonin_Glutamate">
      <connection id="11" preCellId="../NSML/0/NSML" postCellId="../NSML/1/NSML" preSegmentId="7" postSegmentId="5" preFractionAlong="0.302" postFractionAlong="0.554"/>
    </projection>
    <electricalProjection id="NCXLS_I1R_I1R_GJ" presynapticPopulation="I1R" postsynapticPopulation="I1R">
      <electricalConnection id="12" preCell="1" postCell="0" synapse="Generic_GJ" preSegment="7" postSegment="6" preFractionAlong="0.785" postFractionAlong="0.459"/>
      <electricalConnection id="13" preCell="1" postCell="3" synapse="Generic_GJ" preSegment="7" postSegment="4" preFractionAlong="0.785" postFractionAlong="0.541"/>
    </electricalProjection>
    <projection id="NCXLS_M2L_I1L" presynapticPopulation="M2L" postsynapticPopulation="I1L" synapse="Acetylcholine">
      <connection id="14" preCellId="../M2L/0/M2L" postCellId="../I1L/0/I1L" preSegmentId="8" postSegmentId="2" preFractionAlong="0.001" postFractionAlong="0.217"/>
    </projection>
    <electricalProjection id="NCXLS_M2L_M3L_GJ" presynapticPopulation="M2L" postsynapticPopulation="M3L">
      <electricalConnection id="15" preCell="0" postCell="0" synapse="Generic_GJ" preSegment="8" postSegment="1" preFractionAlong="0.001" postFractionAlong="0.675"/>
      <electricalConnection id="25" preCell="0" postCell="2" synapse="Generic_GJ" preSegment="8" postSegment="1" preFractionAlong="0.001" postFractionAlong="0.26"/>
    </electricalProjection>
    <projection id="NCXLS_M2L_I1R" presynapticPopulation="M2L" postsynapticPopulation="I1R" synapse="Acetylcholine">
      <connection id="16" preCellId="../M2L/0/M2L" postCellId="../I1R/0/I1R" preSegmentId="8" postSegmentId="6" preFractionAlong="0.001" postFractionAlong="0.459"/>
      <connection id="19" preCellId="../M2L/0/M2L" postCellId="../I1R/1/I1R" preSegmentId="8" postSegmentId="7" preFractionAlong="0.001" postFractionAlong="0.59"/>
      <connection id="22" preCellId="../M2L/0/M2L" postCellId="../I1R/2/I1R" preSegmentId="8" postSegmentId="5" preFractionAlong="0.001" postFractionAlong="0.203"/>
      <connection id="24" preCellId="../M2L/0/M2L" postCellId="../I1R/3/I1R" preSegmentId="8" postSegmentId="4" preFractionAlong="0.001" postFractionAlong="0.541"/>
    </projection>
    <projection id="NCXLS_M2L_M1" presynapticPopulation="M2L" postsynapticPopulation="M1" synapse="Glutamate">
      <connection id="17" preCellId="../M2L/0/M2L" postCellId="../M1/0/M1" preSegmentId="8" postSegmentId="8" preFractionAlong="0.001" postFractionAlong="0.291"/>
    </projection>
    <projection id="NCXLS_M2L_I2L" presynapticPopulation="M2L" postsynapticPopulation="I2L" synapse="Acetylcholine">
      <connection id="18" preCellId="../M2L/0/M2L" postCellId="../I2L/0/I2L" preSegmentId="8" postSegmentId="8" preFractionAlong="0.001" postFractionAlong="0.031"/>
    </projection>
    <electricalProjection id="NCXLS_M2L_MI_GJ" presynapticPopulation="M2L" postsynapticPopulation="MI">
      <electricalConnection id="20" preCell="0" postCell="0" synapse="Generic_GJ" preSegment="8" postSegment="2" preFractionAlong="0.001" postFractionAlong="0.685"/>
    </electricalProjection>
    <projection id="NCXLS_M2L_I2R" presynapticPopulation="M2L" postsynapticPopulation="I2R" synapse="Acetylcholine">
      <connection id="21" preCellId="../M2L/0/M2L" postCellId="../I2R/0/I2R" preSegmentId="8" postSegmentId="9" preFractionAlong="0.001" postFractionAlong="0.207"/>
    </projection>
    <projection id="NCXLS_M2L_M2R" presynapticPopulation="M2L" postsynapticPopulation="M2R" synapse="Acetylcholine">
      <connection id="23" preCellId="../M2L/0/M2L" postCellId="../M2R/0/M2R" preSegmentId="8" postSegmentId="1" preFractionAlong="0.001" postFractionAlong="0.469"/>
    </projection>
    <projection id="NCXLS_M2L_I3" presynapticPopulation="M2L" postsynapticPopulation="I3" synapse="Acetylcholine">
      <connection id="26" preCellId="../M2L/0/M2L" postCellId="../I3/0/I3" preSegmentId="8" postSegmentId="7" preFractionAlong="0.001" postFractionAlong="0.388"/>
    </projection>
    <projection id="NCXLS_MI_I1L" presynapticPopulation="MI" postsynapticPopulation="I1L" synapse="Acetylcholine">
      <connection id="27" preCellId="../MI/0/MI" postCellId="../I1L/0/I1L" preSegmentId="5" postSegmentId="2" preFractionAlong="0.5" postFractionAlong="0.217"/>
    </projection>
    <projection id="NCXLS_MI_NSMR" presynapticPopulation="MI" postsynapticPopulation="NSMR" synapse="Acetylcholine">
      <connection id="28" preCellId="../MI/0/MI" postCellId="../NSMR/0/NSMR" preSegmentId="5" postSegmentId="1" preFractionAlong="0.5" postFractionAlong="0.995"/>
    </projection>
    <projection id="NCXLS_MI_M3L" presynapticPopulation="MI" postsynapticPopulation="M3L" synapse="Acetylcholine">
      <connection id="29" preCellId="../MI/0/MI" postCellId="../M3L/0/M3L" preSegmentId="5" postSegmentId="1" preFractionAlong="0.5" postFractionAlong="0.675"/>
      <connection id="37" preCellId="../MI/0/MI" postCellId="../M3L/1/M3L" preSegmentId="5" postSegmentId="6" preFractionAlong="0.5" postFractionAlong="0.911"/>
      <connection id="40" preCellId="../MI/0/MI" postCellId="../M3L/2/M3L" preSegmentId="5" postSegmentId="1" preFractionAlong="0.5" postFractionAlong="0.26"/>
    </projection>
    <projection id="NCXLS_MI_I1R" presynapticPopulation="MI" postsynapticPopulation="I1R" synapse="Acetylcholine">
      <connection id="30" preCellId="../MI/0/MI" postCellId="../I1R/0/I1R" preSegmentId="5" postSegmentId="6" preFractionAlong="0.5" postFractionAlong="0.459"/>
      <connection id="33" preCellId="../MI/0/MI" postCellId="../I1R/1/I1R" preSegmentId="5" postSegmentId="7" preFractionAlong="0.5" postFractionAlong="0.59"/>
      <connection id="36" preCellId="../MI/0/MI" postCellId="../I1R/2/I1R" preSegmentId="5" postSegmentId="5" preFractionAlong="0.5" postFractionAlong="0.203"/>
      <connection id="39" preCellId="../MI/0/MI" postCellId="../I1R/3/I1R" preSegmentId="5" postSegmentId="4" preFractionAlong="0.5" postFractionAlong="0.541"/>
    </projection>
    <electricalProjection id="NCXLS_MI_M1_GJ" presynapticPopulation="MI" postsynapticPopulation="M1">
      <electricalConnection id="31" preCell="0" postCell="0" synapse="Generic_GJ" preSegment="5" postSegment="8" preFractionAlong="0.5" postFractionAlong="0.291"/>
    </electricalProjection>
    <projection id="NCXLS_MI_NSML" presynapticPopulation="MI" postsynapticPopulation="NSML" synapse="Acetylcholine">
      <connection id="32" preCellId="../MI/0/MI" postCellId="../NSML/0/NSML" preSegmentId="5" postSegmentId="10" preFractionAlong="0.5" postFractionAlong="0.544"/>
      <connection id="35" preCellId="../MI/0/MI" postCellId="../NSML/1/NSML" preSegmentId="5" postSegmentId="5" preFractionAlong="0.5" postFractionAlong="0.554"/>
    </projection>
    <projection id="NCXLS_MI_M2L" presynapticPopulation="MI" postsynapticPopulation="M2L" synapse="Glutamate">
      <connection id="34" preCellId="../MI/0/MI" postCellId="../M2L/0/M2L" preSegmentId="5" postSegmentId="5" preFractionAlong="0.5" postFractionAlong="0.962"/>
    </projection>
    <electricalProjection id="NCXLS_MI_M2R_GJ" presynapticPopulation="MI" postsynapticPopulation="M2R">
      <electricalConnection id="38" preCell="0" postCell="0" synapse="Generic_GJ" preSegment="5" postSegment="1" preFractionAlong="0.5" postFractionAlong="0.469"/>
    </electricalProjection>
    <projection id="NCXLS_MI_I3" presynapticPopulation="MI" postsynapticPopulation="I3" synapse="Acetylcholine">
      <connection id="41" preCellId="../MI/0/MI" postCellId="../I3/0/I3" preSegmentId="5" postSegmentId="7" preFractionAlong="0.5" postFractionAlong="0.388"/>
    </projection>
    <projection id="NCXLS_I1R_I1R" presynapticPopulation="I1R" postsynapticPopulation="I1R" synapse="Acetylcholine">
      <connection id="42" preCellId="../I1R/2/I1R" postCellId="../I1R/0/I1R" preSegmentId="1" postSegmentId="6" preFractionAlong="0.068" postFractionAlong="0.459"/>
    </projection>
    <projection id="NCXLS_M3L_I1L" presynapticPopulation="M3L" postsynapticPopulation="I1L" synapse="Acetylcholine">
      <connection id="43" preCellId="../M3L/1/M3L" postCellId="../I1L/0/I1L" preSegmentId="4" postSegmentId="2" preFractionAlong="0.34" postFractionAlong="0.217"/>
      <connection id="59" preCellId="../M3L/2/M3L" postCellId="../I1L/0/I1L" preSegmentId="8" postSegmentId="2" preFractionAlong="0.932" postFractionAlong="0.217"/>
    </projection>
    <electricalProjection id="NCXLS_M3L_M3L_GJ" presynapticPopulation="M3L" postsynapticPopulation="M3L">
      <electricalConnection id="44" preCell="1" postCell="0" synapse="Generic_GJ" preSegment="4" postSegment="1" preFractionAlong="0.34" postFractionAlong="0.675"/>
      <electricalConnection id="60" preCell="2" postCell="0" synapse="Generic_GJ" preSegment="8" postSegment="1" preFractionAlong="0.932" postFractionAlong="0.675"/>
      <electricalConnection id="70" preCell="2" postCell="1" synapse="Generic_GJ" preSegment="8" postSegment="6" preFractionAlong="0.932" postFractionAlong="0.911"/>
    </electricalProjection>
    <projection id="NCXLS_M3L_NSMR" presynapticPopulation="M3L" postsynapticPopulation="NSMR" synapse="Acetylcholine">
      <connection id="45" preCellId="../M3L/1/M3L" postCellId="../NSMR/1/NSMR" preSegmentId="4" postSegmentId="4" preFractionAlong="0.34" postFractionAlong="0.183"/>
      <connection id="62" preCellId="../M3L/2/M3L" postCellId="../NSMR/1/NSMR" preSegmentId="8" postSegmentId="4" preFractionAlong="0.932" postFractionAlong="0.183"/>
    </projection>
    <electricalProjection id="NCXLS_M3L_M1_GJ" presynapticPopulation="M3L" postsynapticPopulation="M1">
      <electricalConnection id="46" preCell="1" postCell="0" synapse="Generic_GJ" preSegment="4" postSegment="8" preFractionAlong="0.34" postFractionAlong="0.291"/>
    </electricalProjection>
    <projection id="NCXLS_M3L_I3" presynapticPopulation="M3L" postsynapticPopulation="I3" synapse="Acetylcholine">
      <connection id="50" preCellId="../M3L/1/M3L" postCellId="../I3/0/I3" preSegmentId="4" postSegmentId="7" preFractionAlong="0.34" postFractionAlong="0.388"/>
      <connection id="72" preCellId="../M3L/2/M3L" postCellId="../I3/0/I3" preSegmentId="8" postSegmentId="7" preFractionAlong="0.932" postFractionAlong="0.388"/>
    </projection>
    <projection id="NCXLS_M2R_NSMR" presynapticPopulation="M2R" postsynapticPopulation="NSMR" synapse="Acetylcholine">
      <connection id="51" preCellId="../M2R/0/M2R" postCellId="../NSMR/0/NSMR" preSegmentId="6" postSegmentId="1" preFractionAlong="0.854" postFractionAlong="0.995"/>
    </projection>
    <projection id="NCXLS_M2R_I1R" presynapticPopulation="M2R" postsynapticPopulation="I1R" synapse="Acetylcholine">
      <connection id="52" preCellId="../M2R/0/M2R" postCellId="../I1R/0/I1R" preSegmentId="6" postSegmentId="6" preFractionAlong="0.854" postFractionAlong="0.459"/>
      <connection id="54" preCellId="../M2R/0/M2R" postCellId="../I1R/1/I1R" preSegmentId="6" postSegmentId="7" preFractionAlong="0.854" postFractionAlong="0.59"/>
      <connection id="56" preCellId="../M2R/0/M2R" postCellId="../I1R/2/I1R" preSegmentId="6" postSegmentId="5" preFractionAlong="0.854" postFractionAlong="0.203"/>
      <connection id="57" preCellId="../M2R/0/M2R" postCellId="../I1R/3/I1R" preSegmentId="6" postSegmentId="4" preFractionAlong="0.854" postFractionAlong="0.541"/>
    </projection>
    <projection id="NCXLS_M2R_NSML" presynapticPopulation="M2R" postsynapticPopulation="NSML" synapse="Acetylcholine">
      <connection id="53" preCellId="../M2R/0/M2R" postCellId="../NSML/0/NSML" preSegmentId="6" postSegmentId="10" preFractionAlong="0.854" postFractionAlong="0.544"/>
    </projection>
    <projection id="NCXLS_M2R_M2L" presynapticPopulation="M2R" postsynapticPopulation="M2L" synapse="Acetylcholine">
      <connection id="55" preCellId="../M2R/0/M2R" postCellId="../M2L/0/M2L" preSegmentId="6" postSegmentId="5" preFractionAlong="0.854" postFractionAlong="0.962"/>
    </projection>
    <projection id="NCXLS_M2R_M3L" presynapticPopulation="M2R" postsynapticPopulation="M3L" synapse="Glutamate">
      <connection id="58" preCellId="../M2R/0/M2R" postCellId="../M3L/2/M3L" preSegmentId="6" postSegmentId="1" preFractionAlong="0.854" postFractionAlong="0.26"/>
    </projection>
    <projection id="NCXLS_M3L_I1R" presynapticPopulation="M3L" postsynapticPopulation="I1R" synapse="Acetylcholine">
      <connection id="61" preCellId="../M3L/2/M3L" postCellId="../I1R/0/I1R" preSegmentId="8" postSegmentId="6" preFractionAlong="0.932" postFractionAlong="0.459"/>
      <connection id="69" preCellId="../M3L/2/M3L" postCellId="../I1R/2/I1R" preSegmentId="8" postSegmentId="5" preFractionAlong="0.932" postFractionAlong="0.203"/>
    </projection>
    <projection id="NCXLS_M3L_M1" presynapticPopulation="M3L" postsynapticPopulation="M1" synapse="Acetylcholine">
      <connection id="63" preCellId="../M3L/2/M3L" postCellId="../M1/0/M1" preSegmentId="8" postSegmentId="8" preFractionAlong="0.932" postFractionAlong="0.291"/>
    </projection>
    <projection id="NCXLS_M3L_NSML" presynapticPopulation="M3L" postsynapticPopulation="NSML" synapse="Acetylcholine">
      <connection id="64" preCellId="../M3L/2/M3L" postCellId="../NSML/2/NSML" preSegmentId="8" postSegmentId="10" preFractionAlong="0.932" postFractionAlong="0.724"/>
    </projection>
    <projection id="NCXLS_M3L_M2L" presynapticPopulation="M3L" postsynapticPopulation="M2L" synapse="Glutamate">
      <connection id="66" preCellId="../M3L/2/M3L" postCellId="../M2L/0/M2L" preSegmentId="8" postSegmentId="5" preFractionAlong="0.932" postFractionAlong="0.962"/>
    </projection>
    <electricalProjection id="NCXLS_M3L_MI_GJ" presynapticPopulation="M3L" postsynapticPopulation="MI">
      <electricalConnection id="67" preCell="2" postCell="0" synapse="Generic_GJ" preSegment="8" postSegment="2" preFractionAlong="0.932" postFractionAlong="0.685"/>
    </electricalProjection>
    <electricalProjection id="NCXLS_M3L_M2R_GJ" presynapticPopulation="M3L" postsynapticPopulation="M2R">
      <electricalConnection id="71" preCell="2" postCell="0" synapse="Generic_GJ" preSegment="8" postSegment="1" preFractionAlong="0.932" postFractionAlong="0.469"/>
    </electricalProjection>
  </network>
</neuroml>
