<?xml version='1.0' encoding='UTF-8'?>
<neuroml xmlns="http://www.neuroml.org/schema/neuroml2" xmlns:xsi="http://www.w3.org/2001/XMLSchema-instance" xsi:schemaLocation="http://www.neuroml.org/schema/neuroml2 https://raw.githubusercontent.com/NeuroML/NeuroML2/development/Schemas/NeuroML2/NeuroML_v2beta4.xsd" id="gvft_network_bio_prior_lamW_0.367_DF_0.013_t80.net">
  <notes>NeuroML2 network generated from GVFT simulation on 2025-05-04 10:23:02
</notes>
  <include href="I1L.cell.nml"/>
  <include href="I1R.cell.nml"/>
  <include href="I2L.cell.nml"/>
  <include href="I2R.cell.nml"/>
  <include href="I3.cell.nml"/>
  <include href="I4.cell.nml"/>
  <include href="M1.cell.nml"/>
  <include href="M2L.cell.nml"/>
  <include href="M2R.cell.nml"/>
  <include href="MI.cell.nml"/>
  <include href="NSML.cell.nml"/>
  <include href="NSMR.cell.nml"/>
  <include href="Acetylcholine.synapse.nml"/>
  <include href="Generic_GJ.nml"/>
  <include href="Glutamate.synapse.nml"/>
  <include href="Serotonin_Glutamate.synapse.nml"/>
  <network id="gvft_network_bio_prior_lamW_0.367_DF_0.013_t80.net" type="networkWithTemperature" temperature="20.0 degC">
    <population id="I1L" component="I1L" type="populationList" size="1">
      <instance id="0">
        <location x="-0.14572864770889282" y="0.8693467378616333" z="0.0"/>
      </instance>
    </population>
    <population id="I1R" component="I1R" type="populationList" size="1">
      <instance id="0">
        <location x="-0.7286432385444641" y="0.5276381969451904" z="0.0"/>
      </instance>
    </population>
    <population id="I2L" component="I2L" type="populationList" size="1">
      <instance id="0">
        <location x="-0.37688443064689636" y="-0.5376884341239929" z="0.0"/>
      </instance>
    </population>
    <population id="I2R" component="I2R" type="populationList" size="1">
      <instance id="0">
        <location x="1.0" y="-0.8291457295417786" z="0.0"/>
      </instance>
    </population>
    <population id="I3" component="I3" type="populationList" size="1">
      <instance id="0">
        <location x="0.6884422302246094" y="-0.5879396796226501" z="0.0"/>
      </instance>
    </population>
    <population id="I4" component="I4" type="populationList" size="3">
      <instance id="0">
        <location x="0.17587940394878387" y="-0.8190954923629761" z="0.0"/>
      </instance>
      <instance id="1">
        <location x="-0.26633167266845703" y="-0.8994975090026855" z="0.0"/>
      </instance>
      <instance id="2">
        <location x="0.2160804122686386" y="-0.6381909847259521" z="0.0"/>
      </instance>
    </population>
    <population id="M1" component="M1" type="populationList" size="3">
      <instance id="0">
        <location x="-0.1557788997888565" y="-0.2160804122686386" z="0.0"/>
      </instance>
      <instance id="1">
        <location x="-0.2964824140071869" y="0.7085427045822144" z="0.0"/>
      </instance>
      <instance id="2">
        <location x="0.03517588973045349" y="0.5879396796226501" z="0.0"/>
      </instance>
    </population>
    <population id="M2L" component="M2L" type="populationList" size="2">
      <instance id="0">
        <location x="0.8492462038993835" y="-0.356783926486969" z="0.0"/>
      </instance>
      <instance id="1">
        <location x="0.2160804122686386" y="-0.07537689805030823" z="0.0"/>
      </instance>
    </population>
    <population id="M2R" component="M2R" type="populationList" size="1">
      <instance id="0">
        <location x="0.18592965602874756" y="0.005025136284530163" z="0.0"/>
      </instance>
    </population>
    <population id="MI" component="MI" type="populationList" size="1">
      <instance id="0">
        <location x="-0.9396985173225403" y="0.7587939500808716" z="0.0"/>
      </instance>
    </population>
    <population id="NSML" component="NSML" type="populationList" size="4">
      <instance id="0">
        <location x="0.23618091642856598" y="-0.10552764683961868" z="0.0"/>
      </instance>
      <instance id="1">
        <location x="0.025125637650489807" y="-0.32663318514823914" z="0.0"/>
      </instance>
      <instance id="2">
        <location x="0.17587940394878387" y="0.7889447212219238" z="0.0"/>
      </instance>
      <instance id="3">
        <location x="0.10552764683961868" y="1.0" z="0.0"/>
      </instance>
    </population>
    <population id="NSMR" component="NSMR" type="populationList" size="1">
      <instance id="0">
        <location x="-0.9195979833602905" y="-0.07537689805030823" z="0.0"/>
      </instance>
    </population>
    <projection id="NCXLS_M1_M1" presynapticPopulation="M1" postsynapticPopulation="M1" synapse="Glutamate">
      <connection id="0" preCellId="../M1/0/M1" postCellId="../M1/1/M1" preSegmentId="1" postSegmentId="7" preFractionAlong="0.864" postFractionAlong="0.891"/>
      <connection id="51" preCellId="../M1/2/M1" postCellId="../M1/0/M1" preSegmentId="1" postSegmentId="8" preFractionAlong="0.147" postFractionAlong="0.291"/>
      <connection id="52" preCellId="../M1/2/M1" postCellId="../M1/1/M1" preSegmentId="1" postSegmentId="7" preFractionAlong="0.147" postFractionAlong="0.891"/>
    </projection>
    <projection id="NCXLS_M1_I1L" presynapticPopulation="M1" postsynapticPopulation="I1L" synapse="Acetylcholine">
      <connection id="1" preCellId="../M1/0/M1" postCellId="../I1L/0/I1L" preSegmentId="1" postSegmentId="2" preFractionAlong="0.864" postFractionAlong="0.217"/>
      <connection id="53" preCellId="../M1/2/M1" postCellId="../I1L/0/I1L" preSegmentId="1" postSegmentId="2" preFractionAlong="0.147" postFractionAlong="0.217"/>
    </projection>
    <projection id="NCXLS_M1_I1R" presynapticPopulation="M1" postsynapticPopulation="I1R" synapse="Acetylcholine">
      <connection id="2" preCellId="../M1/0/M1" postCellId="../I1R/0/I1R" preSegmentId="1" postSegmentId="6" preFractionAlong="0.864" postFractionAlong="0.459"/>
      <connection id="25" preCellId="../M1/1/M1" postCellId="../I1R/0/I1R" preSegmentId="9" postSegmentId="6" preFractionAlong="0.979" postFractionAlong="0.459"/>
      <connection id="54" preCellId="../M1/2/M1" postCellId="../I1R/0/I1R" preSegmentId="1" postSegmentId="6" preFractionAlong="0.147" postFractionAlong="0.459"/>
    </projection>
    <projection id="NCXLS_M1_MI" presynapticPopulation="M1" postsynapticPopulation="MI" synapse="Glutamate">
      <connection id="3" preCellId="../M1/0/M1" postCellId="../MI/0/MI" preSegmentId="1" postSegmentId="2" preFractionAlong="0.864" postFractionAlong="0.685"/>
    </projection>
    <projection id="NCXLS_M1_I2L" presynapticPopulation="M1" postsynapticPopulation="I2L" synapse="Acetylcholine">
      <connection id="4" preCellId="../M1/0/M1" postCellId="../I2L/0/I2L" preSegmentId="1" postSegmentId="8" preFractionAlong="0.864" postFractionAlong="0.031"/>
      <connection id="28" preCellId="../M1/1/M1" postCellId="../I2L/0/I2L" preSegmentId="9" postSegmentId="8" preFractionAlong="0.979" postFractionAlong="0.031"/>
      <connection id="58" preCellId="../M1/2/M1" postCellId="../I2L/0/I2L" preSegmentId="1" postSegmentId="8" preFractionAlong="0.147" postFractionAlong="0.031"/>
    </projection>
    <projection id="NCXLS_M1_NSMR" presynapticPopulation="M1" postsynapticPopulation="NSMR" synapse="Acetylcholine">
      <connection id="5" preCellId="../M1/0/M1" postCellId="../NSMR/0/NSMR" preSegmentId="1" postSegmentId="1" preFractionAlong="0.864" postFractionAlong="0.995"/>
      <connection id="29" preCellId="../M1/1/M1" postCellId="../NSMR/0/NSMR" preSegmentId="9" postSegmentId="1" preFractionAlong="0.979" postFractionAlong="0.995"/>
      <connection id="59" preCellId="../M1/2/M1" postCellId="../NSMR/0/NSMR" preSegmentId="1" postSegmentId="1" preFractionAlong="0.147" postFractionAlong="0.995"/>
    </projection>
    <projection id="NCXLS_NSML_M2L" presynapticPopulation="NSML" postsynapticPopulation="M2L" synapse="Serotonin_Glutamate">
      <connection id="6" preCellId="../NSML/0/NSML" postCellId="../M2L/0/M2L" preSegmentId="7" postSegmentId="5" preFractionAlong="0.302" postFractionAlong="0.962"/>
    </projection>
    <projection id="NCXLS_NSML_I4" presynapticPopulation="NSML" postsynapticPopulation="I4" synapse="Serotonin_Glutamate">
      <connection id="7" preCellId="../NSML/0/NSML" postCellId="../I4/0/I4" preSegmentId="7" postSegmentId="10" preFractionAlong="0.302" postFractionAlong="0.486"/>
      <connection id="9" preCellId="../NSML/0/NSML" postCellId="../I4/2/I4" preSegmentId="7" postSegmentId="9" preFractionAlong="0.302" postFractionAlong="0.52"/>
    </projection>
    <projection id="NCXLS_NSML_I2R" presynapticPopulation="NSML" postsynapticPopulation="I2R" synapse="Serotonin_Glutamate">
      <connection id="8" preCellId="../NSML/0/NSML" postCellId="../I2R/0/I2R" preSegmentId="7" postSegmentId="9" preFractionAlong="0.302" postFractionAlong="0.207"/>
    </projection>
    <projection id="NCXLS_NSML_I3" presynapticPopulation="NSML" postsynapticPopulation="I3" synapse="Serotonin_Glutamate">
      <connection id="10" preCellId="../NSML/0/NSML" postCellId="../I3/0/I3" preSegmentId="7" postSegmentId="7" preFractionAlong="0.302" postFractionAlong="0.388"/>
    </projection>
    <projection id="NCXLS_M2L_I4" presynapticPopulation="M2L" postsynapticPopulation="I4" synapse="Acetylcholine">
      <connection id="11" preCellId="../M2L/0/M2L" postCellId="../I4/0/I4" preSegmentId="8" postSegmentId="10" preFractionAlong="0.001" postFractionAlong="0.486"/>
      <connection id="13" preCellId="../M2L/0/M2L" postCellId="../I4/1/I4" preSegmentId="8" postSegmentId="7" preFractionAlong="0.001" postFractionAlong="0.364"/>
      <connection id="67" preCellId="../M2L/1/M2L" postCellId="../I4/0/I4" preSegmentId="6" postSegmentId="10" preFractionAlong="0.058" postFractionAlong="0.486"/>
      <connection id="69" preCellId="../M2L/1/M2L" postCellId="../I4/2/I4" preSegmentId="6" postSegmentId="9" preFractionAlong="0.058" postFractionAlong="0.52"/>
    </projection>
    <projection id="NCXLS_M2L_I2R" presynapticPopulation="M2L" postsynapticPopulation="I2R" synapse="Acetylcholine">
      <connection id="12" preCellId="../M2L/0/M2L" postCellId="../I2R/0/I2R" preSegmentId="8" postSegmentId="9" preFractionAlong="0.001" postFractionAlong="0.207"/>
      <connection id="68" preCellId="../M2L/1/M2L" postCellId="../I2R/0/I2R" preSegmentId="6" postSegmentId="9" preFractionAlong="0.058" postFractionAlong="0.207"/>
    </projection>
    <projection id="NCXLS_M2L_I3" presynapticPopulation="M2L" postsynapticPopulation="I3" synapse="Acetylcholine">
      <connection id="14" preCellId="../M2L/0/M2L" postCellId="../I3/0/I3" preSegmentId="8" postSegmentId="7" preFractionAlong="0.001" postFractionAlong="0.388"/>
      <connection id="70" preCellId="../M2L/1/M2L" postCellId="../I3/0/I3" preSegmentId="6" postSegmentId="7" preFractionAlong="0.058" postFractionAlong="0.388"/>
    </projection>
    <projection id="NCXLS_M2R_M1" presynapticPopulation="M2R" postsynapticPopulation="M1" synapse="Acetylcholine">
      <connection id="15" preCellId="../M2R/0/M2R" postCellId="../M1/0/M1" preSegmentId="6" postSegmentId="8" preFractionAlong="0.854" postFractionAlong="0.291"/>
    </projection>
    <projection id="NCXLS_M2R_I4" presynapticPopulation="M2R" postsynapticPopulation="I4" synapse="Acetylcholine">
      <connection id="16" preCellId="../M2R/0/M2R" postCellId="../I4/0/I4" preSegmentId="6" postSegmentId="10" preFractionAlong="0.854" postFractionAlong="0.486"/>
      <connection id="18" preCellId="../M2R/0/M2R" postCellId="../I4/1/I4" preSegmentId="6" postSegmentId="7" preFractionAlong="0.854" postFractionAlong="0.364"/>
      <connection id="21" preCellId="../M2R/0/M2R" postCellId="../I4/2/I4" preSegmentId="6" postSegmentId="9" preFractionAlong="0.854" postFractionAlong="0.52"/>
    </projection>
    <projection id="NCXLS_M2R_I1R" presynapticPopulation="M2R" postsynapticPopulation="I1R" synapse="Acetylcholine">
      <connection id="17" preCellId="../M2R/0/M2R" postCellId="../I1R/0/I1R" preSegmentId="6" postSegmentId="6" preFractionAlong="0.854" postFractionAlong="0.459"/>
    </projection>
    <projection id="NCXLS_M2R_NSML" presynapticPopulation="M2R" postsynapticPopulation="NSML" synapse="Acetylcholine">
      <connection id="19" preCellId="../M2R/0/M2R" postCellId="../NSML/1/NSML" preSegmentId="6" postSegmentId="5" preFractionAlong="0.854" postFractionAlong="0.554"/>
    </projection>
    <electricalProjection id="NCXLS_M2R_MI_GJ" presynapticPopulation="M2R" postsynapticPopulation="MI">
      <electricalConnection id="20" preCell="0" postCell="0" synapse="Generic_GJ" preSegment="6" postSegment="2" preFractionAlong="0.854" postFractionAlong="0.685"/>
    </electricalProjection>
    <projection id="NCXLS_M2R_I2L" presynapticPopulation="M2R" postsynapticPopulation="I2L" synapse="Acetylcholine">
      <connection id="22" preCellId="../M2R/0/M2R" postCellId="../I2L/0/I2L" preSegmentId="6" postSegmentId="8" preFractionAlong="0.854" postFractionAlong="0.031"/>
    </projection>
    <projection id="NCXLS_M2R_NSMR" presynapticPopulation="M2R" postsynapticPopulation="NSMR" synapse="Acetylcholine">
      <connection id="23" preCellId="../M2R/0/M2R" postCellId="../NSMR/0/NSMR" preSegmentId="6" postSegmentId="1" preFractionAlong="0.854" postFractionAlong="0.995"/>
    </projection>
    <projection id="NCXLS_M2R_M2L" presynapticPopulation="M2R" postsynapticPopulation="M2L" synapse="Glutamate">
      <connection id="24" preCellId="../M2R/0/M2R" postCellId="../M2L/1/M2L" preSegmentId="6" postSegmentId="10" preFractionAlong="0.854" postFractionAlong="0.574"/>
    </projection>
    <projection id="NCXLS_M1_I4" presynapticPopulation="M1" postsynapticPopulation="I4" synapse="Acetylcholine">
      <connection id="26" preCellId="../M1/1/M1" postCellId="../I4/1/I4" preSegmentId="9" postSegmentId="7" preFractionAlong="0.979" postFractionAlong="0.364"/>
      <connection id="55" preCellId="../M1/2/M1" postCellId="../I4/1/I4" preSegmentId="1" postSegmentId="7" preFractionAlong="0.147" postFractionAlong="0.364"/>
    </projection>
    <projection id="NCXLS_M1_MI" presynapticPopulation="M1" postsynapticPopulation="MI" synapse="Acetylcholine">
      <connection id="27" preCellId="../M1/1/M1" postCellId="../MI/0/MI" preSegmentId="9" postSegmentId="2" preFractionAlong="0.979" postFractionAlong="0.685"/>
    </projection>
    <projection id="NCXLS_I4_I4" presynapticPopulation="I4" postsynapticPopulation="I4" synapse="Glutamate">
      <connection id="30" preCellId="../I4/0/I4" postCellId="../I4/1/I4" preSegmentId="6" postSegmentId="7" preFractionAlong="0.862" postFractionAlong="0.364"/>
    </projection>
    <projection id="NCXLS_I1R_MI" presynapticPopulation="I1R" postsynapticPopulation="MI" synapse="Glutamate">
      <connection id="31" preCellId="../I1R/0/I1R" postCellId="../MI/0/MI" preSegmentId="3" postSegmentId="2" preFractionAlong="0.075" postFractionAlong="0.685"/>
    </projection>
    <electricalProjection id="NCXLS_MI_M1_GJ" presynapticPopulation="MI" postsynapticPopulation="M1">
      <electricalConnection id="32" preCell="0" postCell="0" synapse="Generic_GJ" preSegment="5" postSegment="8" preFractionAlong="0.5" postFractionAlong="0.291"/>
    </electricalProjection>
    <projection id="NCXLS_MI_NSML" presynapticPopulation="MI" postsynapticPopulation="NSML" synapse="Acetylcholine">
      <connection id="33" preCellId="../MI/0/MI" postCellId="../NSML/0/NSML" preSegmentId="5" postSegmentId="10" preFractionAlong="0.5" postFractionAlong="0.544"/>
      <connection id="42" preCellId="../MI/0/MI" postCellId="../NSML/1/NSML" preSegmentId="5" postSegmentId="5" preFractionAlong="0.5" postFractionAlong="0.554"/>
      <connection id="43" preCellId="../MI/0/MI" postCellId="../NSML/2/NSML" preSegmentId="5" postSegmentId="10" preFractionAlong="0.5" postFractionAlong="0.724"/>
      <connection id="44" preCellId="../MI/0/MI" postCellId="../NSML/3/NSML" preSegmentId="5" postSegmentId="7" preFractionAlong="0.5" postFractionAlong="0.399"/>
    </projection>
    <projection id="NCXLS_MI_M2L" presynapticPopulation="MI" postsynapticPopulation="M2L" synapse="Acetylcholine">
      <connection id="34" preCellId="../MI/0/MI" postCellId="../M2L/0/M2L" preSegmentId="5" postSegmentId="5" preFractionAlong="0.5" postFractionAlong="0.962"/>
    </projection>
    <electricalProjection id="NCXLS_MI_M2R_GJ" presynapticPopulation="MI" postsynapticPopulation="M2R">
      <electricalConnection id="35" preCell="0" postCell="0" synapse="Generic_GJ" preSegment="5" postSegment="1" preFractionAlong="0.5" postFractionAlong="0.469"/>
    </electricalProjection>
    <projection id="NCXLS_MI_M1" presynapticPopulation="MI" postsynapticPopulation="M1" synapse="Acetylcholine">
      <connection id="36" preCellId="../MI/0/MI" postCellId="../M1/1/M1" preSegmentId="5" postSegmentId="7" preFractionAlong="0.5" postFractionAlong="0.891"/>
      <connection id="45" preCellId="../MI/0/MI" postCellId="../M1/2/M1" preSegmentId="5" postSegmentId="10" preFractionAlong="0.5" postFractionAlong="0.654"/>
    </projection>
    <projection id="NCXLS_MI_I1L" presynapticPopulation="MI" postsynapticPopulation="I1L" synapse="Acetylcholine">
      <connection id="37" preCellId="../MI/0/MI" postCellId="../I1L/0/I1L" preSegmentId="5" postSegmentId="2" preFractionAlong="0.5" postFractionAlong="0.217"/>
    </projection>
    <projection id="NCXLS_MI_I4" presynapticPopulation="MI" postsynapticPopulation="I4" synapse="Acetylcholine">
      <connection id="38" preCellId="../MI/0/MI" postCellId="../I4/0/I4" preSegmentId="5" postSegmentId="10" preFractionAlong="0.5" postFractionAlong="0.486"/>
      <connection id="41" preCellId="../MI/0/MI" postCellId="../I4/1/I4" preSegmentId="5" postSegmentId="7" preFractionAlong="0.5" postFractionAlong="0.364"/>
      <connection id="46" preCellId="../MI/0/MI" postCellId="../I4/2/I4" preSegmentId="5" postSegmentId="9" preFractionAlong="0.5" postFractionAlong="0.52"/>
    </projection>
    <projection id="NCXLS_MI_I2R" presynapticPopulation="MI" postsynapticPopulation="I2R" synapse="Acetylcholine">
      <connection id="39" preCellId="../MI/0/MI" postCellId="../I2R/0/I2R" preSegmentId="5" postSegmentId="9" preFractionAlong="0.5" postFractionAlong="0.207"/>
    </projection>
    <projection id="NCXLS_MI_I1R" presynapticPopulation="MI" postsynapticPopulation="I1R" synapse="Acetylcholine">
      <connection id="40" preCellId="../MI/0/MI" postCellId="../I1R/0/I1R" preSegmentId="5" postSegmentId="6" preFractionAlong="0.5" postFractionAlong="0.459"/>
    </projection>
    <projection id="NCXLS_MI_I2L" presynapticPopulation="MI" postsynapticPopulation="I2L" synapse="Acetylcholine">
      <connection id="47" preCellId="../MI/0/MI" postCellId="../I2L/0/I2L" preSegmentId="5" postSegmentId="8" preFractionAlong="0.5" postFractionAlong="0.031"/>
    </projection>
    <projection id="NCXLS_MI_I3" presynapticPopulation="MI" postsynapticPopulation="I3" synapse="Acetylcholine">
      <connection id="48" preCellId="../MI/0/MI" postCellId="../I3/0/I3" preSegmentId="5" postSegmentId="7" preFractionAlong="0.5" postFractionAlong="0.388"/>
    </projection>
    <projection id="NCXLS_MI_NSMR" presynapticPopulation="MI" postsynapticPopulation="NSMR" synapse="Acetylcholine">
      <connection id="49" preCellId="../MI/0/MI" postCellId="../NSMR/0/NSMR" preSegmentId="5" postSegmentId="1" preFractionAlong="0.5" postFractionAlong="0.995"/>
    </projection>
    <projection id="NCXLS_MI_M2L" presynapticPopulation="MI" postsynapticPopulation="M2L" synapse="Glutamate">
      <connection id="50" preCellId="../MI/0/MI" postCellId="../M2L/1/M2L" preSegmentId="5" postSegmentId="10" preFractionAlong="0.5" postFractionAlong="0.574"/>
    </projection>
    <projection id="NCXLS_M1_NSML" presynapticPopulation="M1" postsynapticPopulation="NSML" synapse="Acetylcholine">
      <connection id="56" preCellId="../M1/2/M1" postCellId="../NSML/1/NSML" preSegmentId="1" postSegmentId="5" preFractionAlong="0.147" postFractionAlong="0.554"/>
    </projection>
    <electricalProjection id="NCXLS_M1_MI_GJ" presynapticPopulation="M1" postsynapticPopulation="MI">
      <electricalConnection id="57" preCell="2" postCell="0" synapse="Generic_GJ" preSegment="1" postSegment="2" preFractionAlong="0.147" postFractionAlong="0.685"/>
    </electricalProjection>
    <electricalProjection id="NCXLS_I3_I2R_GJ" presynapticPopulation="I3" postsynapticPopulation="I2R">
      <electricalConnection id="60" preCell="0" postCell="0" synapse="Generic_GJ" preSegment="2" postSegment="9" preFractionAlong="0.583" postFractionAlong="0.207"/>
    </electricalProjection>
    <projection id="NCXLS_NSMR_I4" presynapticPopulation="NSMR" postsynapticPopulation="I4" synapse="Serotonin_Glutamate">
      <connection id="61" preCellId="../NSMR/0/NSMR" postCellId="../I4/0/I4" preSegmentId="10" postSegmentId="10" preFractionAlong="0.339" postFractionAlong="0.486"/>
      <connection id="62" preCellId="../NSMR/0/NSMR" postCellId="../I4/1/I4" preSegmentId="10" postSegmentId="7" preFractionAlong="0.339" postFractionAlong="0.364"/>
      <connection id="63" preCellId="../NSMR/0/NSMR" postCellId="../I4/2/I4" preSegmentId="10" postSegmentId="9" preFractionAlong="0.339" postFractionAlong="0.52"/>
    </projection>
    <projection id="NCXLS_NSMR_I2L" presynapticPopulation="NSMR" postsynapticPopulation="I2L" synapse="Serotonin_Glutamate">
      <connection id="64" preCellId="../NSMR/0/NSMR" postCellId="../I2L/0/I2L" preSegmentId="10" postSegmentId="8" preFractionAlong="0.339" postFractionAlong="0.031"/>
    </projection>
    <projection id="NCXLS_M2L_NSML" presynapticPopulation="M2L" postsynapticPopulation="NSML" synapse="Acetylcholine">
      <connection id="65" preCellId="../M2L/1/M2L" postCellId="../NSML/0/NSML" preSegmentId="6" postSegmentId="10" preFractionAlong="0.058" postFractionAlong="0.544"/>
    </projection>
    <projection id="NCXLS_M2L_M2L" presynapticPopulation="M2L" postsynapticPopulation="M2L" synapse="Acetylcholine">
      <connection id="66" preCellId="../M2L/1/M2L" postCellId="../M2L/0/M2L" preSegmentId="6" postSegmentId="5" preFractionAlong="0.058" postFractionAlong="0.962"/>
    </projection>
  </network>
</neuroml>
