<?xml version='1.0' encoding='UTF-8'?>
<neuroml xmlns="http://www.neuroml.org/schema/neuroml2" xmlns:xsi="http://www.w3.org/2001/XMLSchema-instance" xsi:schemaLocation="http://www.neuroml.org/schema/neuroml2 https://raw.githubusercontent.com/NeuroML/NeuroML2/development/Schemas/NeuroML2/NeuroML_v2beta4.xsd" id="gvft_network_bio_prior_lamW_0.367_DF_0.013_t90.net">
  <notes>NeuroML2 network generated from GVFT simulation on 2025-05-04 10:23:05
</notes>
  <include href="I1L.cell.nml"/>
  <include href="I1R.cell.nml"/>
  <include href="I2L.cell.nml"/>
  <include href="I2R.cell.nml"/>
  <include href="I3.cell.nml"/>
  <include href="M1.cell.nml"/>
  <include href="M2L.cell.nml"/>
  <include href="M2R.cell.nml"/>
  <include href="M3L.cell.nml"/>
  <include href="NSML.cell.nml"/>
  <include href="NSMR.cell.nml"/>
  <include href="Acetylcholine.synapse.nml"/>
  <include href="Generic_GJ.nml"/>
  <include href="Glutamate.synapse.nml"/>
  <include href="Serotonin_Glutamate.synapse.nml"/>
  <network id="gvft_network_bio_prior_lamW_0.367_DF_0.013_t90.net" type="networkWithTemperature" temperature="20.0 degC">
    <population id="I1L" component="I1L" type="populationList" size="1">
      <instance id="0">
        <location x="-0.5276381969451904" y="0.979899525642395" z="0.0"/>
      </instance>
    </population>
    <population id="I1R" component="I1R" type="populationList" size="1">
      <instance id="0">
        <location x="0.31658291816711426" y="0.6582914590835571" z="0.0"/>
      </instance>
    </population>
    <population id="I2L" component="I2L" type="populationList" size="1">
      <instance id="0">
        <location x="-0.3467336893081665" y="0.7688442468643188" z="0.0"/>
      </instance>
    </population>
    <population id="I2R" component="I2R" type="populationList" size="1">
      <instance id="0">
        <location x="-0.44723618030548096" y="0.7185929417610168" z="0.0"/>
      </instance>
    </population>
    <population id="I3" component="I3" type="populationList" size="4">
      <instance id="0">
        <location x="0.8894472122192383" y="-0.7487437129020691" z="0.0"/>
      </instance>
      <instance id="1">
        <location x="0.11557789891958237" y="-0.356783926486969" z="0.0"/>
      </instance>
      <instance id="2">
        <location x="0.08542714267969131" y="-0.4170854389667511" z="0.0"/>
      </instance>
      <instance id="3">
        <location x="-0.3366834223270416" y="-0.9195979833602905" z="0.0"/>
      </instance>
    </population>
    <population id="M1" component="M1" type="populationList" size="4">
      <instance id="0">
        <location x="-0.7386934757232666" y="-0.2864321768283844" z="0.0"/>
      </instance>
      <instance id="1">
        <location x="-0.909547746181488" y="-0.5577889680862427" z="0.0"/>
      </instance>
      <instance id="2">
        <location x="-0.08542714267969131" y="0.3366834223270416" z="0.0"/>
      </instance>
      <instance id="3">
        <location x="0.18592965602874756" y="-0.4070351719856262" z="0.0"/>
      </instance>
    </population>
    <population id="M2L" component="M2L" type="populationList" size="1">
      <instance id="0">
        <location x="0.7688442468643188" y="-0.4170854389667511" z="0.0"/>
      </instance>
    </population>
    <population id="M2R" component="M2R" type="populationList" size="1">
      <instance id="0">
        <location x="-0.6884422302246094" y="-0.015075387433171272" z="0.0"/>
      </instance>
    </population>
    <population id="M3L" component="M3L" type="populationList" size="1">
      <instance id="0">
        <location x="0.839195966720581" y="-0.20603016018867493" z="0.0"/>
      </instance>
    </population>
    <population id="NSML" component="NSML" type="populationList" size="3">
      <instance id="0">
        <location x="0.8994975090026855" y="0.7587939500808716" z="0.0"/>
      </instance>
      <instance id="1">
        <location x="-0.08542714267969131" y="-0.8492462038993835" z="0.0"/>
      </instance>
      <instance id="2">
        <location x="0.045226141810417175" y="-0.7688442468643188" z="0.0"/>
      </instance>
    </population>
    <population id="NSMR" component="NSMR" type="populationList" size="2">
      <instance id="0">
        <location x="-0.1658291518688202" y="0.7587939500808716" z="0.0"/>
      </instance>
      <instance id="1">
        <location x="0.7085427045822144" y="0.25628140568733215" z="0.0"/>
      </instance>
    </population>
    <projection id="NCXLS_M1_I3" presynapticPopulation="M1" postsynapticPopulation="I3" synapse="Acetylcholine">
      <connection id="0" preCellId="../M1/0/M1" postCellId="../I3/1/I3" preSegmentId="1" postSegmentId="10" preFractionAlong="0.864" postFractionAlong="0.391"/>
      <connection id="14" preCellId="../M1/1/M1" postCellId="../I3/0/I3" preSegmentId="9" postSegmentId="7" preFractionAlong="0.979" postFractionAlong="0.388"/>
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    </projection>
    <electricalProjection id="NCXLS_M1_M2L_GJ" presynapticPopulation="M1" postsynapticPopulation="M2L">
      <electricalConnection id="1" preCell="0" postCell="0" synapse="Generic_GJ" preSegment="1" postSegment="5" preFractionAlong="0.864" postFractionAlong="0.962"/>
      <electricalConnection id="16" preCell="1" postCell="0" synapse="Generic_GJ" preSegment="9" postSegment="5" preFractionAlong="0.979" postFractionAlong="0.962"/>
    </electricalProjection>
    <projection id="NCXLS_M1_I1L" presynapticPopulation="M1" postsynapticPopulation="I1L" synapse="Acetylcholine">
      <connection id="2" preCellId="../M1/0/M1" postCellId="../I1L/0/I1L" preSegmentId="1" postSegmentId="2" preFractionAlong="0.864" postFractionAlong="0.217"/>
      <connection id="18" preCellId="../M1/1/M1" postCellId="../I1L/0/I1L" preSegmentId="9" postSegmentId="2" preFractionAlong="0.979" postFractionAlong="0.217"/>
      <connection id="36" preCellId="../M1/2/M1" postCellId="../I1L/0/I1L" preSegmentId="1" postSegmentId="2" preFractionAlong="0.147" postFractionAlong="0.217"/>
      <connection id="50" preCellId="../M1/3/M1" postCellId="../I1L/0/I1L" preSegmentId="8" postSegmentId="2" preFractionAlong="0.283" postFractionAlong="0.217"/>
    </projection>
    <projection id="NCXLS_M1_NSML" presynapticPopulation="M1" postsynapticPopulation="NSML" synapse="Acetylcholine">
      <connection id="3" preCellId="../M1/0/M1" postCellId="../NSML/0/NSML" preSegmentId="1" postSegmentId="10" preFractionAlong="0.864" postFractionAlong="0.544"/>
      <connection id="19" preCellId="../M1/1/M1" postCellId="../NSML/0/NSML" preSegmentId="9" postSegmentId="10" preFractionAlong="0.979" postFractionAlong="0.544"/>
      <connection id="37" preCellId="../M1/2/M1" postCellId="../NSML/0/NSML" preSegmentId="1" postSegmentId="10" preFractionAlong="0.147" postFractionAlong="0.544"/>
    </projection>
    <projection id="NCXLS_M1_M1" presynapticPopulation="M1" postsynapticPopulation="M1" synapse="Acetylcholine">
      <connection id="4" preCellId="../M1/0/M1" postCellId="../M1/2/M1" preSegmentId="1" postSegmentId="10" preFractionAlong="0.864" postFractionAlong="0.654"/>
      <connection id="20" preCellId="../M1/1/M1" postCellId="../M1/2/M1" preSegmentId="9" postSegmentId="10" preFractionAlong="0.979" postFractionAlong="0.654"/>
      <connection id="51" preCellId="../M1/3/M1" postCellId="../M1/2/M1" preSegmentId="8" postSegmentId="10" preFractionAlong="0.283" postFractionAlong="0.654"/>
    </projection>
    <projection id="NCXLS_M1_NSMR" presynapticPopulation="M1" postsynapticPopulation="NSMR" synapse="Acetylcholine">
      <connection id="5" preCellId="../M1/0/M1" postCellId="../NSMR/0/NSMR" preSegmentId="1" postSegmentId="1" preFractionAlong="0.864" postFractionAlong="0.995"/>
      <connection id="6" preCellId="../M1/0/M1" postCellId="../NSMR/1/NSMR" preSegmentId="1" postSegmentId="4" preFractionAlong="0.864" postFractionAlong="0.183"/>
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    </projection>
    <projection id="NCXLS_M1_I1R" presynapticPopulation="M1" postsynapticPopulation="I1R" synapse="Acetylcholine">
      <connection id="7" preCellId="../M1/0/M1" postCellId="../I1R/0/I1R" preSegmentId="1" postSegmentId="6" preFractionAlong="0.864" postFractionAlong="0.459"/>
      <connection id="23" preCellId="../M1/1/M1" postCellId="../I1R/0/I1R" preSegmentId="9" postSegmentId="6" preFractionAlong="0.979" postFractionAlong="0.459"/>
      <connection id="39" preCellId="../M1/2/M1" postCellId="../I1R/0/I1R" preSegmentId="1" postSegmentId="6" preFractionAlong="0.147" postFractionAlong="0.459"/>
      <connection id="53" preCellId="../M1/3/M1" postCellId="../I1R/0/I1R" preSegmentId="8" postSegmentId="6" preFractionAlong="0.283" postFractionAlong="0.459"/>
    </projection>
    <projection id="NCXLS_M1_I2L" presynapticPopulation="M1" postsynapticPopulation="I2L" synapse="Acetylcholine">
      <connection id="8" preCellId="../M1/0/M1" postCellId="../I2L/0/I2L" preSegmentId="1" postSegmentId="8" preFractionAlong="0.864" postFractionAlong="0.031"/>
      <connection id="24" preCellId="../M1/1/M1" postCellId="../I2L/0/I2L" preSegmentId="9" postSegmentId="8" preFractionAlong="0.979" postFractionAlong="0.031"/>
      <connection id="40" preCellId="../M1/2/M1" postCellId="../I2L/0/I2L" preSegmentId="1" postSegmentId="8" preFractionAlong="0.147" postFractionAlong="0.031"/>
      <connection id="54" preCellId="../M1/3/M1" postCellId="../I2L/0/I2L" preSegmentId="8" postSegmentId="8" preFractionAlong="0.283" postFractionAlong="0.031"/>
    </projection>
    <projection id="NCXLS_M1_I2R" presynapticPopulation="M1" postsynapticPopulation="I2R" synapse="Acetylcholine">
      <connection id="9" preCellId="../M1/0/M1" postCellId="../I2R/0/I2R" preSegmentId="1" postSegmentId="9" preFractionAlong="0.864" postFractionAlong="0.207"/>
      <connection id="25" preCellId="../M1/1/M1" postCellId="../I2R/0/I2R" preSegmentId="9" postSegmentId="9" preFractionAlong="0.979" postFractionAlong="0.207"/>
      <connection id="41" preCellId="../M1/2/M1" postCellId="../I2R/0/I2R" preSegmentId="1" postSegmentId="9" preFractionAlong="0.147" postFractionAlong="0.207"/>
      <connection id="55" preCellId="../M1/3/M1" postCellId="../I2R/0/I2R" preSegmentId="8" postSegmentId="9" preFractionAlong="0.283" postFractionAlong="0.207"/>
    </projection>
    <projection id="NCXLS_M1_M1" presynapticPopulation="M1" postsynapticPopulation="M1" synapse="Glutamate">
      <connection id="10" preCellId="../M1/0/M1" postCellId="../M1/3/M1" preSegmentId="1" postSegmentId="2" preFractionAlong="0.864" postFractionAlong="0.28"/>
      <connection id="46" preCellId="../M1/3/M1" postCellId="../M1/0/M1" preSegmentId="8" postSegmentId="8" preFractionAlong="0.283" postFractionAlong="0.291"/>
      <connection id="47" preCellId="../M1/3/M1" postCellId="../M1/1/M1" preSegmentId="8" postSegmentId="7" preFractionAlong="0.283" postFractionAlong="0.891"/>
    </projection>
    <projection id="NCXLS_M1_M2R" presynapticPopulation="M1" postsynapticPopulation="M2R" synapse="Glutamate">
      <connection id="11" preCellId="../M1/0/M1" postCellId="../M2R/0/M2R" preSegmentId="1" postSegmentId="1" preFractionAlong="0.864" postFractionAlong="0.469"/>
      <connection id="27" preCellId="../M1/1/M1" postCellId="../M2R/0/M2R" preSegmentId="9" postSegmentId="1" preFractionAlong="0.979" postFractionAlong="0.469"/>
    </projection>
    <projection id="NCXLS_M1_M3L" presynapticPopulation="M1" postsynapticPopulation="M3L" synapse="Glutamate">
      <connection id="12" preCellId="../M1/0/M1" postCellId="../M3L/0/M3L" preSegmentId="1" postSegmentId="1" preFractionAlong="0.864" postFractionAlong="0.675"/>
      <connection id="28" preCellId="../M1/1/M1" postCellId="../M3L/0/M3L" preSegmentId="9" postSegmentId="1" preFractionAlong="0.979" postFractionAlong="0.675"/>
    </projection>
    <electricalProjection id="NCXLS_M1_M1_GJ" presynapticPopulation="M1" postsynapticPopulation="M1">
      <electricalConnection id="13" preCell="1" postCell="0" synapse="Generic_GJ" preSegment="9" postSegment="8" preFractionAlong="0.979" postFractionAlong="0.291"/>
      <electricalConnection id="26" preCell="1" postCell="3" synapse="Generic_GJ" preSegment="9" postSegment="2" preFractionAlong="0.979" postFractionAlong="0.28"/>
    </electricalProjection>
    <projection id="NCXLS_M2L_I3" presynapticPopulation="M2L" postsynapticPopulation="I3" synapse="Acetylcholine">
      <connection id="29" preCellId="../M2L/0/M2L" postCellId="../I3/0/I3" preSegmentId="8" postSegmentId="7" preFractionAlong="0.001" postFractionAlong="0.388"/>
      <connection id="32" preCellId="../M2L/0/M2L" postCellId="../I3/2/I3" preSegmentId="8" postSegmentId="8" preFractionAlong="0.001" postFractionAlong="0.008"/>
      <connection id="34" preCellId="../M2L/0/M2L" postCellId="../I3/3/I3" preSegmentId="8" postSegmentId="10" preFractionAlong="0.001" postFractionAlong="0.625"/>
    </projection>
    <projection id="NCXLS_M2L_M1" presynapticPopulation="M2L" postsynapticPopulation="M1" synapse="Acetylcholine">
      <connection id="30" preCellId="../M2L/0/M2L" postCellId="../M1/1/M1" preSegmentId="8" postSegmentId="7" preFractionAlong="0.001" postFractionAlong="0.891"/>
    </projection>
    <projection id="NCXLS_M2L_NSML" presynapticPopulation="M2L" postsynapticPopulation="NSML" synapse="Acetylcholine">
      <connection id="31" preCellId="../M2L/0/M2L" postCellId="../NSML/1/NSML" preSegmentId="8" postSegmentId="5" preFractionAlong="0.001" postFractionAlong="0.554"/>
      <connection id="33" preCellId="../M2L/0/M2L" postCellId="../NSML/2/NSML" preSegmentId="8" postSegmentId="10" preFractionAlong="0.001" postFractionAlong="0.724"/>
    </projection>
    <projection id="NCXLS_NSML_I3" presynapticPopulation="NSML" postsynapticPopulation="I3" synapse="Serotonin_Glutamate">
      <connection id="35" preCellId="../NSML/1/NSML" postCellId="../I3/3/I3" preSegmentId="5" postSegmentId="10" preFractionAlong="0.574" postFractionAlong="0.625"/>
    </projection>
    <projection id="NCXLS_NSMR_I1L" presynapticPopulation="NSMR" postsynapticPopulation="I1L" synapse="Serotonin_Glutamate">
      <connection id="42" preCellId="../NSMR/0/NSMR" postCellId="../I1L/0/I1L" preSegmentId="10" postSegmentId="2" preFractionAlong="0.339" postFractionAlong="0.217"/>
    </projection>
    <projection id="NCXLS_NSMR_I2L" presynapticPopulation="NSMR" postsynapticPopulation="I2L" synapse="Serotonin_Glutamate">
      <connection id="43" preCellId="../NSMR/0/NSMR" postCellId="../I2L/0/I2L" preSegmentId="10" postSegmentId="8" preFractionAlong="0.339" postFractionAlong="0.031"/>
    </projection>
    <projection id="NCXLS_I2L_I1L" presynapticPopulation="I2L" postsynapticPopulation="I1L" synapse="Acetylcholine">
      <connection id="44" preCellId="../I2L/0/I2L" postCellId="../I1L/0/I1L" preSegmentId="10" postSegmentId="2" preFractionAlong="0.838" postFractionAlong="0.217"/>
    </projection>
    <electricalProjection id="NCXLS_I2L_I2R_GJ" presynapticPopulation="I2L" postsynapticPopulation="I2R">
      <electricalConnection id="45" preCell="0" postCell="0" synapse="Generic_GJ" preSegment="10" postSegment="9" preFractionAlong="0.838" postFractionAlong="0.207"/>
    </electricalProjection>
    <electricalProjection id="NCXLS_M1_M2R_GJ" presynapticPopulation="M1" postsynapticPopulation="M2R">
      <electricalConnection id="56" preCell="3" postCell="0" synapse="Generic_GJ" preSegment="8" postSegment="1" preFractionAlong="0.283" postFractionAlong="0.469"/>
    </electricalProjection>
    <projection id="NCXLS_M2R_M1" presynapticPopulation="M2R" postsynapticPopulation="M1" synapse="Acetylcholine">
      <connection id="57" preCellId="../M2R/0/M2R" postCellId="../M1/0/M1" preSegmentId="6" postSegmentId="8" preFractionAlong="0.854" postFractionAlong="0.291"/>
      <connection id="65" preCellId="../M2R/0/M2R" postCellId="../M1/3/M1" preSegmentId="6" postSegmentId="2" preFractionAlong="0.854" postFractionAlong="0.28"/>
    </projection>
    <projection id="NCXLS_M2R_I3" presynapticPopulation="M2R" postsynapticPopulation="I3" synapse="Acetylcholine">
      <connection id="58" preCellId="../M2R/0/M2R" postCellId="../I3/0/I3" preSegmentId="6" postSegmentId="7" preFractionAlong="0.854" postFractionAlong="0.388"/>
      <connection id="60" preCellId="../M2R/0/M2R" postCellId="../I3/1/I3" preSegmentId="6" postSegmentId="10" preFractionAlong="0.854" postFractionAlong="0.391"/>
      <connection id="63" preCellId="../M2R/0/M2R" postCellId="../I3/2/I3" preSegmentId="6" postSegmentId="8" preFractionAlong="0.854" postFractionAlong="0.008"/>
      <connection id="67" preCellId="../M2R/0/M2R" postCellId="../I3/3/I3" preSegmentId="6" postSegmentId="10" preFractionAlong="0.854" postFractionAlong="0.625"/>
    </projection>
    <electricalProjection id="NCXLS_M2R_M1_GJ" presynapticPopulation="M2R" postsynapticPopulation="M1">
      <electricalConnection id="59" preCell="0" postCell="1" synapse="Generic_GJ" preSegment="6" postSegment="7" preFractionAlong="0.854" postFractionAlong="0.891"/>
    </electricalProjection>
    <projection id="NCXLS_M2R_M2L" presynapticPopulation="M2R" postsynapticPopulation="M2L" synapse="Acetylcholine">
      <connection id="61" preCellId="../M2R/0/M2R" postCellId="../M2L/0/M2L" preSegmentId="6" postSegmentId="5" preFractionAlong="0.854" postFractionAlong="0.962"/>
    </projection>
    <projection id="NCXLS_M2R_NSML" presynapticPopulation="M2R" postsynapticPopulation="NSML" synapse="Acetylcholine">
      <connection id="62" preCellId="../M2R/0/M2R" postCellId="../NSML/1/NSML" preSegmentId="6" postSegmentId="5" preFractionAlong="0.854" postFractionAlong="0.554"/>
      <connection id="66" preCellId="../M2R/0/M2R" postCellId="../NSML/2/NSML" preSegmentId="6" postSegmentId="10" preFractionAlong="0.854" postFractionAlong="0.724"/>
    </projection>
    <projection id="NCXLS_M2R_NSMR" presynapticPopulation="M2R" postsynapticPopulation="NSMR" synapse="Acetylcholine">
      <connection id="64" preCellId="../M2R/0/M2R" postCellId="../NSMR/1/NSMR" preSegmentId="6" postSegmentId="4" preFractionAlong="0.854" postFractionAlong="0.183"/>
    </projection>
    <projection id="NCXLS_M2R_M3L" presynapticPopulation="M2R" postsynapticPopulation="M3L" synapse="Acetylcholine">
      <connection id="68" preCellId="../M2R/0/M2R" postCellId="../M3L/0/M3L" preSegmentId="6" postSegmentId="1" preFractionAlong="0.854" postFractionAlong="0.675"/>
    </projection>
    <projection id="NCXLS_M3L_I3" presynapticPopulation="M3L" postsynapticPopulation="I3" synapse="Acetylcholine">
      <connection id="69" preCellId="../M3L/0/M3L" postCellId="../I3/0/I3" preSegmentId="4" postSegmentId="7" preFractionAlong="0.699" postFractionAlong="0.388"/>
    </projection>
    <projection id="NCXLS_M3L_M2L" presynapticPopulation="M3L" postsynapticPopulation="M2L" synapse="Acetylcholine">
      <connection id="70" preCellId="../M3L/0/M3L" postCellId="../M2L/0/M2L" preSegmentId="4" postSegmentId="5" preFractionAlong="0.699" postFractionAlong="0.962"/>
    </projection>
  </network>
</neuroml>
