<?xml version='1.0' encoding='UTF-8'?>
<neuroml xmlns="http://www.neuroml.org/schema/neuroml2" xmlns:xsi="http://www.w3.org/2001/XMLSchema-instance" xsi:schemaLocation="http://www.neuroml.org/schema/neuroml2 https://raw.githubusercontent.com/NeuroML/NeuroML2/development/Schemas/NeuroML2/NeuroML_v2beta4.xsd" id="gvft_network_bio_prior_lamW_0.367_DF_0.019_t60.net">
  <notes>NeuroML2 network generated from GVFT simulation on 2025-05-04 11:16:32
</notes>
  <include href="I1L.cell.nml"/>
  <include href="I1R.cell.nml"/>
  <include href="I2L.cell.nml"/>
  <include href="I2R.cell.nml"/>
  <include href="M1.cell.nml"/>
  <include href="M2L.cell.nml"/>
  <include href="M2R.cell.nml"/>
  <include href="M3L.cell.nml"/>
  <include href="M3R.cell.nml"/>
  <include href="NSML.cell.nml"/>
  <include href="NSMR.cell.nml"/>
  <include href="Acetylcholine.synapse.nml"/>
  <include href="Generic_GJ.nml"/>
  <include href="Glutamate.synapse.nml"/>
  <include href="Serotonin_Glutamate.synapse.nml"/>
  <network id="gvft_network_bio_prior_lamW_0.367_DF_0.019_t60.net" type="networkWithTemperature" temperature="20.0 degC">
    <population id="I1L" component="I1L" type="populationList" size="4">
      <instance id="0">
        <location x="-0.03517588973045349" y="0.7587939500808716" z="0.0"/>
      </instance>
      <instance id="1">
        <location x="-0.03517588973045349" y="0.8592965006828308" z="0.0"/>
      </instance>
      <instance id="2">
        <location x="0.30653268098831177" y="0.5577889680862427" z="0.0"/>
      </instance>
      <instance id="3">
        <location x="0.9899497628211975" y="0.4773869514465332" z="0.0"/>
      </instance>
    </population>
    <population id="I1R" component="I1R" type="populationList" size="2">
      <instance id="0">
        <location x="0.49748745560646057" y="-0.45728644728660583" z="0.0"/>
      </instance>
      <instance id="1">
        <location x="0.39698493480682373" y="-0.005025136284530163" z="0.0"/>
      </instance>
    </population>
    <population id="I2L" component="I2L" type="populationList" size="1">
      <instance id="0">
        <location x="-0.13567839562892914" y="0.015075387433171272" z="0.0"/>
      </instance>
    </population>
    <population id="I2R" component="I2R" type="populationList" size="1">
      <instance id="0">
        <location x="-0.6683416962623596" y="0.7185929417610168" z="0.0"/>
      </instance>
    </population>
    <population id="M1" component="M1" type="populationList" size="1">
      <instance id="0">
        <location x="0.7085427045822144" y="-0.929648220539093" z="0.0"/>
      </instance>
    </population>
    <population id="M2L" component="M2L" type="populationList" size="1">
      <instance id="0">
        <location x="-0.43718594312667847" y="-0.7185929417610168" z="0.0"/>
      </instance>
    </population>
    <population id="M2R" component="M2R" type="populationList" size="1">
      <instance id="0">
        <location x="0.08542714267969131" y="-0.13567839562892914" z="0.0"/>
      </instance>
    </population>
    <population id="M3L" component="M3L" type="populationList" size="1">
      <instance id="0">
        <location x="0.4070351719856262" y="0.5678392052650452" z="0.0"/>
      </instance>
    </population>
    <population id="M3R" component="M3R" type="populationList" size="3">
      <instance id="0">
        <location x="-0.43718594312667847" y="0.025125637650489807" z="0.0"/>
      </instance>
      <instance id="1">
        <location x="0.10552764683961868" y="-0.43718594312667847" z="0.0"/>
      </instance>
      <instance id="2">
        <location x="-0.2261306643486023" y="0.6984924674034119" z="0.0"/>
      </instance>
    </population>
    <population id="NSML" component="NSML" type="populationList" size="3">
      <instance id="0">
        <location x="0.13567839562892914" y="0.6381909847259521" z="0.0"/>
      </instance>
      <instance id="1">
        <location x="0.12562814354896545" y="-0.8291457295417786" z="0.0"/>
      </instance>
      <instance id="2">
        <location x="-1.0" y="-0.39698493480682373" z="0.0"/>
      </instance>
    </population>
    <population id="NSMR" component="NSMR" type="populationList" size="2">
      <instance id="0">
        <location x="0.4773869514465332" y="-0.2964824140071869" z="0.0"/>
      </instance>
      <instance id="1">
        <location x="-0.5778894424438477" y="0.2160804122686386" z="0.0"/>
      </instance>
    </population>
    <projection id="NCXLS_I1L_I1L" presynapticPopulation="I1L" postsynapticPopulation="I1L" synapse="Acetylcholine">
      <connection id="0" preCellId="../I1L/0/I1L" postCellId="../I1L/1/I1L" preSegmentId="1" postSegmentId="2" preFractionAlong="0.5286566039892756" postFractionAlong="0.33444252711810407"/>
    </projection>
    <projection id="NCXLS_NSMR_I2R" presynapticPopulation="NSMR" postsynapticPopulation="I2R" synapse="Serotonin_Glutamate">
      <connection id="1" preCellId="../NSMR/1/NSMR" postCellId="../I2R/0/I2R" preSegmentId="5" postSegmentId="4" preFractionAlong="0.19755590567847825" postFractionAlong="0.8051743973603768"/>
    </projection>
    <electricalProjection id="NCXLS_NSMR_NSML_GJ" presynapticPopulation="NSMR" postsynapticPopulation="NSML">
      <electricalConnection id="2" preCell="1" postCell="2" synapse="Generic_GJ" preSegment="8" postSegment="4" preFractionAlong="0.08496628988946642" postFractionAlong="0.43624602635715737"/>
    </electricalProjection>
    <projection id="NCXLS_M1_I1L" presynapticPopulation="M1" postsynapticPopulation="I1L" synapse="Acetylcholine">
      <connection id="3" preCellId="../M1/0/M1" postCellId="../I1L/0/I1L" preSegmentId="6" postSegmentId="8" preFractionAlong="0.43771682493354136" postFractionAlong="0.2767541319513086"/>
      <connection id="6" preCellId="../M1/0/M1" postCellId="../I1L/1/I1L" preSegmentId="6" postSegmentId="6" preFractionAlong="0.03671294348306664" postFractionAlong="0.47476900604365124"/>
      <connection id="7" preCellId="../M1/0/M1" postCellId="../I1L/2/I1L" preSegmentId="4" postSegmentId="2" preFractionAlong="0.9205358851025547" postFractionAlong="0.012003027272682543"/>
      <connection id="10" preCellId="../M1/0/M1" postCellId="../I1L/3/I1L" preSegmentId="5" postSegmentId="1" preFractionAlong="0.23660978270750732" postFractionAlong="0.4834980851068038"/>
    </projection>
    <projection id="NCXLS_M1_I1R" presynapticPopulation="M1" postsynapticPopulation="I1R" synapse="Acetylcholine">
      <connection id="4" preCellId="../M1/0/M1" postCellId="../I1R/0/I1R" preSegmentId="5" postSegmentId="4" preFractionAlong="0.34700233541219994" postFractionAlong="0.9328676901266331"/>
      <connection id="8" preCellId="../M1/0/M1" postCellId="../I1R/1/I1R" preSegmentId="1" postSegmentId="3" preFractionAlong="0.740663581066626" postFractionAlong="0.48501798752404124"/>
    </projection>
    <projection id="NCXLS_M1_I2L" presynapticPopulation="M1" postsynapticPopulation="I2L" synapse="Acetylcholine">
      <connection id="5" preCellId="../M1/0/M1" postCellId="../I2L/0/I2L" preSegmentId="8" postSegmentId="7" preFractionAlong="0.5023718199720955" postFractionAlong="0.3278839940182585"/>
    </projection>
    <electricalProjection id="NCXLS_M1_NSMR_GJ" presynapticPopulation="M1" postsynapticPopulation="NSMR">
      <electricalConnection id="9" preCell="0" postCell="0" synapse="Generic_GJ" preSegment="2" postSegment="8" preFractionAlong="0.9724613900279022" postFractionAlong="0.5180104313760979"/>
    </electricalProjection>
    <projection id="NCXLS_M1_NSML" presynapticPopulation="M1" postsynapticPopulation="NSML" synapse="Acetylcholine">
      <connection id="11" preCellId="../M1/0/M1" postCellId="../NSML/0/NSML" preSegmentId="3" postSegmentId="2" preFractionAlong="0.07489584200198374" postFractionAlong="0.10616035354746722"/>
    </projection>
    <electricalProjection id="NCXLS_M1_M2R_GJ" presynapticPopulation="M1" postsynapticPopulation="M2R">
      <electricalConnection id="12" preCell="0" postCell="0" synapse="Generic_GJ" preSegment="8" postSegment="4" preFractionAlong="0.23981995220659025" postFractionAlong="0.19495827149863054"/>
    </electricalProjection>
    <projection id="NCXLS_M1_M3R" presynapticPopulation="M1" postsynapticPopulation="M3R" synapse="Acetylcholine">
      <connection id="13" preCellId="../M1/0/M1" postCellId="../M3R/2/M3R" preSegmentId="6" postSegmentId="1" preFractionAlong="0.7687471313625129" postFractionAlong="0.06194651857898792"/>
    </projection>
    <projection id="NCXLS_M1_I2R" presynapticPopulation="M1" postsynapticPopulation="I2R" synapse="Acetylcholine">
      <connection id="14" preCellId="../M1/0/M1" postCellId="../I2R/0/I2R" preSegmentId="2" postSegmentId="1" preFractionAlong="0.11921044284057336" postFractionAlong="0.03646105082561846"/>
    </projection>
    <electricalProjection id="NCXLS_M1_M3L_GJ" presynapticPopulation="M1" postsynapticPopulation="M3L">
      <electricalConnection id="15" preCell="0" postCell="0" synapse="Generic_GJ" preSegment="4" postSegment="8" preFractionAlong="0.8341641082084413" postFractionAlong="0.11797248362806156"/>
    </electricalProjection>
    <projection id="NCXLS_M3R_I1L" presynapticPopulation="M3R" postsynapticPopulation="I1L" synapse="Acetylcholine">
      <connection id="16" preCellId="../M3R/0/M3R" postCellId="../I1L/0/I1L" preSegmentId="8" postSegmentId="7" preFractionAlong="0.4378998871429123" postFractionAlong="0.8439934719420248"/>
      <connection id="18" preCellId="../M3R/0/M3R" postCellId="../I1L/1/I1L" preSegmentId="3" postSegmentId="3" preFractionAlong="0.5776130806371337" postFractionAlong="0.5709070537521448"/>
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    </projection>
    <projection id="NCXLS_M3R_NSMR" presynapticPopulation="M3R" postsynapticPopulation="NSMR" synapse="Acetylcholine">
      <connection id="17" preCellId="../M3R/0/M3R" postCellId="../NSMR/1/NSMR" preSegmentId="2" postSegmentId="7" preFractionAlong="0.4217126175259164" postFractionAlong="0.03992253256375122"/>
      <connection id="79" preCellId="../M3R/2/M3R" postCellId="../NSMR/0/NSMR" preSegmentId="5" postSegmentId="2" preFractionAlong="0.4603553731348269" postFractionAlong="0.7096713435045244"/>
    </projection>
    <electricalProjection id="NCXLS_M3R_NSML_GJ" presynapticPopulation="M3R" postsynapticPopulation="NSML">
      <electricalConnection id="19" preCell="0" postCell="0" synapse="Generic_GJ" preSegment="6" postSegment="6" preFractionAlong="0.3155331806631355" postFractionAlong="0.10662361893659789"/>
      <electricalConnection id="40" preCell="1" postCell="0" synapse="Generic_GJ" preSegment="8" postSegment="5" preFractionAlong="0.13035313004326554" postFractionAlong="0.2035348738868964"/>
      <electricalConnection id="80" preCell="2" postCell="1" synapse="Generic_GJ" preSegment="4" postSegment="8" preFractionAlong="0.050175350319974" postFractionAlong="0.09669455978756714"/>
      <electricalConnection id="85" preCell="2" postCell="2" synapse="Generic_GJ" preSegment="1" postSegment="5" preFractionAlong="0.761889894377484" postFractionAlong="0.8933044937881227"/>
    </electricalProjection>
    <projection id="NCXLS_M3R_M3R" presynapticPopulation="M3R" postsynapticPopulation="M3R" synapse="Acetylcholine">
      <connection id="20" preCellId="../M3R/0/M3R" postCellId="../M3R/2/M3R" preSegmentId="4" postSegmentId="5" preFractionAlong="0.09949466887296465" postFractionAlong="0.7665959447120516"/>
      <connection id="37" preCellId="../M3R/1/M3R" postCellId="../M3R/0/M3R" preSegmentId="5" postSegmentId="6" preFractionAlong="0.47415794587907967" postFractionAlong="0.22578955215062912"/>
      <connection id="77" preCellId="../M3R/2/M3R" postCellId="../M3R/0/M3R" preSegmentId="4" postSegmentId="3" preFractionAlong="0.9399243728857088" postFractionAlong="0.3430267125900244"/>
      <connection id="81" preCellId="../M3R/2/M3R" postCellId="../M3R/1/M3R" preSegmentId="4" postSegmentId="1" preFractionAlong="0.281825003295472" postFractionAlong="0.18430139695009906"/>
    </projection>
    <projection id="NCXLS_M3R_I2R" presynapticPopulation="M3R" postsynapticPopulation="I2R" synapse="Acetylcholine">
      <connection id="21" preCellId="../M3R/0/M3R" postCellId="../I2R/0/I2R" preSegmentId="3" postSegmentId="2" preFractionAlong="0.9700744566667069" postFractionAlong="0.8650710993753938"/>
      <connection id="43" preCellId="../M3R/1/M3R" postCellId="../I2R/0/I2R" preSegmentId="5" postSegmentId="8" preFractionAlong="0.8852388787075652" postFractionAlong="0.08670656759564022"/>
      <connection id="84" preCellId="../M3R/2/M3R" postCellId="../I2R/0/I2R" preSegmentId="6" postSegmentId="3" preFractionAlong="0.027106652336233106" postFractionAlong="0.7835015025879088"/>
    </projection>
    <projection id="NCXLS_NSMR_I1R" presynapticPopulation="NSMR" postsynapticPopulation="I1R" synapse="Serotonin_Glutamate">
      <connection id="22" preCellId="../NSMR/0/NSMR" postCellId="../I1R/0/I1R" preSegmentId="7" postSegmentId="5" preFractionAlong="0.7008656972438799" postFractionAlong="0.28520580268041407"/>
    </projection>
    <projection id="NCXLS_NSMR_M1" presynapticPopulation="NSMR" postsynapticPopulation="M1" synapse="Serotonin_Glutamate">
      <connection id="23" preCellId="../NSMR/0/NSMR" postCellId="../M1/0/M1" preSegmentId="3" postSegmentId="2" preFractionAlong="0.45564954943987745" postFractionAlong="0.4820173397769325"/>
    </projection>
    <projection id="NCXLS_NSMR_I1L" presynapticPopulation="NSMR" postsynapticPopulation="I1L" synapse="Serotonin_Glutamate">
      <connection id="24" preCellId="../NSMR/0/NSMR" postCellId="../I1L/3/I1L" preSegmentId="7" postSegmentId="3" preFractionAlong="0.28191835559725165" postFractionAlong="0.3180396116945199"/>
    </projection>
    <projection id="NCXLS_NSML_M2L" presynapticPopulation="NSML" postsynapticPopulation="M2L" synapse="Serotonin_Glutamate">
      <connection id="25" preCellId="../NSML/1/NSML" postCellId="../M2L/0/M2L" preSegmentId="8" postSegmentId="2" preFractionAlong="0.056224294850972245" postFractionAlong="0.4856342984133404"/>
      <connection id="88" preCellId="../NSML/2/NSML" postCellId="../M2L/0/M2L" preSegmentId="2" postSegmentId="3" preFractionAlong="0.615069754014698" postFractionAlong="0.9269075621458641"/>
    </projection>
    <electricalProjection id="NCXLS_NSML_NSML_GJ" presynapticPopulation="NSML" postsynapticPopulation="NSML">
      <electricalConnection id="26" preCell="1" postCell="2" synapse="Generic_GJ" preSegment="1" postSegment="8" preFractionAlong="0.610363007818157" postFractionAlong="0.5464070742121321"/>
      <electricalConnection id="87" preCell="2" postCell="1" synapse="Generic_GJ" preSegment="2" postSegment="7" preFractionAlong="0.8874245353703603" postFractionAlong="0.8939335106699905"/>
    </electricalProjection>
    <projection id="NCXLS_NSML_I1L" presynapticPopulation="NSML" postsynapticPopulation="I1L" synapse="Serotonin_Glutamate">
      <connection id="27" preCellId="../NSML/0/NSML" postCellId="../I1L/0/I1L" preSegmentId="5" postSegmentId="3" preFractionAlong="0.34327548906444827" postFractionAlong="0.8520484158046929"/>
      <connection id="28" preCellId="../NSML/0/NSML" postCellId="../I1L/1/I1L" preSegmentId="3" postSegmentId="2" preFractionAlong="0.5147421937567799" postFractionAlong="0.09957971354002892"/>
      <connection id="29" preCellId="../NSML/0/NSML" postCellId="../I1L/2/I1L" preSegmentId="3" postSegmentId="4" preFractionAlong="0.9636851886870491" postFractionAlong="0.37698616728684164"/>
      <connection id="30" preCellId="../NSML/0/NSML" postCellId="../I1L/3/I1L" preSegmentId="6" postSegmentId="4" preFractionAlong="0.07971507318728499" postFractionAlong="0.6831142857230466"/>
    </projection>
    <electricalProjection id="NCXLS_NSML_M3L_GJ" presynapticPopulation="NSML" postsynapticPopulation="M3L">
      <electricalConnection id="31" preCell="0" postCell="0" synapse="Generic_GJ" preSegment="2" postSegment="2" preFractionAlong="0.5756652529974197" postFractionAlong="0.12611532237541057"/>
    </electricalProjection>
    <electricalProjection id="NCXLS_M3R_NSMR_GJ" presynapticPopulation="M3R" postsynapticPopulation="NSMR">
      <electricalConnection id="33" preCell="1" postCell="1" synapse="Generic_GJ" preSegment="5" postSegment="5" preFractionAlong="0.6486829533573645" postFractionAlong="0.8992489182892025"/>
      <electricalConnection id="74" preCell="2" postCell="1" synapse="Generic_GJ" preSegment="5" postSegment="3" preFractionAlong="0.3049031243850635" postFractionAlong="0.19267639648670032"/>
    </electricalProjection>
    <projection id="NCXLS_M3R_I2L" presynapticPopulation="M3R" postsynapticPopulation="I2L" synapse="Acetylcholine">
      <connection id="34" preCellId="../M3R/1/M3R" postCellId="../I2L/0/I2L" preSegmentId="5" postSegmentId="1" preFractionAlong="0.13128797200482423" postFractionAlong="0.3096917111051891"/>
      <connection id="76" preCellId="../M3R/2/M3R" postCellId="../I2L/0/I2L" preSegmentId="5" postSegmentId="4" preFractionAlong="0.22748160369353998" postFractionAlong="0.1661849996097492"/>
    </projection>
    <projection id="NCXLS_M3R_I1R" presynapticPopulation="M3R" postsynapticPopulation="I1R" synapse="Acetylcholine">
      <connection id="38" preCellId="../M3R/1/M3R" postCellId="../I1R/1/I1R" preSegmentId="2" postSegmentId="5" preFractionAlong="0.040333852138451975" postFractionAlong="0.3261702541282535"/>
      <connection id="73" preCellId="../M3R/2/M3R" postCellId="../I1R/0/I1R" preSegmentId="5" postSegmentId="5" preFractionAlong="0.2908768542315825" postFractionAlong="0.4694068419892581"/>
      <connection id="78" preCellId="../M3R/2/M3R" postCellId="../I1R/1/I1R" preSegmentId="2" postSegmentId="8" preFractionAlong="0.4852304557653562" postFractionAlong="0.17916391829015088"/>
    </projection>
    <projection id="NCXLS_M3R_M2R" presynapticPopulation="M3R" postsynapticPopulation="M2R" synapse="Acetylcholine">
      <connection id="41" preCellId="../M3R/1/M3R" postCellId="../M2R/0/M2R" preSegmentId="5" postSegmentId="7" preFractionAlong="0.4255056592718428" postFractionAlong="0.565415939752538"/>
    </projection>
    <electricalProjection id="NCXLS_M3R_M3R_GJ" presynapticPopulation="M3R" postsynapticPopulation="M3R">
      <electricalConnection id="42" preCell="1" postCell="2" synapse="Generic_GJ" preSegment="5" postSegment="2" preFractionAlong="0.034431308573314556" postFractionAlong="0.44582554982701617"/>
    </electricalProjection>
    <projection id="NCXLS_M3R_NSML" presynapticPopulation="M3R" postsynapticPopulation="NSML" synapse="Acetylcholine">
      <connection id="44" preCellId="../M3R/1/M3R" postCellId="../NSML/2/NSML" preSegmentId="4" postSegmentId="5" preFractionAlong="0.9132296862792705" postFractionAlong="0.38797275439788637"/>
    </projection>
    <projection id="NCXLS_M3R_M3L" presynapticPopulation="M3R" postsynapticPopulation="M3L" synapse="Acetylcholine">
      <connection id="45" preCellId="../M3R/1/M3R" postCellId="../M3L/0/M3L" preSegmentId="8" postSegmentId="3" preFractionAlong="0.1336956543994362" postFractionAlong="0.9353944896677987"/>
    </projection>
    <projection id="NCXLS_M2L_I1L" presynapticPopulation="M2L" postsynapticPopulation="I1L" synapse="Acetylcholine">
      <connection id="46" preCellId="../M2L/0/M2L" postCellId="../I1L/0/I1L" preSegmentId="5" postSegmentId="7" preFractionAlong="0.9413343927869017" postFractionAlong="0.6766172335525065"/>
      <connection id="51" preCellId="../M2L/0/M2L" postCellId="../I1L/1/I1L" preSegmentId="3" postSegmentId="2" preFractionAlong="0.3044904243540304" postFractionAlong="0.9829468795547008"/>
      <connection id="52" preCellId="../M2L/0/M2L" postCellId="../I1L/2/I1L" preSegmentId="2" postSegmentId="8" preFractionAlong="0.7176761577934996" postFractionAlong="0.9766176373150092"/>
      <connection id="57" preCellId="../M2L/0/M2L" postCellId="../I1L/3/I1L" preSegmentId="7" postSegmentId="4" preFractionAlong="0.22833125236861085" postFractionAlong="0.05845798723687701"/>
    </projection>
    <projection id="NCXLS_M2L_I1R" presynapticPopulation="M2L" postsynapticPopulation="I1R" synapse="Acetylcholine">
      <connection id="47" preCellId="../M2L/0/M2L" postCellId="../I1R/0/I1R" preSegmentId="6" postSegmentId="3" preFractionAlong="0.9381811725247224" postFractionAlong="0.2755667763091785"/>
      <connection id="54" preCellId="../M2L/0/M2L" postCellId="../I1R/1/I1R" preSegmentId="5" postSegmentId="5" preFractionAlong="0.18065754131130318" postFractionAlong="0.9476861770642796"/>
    </projection>
    <projection id="NCXLS_M2L_NSMR" presynapticPopulation="M2L" postsynapticPopulation="NSMR" synapse="Acetylcholine">
      <connection id="48" preCellId="../M2L/0/M2L" postCellId="../NSMR/1/NSMR" preSegmentId="1" postSegmentId="7" preFractionAlong="0.7008084180017403" postFractionAlong="0.7653162995253863"/>
    </projection>
    <electricalProjection id="NCXLS_M2L_M1_GJ" presynapticPopulation="M2L" postsynapticPopulation="M1">
      <electricalConnection id="49" preCell="0" postCell="0" synapse="Generic_GJ" preSegment="8" postSegment="3" preFractionAlong="0.2048024090562095" postFractionAlong="0.797998035219224"/>
    </electricalProjection>
    <projection id="NCXLS_M2L_I2L" presynapticPopulation="M2L" postsynapticPopulation="I2L" synapse="Acetylcholine">
      <connection id="50" preCellId="../M2L/0/M2L" postCellId="../I2L/0/I2L" preSegmentId="6" postSegmentId="7" preFractionAlong="0.06379455625359787" postFractionAlong="0.38722314121020696"/>
    </projection>
    <projection id="NCXLS_M2L_M3R" presynapticPopulation="M2L" postsynapticPopulation="M3R" synapse="Acetylcholine">
      <connection id="53" preCellId="../M2L/0/M2L" postCellId="../M3R/0/M3R" preSegmentId="4" postSegmentId="2" preFractionAlong="0.8018401684528059" postFractionAlong="0.43453096330449537"/>
    </projection>
    <electricalProjection id="NCXLS_M2L_NSMR_GJ" presynapticPopulation="M2L" postsynapticPopulation="NSMR">
      <electricalConnection id="55" preCell="0" postCell="0" synapse="Generic_GJ" preSegment="7" postSegment="1" preFractionAlong="0.3262205069809315" postFractionAlong="0.7561922341067805"/>
    </electricalProjection>
    <electricalProjection id="NCXLS_M2L_NSML_GJ" presynapticPopulation="M2L" postsynapticPopulation="NSML">
      <electricalConnection id="56" preCell="0" postCell="1" synapse="Generic_GJ" preSegment="4" postSegment="5" preFractionAlong="0.6082113767664467" postFractionAlong="0.4445735010694285"/>
      <electricalConnection id="58" preCell="0" postCell="0" synapse="Generic_GJ" preSegment="5" postSegment="2" preFractionAlong="0.47430866486843026" postFractionAlong="0.16802005219267857"/>
    </electricalProjection>
    <electricalProjection id="NCXLS_M2L_M3R_GJ" presynapticPopulation="M2L" postsynapticPopulation="M3R">
      <electricalConnection id="59" preCell="0" postCell="1" synapse="Generic_GJ" preSegment="2" postSegment="1" preFractionAlong="0.3999830182935685" postFractionAlong="0.05739184368827355"/>
      <electricalConnection id="61" preCell="0" postCell="2" synapse="Generic_GJ" preSegment="1" postSegment="6" preFractionAlong="0.6647392049108463" postFractionAlong="0.41933468041928834"/>
    </electricalProjection>
    <projection id="NCXLS_M2L_M2R" presynapticPopulation="M2L" postsynapticPopulation="M2R" synapse="Acetylcholine">
      <connection id="60" preCellId="../M2L/0/M2L" postCellId="../M2R/0/M2R" preSegmentId="3" postSegmentId="6" preFractionAlong="0.8843434279712875" postFractionAlong="0.15174291295305242"/>
    </projection>
    <projection id="NCXLS_M2L_I2R" presynapticPopulation="M2L" postsynapticPopulation="I2R" synapse="Acetylcholine">
      <connection id="62" preCellId="../M2L/0/M2L" postCellId="../I2R/0/I2R" preSegmentId="1" postSegmentId="3" preFractionAlong="0.41073154349101204" postFractionAlong="0.5046372879774349"/>
    </projection>
    <projection id="NCXLS_M2L_M3L" presynapticPopulation="M2L" postsynapticPopulation="M3L" synapse="Acetylcholine">
      <connection id="63" preCellId="../M2L/0/M2L" postCellId="../M3L/0/M3L" preSegmentId="2" postSegmentId="1" preFractionAlong="0.6917201141346888" postFractionAlong="0.6613426789447244"/>
    </projection>
    <projection id="NCXLS_M2R_I1R" presynapticPopulation="M2R" postsynapticPopulation="I1R" synapse="Acetylcholine">
      <connection id="64" preCellId="../M2R/0/M2R" postCellId="../I1R/0/I1R" preSegmentId="7" postSegmentId="7" preFractionAlong="0.3682501073951331" postFractionAlong="0.9790318407916674"/>
      <connection id="67" preCellId="../M2R/0/M2R" postCellId="../I1R/1/I1R" preSegmentId="7" postSegmentId="3" preFractionAlong="0.45688807173726687" postFractionAlong="0.4751083649318354"/>
    </projection>
    <electricalProjection id="NCXLS_M2R_M1_GJ" presynapticPopulation="M2R" postsynapticPopulation="M1">
      <electricalConnection id="65" preCell="0" postCell="0" synapse="Generic_GJ" preSegment="3" postSegment="3" preFractionAlong="0.5019454051318417" postFractionAlong="0.9099301581597186"/>
    </electricalProjection>
    <projection id="NCXLS_M2R_I1L" presynapticPopulation="M2R" postsynapticPopulation="I1L" synapse="Acetylcholine">
      <connection id="66" preCellId="../M2R/0/M2R" postCellId="../I1L/2/I1L" preSegmentId="4" postSegmentId="2" preFractionAlong="0.5820701311242236" postFractionAlong="0.7978046813410725"/>
      <connection id="70" preCellId="../M2R/0/M2R" postCellId="../I1L/3/I1L" preSegmentId="1" postSegmentId="4" preFractionAlong="0.549717255163311" postFractionAlong="0.4171642789757021"/>
    </projection>
    <electricalProjection id="NCXLS_M2R_NSMR_GJ" presynapticPopulation="M2R" postsynapticPopulation="NSMR">
      <electricalConnection id="68" preCell="0" postCell="0" synapse="Generic_GJ" preSegment="4" postSegment="6" preFractionAlong="0.9667061400184606" postFractionAlong="0.6971662542903504"/>
    </electricalProjection>
    <projection id="NCXLS_M2R_NSML" presynapticPopulation="M2R" postsynapticPopulation="NSML" synapse="Acetylcholine">
      <connection id="69" preCellId="../M2R/0/M2R" postCellId="../NSML/1/NSML" preSegmentId="6" postSegmentId="2" preFractionAlong="0.8629596233130185" postFractionAlong="0.4805599408362681"/>
    </projection>
    <electricalProjection id="NCXLS_M2R_M3R_GJ" presynapticPopulation="M2R" postsynapticPopulation="M3R">
      <electricalConnection id="71" preCell="0" postCell="1" synapse="Generic_GJ" preSegment="7" postSegment="4" preFractionAlong="0.20399460360938737" postFractionAlong="0.8264646094921829"/>
    </electricalProjection>
    <electricalProjection id="NCXLS_M2R_M3L_GJ" presynapticPopulation="M2R" postsynapticPopulation="M3L">
      <electricalConnection id="72" preCell="0" postCell="0" synapse="Generic_GJ" preSegment="5" postSegment="4" preFractionAlong="0.05461030321346905" postFractionAlong="0.9718453013254846"/>
    </electricalProjection>
    <electricalProjection id="NCXLS_M3R_M1_GJ" presynapticPopulation="M3R" postsynapticPopulation="M1">
      <electricalConnection id="75" preCell="2" postCell="0" synapse="Generic_GJ" preSegment="6" postSegment="4" preFractionAlong="0.29785939839021125" postFractionAlong="0.7800480870400435"/>
    </electricalProjection>
    <electricalProjection id="NCXLS_M3R_M2L_GJ" presynapticPopulation="M3R" postsynapticPopulation="M2L">
      <electricalConnection id="82" preCell="2" postCell="0" synapse="Generic_GJ" preSegment="5" postSegment="1" preFractionAlong="0.021846711986201806" postFractionAlong="0.7744856031197909"/>
    </electricalProjection>
    <electricalProjection id="NCXLS_M3R_M2R_GJ" presynapticPopulation="M3R" postsynapticPopulation="M2R">
      <electricalConnection id="83" preCell="2" postCell="0" synapse="Generic_GJ" preSegment="1" postSegment="6" preFractionAlong="0.4677206159711509" postFractionAlong="0.605896815179483"/>
    </electricalProjection>
    <projection id="NCXLS_NSML_M1" presynapticPopulation="NSML" postsynapticPopulation="M1" synapse="Serotonin_Glutamate">
      <connection id="86" preCellId="../NSML/2/NSML" postCellId="../M1/0/M1" preSegmentId="5" postSegmentId="3" preFractionAlong="0.5355424730977982" postFractionAlong="0.47698339261765377"/>
    </projection>
    <projection id="NCXLS_M3L_I1L" presynapticPopulation="M3L" postsynapticPopulation="I1L" synapse="Acetylcholine">
      <connection id="89" preCellId="../M3L/0/M3L" postCellId="../I1L/0/I1L" preSegmentId="8" postSegmentId="6" preFractionAlong="0.5089590404220475" postFractionAlong="0.4528248052843268"/>
      <connection id="94" preCellId="../M3L/0/M3L" postCellId="../I1L/1/I1L" preSegmentId="7" postSegmentId="5" preFractionAlong="0.5104601313464413" postFractionAlong="0.258792408364524"/>
      <connection id="95" preCellId="../M3L/0/M3L" postCellId="../I1L/2/I1L" preSegmentId="4" postSegmentId="4" preFractionAlong="0.08696702025593306" postFractionAlong="0.3032197838442505"/>
    </projection>
    <projection id="NCXLS_M3L_I1R" presynapticPopulation="M3L" postsynapticPopulation="I1R" synapse="Acetylcholine">
      <connection id="90" preCellId="../M3L/0/M3L" postCellId="../I1R/0/I1R" preSegmentId="6" postSegmentId="1" preFractionAlong="0.95887187319041" postFractionAlong="0.14281430447286736"/>
      <connection id="97" preCellId="../M3L/0/M3L" postCellId="../I1R/1/I1R" preSegmentId="5" postSegmentId="1" preFractionAlong="0.9095953911109443" postFractionAlong="0.0061838226408966745"/>
    </projection>
    <projection id="NCXLS_M3L_NSMR" presynapticPopulation="M3L" postsynapticPopulation="NSMR" synapse="Acetylcholine">
      <connection id="91" preCellId="../M3L/0/M3L" postCellId="../NSMR/1/NSMR" preSegmentId="2" postSegmentId="7" preFractionAlong="0.2825502675186389" postFractionAlong="0.2790082903477966"/>
    </projection>
    <electricalProjection id="NCXLS_M3L_M1_GJ" presynapticPopulation="M3L" postsynapticPopulation="M1">
      <electricalConnection id="92" preCell="0" postCell="0" synapse="Generic_GJ" preSegment="8" postSegment="1" preFractionAlong="0.9987929358156545" postFractionAlong="0.054966306839822066"/>
    </electricalProjection>
    <projection id="NCXLS_M3L_I2L" presynapticPopulation="M3L" postsynapticPopulation="I2L" synapse="Acetylcholine">
      <connection id="93" preCellId="../M3L/0/M3L" postCellId="../I2L/0/I2L" preSegmentId="5" postSegmentId="3" preFractionAlong="0.08257215803527718" postFractionAlong="0.15452082999051897"/>
    </projection>
    <electricalProjection id="NCXLS_M3L_M3R_GJ" presynapticPopulation="M3L" postsynapticPopulation="M3R">
      <electricalConnection id="96" preCell="0" postCell="0" synapse="Generic_GJ" preSegment="7" postSegment="8" preFractionAlong="0.9447073816724817" postFractionAlong="0.334878290136985"/>
      <electricalConnection id="101" preCell="0" postCell="1" synapse="Generic_GJ" preSegment="4" postSegment="3" preFractionAlong="0.7331603781367996" postFractionAlong="0.9954215129254561"/>
    </electricalProjection>
    <electricalProjection id="NCXLS_M3L_NSMR_GJ" presynapticPopulation="M3L" postsynapticPopulation="NSMR">
      <electricalConnection id="98" preCell="0" postCell="0" synapse="Generic_GJ" preSegment="2" postSegment="3" preFractionAlong="0.948369552788919" postFractionAlong="0.09132573433355706"/>
    </electricalProjection>
    <electricalProjection id="NCXLS_M3L_NSML_GJ" presynapticPopulation="M3L" postsynapticPopulation="NSML">
      <electricalConnection id="99" preCell="0" postCell="1" synapse="Generic_GJ" preSegment="7" postSegment="2" preFractionAlong="0.9607463027713554" postFractionAlong="0.5375401436403463"/>
      <electricalConnection id="100" preCell="0" postCell="0" synapse="Generic_GJ" preSegment="1" postSegment="3" preFractionAlong="0.25763199876352916" postFractionAlong="0.4499436742688596"/>
    </electricalProjection>
    <projection id="NCXLS_M3L_M2L" presynapticPopulation="M3L" postsynapticPopulation="M2L" synapse="Acetylcholine">
      <connection id="102" preCellId="../M3L/0/M3L" postCellId="../M2L/0/M2L" preSegmentId="5" postSegmentId="6" preFractionAlong="0.5382201018684752" postFractionAlong="0.533323547859605"/>
    </projection>
    <electricalProjection id="NCXLS_M3L_M2R_GJ" presynapticPopulation="M3L" postsynapticPopulation="M2R">
      <electricalConnection id="103" preCell="0" postCell="0" synapse="Generic_GJ" preSegment="4" postSegment="8" preFractionAlong="0.1691618938424202" postFractionAlong="0.9774565631838426"/>
    </electricalProjection>
    <projection id="NCXLS_M3L_M3R" presynapticPopulation="M3L" postsynapticPopulation="M3R" synapse="Glutamate">
      <connection id="104" preCellId="../M3L/0/M3L" postCellId="../M3R/2/M3R" preSegmentId="5" postSegmentId="6" preFractionAlong="0.4983330282942372" postFractionAlong="0.6032454226840298"/>
    </projection>
    <projection id="NCXLS_M3L_I2R" presynapticPopulation="M3L" postsynapticPopulation="I2R" synapse="Acetylcholine">
      <connection id="105" preCellId="../M3L/0/M3L" postCellId="../I2R/0/I2R" preSegmentId="1" postSegmentId="4" preFractionAlong="0.5437870703917469" postFractionAlong="0.6949701331214758"/>
    </projection>
    <projection id="NCXLS_M3L_NSML" presynapticPopulation="M3L" postsynapticPopulation="NSML" synapse="Acetylcholine">
      <connection id="106" preCellId="../M3L/0/M3L" postCellId="../NSML/2/NSML" preSegmentId="2" postSegmentId="2" preFractionAlong="0.9902851705849413" postFractionAlong="0.6113416562477262"/>
    </projection>
  </network>
</neuroml>
