<?xml version='1.0' encoding='UTF-8'?>
<neuroml xmlns="http://www.neuroml.org/schema/neuroml2" xmlns:xsi="http://www.w3.org/2001/XMLSchema-instance" xsi:schemaLocation="http://www.neuroml.org/schema/neuroml2 https://raw.githubusercontent.com/NeuroML/NeuroML2/development/Schemas/NeuroML2/NeuroML_v2beta4.xsd" id="gvft_network_bio_prior_lamW_0.367_DF_0.019_t70.net">
  <notes>NeuroML2 network generated from GVFT simulation on 2025-05-04 11:16:39
</notes>
  <include href="I1L.cell.nml"/>
  <include href="I1R.cell.nml"/>
  <include href="M1.cell.nml"/>
  <include href="M2L.cell.nml"/>
  <include href="M2R.cell.nml"/>
  <include href="M3L.cell.nml"/>
  <include href="M3R.cell.nml"/>
  <include href="M4.cell.nml"/>
  <include href="M5.cell.nml"/>
  <include href="NSML.cell.nml"/>
  <include href="NSMR.cell.nml"/>
  <include href="Acetylcholine.synapse.nml"/>
  <include href="Generic_GJ.nml"/>
  <include href="Glutamate.synapse.nml"/>
  <include href="Serotonin_Glutamate.synapse.nml"/>
  <network id="gvft_network_bio_prior_lamW_0.367_DF_0.019_t70.net" type="networkWithTemperature" temperature="20.0 degC">
    <population id="I1L" component="I1L" type="populationList" size="4">
      <instance id="0">
        <location x="-0.6281406879425049" y="-0.9195979833602905" z="0.0"/>
      </instance>
      <instance id="1">
        <location x="-0.7788944840431213" y="-0.7085427045822144" z="0.0"/>
      </instance>
      <instance id="2">
        <location x="-0.8291457295417786" y="-0.095477394759655" z="0.0"/>
      </instance>
      <instance id="3">
        <location x="-0.26633167266845703" y="-0.9497487545013428" z="0.0"/>
      </instance>
    </population>
    <population id="I1R" component="I1R" type="populationList" size="4">
      <instance id="0">
        <location x="0.25628140568733215" y="0.8793969750404358" z="0.0"/>
      </instance>
      <instance id="1">
        <location x="0.5577889680862427" y="0.7889447212219238" z="0.0"/>
      </instance>
      <instance id="2">
        <location x="0.7386934757232666" y="0.5879396796226501" z="0.0"/>
      </instance>
      <instance id="3">
        <location x="-0.8291457295417786" y="0.43718594312667847" z="0.0"/>
      </instance>
    </population>
    <population id="M1" component="M1" type="populationList" size="1">
      <instance id="0">
        <location x="0.45728644728660583" y="-0.13567839562892914" z="0.0"/>
      </instance>
    </population>
    <population id="M2L" component="M2L" type="populationList" size="1">
      <instance id="0">
        <location x="-0.356783926486969" y="0.7185929417610168" z="0.0"/>
      </instance>
    </population>
    <population id="M2R" component="M2R" type="populationList" size="1">
      <instance id="0">
        <location x="-0.4170854389667511" y="0.37688443064689636" z="0.0"/>
      </instance>
    </population>
    <population id="M3L" component="M3L" type="populationList" size="1">
      <instance id="0">
        <location x="-0.7989949584007263" y="0.045226141810417175" z="0.0"/>
      </instance>
    </population>
    <population id="M3R" component="M3R" type="populationList" size="1">
      <instance id="0">
        <location x="0.1658291518688202" y="-0.4170854389667511" z="0.0"/>
      </instance>
    </population>
    <population id="M4" component="M4" type="populationList" size="1">
      <instance id="0">
        <location x="0.6783919334411621" y="0.6683416962623596" z="0.0"/>
      </instance>
    </population>
    <population id="M5" component="M5" type="populationList" size="1">
      <instance id="0">
        <location x="0.6180904507637024" y="0.4070351719856262" z="0.0"/>
      </instance>
    </population>
    <population id="NSML" component="NSML" type="populationList" size="3">
      <instance id="0">
        <location x="-0.2261306643486023" y="-0.8492462038993835" z="0.0"/>
      </instance>
      <instance id="1">
        <location x="-0.26633167266845703" y="-0.5276381969451904" z="0.0"/>
      </instance>
      <instance id="2">
        <location x="0.6281406879425049" y="0.2160804122686386" z="0.0"/>
      </instance>
    </population>
    <population id="NSMR" component="NSMR" type="populationList" size="2">
      <instance id="0">
        <location x="0.5979899764060974" y="-0.979899525642395" z="0.0"/>
      </instance>
      <instance id="1">
        <location x="0.4874371886253357" y="0.6984924674034119" z="0.0"/>
      </instance>
    </population>
    <projection id="NCXLS_NSMR_I1R" presynapticPopulation="NSMR" postsynapticPopulation="I1R" synapse="Serotonin_Glutamate">
      <connection id="0" preCellId="../NSMR/1/NSMR" postCellId="../I1R/1/I1R" preSegmentId="1" postSegmentId="4" preFractionAlong="0.31283419752422004" postFractionAlong="0.06090554323518271"/>
      <connection id="1" preCellId="../NSMR/1/NSMR" postCellId="../I1R/2/I1R" preSegmentId="1" postSegmentId="2" preFractionAlong="0.009827552569787845" postFractionAlong="0.40918258745848857"/>
    </projection>
    <electricalProjection id="NCXLS_NSMR_M4_GJ" presynapticPopulation="NSMR" postsynapticPopulation="M4">
      <electricalConnection id="2" preCell="1" postCell="0" synapse="Generic_GJ" preSegment="4" postSegment="4" preFractionAlong="0.6933775385188524" postFractionAlong="0.7662454727603789"/>
    </electricalProjection>
    <electricalProjection id="NCXLS_I1R_I1R_GJ" presynapticPopulation="I1R" postsynapticPopulation="I1R">
      <electricalConnection id="3" preCell="0" postCell="3" synapse="Generic_GJ" preSegment="7" postSegment="3" preFractionAlong="0.8116270144448535" postFractionAlong="0.29391676050493376"/>
    </electricalProjection>
    <projection id="NCXLS_I1R_M2L" presynapticPopulation="I1R" postsynapticPopulation="M2L" synapse="Acetylcholine">
      <connection id="4" preCellId="../I1R/0/I1R" postCellId="../M2L/0/M2L" preSegmentId="2" postSegmentId="4" preFractionAlong="0.7270185270141339" postFractionAlong="0.6929202292247886"/>
    </projection>
    <projection id="NCXLS_NSML_I1L" presynapticPopulation="NSML" postsynapticPopulation="I1L" synapse="Serotonin_Glutamate">
      <connection id="5" preCellId="../NSML/0/NSML" postCellId="../I1L/0/I1L" preSegmentId="7" postSegmentId="5" preFractionAlong="0.22516102421593187" postFractionAlong="0.6623179135395824"/>
      <connection id="6" preCellId="../NSML/0/NSML" postCellId="../I1L/1/I1L" preSegmentId="4" postSegmentId="5" preFractionAlong="0.9150984544900299" postFractionAlong="0.15636214164487505"/>
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    </projection>
    <electricalProjection id="NCXLS_NSML_M3L_GJ" presynapticPopulation="NSML" postsynapticPopulation="M3L">
      <electricalConnection id="7" preCell="0" postCell="0" synapse="Generic_GJ" preSegment="8" postSegment="6" preFractionAlong="0.5682686162687683" postFractionAlong="0.2746658697879054"/>
    </electricalProjection>
    <projection id="NCXLS_NSML_I1R" presynapticPopulation="NSML" postsynapticPopulation="I1R" synapse="Serotonin_Glutamate">
      <connection id="8" preCellId="../NSML/0/NSML" postCellId="../I1R/3/I1R" preSegmentId="3" postSegmentId="8" preFractionAlong="0.3337765970697978" postFractionAlong="0.5793134027884609"/>
    </projection>
    <electricalProjection id="NCXLS_M3L_NSMR_GJ" presynapticPopulation="M3L" postsynapticPopulation="NSMR">
      <electricalConnection id="11" preCell="0" postCell="1" synapse="Generic_GJ" preSegment="7" postSegment="5" preFractionAlong="0.31023528374470477" postFractionAlong="0.18176359776119422"/>
    </electricalProjection>
    <projection id="NCXLS_M3L_I1R" presynapticPopulation="M3L" postsynapticPopulation="I1R" synapse="Acetylcholine">
      <connection id="12" preCellId="../M3L/0/M3L" postCellId="../I1R/0/I1R" preSegmentId="8" postSegmentId="4" preFractionAlong="0.3228097934478503" postFractionAlong="0.2581076431734147"/>
      <connection id="13" preCellId="../M3L/0/M3L" postCellId="../I1R/1/I1R" preSegmentId="1" postSegmentId="4" preFractionAlong="0.13328425808217315" postFractionAlong="0.9277457330754073"/>
      <connection id="14" preCellId="../M3L/0/M3L" postCellId="../I1R/3/I1R" preSegmentId="3" postSegmentId="6" preFractionAlong="0.7076205857405353" postFractionAlong="0.10621382758845621"/>
    </projection>
    <projection id="NCXLS_M3L_M2L" presynapticPopulation="M3L" postsynapticPopulation="M2L" synapse="Acetylcholine">
      <connection id="15" preCellId="../M3L/0/M3L" postCellId="../M2L/0/M2L" preSegmentId="6" postSegmentId="6" preFractionAlong="0.807957328109019" postFractionAlong="0.7677646177143377"/>
    </projection>
    <projection id="NCXLS_M3L_M4" presynapticPopulation="M3L" postsynapticPopulation="M4" synapse="Acetylcholine">
      <connection id="16" preCellId="../M3L/0/M3L" postCellId="../M4/0/M4" preSegmentId="1" postSegmentId="7" preFractionAlong="0.6439079570677647" postFractionAlong="0.8343247957493986"/>
    </projection>
    <electricalProjection id="NCXLS_M3L_M2R_GJ" presynapticPopulation="M3L" postsynapticPopulation="M2R">
      <electricalConnection id="17" preCell="0" postCell="0" synapse="Generic_GJ" preSegment="5" postSegment="1" preFractionAlong="0.646407375228089" postFractionAlong="0.4583634794263062"/>
    </electricalProjection>
    <projection id="NCXLS_NSMR_I1L" presynapticPopulation="NSMR" postsynapticPopulation="I1L" synapse="Serotonin_Glutamate">
      <connection id="18" preCellId="../NSMR/0/NSMR" postCellId="../I1L/0/I1L" preSegmentId="7" postSegmentId="5" preFractionAlong="0.034376858351725215" postFractionAlong="0.6389630219732846"/>
      <connection id="19" preCellId="../NSMR/0/NSMR" postCellId="../I1L/3/I1L" preSegmentId="5" postSegmentId="5" preFractionAlong="0.4350145943402234" postFractionAlong="0.2926550976674078"/>
    </projection>
    <electricalProjection id="NCXLS_M3R_NSMR_GJ" presynapticPopulation="M3R" postsynapticPopulation="NSMR">
      <electricalConnection id="20" preCell="0" postCell="1" synapse="Generic_GJ" preSegment="2" postSegment="7" preFractionAlong="0.13341633552320709" postFractionAlong="0.6916434019733182"/>
    </electricalProjection>
    <projection id="NCXLS_M3R_I1L" presynapticPopulation="M3R" postsynapticPopulation="I1L" synapse="Acetylcholine">
      <connection id="21" preCellId="../M3R/0/M3R" postCellId="../I1L/1/I1L" preSegmentId="2" postSegmentId="7" preFractionAlong="0.1633544497431565" postFractionAlong="0.10431308735188216"/>
      <connection id="27" preCellId="../M3R/0/M3R" postCellId="../I1L/2/I1L" preSegmentId="6" postSegmentId="5" preFractionAlong="0.9429827840711357" postFractionAlong="0.6103760597816921"/>
    </projection>
    <projection id="NCXLS_M3R_I1R" presynapticPopulation="M3R" postsynapticPopulation="I1R" synapse="Acetylcholine">
      <connection id="22" preCellId="../M3R/0/M3R" postCellId="../I1R/0/I1R" preSegmentId="3" postSegmentId="2" preFractionAlong="0.8771275618985017" postFractionAlong="0.5281892617563562"/>
      <connection id="24" preCellId="../M3R/0/M3R" postCellId="../I1R/1/I1R" preSegmentId="5" postSegmentId="7" preFractionAlong="0.828185869323453" postFractionAlong="0.6260547089808013"/>
      <connection id="25" preCellId="../M3R/0/M3R" postCellId="../I1R/2/I1R" preSegmentId="3" postSegmentId="6" preFractionAlong="0.11239702717601296" postFractionAlong="0.049308987109824676"/>
      <connection id="26" preCellId="../M3R/0/M3R" postCellId="../I1R/3/I1R" preSegmentId="8" postSegmentId="7" preFractionAlong="0.13566146716037775" postFractionAlong="0.2600480402524339"/>
    </projection>
    <electricalProjection id="NCXLS_M3R_M3L_GJ" presynapticPopulation="M3R" postsynapticPopulation="M3L">
      <electricalConnection id="23" preCell="0" postCell="0" synapse="Generic_GJ" preSegment="1" postSegment="8" preFractionAlong="0.10671181910235428" postFractionAlong="0.6495560067569618"/>
    </electricalProjection>
    <electricalProjection id="NCXLS_M3R_NSML_GJ" presynapticPopulation="M3R" postsynapticPopulation="NSML">
      <electricalConnection id="28" preCell="0" postCell="1" synapse="Generic_GJ" preSegment="7" postSegment="8" preFractionAlong="0.7103515007123322" postFractionAlong="0.11250313052663174"/>
    </electricalProjection>
    <projection id="NCXLS_M3R_M1" presynapticPopulation="M3R" postsynapticPopulation="M1" synapse="Acetylcholine">
      <connection id="29" preCellId="../M3R/0/M3R" postCellId="../M1/0/M1" preSegmentId="1" postSegmentId="8" preFractionAlong="0.27509888155912443" postFractionAlong="0.6391078469947064"/>
    </projection>
    <projection id="NCXLS_M3R_M2L" presynapticPopulation="M3R" postsynapticPopulation="M2L" synapse="Glutamate">
      <connection id="30" preCellId="../M3R/0/M3R" postCellId="../M2L/0/M2L" preSegmentId="3" postSegmentId="7" preFractionAlong="0.9976722632646592" postFractionAlong="0.2635514794967778"/>
    </projection>
    <electricalProjection id="NCXLS_M3R_M4_GJ" presynapticPopulation="M3R" postsynapticPopulation="M4">
      <electricalConnection id="31" preCell="0" postCell="0" synapse="Generic_GJ" preSegment="8" postSegment="5" preFractionAlong="0.9306722555623983" postFractionAlong="0.02464440463632267"/>
    </electricalProjection>
    <electricalProjection id="NCXLS_M3R_M5_GJ" presynapticPopulation="M3R" postsynapticPopulation="M5">
      <electricalConnection id="32" preCell="0" postCell="0" synapse="Generic_GJ" preSegment="2" postSegment="3" preFractionAlong="0.7253263907358781" postFractionAlong="0.8363785774103993"/>
    </electricalProjection>
    <projection id="NCXLS_M3R_M2R" presynapticPopulation="M3R" postsynapticPopulation="M2R" synapse="Acetylcholine">
      <connection id="33" preCellId="../M3R/0/M3R" postCellId="../M2R/0/M2R" preSegmentId="7" postSegmentId="6" preFractionAlong="0.9756019191566524" postFractionAlong="0.0652767575664639"/>
    </projection>
    <projection id="NCXLS_M3R_NSML" presynapticPopulation="M3R" postsynapticPopulation="NSML" synapse="Acetylcholine">
      <connection id="34" preCellId="../M3R/0/M3R" postCellId="../NSML/2/NSML" preSegmentId="3" postSegmentId="7" preFractionAlong="0.6463099336573813" postFractionAlong="0.6473421343730912"/>
    </projection>
    <electricalProjection id="NCXLS_I1L_I1L_GJ" presynapticPopulation="I1L" postsynapticPopulation="I1L">
      <electricalConnection id="35" preCell="2" postCell="0" synapse="Generic_GJ" preSegment="3" postSegment="3" preFractionAlong="0.6501871664456533" postFractionAlong="0.9824825806012478"/>
      <electricalConnection id="40" preCell="2" postCell="3" synapse="Generic_GJ" preSegment="4" postSegment="4" preFractionAlong="0.5253182644507214" postFractionAlong="0.06605530782216007"/>
    </electricalProjection>
    <projection id="NCXLS_I1L_I1L" presynapticPopulation="I1L" postsynapticPopulation="I1L" synapse="Glutamate">
      <connection id="36" preCellId="../I1L/2/I1L" postCellId="../I1L/1/I1L" preSegmentId="1" postSegmentId="3" preFractionAlong="0.4391306608048505" postFractionAlong="0.03994797328609434"/>
    </projection>
    <projection id="NCXLS_I1L_NSML" presynapticPopulation="I1L" postsynapticPopulation="NSML" synapse="Acetylcholine">
      <connection id="37" preCellId="../I1L/2/I1L" postCellId="../NSML/0/NSML" preSegmentId="3" postSegmentId="2" preFractionAlong="0.8263903116005552" postFractionAlong="0.701499101465166"/>
      <connection id="39" preCellId="../I1L/2/I1L" postCellId="../NSML/1/NSML" preSegmentId="4" postSegmentId="6" preFractionAlong="0.928555532894136" postFractionAlong="0.6410861035821595"/>
    </projection>
    <projection id="NCXLS_I1L_NSMR" presynapticPopulation="I1L" postsynapticPopulation="NSMR" synapse="Acetylcholine">
      <connection id="38" preCellId="../I1L/2/I1L" postCellId="../NSMR/0/NSMR" preSegmentId="8" postSegmentId="2" preFractionAlong="0.055101535158831094" postFractionAlong="0.4268947278233026"/>
    </projection>
    <projection id="NCXLS_NSML_NSML" presynapticPopulation="NSML" postsynapticPopulation="NSML" synapse="Serotonin_Glutamate">
      <connection id="43" preCellId="../NSML/1/NSML" postCellId="../NSML/0/NSML" preSegmentId="6" postSegmentId="7" preFractionAlong="0.26814322961192083" postFractionAlong="0.315668481164066"/>
    </projection>
    <projection id="NCXLS_M1_I1L" presynapticPopulation="M1" postsynapticPopulation="I1L" synapse="Acetylcholine">
      <connection id="46" preCellId="../M1/0/M1" postCellId="../I1L/0/I1L" preSegmentId="8" postSegmentId="8" preFractionAlong="0.45930368821307377" postFractionAlong="0.07696918300801736"/>
      <connection id="48" preCellId="../M1/0/M1" postCellId="../I1L/1/I1L" preSegmentId="3" postSegmentId="6" preFractionAlong="0.8388393367652703" postFractionAlong="0.877120467662288"/>
      <connection id="55" preCellId="../M1/0/M1" postCellId="../I1L/2/I1L" preSegmentId="6" postSegmentId="7" preFractionAlong="0.5877984493716848" postFractionAlong="0.8403481775885081"/>
      <connection id="57" preCellId="../M1/0/M1" postCellId="../I1L/3/I1L" preSegmentId="6" postSegmentId="5" preFractionAlong="0.3267388905686336" postFractionAlong="0.34961439880772216"/>
    </projection>
    <electricalProjection id="NCXLS_M1_NSMR_GJ" presynapticPopulation="M1" postsynapticPopulation="NSMR">
      <electricalConnection id="47" preCell="0" postCell="1" synapse="Generic_GJ" preSegment="6" postSegment="3" preFractionAlong="0.8212594203728455" postFractionAlong="0.24465505460471304"/>
    </electricalProjection>
    <projection id="NCXLS_M1_I1R" presynapticPopulation="M1" postsynapticPopulation="I1R" synapse="Acetylcholine">
      <connection id="49" preCellId="../M1/0/M1" postCellId="../I1R/0/I1R" preSegmentId="8" postSegmentId="1" preFractionAlong="0.5505706345413642" postFractionAlong="0.19249315063582706"/>
      <connection id="53" preCellId="../M1/0/M1" postCellId="../I1R/1/I1R" preSegmentId="7" postSegmentId="6" preFractionAlong="0.7566465493523988" postFractionAlong="0.5824350768882959"/>
      <connection id="54" preCellId="../M1/0/M1" postCellId="../I1R/3/I1R" preSegmentId="8" postSegmentId="4" preFractionAlong="0.1882321997690456" postFractionAlong="0.18424865157267423"/>
    </projection>
    <projection id="NCXLS_M1_NSML" presynapticPopulation="M1" postsynapticPopulation="NSML" synapse="Acetylcholine">
      <connection id="50" preCellId="../M1/0/M1" postCellId="../NSML/0/NSML" preSegmentId="5" postSegmentId="8" preFractionAlong="0.9111205013919575" postFractionAlong="0.8205075042321092"/>
    </projection>
    <electricalProjection id="NCXLS_M1_M3L_GJ" presynapticPopulation="M1" postsynapticPopulation="M3L">
      <electricalConnection id="51" preCell="0" postCell="0" synapse="Generic_GJ" preSegment="8" postSegment="8" preFractionAlong="0.04876631881314042" postFractionAlong="0.8437287927102575"/>
    </electricalProjection>
    <electricalProjection id="NCXLS_M1_M3R_GJ" presynapticPopulation="M1" postsynapticPopulation="M3R">
      <electricalConnection id="52" preCell="0" postCell="0" synapse="Generic_GJ" preSegment="7" postSegment="2" preFractionAlong="0.34239512329585964" postFractionAlong="0.5464763610253764"/>
    </electricalProjection>
    <electricalProjection id="NCXLS_M1_NSML_GJ" presynapticPopulation="M1" postsynapticPopulation="NSML">
      <electricalConnection id="56" preCell="0" postCell="1" synapse="Generic_GJ" preSegment="8" postSegment="6" preFractionAlong="0.04900464497127355" postFractionAlong="0.5727702766869458"/>
    </electricalProjection>
    <projection id="NCXLS_M1_M2L" presynapticPopulation="M1" postsynapticPopulation="M2L" synapse="Glutamate">
      <connection id="58" preCellId="../M1/0/M1" postCellId="../M2L/0/M2L" preSegmentId="7" postSegmentId="3" preFractionAlong="0.274212889124147" postFractionAlong="0.02660836607768413"/>
    </projection>
    <electricalProjection id="NCXLS_M1_M2R_GJ" presynapticPopulation="M1" postsynapticPopulation="M2R">
      <electricalConnection id="59" preCell="0" postCell="0" synapse="Generic_GJ" preSegment="3" postSegment="1" preFractionAlong="0.6256499129414531" postFractionAlong="0.5807559990556591"/>
    </electricalProjection>
    <projection id="NCXLS_M2L_I1L" presynapticPopulation="M2L" postsynapticPopulation="I1L" synapse="Acetylcholine">
      <connection id="60" preCellId="../M2L/0/M2L" postCellId="../I1L/0/I1L" preSegmentId="7" postSegmentId="5" preFractionAlong="0.6752308375620375" postFractionAlong="0.20588198817832115"/>
      <connection id="61" preCellId="../M2L/0/M2L" postCellId="../I1L/1/I1L" preSegmentId="4" postSegmentId="1" preFractionAlong="0.126110141678625" postFractionAlong="0.12985701341788103"/>
      <connection id="67" preCellId="../M2L/0/M2L" postCellId="../I1L/2/I1L" preSegmentId="8" postSegmentId="4" preFractionAlong="0.6404472739932529" postFractionAlong="0.3141620638369721"/>
      <connection id="69" preCellId="../M2L/0/M2L" postCellId="../I1L/3/I1L" preSegmentId="7" postSegmentId="3" preFractionAlong="0.7122202051771587" postFractionAlong="0.17589028341866209"/>
    </projection>
    <projection id="NCXLS_M2L_NSML" presynapticPopulation="M2L" postsynapticPopulation="NSML" synapse="Acetylcholine">
      <connection id="62" preCellId="../M2L/0/M2L" postCellId="../NSML/0/NSML" preSegmentId="1" postSegmentId="1" preFractionAlong="0.8586001069824982" postFractionAlong="0.962732583861139"/>
    </projection>
    <projection id="NCXLS_M2L_M3L" presynapticPopulation="M2L" postsynapticPopulation="M3L" synapse="Glutamate">
      <connection id="63" preCellId="../M2L/0/M2L" postCellId="../M3L/0/M3L" preSegmentId="2" postSegmentId="2" preFractionAlong="0.18410132336095697" postFractionAlong="0.1056503454489307"/>
    </projection>
    <projection id="NCXLS_M2L_NSMR" presynapticPopulation="M2L" postsynapticPopulation="NSMR" synapse="Acetylcholine">
      <connection id="64" preCellId="../M2L/0/M2L" postCellId="../NSMR/0/NSMR" preSegmentId="3" postSegmentId="6" preFractionAlong="0.5787564763599993" postFractionAlong="0.6182850210137198"/>
    </projection>
    <electricalProjection id="NCXLS_M2L_M3R_GJ" presynapticPopulation="M2L" postsynapticPopulation="M3R">
      <electricalConnection id="65" preCell="0" postCell="0" synapse="Generic_GJ" preSegment="2" postSegment="2" preFractionAlong="0.7032772277324516" postFractionAlong="0.8344582528560966"/>
    </electricalProjection>
    <projection id="NCXLS_M2L_I1R" presynapticPopulation="M2L" postsynapticPopulation="I1R" synapse="Acetylcholine">
      <connection id="66" preCellId="../M2L/0/M2L" postCellId="../I1R/3/I1R" preSegmentId="4" postSegmentId="6" preFractionAlong="0.7475206367465048" postFractionAlong="0.8508527573220954"/>
    </projection>
    <electricalProjection id="NCXLS_M2L_NSML_GJ" presynapticPopulation="M2L" postsynapticPopulation="NSML">
      <electricalConnection id="68" preCell="0" postCell="1" synapse="Generic_GJ" preSegment="1" postSegment="5" preFractionAlong="0.03342357243550376" postFractionAlong="0.579792843832955"/>
    </electricalProjection>
    <projection id="NCXLS_M2L_M2R" presynapticPopulation="M2L" postsynapticPopulation="M2R" synapse="Acetylcholine">
      <connection id="70" preCellId="../M2L/0/M2L" postCellId="../M2R/0/M2R" preSegmentId="6" postSegmentId="8" preFractionAlong="0.4943708110457581" postFractionAlong="0.9148349499968781"/>
    </projection>
    <projection id="NCXLS_M4_I1L" presynapticPopulation="M4" postsynapticPopulation="I1L" synapse="Acetylcholine">
      <connection id="71" preCellId="../M4/0/M4" postCellId="../I1L/0/I1L" preSegmentId="1" postSegmentId="8" preFractionAlong="0.14424002111810352" postFractionAlong="0.7589768318540306"/>
      <connection id="73" preCellId="../M4/0/M4" postCellId="../I1L/1/I1L" preSegmentId="1" postSegmentId="3" preFractionAlong="0.23287914615181504" postFractionAlong="0.1567604286516393"/>
      <connection id="80" preCellId="../M4/0/M4" postCellId="../I1L/2/I1L" preSegmentId="7" postSegmentId="8" preFractionAlong="0.968326960099255" postFractionAlong="0.4528833604155117"/>
      <connection id="83" preCellId="../M4/0/M4" postCellId="../I1L/3/I1L" preSegmentId="1" postSegmentId="7" preFractionAlong="0.10466044034648114" postFractionAlong="0.42294354374155774"/>
    </projection>
    <electricalProjection id="NCXLS_M4_NSMR_GJ" presynapticPopulation="M4" postsynapticPopulation="NSMR">
      <electricalConnection id="72" preCell="0" postCell="1" synapse="Generic_GJ" preSegment="4" postSegment="4" preFractionAlong="0.9117851123817714" postFractionAlong="0.14661455715984228"/>
    </electricalProjection>
    <projection id="NCXLS_M4_I1R" presynapticPopulation="M4" postsynapticPopulation="I1R" synapse="Acetylcholine">
      <connection id="74" preCellId="../M4/0/M4" postCellId="../I1R/0/I1R" preSegmentId="1" postSegmentId="2" preFractionAlong="0.5936846199087332" postFractionAlong="0.7548274583623312"/>
      <connection id="78" preCellId="../M4/0/M4" postCellId="../I1R/1/I1R" preSegmentId="3" postSegmentId="4" preFractionAlong="0.2656855648662635" postFractionAlong="0.8958157315601947"/>
      <connection id="79" preCellId="../M4/0/M4" postCellId="../I1R/3/I1R" preSegmentId="5" postSegmentId="8" preFractionAlong="0.6565627023996523" postFractionAlong="0.9069855184382437"/>
    </projection>
    <projection id="NCXLS_M4_NSML" presynapticPopulation="M4" postsynapticPopulation="NSML" synapse="Acetylcholine">
      <connection id="75" preCellId="../M4/0/M4" postCellId="../NSML/0/NSML" preSegmentId="3" postSegmentId="4" preFractionAlong="0.44797165638218994" postFractionAlong="0.4054716763304185"/>
    </projection>
    <electricalProjection id="NCXLS_M4_M3L_GJ" presynapticPopulation="M4" postsynapticPopulation="M3L">
      <electricalConnection id="76" preCell="0" postCell="0" synapse="Generic_GJ" preSegment="2" postSegment="3" preFractionAlong="0.2922489567393879" postFractionAlong="0.2948172383467669"/>
    </electricalProjection>
    <electricalProjection id="NCXLS_M4_M3R_GJ" presynapticPopulation="M4" postsynapticPopulation="M3R">
      <electricalConnection id="77" preCell="0" postCell="0" synapse="Generic_GJ" preSegment="2" postSegment="2" preFractionAlong="0.5645940812903215" postFractionAlong="0.25232274426374524"/>
    </electricalProjection>
    <electricalProjection id="NCXLS_M4_NSML_GJ" presynapticPopulation="M4" postsynapticPopulation="NSML">
      <electricalConnection id="81" preCell="0" postCell="1" synapse="Generic_GJ" preSegment="4" postSegment="8" preFractionAlong="0.676820043630047" postFractionAlong="0.30158686987355154"/>
    </electricalProjection>
    <electricalProjection id="NCXLS_M4_M1_GJ" presynapticPopulation="M4" postsynapticPopulation="M1">
      <electricalConnection id="82" preCell="0" postCell="0" synapse="Generic_GJ" preSegment="8" postSegment="3" preFractionAlong="0.3037350462250994" postFractionAlong="0.09301740926267499"/>
    </electricalProjection>
    <electricalProjection id="NCXLS_M4_M2L_GJ" presynapticPopulation="M4" postsynapticPopulation="M2L">
      <electricalConnection id="84" preCell="0" postCell="0" synapse="Generic_GJ" preSegment="1" postSegment="5" preFractionAlong="0.1413835542163402" postFractionAlong="0.13032043317233588"/>
    </electricalProjection>
    <electricalProjection id="NCXLS_M4_M5_GJ" presynapticPopulation="M4" postsynapticPopulation="M5">
      <electricalConnection id="85" preCell="0" postCell="0" synapse="Generic_GJ" preSegment="3" postSegment="5" preFractionAlong="0.19718298196806627" postFractionAlong="0.0976100381089916"/>
    </electricalProjection>
    <projection id="NCXLS_M4_M2R" presynapticPopulation="M4" postsynapticPopulation="M2R" synapse="Glutamate">
      <connection id="86" preCellId="../M4/0/M4" postCellId="../M2R/0/M2R" preSegmentId="4" postSegmentId="4" preFractionAlong="0.9237313958767761" postFractionAlong="0.8214712527761908"/>
    </projection>
    <projection id="NCXLS_M5_NSMR" presynapticPopulation="M5" postsynapticPopulation="NSMR" synapse="Acetylcholine">
      <connection id="87" preCellId="../M5/0/M5" postCellId="../NSMR/1/NSMR" preSegmentId="2" postSegmentId="8" preFractionAlong="0.6558207673273928" postFractionAlong="0.5372756736680381"/>
    </projection>
    <projection id="NCXLS_M5_I1R" presynapticPopulation="M5" postsynapticPopulation="I1R" synapse="Acetylcholine">
      <connection id="88" preCellId="../M5/0/M5" postCellId="../I1R/0/I1R" preSegmentId="5" postSegmentId="4" preFractionAlong="0.6826711524627593" postFractionAlong="0.6287340150599929"/>
      <connection id="89" preCellId="../M5/0/M5" postCellId="../I1R/1/I1R" preSegmentId="7" postSegmentId="5" preFractionAlong="0.03900642076281813" postFractionAlong="0.4555667819901088"/>
      <connection id="90" preCellId="../M5/0/M5" postCellId="../I1R/2/I1R" preSegmentId="8" postSegmentId="4" preFractionAlong="0.5694972585185759" postFractionAlong="0.8323910417019079"/>
    </projection>
    <electricalProjection id="NCXLS_M5_M4_GJ" presynapticPopulation="M5" postsynapticPopulation="M4">
      <electricalConnection id="91" preCell="0" postCell="0" synapse="Generic_GJ" preSegment="6" postSegment="1" preFractionAlong="0.16361620413827627" postFractionAlong="0.6917776391419823"/>
    </electricalProjection>
    <projection id="NCXLS_M2R_I1L" presynapticPopulation="M2R" postsynapticPopulation="I1L" synapse="Acetylcholine">
      <connection id="92" preCellId="../M2R/0/M2R" postCellId="../I1L/0/I1L" preSegmentId="6" postSegmentId="6" preFractionAlong="0.9799554473582784" postFractionAlong="0.9856007339528003"/>
      <connection id="93" preCellId="../M2R/0/M2R" postCellId="../I1L/1/I1L" preSegmentId="7" postSegmentId="2" preFractionAlong="0.24361479198219427" postFractionAlong="0.798555838130599"/>
      <connection id="97" preCellId="../M2R/0/M2R" postCellId="../I1L/2/I1L" preSegmentId="2" postSegmentId="8" preFractionAlong="0.9407508592344611" postFractionAlong="0.17478128487493383"/>
      <connection id="99" preCellId="../M2R/0/M2R" postCellId="../I1L/3/I1L" preSegmentId="4" postSegmentId="2" preFractionAlong="0.26799726688437797" postFractionAlong="0.9122082367815256"/>
    </projection>
    <electricalProjection id="NCXLS_M2R_NSML_GJ" presynapticPopulation="M2R" postsynapticPopulation="NSML">
      <electricalConnection id="94" preCell="0" postCell="0" synapse="Generic_GJ" preSegment="3" postSegment="1" preFractionAlong="0.7806993041716287" postFractionAlong="0.9101961241446964"/>
    </electricalProjection>
    <projection id="NCXLS_M2R_M3L" presynapticPopulation="M2R" postsynapticPopulation="M3L" synapse="Glutamate">
      <connection id="95" preCellId="../M2R/0/M2R" postCellId="../M3L/0/M3L" preSegmentId="8" postSegmentId="4" preFractionAlong="0.6306352949830805" postFractionAlong="0.4301427320968263"/>
    </projection>
    <projection id="NCXLS_M2R_I1R" presynapticPopulation="M2R" postsynapticPopulation="I1R" synapse="Acetylcholine">
      <connection id="96" preCellId="../M2R/0/M2R" postCellId="../I1R/3/I1R" preSegmentId="7" postSegmentId="4" preFractionAlong="0.31037088910812005" postFractionAlong="0.7621296204503246"/>
    </projection>
    <projection id="NCXLS_M2R_NSML" presynapticPopulation="M2R" postsynapticPopulation="NSML" synapse="Acetylcholine">
      <connection id="98" preCellId="../M2R/0/M2R" postCellId="../NSML/1/NSML" preSegmentId="5" postSegmentId="2" preFractionAlong="0.7374314414271221" postFractionAlong="0.25283740069028926"/>
    </projection>
    <electricalProjection id="NCXLS_NSML_NSMR_GJ" presynapticPopulation="NSML" postsynapticPopulation="NSMR">
      <electricalConnection id="100" preCell="2" postCell="0" synapse="Generic_GJ" preSegment="5" postSegment="2" preFractionAlong="0.7210546608978718" postFractionAlong="0.25715235110909584"/>
    </electricalProjection>
  </network>
</neuroml>
