<?xml version='1.0' encoding='UTF-8'?>
<neuroml xmlns="http://www.neuroml.org/schema/neuroml2" xmlns:xsi="http://www.w3.org/2001/XMLSchema-instance" xsi:schemaLocation="http://www.neuroml.org/schema/neuroml2 https://raw.githubusercontent.com/NeuroML/NeuroML2/development/Schemas/NeuroML2/NeuroML_v2beta4.xsd" id="gvft_network_bio_prior_lamW_0.367_DF_0.033_t10.net">
  <notes>NeuroML2 network generated from GVFT simulation on 2025-05-04 12:20:59
</notes>
  <include href="AVAL.cell.nml"/>
  <include href="AVAR.cell.nml"/>
  <include href="AVKL.cell.nml"/>
  <include href="AVKR.cell.nml"/>
  <include href="RIS.cell.nml"/>
  <include href="RMDDL.cell.nml"/>
  <include href="RMDDR.cell.nml"/>
  <include href="RMDVL.cell.nml"/>
  <include href="RMDVR.cell.nml"/>
  <include href="SMBVL.cell.nml"/>
  <include href="SMBVR.cell.nml"/>
  <include href="URXL.cell.nml"/>
  <include href="URXR.cell.nml"/>
  <include href="I6.cell.nml"/>
  <include href="M3L.cell.nml"/>
  <include href="I5.cell.nml"/>
  <include href="M1.cell.nml"/>
  <include href="I1R.cell.nml"/>
  <include href="MCR.cell.nml"/>
  <include href="I2R.cell.nml"/>
  <include href="I4.cell.nml"/>
  <include href="NSMR.cell.nml"/>
  <include href="M4.cell.nml"/>
  <include href="I3.cell.nml"/>
  <include href="MI.cell.nml"/>
  <include href="I2L.cell.nml"/>
  <include href="M5.cell.nml"/>
  <include href="NSML.cell.nml"/>
  <include href="M2R.cell.nml"/>
  <include href="M3R.cell.nml"/>
  <include href="MCL.cell.nml"/>
  <include href="I1L.cell.nml"/>
  <include href="M2L.cell.nml"/>
  <include href="Acetylcholine.synapse.nml"/>
  <include href="Glutamate.synapse.nml"/>
  <include href="Generic_GJ.synapse.nml"/>
  <include href="Serotonin_Glutamate.synapse.nml"/>
  <network id="gvft_network_bio_prior_lamW_0.367_DF_0.033_t10.net" type="networkWithTemperature" temperature="20.0 degC">
    <population id="M1" component="M1" type="populationList" size="1">
      <instance id="0">
        <location x="0.6683417" y="-0.9698492" z="0.0"/>
      </instance>
    </population>
    <population id="M2L" component="M2L" type="populationList" size="1">
      <instance id="0">
        <location x="0.79899496" y="0.0753769" z="0.0"/>
      </instance>
    </population>
    <population id="M2R" component="M2R" type="populationList" size="1">
      <instance id="0">
        <location x="-0.6482412" y="0.53768843" z="0.0"/>
      </instance>
    </population>
    <population id="M3L" component="M3L" type="populationList" size="1">
      <instance id="0">
        <location x="-0.28643218" y="0.37688443" z="0.0"/>
      </instance>
    </population>
    <population id="M3R" component="M3R" type="populationList" size="1">
      <instance id="0">
        <location x="-0.6281407" y="-0.3266332" z="0.0"/>
      </instance>
    </population>
    <population id="M4" component="M4" type="populationList" size="1">
      <instance id="0">
        <location x="-0.025125638" y="-0.095477395" z="0.0"/>
      </instance>
    </population>
    <population id="M5" component="M5" type="populationList" size="1">
      <instance id="0">
        <location x="-0.4874372" y="-0.71859294" z="0.0"/>
      </instance>
    </population>
    <population id="I1L" component="I1L" type="populationList" size="1">
      <instance id="0">
        <location x="-0.6281407" y="0.2562814" z="0.0"/>
      </instance>
    </population>
    <population id="I1R" component="I1R" type="populationList" size="1">
      <instance id="0">
        <location x="-0.055276394" y="-0.79899496" z="0.0"/>
      </instance>
    </population>
    <population id="I2L" component="I2L" type="populationList" size="1">
      <instance id="0">
        <location x="-0.879397" y="-0.8894472" z="0.0"/>
      </instance>
    </population>
    <population id="I2R" component="I2R" type="populationList" size="1">
      <instance id="0">
        <location x="-0.33668342" y="0.46733668" z="0.0"/>
      </instance>
    </population>
    <population id="I3" component="I3" type="populationList" size="1">
      <instance id="0">
        <location x="-0.8190955" y="-0.65829146" z="0.0"/>
      </instance>
    </population>
    <population id="I4" component="I4" type="populationList" size="1">
      <instance id="0">
        <location x="0.71859294" y="-0.36683416" z="0.0"/>
      </instance>
    </population>
    <population id="I5" component="I5" type="populationList" size="1">
      <instance id="0">
        <location x="-0.9798995" y="-0.76884425" z="0.0"/>
      </instance>
    </population>
    <population id="I6" component="I6" type="populationList" size="1">
      <instance id="0">
        <location x="0.12562814" y="0.23618092" z="0.0"/>
      </instance>
    </population>
    <population id="MCL" component="MCL" type="populationList" size="1">
      <instance id="0">
        <location x="-0.22613066" y="-0.3467337" z="0.0"/>
      </instance>
    </population>
    <population id="MCR" component="MCR" type="populationList" size="1">
      <instance id="0">
        <location x="-0.61809045" y="-0.5276382" z="0.0"/>
      </instance>
    </population>
    <population id="MI" component="MI" type="populationList" size="1">
      <instance id="0">
        <location x="-0.0753769" y="-0.49748746" z="0.0"/>
      </instance>
    </population>
    <population id="NSML" component="NSML" type="populationList" size="1">
      <instance id="0">
        <location x="-0.6281407" y="0.24623117" z="0.0"/>
      </instance>
    </population>
    <population id="NSMR" component="NSMR" type="populationList" size="1">
      <instance id="0">
        <location x="0.1758794" y="0.5879397" z="0.0"/>
      </instance>
    </population>
    <population id="AVAL" component="AVAL" type="populationList" size="1">
      <instance id="0">
        <location x="5.0" y="0.0" z="0.0"/>
      </instance>
    </population>
    <population id="AVAR" component="AVAR" type="populationList" size="1">
      <instance id="0">
        <location x="5.0" y="0.0" z="0.0"/>
      </instance>
    </population>
    <population id="AVKL" component="AVKL" type="populationList" size="1">
      <instance id="0">
        <location x="5.0" y="0.0" z="0.0"/>
      </instance>
    </population>
    <population id="AVKR" component="AVKR" type="populationList" size="1">
      <instance id="0">
        <location x="5.0" y="0.0" z="0.0"/>
      </instance>
    </population>
    <population id="RIS" component="RIS" type="populationList" size="1">
      <instance id="0">
        <location x="5.0" y="0.0" z="0.0"/>
      </instance>
    </population>
    <population id="RMDDL" component="RMDDL" type="populationList" size="1">
      <instance id="0">
        <location x="5.0" y="0.0" z="0.0"/>
      </instance>
    </population>
    <population id="RMDDR" component="RMDDR" type="populationList" size="1">
      <instance id="0">
        <location x="5.0" y="0.0" z="0.0"/>
      </instance>
    </population>
    <population id="RMDVL" component="RMDVL" type="populationList" size="1">
      <instance id="0">
        <location x="5.0" y="0.0" z="0.0"/>
      </instance>
    </population>
    <population id="RMDVR" component="RMDVR" type="populationList" size="1">
      <instance id="0">
        <location x="5.0" y="0.0" z="0.0"/>
      </instance>
    </population>
    <population id="SMBVL" component="SMBVL" type="populationList" size="1">
      <instance id="0">
        <location x="5.0" y="0.0" z="0.0"/>
      </instance>
    </population>
    <population id="SMBVR" component="SMBVR" type="populationList" size="1">
      <instance id="0">
        <location x="5.0" y="0.0" z="0.0"/>
      </instance>
    </population>
    <population id="URXL" component="URXL" type="populationList" size="1">
      <instance id="0">
        <location x="5.0" y="0.0" z="0.0"/>
      </instance>
    </population>
    <population id="URXR" component="URXR" type="populationList" size="1">
      <instance id="0">
        <location x="5.0" y="0.0" z="0.0"/>
      </instance>
    </population>
    <projection id="NCXLS_I2R_M2R" presynapticPopulation="I2R" postsynapticPopulation="M2R" synapse="Acetylcholine">
      <connection id="0" preCellId="../I2R/0/I2R" postCellId="../M2R/0/M2R" preSegmentId="2" postSegmentId="4" preFractionAlong="0.3941704545835062" postFractionAlong="0.17010688201207602"/>
    </projection>
    <projection id="NCXLS_M2R_I2R" presynapticPopulation="M2R" postsynapticPopulation="I2R" synapse="Acetylcholine">
      <connection id="1" preCellId="../M2R/0/M2R" postCellId="../I2R/0/I2R" preSegmentId="1" postSegmentId="3" preFractionAlong="0.9098043289501905" postFractionAlong="0.938337202621459"/>
    </projection>
    <projection id="NCXLS_M2R_M5" presynapticPopulation="M2R" postsynapticPopulation="M5" synapse="Glutamate">
      <connection id="2" preCellId="../M2R/0/M2R" postCellId="../M5/0/M5" preSegmentId="5" postSegmentId="6" preFractionAlong="0.7274357374154816" postFractionAlong="0.30920773652932665"/>
    </projection>
    <projection id="NCXLS_M2R_I3" presynapticPopulation="M2R" postsynapticPopulation="I3" synapse="Acetylcholine">
      <connection id="3" preCellId="../M2R/0/M2R" postCellId="../I3/0/I3" preSegmentId="6" postSegmentId="9" preFractionAlong="0.49602989425354427" postFractionAlong="0.3477397822959257"/>
    </projection>
    <projection id="NCXLS_M2R_I4" presynapticPopulation="M2R" postsynapticPopulation="I4" synapse="Acetylcholine">
      <connection id="4" preCellId="../M2R/0/M2R" postCellId="../I4/0/I4" preSegmentId="3" postSegmentId="6" preFractionAlong="0.7015635404895175" postFractionAlong="0.718601662842142"/>
    </projection>
    <projection id="NCXLS_M2R_I1R" presynapticPopulation="M2R" postsynapticPopulation="I1R" synapse="Acetylcholine">
      <connection id="5" preCellId="../M2R/0/M2R" postCellId="../I1R/0/I1R" preSegmentId="5" postSegmentId="7" preFractionAlong="0.14246314808710858" postFractionAlong="0.6406389213201227"/>
    </projection>
    <projection id="NCXLS_M2R_I2L" presynapticPopulation="M2R" postsynapticPopulation="I2L" synapse="Acetylcholine">
      <connection id="6" preCellId="../M2R/0/M2R" postCellId="../I2L/0/I2L" preSegmentId="1" postSegmentId="1" preFractionAlong="0.6115315946147739" postFractionAlong="0.23946477953446677"/>
    </projection>
    <electricalProjection id="NCXLS_M2R_M1_GJ" presynapticPopulation="M2R" postsynapticPopulation="M1">
      <electricalConnection id="7" preCell="0" postCell="0" synapse="Generic_GJ" preSegment="5" postSegment="9" preFractionAlong="0.919558862813285" postFractionAlong="0.6537200927599808"/>
    </electricalProjection>
    <projection id="NCXLS_M2R_M3L" presynapticPopulation="M2R" postsynapticPopulation="M3L" synapse="Acetylcholine">
      <connection id="8" preCellId="../M2R/0/M2R" postCellId="../M3L/0/M3L" preSegmentId="7" postSegmentId="6" preFractionAlong="0.3354639511826475" postFractionAlong="0.5254405701523811"/>
    </projection>
    <projection id="NCXLS_M2R_MI" presynapticPopulation="M2R" postsynapticPopulation="MI" synapse="Acetylcholine">
      <connection id="9" preCellId="../M2R/0/M2R" postCellId="../MI/0/MI" preSegmentId="4" postSegmentId="6" preFractionAlong="0.17389217506474486" postFractionAlong="0.565152304677289"/>
    </projection>
    <projection id="NCXLS_M2R_I5" presynapticPopulation="M2R" postsynapticPopulation="I5" synapse="Acetylcholine">
      <connection id="10" preCellId="../M2R/0/M2R" postCellId="../I5/0/I5" preSegmentId="1" postSegmentId="2" preFractionAlong="0.7608075414310771" postFractionAlong="0.850780382630682"/>
    </projection>
    <projection id="NCXLS_M2R_NSML" presynapticPopulation="M2R" postsynapticPopulation="NSML" synapse="Acetylcholine">
      <connection id="11" preCellId="../M2R/0/M2R" postCellId="../NSML/0/NSML" preSegmentId="2" postSegmentId="6" preFractionAlong="0.5515874589482459" postFractionAlong="0.11571239426352209"/>
    </projection>
    <projection id="NCXLS_M2R_MCR" presynapticPopulation="M2R" postsynapticPopulation="MCR" synapse="Acetylcholine">
      <connection id="12" preCellId="../M2R/0/M2R" postCellId="../MCR/0/MCR" preSegmentId="8" postSegmentId="9" preFractionAlong="0.4584050530305287" postFractionAlong="0.8486277987209782"/>
    </projection>
    <projection id="NCXLS_M2R_M3R" presynapticPopulation="M2R" postsynapticPopulation="M3R" synapse="Glutamate">
      <connection id="13" preCellId="../M2R/0/M2R" postCellId="../M3R/0/M3R" preSegmentId="9" postSegmentId="8" preFractionAlong="0.14908974876824777" postFractionAlong="0.9850338450059597"/>
    </projection>
    <projection id="NCXLS_M2R_M2L" presynapticPopulation="M2R" postsynapticPopulation="M2L" synapse="Acetylcholine">
      <connection id="14" preCellId="../M2R/0/M2R" postCellId="../M2L/0/M2L" preSegmentId="7" postSegmentId="9" preFractionAlong="0.771313633225014" postFractionAlong="0.4115116028992104"/>
    </projection>
    <electricalProjection id="NCXLS_M2R_M4_GJ" presynapticPopulation="M2R" postsynapticPopulation="M4">
      <electricalConnection id="15" preCell="0" postCell="0" synapse="Generic_GJ" preSegment="4" postSegment="6" preFractionAlong="0.34160226093303414" postFractionAlong="0.43317704897588727"/>
    </electricalProjection>
    <projection id="NCXLS_M2R_MCL" presynapticPopulation="M2R" postsynapticPopulation="MCL" synapse="Acetylcholine">
      <connection id="16" preCellId="../M2R/0/M2R" postCellId="../MCL/0/MCL" preSegmentId="8" postSegmentId="1" preFractionAlong="0.1406954238607463" postFractionAlong="0.2196746779947074"/>
    </projection>
    <projection id="NCXLS_M2R_I6" presynapticPopulation="M2R" postsynapticPopulation="I6" synapse="Acetylcholine">
      <connection id="17" preCellId="../M2R/0/M2R" postCellId="../I6/0/I6" preSegmentId="6" postSegmentId="7" preFractionAlong="0.4189408420801276" postFractionAlong="0.779336265319487"/>
    </projection>
    <projection id="NCXLS_M2R_I1L" presynapticPopulation="M2R" postsynapticPopulation="I1L" synapse="Acetylcholine">
      <connection id="18" preCellId="../M2R/0/M2R" postCellId="../I1L/0/I1L" preSegmentId="1" postSegmentId="3" preFractionAlong="0.9825487615395994" postFractionAlong="0.18076991930090314"/>
    </projection>
    <projection id="NCXLS_M2R_NSMR" presynapticPopulation="M2R" postsynapticPopulation="NSMR" synapse="Acetylcholine">
      <connection id="19" preCellId="../M2R/0/M2R" postCellId="../NSMR/0/NSMR" preSegmentId="6" postSegmentId="2" preFractionAlong="0.8476451466520427" postFractionAlong="0.5927006378378993"/>
    </projection>
    <projection id="NCXLS_M5_I2R" presynapticPopulation="M5" postsynapticPopulation="I2R" synapse="Acetylcholine">
      <connection id="20" preCellId="../M5/0/M5" postCellId="../I2R/0/I2R" preSegmentId="8" postSegmentId="7" preFractionAlong="0.5557035407203013" postFractionAlong="0.48474135739969204"/>
    </projection>
    <projection id="NCXLS_M5_M2R" presynapticPopulation="M5" postsynapticPopulation="M2R" synapse="Acetylcholine">
      <connection id="21" preCellId="../M5/0/M5" postCellId="../M2R/0/M2R" preSegmentId="8" postSegmentId="4" preFractionAlong="0.9359740847107243" postFractionAlong="0.989206525798093"/>
    </projection>
    <projection id="NCXLS_M5_I3" presynapticPopulation="M5" postsynapticPopulation="I3" synapse="Acetylcholine">
      <connection id="22" preCellId="../M5/0/M5" postCellId="../I3/0/I3" preSegmentId="8" postSegmentId="8" preFractionAlong="0.1559262521738315" postFractionAlong="0.2535497759319092"/>
    </projection>
    <projection id="NCXLS_M5_I2L" presynapticPopulation="M5" postsynapticPopulation="I2L" synapse="Acetylcholine">
      <connection id="23" preCellId="../M5/0/M5" postCellId="../I2L/0/I2L" preSegmentId="9" postSegmentId="1" preFractionAlong="0.7679375516180111" postFractionAlong="0.8529243581784497"/>
    </projection>
    <projection id="NCXLS_M5_M3L" presynapticPopulation="M5" postsynapticPopulation="M3L" synapse="Glutamate">
      <connection id="24" preCellId="../M5/0/M5" postCellId="../M3L/0/M3L" preSegmentId="7" postSegmentId="6" preFractionAlong="0.9642201998380311" postFractionAlong="0.5788730435721895"/>
    </projection>
    <projection id="NCXLS_M5_I5" presynapticPopulation="M5" postsynapticPopulation="I5" synapse="Acetylcholine">
      <connection id="25" preCellId="../M5/0/M5" postCellId="../I5/0/I5" preSegmentId="8" postSegmentId="2" preFractionAlong="0.8376706294551841" postFractionAlong="0.2196445430512427"/>
    </projection>
    <projection id="NCXLS_M5_NSML" presynapticPopulation="M5" postsynapticPopulation="NSML" synapse="Acetylcholine">
      <connection id="26" preCellId="../M5/0/M5" postCellId="../NSML/0/NSML" preSegmentId="4" postSegmentId="8" preFractionAlong="0.8982211239095694" postFractionAlong="0.3129877141804547"/>
    </projection>
    <projection id="NCXLS_M5_MCR" presynapticPopulation="M5" postsynapticPopulation="MCR" synapse="Acetylcholine">
      <connection id="27" preCellId="../M5/0/M5" postCellId="../MCR/0/MCR" preSegmentId="3" postSegmentId="3" preFractionAlong="0.46437032018204105" postFractionAlong="0.5161245842024867"/>
    </projection>
    <projection id="NCXLS_M5_M3R" presynapticPopulation="M5" postsynapticPopulation="M3R" synapse="Acetylcholine">
      <connection id="28" preCellId="../M5/0/M5" postCellId="../M3R/0/M3R" preSegmentId="9" postSegmentId="9" preFractionAlong="0.04516775649747773" postFractionAlong="0.6532579594838668"/>
    </projection>
    <projection id="NCXLS_M5_I1L" presynapticPopulation="M5" postsynapticPopulation="I1L" synapse="Acetylcholine">
      <connection id="29" preCellId="../M5/0/M5" postCellId="../I1L/0/I1L" preSegmentId="9" postSegmentId="6" preFractionAlong="0.7792031367651079" postFractionAlong="0.19074826370580278"/>
    </projection>
    <projection id="NCXLS_M1_I2R" presynapticPopulation="M1" postsynapticPopulation="I2R" synapse="Acetylcholine">
      <connection id="30" preCellId="../M1/0/M1" postCellId="../I2R/0/I2R" preSegmentId="5" postSegmentId="6" preFractionAlong="0.5129607482592392" postFractionAlong="0.24623710120620945"/>
    </projection>
    <projection id="NCXLS_M1_M2R" presynapticPopulation="M1" postsynapticPopulation="M2R" synapse="Acetylcholine">
      <connection id="31" preCellId="../M1/0/M1" postCellId="../M2R/0/M2R" preSegmentId="7" postSegmentId="2" preFractionAlong="0.3138187803271616" postFractionAlong="0.2451530295515314"/>
    </projection>
    <projection id="NCXLS_M1_M5" presynapticPopulation="M1" postsynapticPopulation="M5" synapse="Glutamate">
      <connection id="32" preCellId="../M1/0/M1" postCellId="../M5/0/M5" preSegmentId="1" postSegmentId="8" preFractionAlong="0.017592487993914885" postFractionAlong="0.2680117320860753"/>
    </projection>
    <projection id="NCXLS_M1_I3" presynapticPopulation="M1" postsynapticPopulation="I3" synapse="Acetylcholine">
      <connection id="33" preCellId="../M1/0/M1" postCellId="../I3/0/I3" preSegmentId="3" postSegmentId="6" preFractionAlong="0.7869900833848252" postFractionAlong="0.3342633747792092"/>
    </projection>
    <projection id="NCXLS_M1_I4" presynapticPopulation="M1" postsynapticPopulation="I4" synapse="Acetylcholine">
      <connection id="34" preCellId="../M1/0/M1" postCellId="../I4/0/I4" preSegmentId="5" postSegmentId="7" preFractionAlong="0.6149100858019407" postFractionAlong="0.8223635138124306"/>
    </projection>
    <projection id="NCXLS_M1_I1R" presynapticPopulation="M1" postsynapticPopulation="I1R" synapse="Acetylcholine">
      <connection id="35" preCellId="../M1/0/M1" postCellId="../I1R/0/I1R" preSegmentId="5" postSegmentId="9" preFractionAlong="0.3711116637765881" postFractionAlong="0.6974990360370945"/>
    </projection>
    <projection id="NCXLS_M1_I2L" presynapticPopulation="M1" postsynapticPopulation="I2L" synapse="Acetylcholine">
      <connection id="36" preCellId="../M1/0/M1" postCellId="../I2L/0/I2L" preSegmentId="8" postSegmentId="5" preFractionAlong="0.02910145132297659" postFractionAlong="0.023099673424247125"/>
    </projection>
    <electricalProjection id="NCXLS_M1_M3L_GJ" presynapticPopulation="M1" postsynapticPopulation="M3L">
      <electricalConnection id="37" preCell="0" postCell="0" synapse="Generic_GJ" preSegment="8" postSegment="9" preFractionAlong="0.7890048845606946" postFractionAlong="0.33021522516002744"/>
    </electricalProjection>
    <projection id="NCXLS_M1_MI" presynapticPopulation="M1" postsynapticPopulation="MI" synapse="Acetylcholine">
      <connection id="38" preCellId="../M1/0/M1" postCellId="../MI/0/MI" preSegmentId="7" postSegmentId="6" preFractionAlong="0.4048930968230663" postFractionAlong="0.17024942596174208"/>
    </projection>
    <projection id="NCXLS_M1_I5" presynapticPopulation="M1" postsynapticPopulation="I5" synapse="Acetylcholine">
      <connection id="39" preCellId="../M1/0/M1" postCellId="../I5/0/I5" preSegmentId="1" postSegmentId="4" preFractionAlong="0.6487218801549056" postFractionAlong="0.39019596724990235"/>
    </projection>
    <projection id="NCXLS_M1_NSML" presynapticPopulation="M1" postsynapticPopulation="NSML" synapse="Acetylcholine">
      <connection id="40" preCellId="../M1/0/M1" postCellId="../NSML/0/NSML" preSegmentId="2" postSegmentId="4" preFractionAlong="0.6265463217476971" postFractionAlong="0.0812805233206938"/>
    </projection>
    <projection id="NCXLS_M1_MCR" presynapticPopulation="M1" postsynapticPopulation="MCR" synapse="Acetylcholine">
      <connection id="41" preCellId="../M1/0/M1" postCellId="../MCR/0/MCR" preSegmentId="2" postSegmentId="2" preFractionAlong="0.779711525180385" postFractionAlong="0.1168347364106812"/>
    </projection>
    <projection id="NCXLS_M1_M3R" presynapticPopulation="M1" postsynapticPopulation="M3R" synapse="Acetylcholine">
      <connection id="42" preCellId="../M1/0/M1" postCellId="../M3R/0/M3R" preSegmentId="7" postSegmentId="1" preFractionAlong="0.30744959496135194" postFractionAlong="0.55939524463847"/>
    </projection>
    <projection id="NCXLS_M1_M2L" presynapticPopulation="M1" postsynapticPopulation="M2L" synapse="Acetylcholine">
      <connection id="43" preCellId="../M1/0/M1" postCellId="../M2L/0/M2L" preSegmentId="7" postSegmentId="7" preFractionAlong="0.34544638580551346" postFractionAlong="0.7612714296253603"/>
    </projection>
    <projection id="NCXLS_M1_M4" presynapticPopulation="M1" postsynapticPopulation="M4" synapse="Acetylcholine">
      <connection id="44" preCellId="../M1/0/M1" postCellId="../M4/0/M4" preSegmentId="8" postSegmentId="2" preFractionAlong="0.957868559877576" postFractionAlong="0.1578008770256658"/>
    </projection>
    <projection id="NCXLS_M1_MCL" presynapticPopulation="M1" postsynapticPopulation="MCL" synapse="Acetylcholine">
      <connection id="45" preCellId="../M1/0/M1" postCellId="../MCL/0/MCL" preSegmentId="7" postSegmentId="3" preFractionAlong="0.8068713932688795" postFractionAlong="0.6247957073338625"/>
    </projection>
    <projection id="NCXLS_M1_I6" presynapticPopulation="M1" postsynapticPopulation="I6" synapse="Acetylcholine">
      <connection id="46" preCellId="../M1/0/M1" postCellId="../I6/0/I6" preSegmentId="4" postSegmentId="7" preFractionAlong="0.12400299462414255" postFractionAlong="0.9218536737859097"/>
    </projection>
    <projection id="NCXLS_M1_I1L" presynapticPopulation="M1" postsynapticPopulation="I1L" synapse="Acetylcholine">
      <connection id="47" preCellId="../M1/0/M1" postCellId="../I1L/0/I1L" preSegmentId="8" postSegmentId="9" preFractionAlong="0.5736665975490097" postFractionAlong="0.9142087896808119"/>
    </projection>
    <projection id="NCXLS_M1_NSMR" presynapticPopulation="M1" postsynapticPopulation="NSMR" synapse="Acetylcholine">
      <connection id="48" preCellId="../M1/0/M1" postCellId="../NSMR/0/NSMR" preSegmentId="1" postSegmentId="9" preFractionAlong="0.5437014196449175" postFractionAlong="0.4716528013283886"/>
    </projection>
    <projection id="NCXLS_M3L_M2R" presynapticPopulation="M3L" postsynapticPopulation="M2R" synapse="Glutamate">
      <connection id="49" preCellId="../M3L/0/M3L" postCellId="../M2R/0/M2R" preSegmentId="3" postSegmentId="6" preFractionAlong="0.4086576822098361" postFractionAlong="0.05259147124067853"/>
    </projection>
    <electricalProjection id="NCXLS_M3L_M5_GJ" presynapticPopulation="M3L" postsynapticPopulation="M5">
      <electricalConnection id="50" preCell="0" postCell="0" synapse="Generic_GJ" preSegment="8" postSegment="2" preFractionAlong="0.9880866567365598" postFractionAlong="0.4384188647019115"/>
    </electricalProjection>
    <projection id="NCXLS_M3L_I3" presynapticPopulation="M3L" postsynapticPopulation="I3" synapse="Acetylcholine">
      <connection id="51" preCellId="../M3L/0/M3L" postCellId="../I3/0/I3" preSegmentId="1" postSegmentId="2" preFractionAlong="0.7930617209035477" postFractionAlong="0.3983103678635713"/>
    </projection>
    <projection id="NCXLS_M3L_I1R" presynapticPopulation="M3L" postsynapticPopulation="I1R" synapse="Acetylcholine">
      <connection id="52" preCellId="../M3L/0/M3L" postCellId="../I1R/0/I1R" preSegmentId="2" postSegmentId="9" preFractionAlong="0.9155167287166966" postFractionAlong="0.8525106362892052"/>
    </projection>
    <projection id="NCXLS_M3L_I2L" presynapticPopulation="M3L" postsynapticPopulation="I2L" synapse="Acetylcholine">
      <connection id="53" preCellId="../M3L/0/M3L" postCellId="../I2L/0/I2L" preSegmentId="9" postSegmentId="7" preFractionAlong="0.9307257945453972" postFractionAlong="0.9324277829788153"/>
    </projection>
    <projection id="NCXLS_M3L_MI" presynapticPopulation="M3L" postsynapticPopulation="MI" synapse="Acetylcholine">
      <connection id="54" preCellId="../M3L/0/M3L" postCellId="../MI/0/MI" preSegmentId="5" postSegmentId="2" preFractionAlong="0.12537888410818765" postFractionAlong="0.16055781076317022"/>
    </projection>
    <projection id="NCXLS_M3L_I5" presynapticPopulation="M3L" postsynapticPopulation="I5" synapse="Acetylcholine">
      <connection id="55" preCellId="../M3L/0/M3L" postCellId="../I5/0/I5" preSegmentId="2" postSegmentId="9" preFractionAlong="0.5414344766098449" postFractionAlong="0.018465904893235963"/>
    </projection>
    <projection id="NCXLS_M3L_NSML" presynapticPopulation="M3L" postsynapticPopulation="NSML" synapse="Acetylcholine">
      <connection id="56" preCellId="../M3L/0/M3L" postCellId="../NSML/0/NSML" preSegmentId="8" postSegmentId="7" preFractionAlong="0.1881483485465556" postFractionAlong="0.10284897206180477"/>
    </projection>
    <projection id="NCXLS_M3L_MCR" presynapticPopulation="M3L" postsynapticPopulation="MCR" synapse="Acetylcholine">
      <connection id="57" preCellId="../M3L/0/M3L" postCellId="../MCR/0/MCR" preSegmentId="2" postSegmentId="1" preFractionAlong="0.3374147086864342" postFractionAlong="0.6559173524819735"/>
    </projection>
    <projection id="NCXLS_M3L_M3R" presynapticPopulation="M3L" postsynapticPopulation="M3R" synapse="Acetylcholine">
      <connection id="58" preCellId="../M3L/0/M3L" postCellId="../M3R/0/M3R" preSegmentId="4" postSegmentId="8" preFractionAlong="0.9204619784452005" postFractionAlong="0.9020025994699015"/>
    </projection>
    <electricalProjection id="NCXLS_M3L_M4_GJ" presynapticPopulation="M3L" postsynapticPopulation="M4">
      <electricalConnection id="59" preCell="0" postCell="0" synapse="Generic_GJ" preSegment="3" postSegment="8" preFractionAlong="0.5934860053966702" postFractionAlong="0.4098460987102419"/>
    </electricalProjection>
    <projection id="NCXLS_M3L_MCL" presynapticPopulation="M3L" postsynapticPopulation="MCL" synapse="Acetylcholine">
      <connection id="60" preCellId="../M3L/0/M3L" postCellId="../MCL/0/MCL" preSegmentId="8" postSegmentId="1" preFractionAlong="0.8726121748775852" postFractionAlong="0.30139837741718245"/>
    </projection>
    <projection id="NCXLS_M3L_I1L" presynapticPopulation="M3L" postsynapticPopulation="I1L" synapse="Acetylcholine">
      <connection id="61" preCellId="../M3L/0/M3L" postCellId="../I1L/0/I1L" preSegmentId="4" postSegmentId="6" preFractionAlong="0.14081921813379517" postFractionAlong="0.8269946099050004"/>
    </projection>
    <projection id="NCXLS_MI_I4" presynapticPopulation="MI" postsynapticPopulation="I4" synapse="Serotonin_Glutamate">
      <connection id="62" preCellId="../MI/0/MI" postCellId="../I4/0/I4" preSegmentId="9" postSegmentId="5" preFractionAlong="0.025025101563866614" postFractionAlong="0.5706441825450448"/>
    </projection>
    <projection id="NCXLS_MI_I1R" presynapticPopulation="MI" postsynapticPopulation="I1R" synapse="Acetylcholine">
      <connection id="63" preCellId="../MI/0/MI" postCellId="../I1R/0/I1R" preSegmentId="9" postSegmentId="6" preFractionAlong="0.5682278156666614" postFractionAlong="0.39842516873946365"/>
    </projection>
    <projection id="NCXLS_MI_M1" presynapticPopulation="MI" postsynapticPopulation="M1" synapse="Acetylcholine">
      <connection id="64" preCellId="../MI/0/MI" postCellId="../M1/0/M1" preSegmentId="3" postSegmentId="7" preFractionAlong="0.507560249110526" postFractionAlong="0.5522677524502678"/>
    </projection>
    <projection id="NCXLS_I5_I2L" presynapticPopulation="I5" postsynapticPopulation="I2L" synapse="Glutamate">
      <connection id="65" preCellId="../I5/0/I5" postCellId="../I2L/0/I2L" preSegmentId="2" postSegmentId="4" preFractionAlong="0.8594225908613043" postFractionAlong="0.8684653412123685"/>
    </projection>
    <projection id="NCXLS_NSML_M2R" presynapticPopulation="NSML" postsynapticPopulation="M2R" synapse="Serotonin_Glutamate">
      <connection id="66" preCellId="../NSML/0/NSML" postCellId="../M2R/0/M2R" preSegmentId="7" postSegmentId="9" preFractionAlong="0.7385594981157951" postFractionAlong="0.26514900221701065"/>
    </projection>
    <projection id="NCXLS_NSML_I1L" presynapticPopulation="NSML" postsynapticPopulation="I1L" synapse="Serotonin_Glutamate">
      <connection id="67" preCellId="../NSML/0/NSML" postCellId="../I1L/0/I1L" preSegmentId="1" postSegmentId="4" preFractionAlong="0.8589123260956414" postFractionAlong="0.8958346766901621"/>
    </projection>
    <projection id="NCXLS_MCR_M5" presynapticPopulation="MCR" postsynapticPopulation="M5" synapse="Acetylcholine">
      <connection id="68" preCellId="../MCR/0/MCR" postCellId="../M5/0/M5" preSegmentId="3" postSegmentId="5" preFractionAlong="0.8795632376127812" postFractionAlong="0.5800435552980984"/>
    </projection>
    <projection id="NCXLS_MCR_I4" presynapticPopulation="MCR" postsynapticPopulation="I4" synapse="Acetylcholine">
      <connection id="69" preCellId="../MCR/0/MCR" postCellId="../I4/0/I4" preSegmentId="3" postSegmentId="2" preFractionAlong="0.774849846534099" postFractionAlong="0.7398216343655964"/>
    </projection>
    <projection id="NCXLS_MCR_I1R" presynapticPopulation="MCR" postsynapticPopulation="I1R" synapse="Acetylcholine">
      <connection id="70" preCellId="../MCR/0/MCR" postCellId="../I1R/0/I1R" preSegmentId="1" postSegmentId="5" preFractionAlong="0.3089203495949695" postFractionAlong="0.4545078900704814"/>
    </projection>
    <projection id="NCXLS_MCR_M1" presynapticPopulation="MCR" postsynapticPopulation="M1" synapse="Acetylcholine">
      <connection id="71" preCellId="../MCR/0/MCR" postCellId="../M1/0/M1" preSegmentId="4" postSegmentId="7" preFractionAlong="0.18798387207603384" postFractionAlong="0.5408595788250777"/>
    </projection>
    <projection id="NCXLS_MCR_MI" presynapticPopulation="MCR" postsynapticPopulation="MI" synapse="Acetylcholine">
      <connection id="72" preCellId="../MCR/0/MCR" postCellId="../MI/0/MI" preSegmentId="5" postSegmentId="9" preFractionAlong="0.1866839259143167" postFractionAlong="0.4063998528544974"/>
    </projection>
    <projection id="NCXLS_MCR_M2L" presynapticPopulation="MCR" postsynapticPopulation="M2L" synapse="Acetylcholine">
      <connection id="73" preCellId="../MCR/0/MCR" postCellId="../M2L/0/M2L" preSegmentId="7" postSegmentId="9" preFractionAlong="0.18920900530577645" postFractionAlong="0.6169011290397374"/>
    </projection>
    <projection id="NCXLS_MCR_M4" presynapticPopulation="MCR" postsynapticPopulation="M4" synapse="Acetylcholine">
      <connection id="74" preCellId="../MCR/0/MCR" postCellId="../M4/0/M4" preSegmentId="2" postSegmentId="8" preFractionAlong="0.5577047619066712" postFractionAlong="0.29029748304403435"/>
    </projection>
    <electricalProjection id="NCXLS_MCR_MCL_GJ" presynapticPopulation="MCR" postsynapticPopulation="MCL">
      <electricalConnection id="75" preCell="0" postCell="0" synapse="Generic_GJ" preSegment="5" postSegment="6" preFractionAlong="0.9707281639857944" postFractionAlong="0.2547923557313042"/>
    </electricalProjection>
    <projection id="NCXLS_MCR_I6" presynapticPopulation="MCR" postsynapticPopulation="I6" synapse="Acetylcholine">
      <connection id="76" preCellId="../MCR/0/MCR" postCellId="../I6/0/I6" preSegmentId="3" postSegmentId="7" preFractionAlong="0.2391767948573762" postFractionAlong="0.5900933994880078"/>
    </projection>
    <projection id="NCXLS_M3R_I2R" presynapticPopulation="M3R" postsynapticPopulation="I2R" synapse="Acetylcholine">
      <connection id="77" preCellId="../M3R/0/M3R" postCellId="../I2R/0/I2R" preSegmentId="7" postSegmentId="8" preFractionAlong="0.3627366479724836" postFractionAlong="0.01692935242553506"/>
    </projection>
    <projection id="NCXLS_M3R_M2R" presynapticPopulation="M3R" postsynapticPopulation="M2R" synapse="Acetylcholine">
      <connection id="78" preCellId="../M3R/0/M3R" postCellId="../M2R/0/M2R" preSegmentId="4" postSegmentId="9" preFractionAlong="0.0013198689843296751" postFractionAlong="0.307943707661932"/>
    </projection>
    <projection id="NCXLS_M3R_I4" presynapticPopulation="M3R" postsynapticPopulation="I4" synapse="Acetylcholine">
      <connection id="79" preCellId="../M3R/0/M3R" postCellId="../I4/0/I4" preSegmentId="6" postSegmentId="1" preFractionAlong="0.3934481532236358" postFractionAlong="0.13185198964339695"/>
    </projection>
    <projection id="NCXLS_M3R_I1R" presynapticPopulation="M3R" postsynapticPopulation="I1R" synapse="Acetylcholine">
      <connection id="80" preCellId="../M3R/0/M3R" postCellId="../I1R/0/I1R" preSegmentId="8" postSegmentId="8" preFractionAlong="0.69244035251813" postFractionAlong="0.6301855690545725"/>
    </projection>
    <projection id="NCXLS_M3R_M1" presynapticPopulation="M3R" postsynapticPopulation="M1" synapse="Acetylcholine">
      <connection id="81" preCellId="../M3R/0/M3R" postCellId="../M1/0/M1" preSegmentId="5" postSegmentId="1" preFractionAlong="0.45200828798708115" postFractionAlong="0.5190917303397282"/>
    </projection>
    <electricalProjection id="NCXLS_M3R_M3L_GJ" presynapticPopulation="M3R" postsynapticPopulation="M3L">
      <electricalConnection id="82" preCell="0" postCell="0" synapse="Generic_GJ" preSegment="7" postSegment="7" preFractionAlong="0.42770117081923853" postFractionAlong="0.7015993498995969"/>
    </electricalProjection>
    <projection id="NCXLS_M3R_MI" presynapticPopulation="M3R" postsynapticPopulation="MI" synapse="Acetylcholine">
      <connection id="83" preCellId="../M3R/0/M3R" postCellId="../MI/0/MI" preSegmentId="3" postSegmentId="2" preFractionAlong="0.3385859719415736" postFractionAlong="0.22417227674690177"/>
    </projection>
    <projection id="NCXLS_M3R_NSML" presynapticPopulation="M3R" postsynapticPopulation="NSML" synapse="Acetylcholine">
      <connection id="84" preCellId="../M3R/0/M3R" postCellId="../NSML/0/NSML" preSegmentId="1" postSegmentId="4" preFractionAlong="0.24637133314762727" postFractionAlong="0.3948569655282109"/>
    </projection>
    <projection id="NCXLS_M3R_M2L" presynapticPopulation="M3R" postsynapticPopulation="M2L" synapse="Glutamate">
      <connection id="85" preCellId="../M3R/0/M3R" postCellId="../M2L/0/M2L" preSegmentId="1" postSegmentId="6" preFractionAlong="0.8917917114831578" postFractionAlong="0.3155474736449152"/>
    </projection>
    <electricalProjection id="NCXLS_M3R_M4_GJ" presynapticPopulation="M3R" postsynapticPopulation="M4">
      <electricalConnection id="86" preCell="0" postCell="0" synapse="Generic_GJ" preSegment="3" postSegment="9" preFractionAlong="0.7298740126426408" postFractionAlong="0.7492753368241044"/>
    </electricalProjection>
    <projection id="NCXLS_M3R_MCL" presynapticPopulation="M3R" postsynapticPopulation="MCL" synapse="Acetylcholine">
      <connection id="87" preCellId="../M3R/0/M3R" postCellId="../MCL/0/MCL" preSegmentId="9" postSegmentId="8" preFractionAlong="0.4683243073685551" postFractionAlong="0.8618281308246027"/>
    </projection>
    <projection id="NCXLS_M3R_I6" presynapticPopulation="M3R" postsynapticPopulation="I6" synapse="Acetylcholine">
      <connection id="88" preCellId="../M3R/0/M3R" postCellId="../I6/0/I6" preSegmentId="1" postSegmentId="5" preFractionAlong="0.6834527434210503" postFractionAlong="0.5879337330342645"/>
    </projection>
    <projection id="NCXLS_M3R_I1L" presynapticPopulation="M3R" postsynapticPopulation="I1L" synapse="Acetylcholine">
      <connection id="89" preCellId="../M3R/0/M3R" postCellId="../I1L/0/I1L" preSegmentId="1" postSegmentId="3" preFractionAlong="0.3905743775924688" postFractionAlong="0.31807654442812994"/>
    </projection>
    <projection id="NCXLS_M3R_NSMR" presynapticPopulation="M3R" postsynapticPopulation="NSMR" synapse="Acetylcholine">
      <connection id="90" preCellId="../M3R/0/M3R" postCellId="../NSMR/0/NSMR" preSegmentId="5" postSegmentId="2" preFractionAlong="0.23277228357521673" postFractionAlong="0.9235936304613274"/>
    </projection>
    <projection id="NCXLS_M2L_I2R" presynapticPopulation="M2L" postsynapticPopulation="I2R" synapse="Acetylcholine">
      <connection id="91" preCellId="../M2L/0/M2L" postCellId="../I2R/0/I2R" preSegmentId="1" postSegmentId="7" preFractionAlong="0.3161015817828243" postFractionAlong="0.7633390532427098"/>
    </projection>
    <projection id="NCXLS_M2L_M2R" presynapticPopulation="M2L" postsynapticPopulation="M2R" synapse="Acetylcholine">
      <connection id="92" preCellId="../M2L/0/M2L" postCellId="../M2R/0/M2R" preSegmentId="7" postSegmentId="8" preFractionAlong="0.5265247107711399" postFractionAlong="0.2503345637346731"/>
    </projection>
    <projection id="NCXLS_M2L_M5" presynapticPopulation="M2L" postsynapticPopulation="M5" synapse="Acetylcholine">
      <connection id="93" preCellId="../M2L/0/M2L" postCellId="../M5/0/M5" preSegmentId="7" postSegmentId="1" preFractionAlong="0.1993405342625726" postFractionAlong="0.8223910929462823"/>
    </projection>
    <projection id="NCXLS_M2L_I3" presynapticPopulation="M2L" postsynapticPopulation="I3" synapse="Acetylcholine">
      <connection id="94" preCellId="../M2L/0/M2L" postCellId="../I3/0/I3" preSegmentId="4" postSegmentId="8" preFractionAlong="0.5963597582193679" postFractionAlong="0.3441718831678193"/>
    </projection>
    <projection id="NCXLS_M2L_I1R" presynapticPopulation="M2L" postsynapticPopulation="I1R" synapse="Acetylcholine">
      <connection id="95" preCellId="../M2L/0/M2L" postCellId="../I1R/0/I1R" preSegmentId="5" postSegmentId="4" preFractionAlong="0.07369125237043472" postFractionAlong="0.9414255948352722"/>
    </projection>
    <projection id="NCXLS_M2L_I2L" presynapticPopulation="M2L" postsynapticPopulation="I2L" synapse="Acetylcholine">
      <connection id="96" preCellId="../M2L/0/M2L" postCellId="../I2L/0/I2L" preSegmentId="7" postSegmentId="3" preFractionAlong="0.20360271573465483" postFractionAlong="0.28093743834221874"/>
    </projection>
    <projection id="NCXLS_M2L_M3L" presynapticPopulation="M2L" postsynapticPopulation="M3L" synapse="Acetylcholine">
      <connection id="97" preCellId="../M2L/0/M2L" postCellId="../M3L/0/M3L" preSegmentId="8" postSegmentId="1" preFractionAlong="0.8957434451243126" postFractionAlong="0.18817159584612386"/>
    </projection>
    <projection id="NCXLS_M2L_MI" presynapticPopulation="M2L" postsynapticPopulation="MI" synapse="Acetylcholine">
      <connection id="98" preCellId="../M2L/0/M2L" postCellId="../MI/0/MI" preSegmentId="2" postSegmentId="2" preFractionAlong="0.5862207115272452" postFractionAlong="0.9192542465263115"/>
    </projection>
    <projection id="NCXLS_M2L_I5" presynapticPopulation="M2L" postsynapticPopulation="I5" synapse="Acetylcholine">
      <connection id="99" preCellId="../M2L/0/M2L" postCellId="../I5/0/I5" preSegmentId="6" postSegmentId="4" preFractionAlong="0.1900854125998448" postFractionAlong="0.6517744788191033"/>
    </projection>
    <projection id="NCXLS_M2L_NSML" presynapticPopulation="M2L" postsynapticPopulation="NSML" synapse="Acetylcholine">
      <connection id="100" preCellId="../M2L/0/M2L" postCellId="../NSML/0/NSML" preSegmentId="2" postSegmentId="2" preFractionAlong="0.45253364402930063" postFractionAlong="0.5065538158814177"/>
    </projection>
    <projection id="NCXLS_M2L_MCR" presynapticPopulation="M2L" postsynapticPopulation="MCR" synapse="Acetylcholine">
      <connection id="101" preCellId="../M2L/0/M2L" postCellId="../MCR/0/MCR" preSegmentId="5" postSegmentId="4" preFractionAlong="0.11471232218718319" postFractionAlong="0.9428054879896225"/>
    </projection>
    <projection id="NCXLS_M2L_M3R" presynapticPopulation="M2L" postsynapticPopulation="M3R" synapse="Acetylcholine">
      <connection id="102" preCellId="../M2L/0/M2L" postCellId="../M3R/0/M3R" preSegmentId="7" postSegmentId="7" preFractionAlong="0.9230008393898834" postFractionAlong="0.3258354395041454"/>
    </projection>
    <electricalProjection id="NCXLS_M2L_M4_GJ" presynapticPopulation="M2L" postsynapticPopulation="M4">
      <electricalConnection id="103" preCell="0" postCell="0" synapse="Generic_GJ" preSegment="4" postSegment="1" preFractionAlong="0.7807732348871894" postFractionAlong="0.3637860515990571"/>
    </electricalProjection>
    <projection id="NCXLS_M2L_MCL" presynapticPopulation="M2L" postsynapticPopulation="MCL" synapse="Acetylcholine">
      <connection id="104" preCellId="../M2L/0/M2L" postCellId="../MCL/0/MCL" preSegmentId="9" postSegmentId="8" preFractionAlong="0.5888825052029606" postFractionAlong="0.5762805932836943"/>
    </projection>
    <projection id="NCXLS_M2L_I6" presynapticPopulation="M2L" postsynapticPopulation="I6" synapse="Acetylcholine">
      <connection id="105" preCellId="../M2L/0/M2L" postCellId="../I6/0/I6" preSegmentId="7" postSegmentId="8" preFractionAlong="0.24907683217159182" postFractionAlong="0.5718392898565416"/>
    </projection>
    <projection id="NCXLS_M2L_I1L" presynapticPopulation="M2L" postsynapticPopulation="I1L" synapse="Acetylcholine">
      <connection id="106" preCellId="../M2L/0/M2L" postCellId="../I1L/0/I1L" preSegmentId="6" postSegmentId="6" preFractionAlong="0.5819603540191924" postFractionAlong="0.9089979943728113"/>
    </projection>
    <projection id="NCXLS_M2L_NSMR" presynapticPopulation="M2L" postsynapticPopulation="NSMR" synapse="Acetylcholine">
      <connection id="107" preCellId="../M2L/0/M2L" postCellId="../NSMR/0/NSMR" preSegmentId="2" postSegmentId="6" preFractionAlong="0.07165061423148467" postFractionAlong="0.9435035356332391"/>
    </projection>
    <projection id="NCXLS_M4_M5" presynapticPopulation="M4" postsynapticPopulation="M5" synapse="Glutamate">
      <connection id="108" preCellId="../M4/0/M4" postCellId="../M5/0/M5" preSegmentId="6" postSegmentId="4" preFractionAlong="0.838881080505121" postFractionAlong="0.3668683942862294"/>
    </projection>
    <projection id="NCXLS_M4_I3" presynapticPopulation="M4" postsynapticPopulation="I3" synapse="Acetylcholine">
      <connection id="109" preCellId="../M4/0/M4" postCellId="../I3/0/I3" preSegmentId="4" postSegmentId="3" preFractionAlong="0.22239143551203222" postFractionAlong="0.9521738374562813"/>
    </projection>
    <projection id="NCXLS_M4_I1R" presynapticPopulation="M4" postsynapticPopulation="I1R" synapse="Acetylcholine">
      <connection id="110" preCellId="../M4/0/M4" postCellId="../I1R/0/I1R" preSegmentId="6" postSegmentId="4" preFractionAlong="0.9982689762040686" postFractionAlong="0.049188990232022056"/>
    </projection>
    <projection id="NCXLS_M4_I2L" presynapticPopulation="M4" postsynapticPopulation="I2L" synapse="Acetylcholine">
      <connection id="111" preCellId="../M4/0/M4" postCellId="../I2L/0/I2L" preSegmentId="5" postSegmentId="7" preFractionAlong="0.30063192858167553" postFractionAlong="0.5713515657069453"/>
    </projection>
    <projection id="NCXLS_M4_M1" presynapticPopulation="M4" postsynapticPopulation="M1" synapse="Acetylcholine">
      <connection id="112" preCellId="../M4/0/M4" postCellId="../M1/0/M1" preSegmentId="9" postSegmentId="4" preFractionAlong="0.7839123805872337" postFractionAlong="0.3324477182476383"/>
    </projection>
    <projection id="NCXLS_M4_MI" presynapticPopulation="M4" postsynapticPopulation="MI" synapse="Acetylcholine">
      <connection id="113" preCellId="../M4/0/M4" postCellId="../MI/0/MI" preSegmentId="5" postSegmentId="6" preFractionAlong="0.7156392360669593" postFractionAlong="0.8890421176901612"/>
    </projection>
    <projection id="NCXLS_M4_I5" presynapticPopulation="M4" postsynapticPopulation="I5" synapse="Acetylcholine">
      <connection id="114" preCellId="../M4/0/M4" postCellId="../I5/0/I5" preSegmentId="3" postSegmentId="6" preFractionAlong="0.6083090281035596" postFractionAlong="0.3883931803838869"/>
    </projection>
    <projection id="NCXLS_M4_NSML" presynapticPopulation="M4" postsynapticPopulation="NSML" synapse="Acetylcholine">
      <connection id="115" preCellId="../M4/0/M4" postCellId="../NSML/0/NSML" preSegmentId="8" postSegmentId="8" preFractionAlong="0.877545542559473" postFractionAlong="0.10378192817667187"/>
    </projection>
    <projection id="NCXLS_M4_MCR" presynapticPopulation="M4" postsynapticPopulation="MCR" synapse="Acetylcholine">
      <connection id="116" preCellId="../M4/0/M4" postCellId="../MCR/0/MCR" preSegmentId="9" postSegmentId="5" preFractionAlong="0.7761165984135006" postFractionAlong="0.431651762593961"/>
    </projection>
    <projection id="NCXLS_M4_M3R" presynapticPopulation="M4" postsynapticPopulation="M3R" synapse="Glutamate">
      <connection id="117" preCellId="../M4/0/M4" postCellId="../M3R/0/M3R" preSegmentId="5" postSegmentId="1" preFractionAlong="0.4113226968232696" postFractionAlong="0.6028447467863508"/>
    </projection>
    <projection id="NCXLS_M4_MCL" presynapticPopulation="M4" postsynapticPopulation="MCL" synapse="Acetylcholine">
      <connection id="118" preCellId="../M4/0/M4" postCellId="../MCL/0/MCL" preSegmentId="1" postSegmentId="7" preFractionAlong="0.4929924291045318" postFractionAlong="0.20849447495426054"/>
    </projection>
    <projection id="NCXLS_M4_I1L" presynapticPopulation="M4" postsynapticPopulation="I1L" synapse="Acetylcholine">
      <connection id="119" preCellId="../M4/0/M4" postCellId="../I1L/0/I1L" preSegmentId="2" postSegmentId="5" preFractionAlong="0.3609714559862718" postFractionAlong="0.1456520910643565"/>
    </projection>
    <projection id="NCXLS_MCL_I2R" presynapticPopulation="MCL" postsynapticPopulation="I2R" synapse="Acetylcholine">
      <connection id="120" preCellId="../MCL/0/MCL" postCellId="../I2R/0/I2R" preSegmentId="7" postSegmentId="6" preFractionAlong="0.3440997640297365" postFractionAlong="0.9904716723472566"/>
    </projection>
    <projection id="NCXLS_MCL_M2R" presynapticPopulation="MCL" postsynapticPopulation="M2R" synapse="Acetylcholine">
      <connection id="121" preCellId="../MCL/0/MCL" postCellId="../M2R/0/M2R" preSegmentId="4" postSegmentId="1" preFractionAlong="0.8417057652229475" postFractionAlong="0.1701012461881699"/>
    </projection>
    <projection id="NCXLS_MCL_I4" presynapticPopulation="MCL" postsynapticPopulation="I4" synapse="Acetylcholine">
      <connection id="122" preCellId="../MCL/0/MCL" postCellId="../I4/0/I4" preSegmentId="5" postSegmentId="8" preFractionAlong="0.6677560251985356" postFractionAlong="0.8547783462955792"/>
    </projection>
    <projection id="NCXLS_MCL_M1" presynapticPopulation="MCL" postsynapticPopulation="M1" synapse="Acetylcholine">
      <connection id="123" preCellId="../MCL/0/MCL" postCellId="../M1/0/M1" preSegmentId="1" postSegmentId="3" preFractionAlong="0.5799833204520839" postFractionAlong="0.23746890722274572"/>
    </projection>
    <projection id="NCXLS_MCL_M3L" presynapticPopulation="MCL" postsynapticPopulation="M3L" synapse="Acetylcholine">
      <connection id="124" preCellId="../MCL/0/MCL" postCellId="../M3L/0/M3L" preSegmentId="1" postSegmentId="6" preFractionAlong="0.9971731279111168" postFractionAlong="0.5660475729241843"/>
    </projection>
    <projection id="NCXLS_MCL_NSML" presynapticPopulation="MCL" postsynapticPopulation="NSML" synapse="Acetylcholine">
      <connection id="125" preCellId="../MCL/0/MCL" postCellId="../NSML/0/NSML" preSegmentId="6" postSegmentId="2" preFractionAlong="0.25107902402934534" postFractionAlong="0.49967024372905344"/>
    </projection>
    <projection id="NCXLS_MCL_M2L" presynapticPopulation="MCL" postsynapticPopulation="M2L" synapse="Acetylcholine">
      <connection id="126" preCellId="../MCL/0/MCL" postCellId="../M2L/0/M2L" preSegmentId="4" postSegmentId="4" preFractionAlong="0.4417964904426055" postFractionAlong="0.7427908347497"/>
    </projection>
    <projection id="NCXLS_MCL_M4" presynapticPopulation="MCL" postsynapticPopulation="M4" synapse="Acetylcholine">
      <connection id="127" preCellId="../MCL/0/MCL" postCellId="../M4/0/M4" preSegmentId="3" postSegmentId="3" preFractionAlong="0.6710901744959188" postFractionAlong="0.9579125508901479"/>
    </projection>
    <projection id="NCXLS_MCL_I6" presynapticPopulation="MCL" postsynapticPopulation="I6" synapse="Acetylcholine">
      <connection id="128" preCellId="../MCL/0/MCL" postCellId="../I6/0/I6" preSegmentId="1" postSegmentId="1" preFractionAlong="0.6040179965751782" postFractionAlong="0.9906281082658567"/>
    </projection>
    <projection id="NCXLS_MCL_I1L" presynapticPopulation="MCL" postsynapticPopulation="I1L" synapse="Acetylcholine">
      <connection id="129" preCellId="../MCL/0/MCL" postCellId="../I1L/0/I1L" preSegmentId="6" postSegmentId="4" preFractionAlong="0.03213086611593108" postFractionAlong="0.7106878795587983"/>
    </projection>
    <projection id="NCXLS_MCL_NSMR" presynapticPopulation="MCL" postsynapticPopulation="NSMR" synapse="Acetylcholine">
      <connection id="130" preCellId="../MCL/0/MCL" postCellId="../NSMR/0/NSMR" preSegmentId="1" postSegmentId="1" preFractionAlong="0.19275201041271228" postFractionAlong="0.6883967049269083"/>
    </projection>
    <projection id="NCXLS_I1L_M2R" presynapticPopulation="I1L" postsynapticPopulation="M2R" synapse="Acetylcholine">
      <connection id="131" preCellId="../I1L/0/I1L" postCellId="../M2R/0/M2R" preSegmentId="8" postSegmentId="1" preFractionAlong="0.9246474785591563" postFractionAlong="0.10359714999747949"/>
    </projection>
    <projection id="NC_I1L_RMDDL" presynapticPopulation="I1L" postsynapticPopulation="RMDDL" synapse="Acetylcholine">
      <connection id="1000" preCellId="../I1L/0/I1L" postCellId="../RMDDL/0/RMDDL" preSegmentId="4" postSegmentId="8" preFractionAlong="0.3140079252735116" postFractionAlong="0.2714150075196725"/>
    </projection>
    <projection id="NC_I1L_RMDVL" presynapticPopulation="I1L" postsynapticPopulation="RMDVL" synapse="Acetylcholine">
      <connection id="1001" preCellId="../I1L/0/I1L" postCellId="../RMDVL/0/RMDVL" preSegmentId="4" postSegmentId="5" preFractionAlong="0.6454418331834965" postFractionAlong="0.947522980551238"/>
    </projection>
    <projection id="NC_I1R_RMDDR" presynapticPopulation="I1R" postsynapticPopulation="RMDDR" synapse="Acetylcholine">
      <connection id="1002" preCellId="../I1R/0/I1R" postCellId="../RMDDR/0/RMDDR" preSegmentId="3" postSegmentId="4" preFractionAlong="0.6829416946253303" postFractionAlong="0.9034002408930234"/>
    </projection>
    <projection id="NC_I1R_RMDVR" presynapticPopulation="I1R" postsynapticPopulation="RMDVR" synapse="Acetylcholine">
      <connection id="1003" preCellId="../I1R/0/I1R" postCellId="../RMDVR/0/RMDVR" preSegmentId="6" postSegmentId="8" preFractionAlong="0.08605454468610119" postFractionAlong="0.05546569726504935"/>
    </projection>
    <projection id="NC_I2L_URXL" presynapticPopulation="I2L" postsynapticPopulation="URXL" synapse="Glutamate">
      <connection id="1004" preCellId="../I2L/0/I2L" postCellId="../URXL/0/URXL" preSegmentId="9" postSegmentId="3" preFractionAlong="0.534659566749085" postFractionAlong="0.020194923084332905"/>
    </projection>
    <projection id="NC_I2R_URXR" presynapticPopulation="I2R" postsynapticPopulation="URXR" synapse="Glutamate">
      <connection id="1005" preCellId="../I2R/0/I2R" postCellId="../URXR/0/URXR" preSegmentId="1" postSegmentId="3" preFractionAlong="0.7169769010638771" postFractionAlong="0.5826009367844994"/>
    </projection>
    <projection id="NC_AVKL_I1L" presynapticPopulation="AVKL" postsynapticPopulation="I1L" synapse="Acetylcholine">
      <connection id="1006" preCellId="../AVKL/0/AVKL" postCellId="../I1L/0/I1L" preSegmentId="7" postSegmentId="2" preFractionAlong="0.4454054285778348" postFractionAlong="0.3550947663631898"/>
    </projection>
    <projection id="NC_AVKR_I1R" presynapticPopulation="AVKR" postsynapticPopulation="I1R" synapse="Acetylcholine">
      <connection id="1007" preCellId="../AVKR/0/AVKR" postCellId="../I1R/0/I1R" preSegmentId="7" postSegmentId="6" preFractionAlong="0.8703290345540943" postFractionAlong="0.7758614386586519"/>
    </projection>
    <projection id="NC_RIS_I1L" presynapticPopulation="RIS" postsynapticPopulation="I1L" synapse="Glutamate">
      <connection id="1008" preCellId="../RIS/0/RIS" postCellId="../I1L/0/I1L" preSegmentId="5" postSegmentId="3" preFractionAlong="0.8903091977745643" postFractionAlong="0.4717671511498236"/>
    </projection>
    <projection id="NC_RIS_I1R" presynapticPopulation="RIS" postsynapticPopulation="I1R" synapse="Glutamate">
      <connection id="1009" preCellId="../RIS/0/RIS" postCellId="../I1R/0/I1R" preSegmentId="2" postSegmentId="4" preFractionAlong="0.14003923126435214" postFractionAlong="0.6707195257070481"/>
    </projection>
    <projection id="NC_AVAL_I2L" presynapticPopulation="AVAL" postsynapticPopulation="I2L" synapse="Acetylcholine">
      <connection id="1010" preCellId="../AVAL/0/AVAL" postCellId="../I2L/0/I2L" preSegmentId="2" postSegmentId="1" preFractionAlong="0.012857534116974989" postFractionAlong="0.10997923576541713"/>
    </projection>
    <projection id="NC_AVAR_I2R" presynapticPopulation="AVAR" postsynapticPopulation="I2R" synapse="Acetylcholine">
      <connection id="1011" preCellId="../AVAR/0/AVAR" postCellId="../I2R/0/I2R" preSegmentId="7" postSegmentId="8" preFractionAlong="0.5801718699913038" postFractionAlong="0.19301213398589256"/>
    </projection>
    <projection id="NC_SMBVL_I4" presynapticPopulation="SMBVL" postsynapticPopulation="I4" synapse="Acetylcholine">
      <connection id="1012" preCellId="../SMBVL/0/SMBVL" postCellId="../I4/0/I4" preSegmentId="8" postSegmentId="1" preFractionAlong="0.617740500624998" postFractionAlong="0.14070783082557425"/>
    </projection>
    <projection id="NC_SMBVR_I4" presynapticPopulation="SMBVR" postsynapticPopulation="I4" synapse="Acetylcholine">
      <connection id="1013" preCellId="../SMBVR/0/SMBVR" postCellId="../I4/0/I4" preSegmentId="1" postSegmentId="7" preFractionAlong="0.9330940731098543" postFractionAlong="0.22550310252096262"/>
    </projection>
  </network>
</neuroml>
