<?xml version='1.0' encoding='UTF-8'?>
<neuroml xmlns="http://www.neuroml.org/schema/neuroml2" xmlns:xsi="http://www.w3.org/2001/XMLSchema-instance" xsi:schemaLocation="http://www.neuroml.org/schema/neuroml2 https://raw.githubusercontent.com/NeuroML/NeuroML2/development/Schemas/NeuroML2/NeuroML_v2beta4.xsd" id="gvft_network_bio_prior_lamW_0.367_DF_0.037_t40.net">
  <notes>NeuroML2 network generated from GVFT simulation on 2025-05-04 00:16:25
</notes>
  <include href="M3R.cell.nml"/>
  <include href="M1.cell.nml"/>
  <include href="I2L.cell.nml"/>
  <include href="MCL.cell.nml"/>
  <include href="I6.cell.nml"/>
  <include href="I5.cell.nml"/>
  <include href="M4.cell.nml"/>
  <include href="I1R.cell.nml"/>
  <include href="MCR.cell.nml"/>
  <include href="I3.cell.nml"/>
  <include href="M3L.cell.nml"/>
  <include href="NSML.cell.nml"/>
  <include href="M2L.cell.nml"/>
  <include href="M5.cell.nml"/>
  <include href="I4.cell.nml"/>
  <include href="MI.cell.nml"/>
  <include href="NSMR.cell.nml"/>
  <include href="I2R.cell.nml"/>
  <include href="M2R.cell.nml"/>
  <include href="I1L.cell.nml"/>
  <include href="Serotonin_Glutamate.synapse.nml"/>
  <include href="Acetylcholine.synapse.nml"/>
  <include href="Generic_GJ.synapse.nml"/>
  <include href="Glutamate.synapse.nml"/>
  <network id="gvft_network_bio_prior_lamW_0.367_DF_0.037_t40.net" type="networkWithTemperature" temperature="20.0 degC">
    <population id="M1" component="M1" type="populationList" size="1">
      <instance id="0">
        <location x="-0.1557789" y="0.12562814" z="0.0"/>
      </instance>
    </population>
    <population id="M2L" component="M2L" type="populationList" size="1">
      <instance id="0">
        <location x="-0.41708544" y="-0.7487437" z="0.0"/>
      </instance>
    </population>
    <population id="M2R" component="M2R" type="populationList" size="1">
      <instance id="0">
        <location x="0.20603016" y="0.1557789" z="0.0"/>
      </instance>
    </population>
    <population id="M3L" component="M3L" type="populationList" size="1">
      <instance id="0">
        <location x="0.20603016" y="-0.055276394" z="0.0"/>
      </instance>
    </population>
    <population id="M3R" component="M3R" type="populationList" size="1">
      <instance id="0">
        <location x="0.33668342" y="0.7788945" z="0.0"/>
      </instance>
    </population>
    <population id="M4" component="M4" type="populationList" size="1">
      <instance id="0">
        <location x="-0.61809045" y="-0.53768843" z="0.0"/>
      </instance>
    </population>
    <population id="M5" component="M5" type="populationList" size="1">
      <instance id="0">
        <location x="-0.7386935" y="0.8190955" z="0.0"/>
      </instance>
    </population>
    <population id="I1L" component="I1L" type="populationList" size="1">
      <instance id="0">
        <location x="-0.45728645" y="0.5276382" z="0.0"/>
      </instance>
    </population>
    <population id="I1R" component="I1R" type="populationList" size="1">
      <instance id="0">
        <location x="-0.5276382" y="0.72864324" z="0.0"/>
      </instance>
    </population>
    <population id="I2L" component="I2L" type="populationList" size="1">
      <instance id="0">
        <location x="-0.8592965" y="0.12562814" z="0.0"/>
      </instance>
    </population>
    <population id="I2R" component="I2R" type="populationList" size="1">
      <instance id="0">
        <location x="-0.23618092" y="-0.9798995" z="0.0"/>
      </instance>
    </population>
    <population id="I3" component="I3" type="populationList" size="1">
      <instance id="0">
        <location x="-0.3467337" y="0.8894472" z="0.0"/>
      </instance>
    </population>
    <population id="I4" component="I4" type="populationList" size="1">
      <instance id="0">
        <location x="0.8492462" y="-0.26633167" z="0.0"/>
      </instance>
    </population>
    <population id="I5" component="I5" type="populationList" size="1">
      <instance id="0">
        <location x="0.5678392" y="0.919598" z="0.0"/>
      </instance>
    </population>
    <population id="I6" component="I6" type="populationList" size="1">
      <instance id="0">
        <location x="0.57788944" y="0.6482412" z="0.0"/>
      </instance>
    </population>
    <population id="MCL" component="MCL" type="populationList" size="1">
      <instance id="0">
        <location x="0.03517589" y="0.03517589" z="0.0"/>
      </instance>
    </population>
    <population id="MCR" component="MCR" type="populationList" size="1">
      <instance id="0">
        <location x="-0.46733668" y="-0.1758794" z="0.0"/>
      </instance>
    </population>
    <population id="MI" component="MI" type="populationList" size="1">
      <instance id="0">
        <location x="-0.3467337" y="0.1356784" z="0.0"/>
      </instance>
    </population>
    <population id="NSML" component="NSML" type="populationList" size="1">
      <instance id="0">
        <location x="-0.03517589" y="-0.30653268" z="0.0"/>
      </instance>
    </population>
    <population id="NSMR" component="NSMR" type="populationList" size="1">
      <instance id="0">
        <location x="0.40703517" y="0.24623117" z="0.0"/>
      </instance>
    </population>
    <projection id="NCXLS_M4_M5" presynapticPopulation="M4" postsynapticPopulation="M5" synapse="Glutamate">
      <connection id="0" preCellId="../M4/0/M4" postCellId="../M5/0/M5" preSegmentId="9" postSegmentId="6" preFractionAlong="0.36791093781607076" postFractionAlong="0.016616226727160566"/>
    </projection>
    <projection id="NCXLS_M4_I1L" presynapticPopulation="M4" postsynapticPopulation="I1L" synapse="Acetylcholine">
      <connection id="1" preCellId="../M4/0/M4" postCellId="../I1L/0/I1L" preSegmentId="1" postSegmentId="5" preFractionAlong="0.06325403087429238" postFractionAlong="0.3648676093204113"/>
    </projection>
    <projection id="NCXLS_M4_I2L" presynapticPopulation="M4" postsynapticPopulation="I2L" synapse="Acetylcholine">
      <connection id="2" preCellId="../M4/0/M4" postCellId="../I2L/0/I2L" preSegmentId="7" postSegmentId="1" preFractionAlong="0.5262086767240161" postFractionAlong="0.3552428610103552"/>
    </projection>
    <projection id="NCXLS_M4_I3" presynapticPopulation="M4" postsynapticPopulation="I3" synapse="Acetylcholine">
      <connection id="3" preCellId="../M4/0/M4" postCellId="../I3/0/I3" preSegmentId="7" postSegmentId="8" preFractionAlong="0.47555284200238057" postFractionAlong="0.6915583668255432"/>
    </projection>
    <projection id="NCXLS_M4_I1R" presynapticPopulation="M4" postsynapticPopulation="I1R" synapse="Acetylcholine">
      <connection id="4" preCellId="../M4/0/M4" postCellId="../I1R/0/I1R" preSegmentId="4" postSegmentId="6" preFractionAlong="0.3656561746118562" postFractionAlong="0.6002022080701612"/>
    </projection>
    <projection id="NCXLS_M3R_M5" presynapticPopulation="M3R" postsynapticPopulation="M5" synapse="Glutamate">
      <connection id="5" preCellId="../M3R/0/M3R" postCellId="../M5/0/M5" preSegmentId="5" postSegmentId="6" preFractionAlong="0.012115270109602339" postFractionAlong="0.5204834143905483"/>
    </projection>
    <projection id="NCXLS_M3R_I1L" presynapticPopulation="M3R" postsynapticPopulation="I1L" synapse="Acetylcholine">
      <connection id="6" preCellId="../M3R/0/M3R" postCellId="../I1L/0/I1L" preSegmentId="5" postSegmentId="9" preFractionAlong="0.5230609089730519" postFractionAlong="0.18242668548911367"/>
    </projection>
    <projection id="NCXLS_M3R_I2L" presynapticPopulation="M3R" postsynapticPopulation="I2L" synapse="Acetylcholine">
      <connection id="7" preCellId="../M3R/0/M3R" postCellId="../I2L/0/I2L" preSegmentId="6" postSegmentId="9" preFractionAlong="0.35470375812420907" postFractionAlong="0.9182280556966069"/>
    </projection>
    <projection id="NCXLS_M3R_I3" presynapticPopulation="M3R" postsynapticPopulation="I3" synapse="Acetylcholine">
      <connection id="8" preCellId="../M3R/0/M3R" postCellId="../I3/0/I3" preSegmentId="4" postSegmentId="6" preFractionAlong="0.9453679748120026" postFractionAlong="0.7294199932542568"/>
    </projection>
    <projection id="NCXLS_M3R_I1R" presynapticPopulation="M3R" postsynapticPopulation="I1R" synapse="Acetylcholine">
      <connection id="9" preCellId="../M3R/0/M3R" postCellId="../I1R/0/I1R" preSegmentId="9" postSegmentId="4" preFractionAlong="0.590686146382252" postFractionAlong="0.5389920090919609"/>
    </projection>
    <electricalProjection id="NCXLS_M5_M4_GJ" presynapticPopulation="M5" postsynapticPopulation="M4">
      <electricalConnection id="10" preCell="0" postCell="0" synapse="Generic_GJ" preSegment="3" postSegment="6" preFractionAlong="0.8070791562587321" postFractionAlong="0.11366358489999251"/>
    </electricalProjection>
    <projection id="NCXLS_M5_I2L" presynapticPopulation="M5" postsynapticPopulation="I2L" synapse="Acetylcholine">
      <connection id="11" preCellId="../M5/0/M5" postCellId="../I2L/0/I2L" preSegmentId="4" postSegmentId="3" preFractionAlong="0.38694584992530223" postFractionAlong="0.46999008881858684"/>
    </projection>
    <projection id="NCXLS_M5_I2R" presynapticPopulation="M5" postsynapticPopulation="I2R" synapse="Acetylcholine">
      <connection id="12" preCellId="../M5/0/M5" postCellId="../I2R/0/I2R" preSegmentId="4" postSegmentId="5" preFractionAlong="0.0316356172129324" postFractionAlong="0.9269735707917681"/>
    </projection>
    <projection id="NCXLS_M5_MCR" presynapticPopulation="M5" postsynapticPopulation="MCR" synapse="Acetylcholine">
      <connection id="13" preCellId="../M5/0/M5" postCellId="../MCR/0/MCR" preSegmentId="5" postSegmentId="1" preFractionAlong="0.2550017580269198" postFractionAlong="0.23927746288310603"/>
    </projection>
    <projection id="NCXLS_M5_M2L" presynapticPopulation="M5" postsynapticPopulation="M2L" synapse="Acetylcholine">
      <connection id="14" preCellId="../M5/0/M5" postCellId="../M2L/0/M2L" preSegmentId="2" postSegmentId="1" preFractionAlong="0.16108424691711154" postFractionAlong="0.10366913548223677"/>
    </projection>
    <projection id="NCXLS_MI_M3R" presynapticPopulation="MI" postsynapticPopulation="M3R" synapse="Glutamate">
      <connection id="15" preCellId="../MI/0/MI" postCellId="../M3R/0/M3R" preSegmentId="2" postSegmentId="4" preFractionAlong="0.005806260909242633" postFractionAlong="0.8134623931347242"/>
    </projection>
    <projection id="NCXLS_MI_M5" presynapticPopulation="MI" postsynapticPopulation="M5" synapse="Glutamate">
      <connection id="16" preCellId="../MI/0/MI" postCellId="../M5/0/M5" preSegmentId="4" postSegmentId="7" preFractionAlong="0.33271158193237393" postFractionAlong="0.031567496409881324"/>
    </projection>
    <projection id="NCXLS_MI_I1L" presynapticPopulation="MI" postsynapticPopulation="I1L" synapse="Acetylcholine">
      <connection id="17" preCellId="../MI/0/MI" postCellId="../I1L/0/I1L" preSegmentId="4" postSegmentId="4" preFractionAlong="0.568800348883758" postFractionAlong="0.09703577850992506"/>
    </projection>
    <projection id="NCXLS_MI_I6" presynapticPopulation="MI" postsynapticPopulation="I6" synapse="Acetylcholine">
      <connection id="18" preCellId="../MI/0/MI" postCellId="../I6/0/I6" preSegmentId="8" postSegmentId="4" preFractionAlong="0.012904196997515771" postFractionAlong="0.6613108500493936"/>
    </projection>
    <projection id="NCXLS_MI_I5" presynapticPopulation="MI" postsynapticPopulation="I5" synapse="Glutamate">
      <connection id="19" preCellId="../MI/0/MI" postCellId="../I5/0/I5" preSegmentId="7" postSegmentId="3" preFractionAlong="0.5232442393090568" postFractionAlong="0.6610837672688546"/>
    </projection>
    <projection id="NCXLS_MI_I3" presynapticPopulation="MI" postsynapticPopulation="I3" synapse="Acetylcholine">
      <connection id="20" preCellId="../MI/0/MI" postCellId="../I3/0/I3" preSegmentId="1" postSegmentId="4" preFractionAlong="0.24590304256326667" postFractionAlong="0.321770570248497"/>
    </projection>
    <projection id="NCXLS_MI_I1R" presynapticPopulation="MI" postsynapticPopulation="I1R" synapse="Glutamate">
      <connection id="21" preCellId="../MI/0/MI" postCellId="../I1R/0/I1R" preSegmentId="3" postSegmentId="6" preFractionAlong="0.36273686812087647" postFractionAlong="0.9996563089563387"/>
    </projection>
    <projection id="NCXLS_M2R_M4" presynapticPopulation="M2R" postsynapticPopulation="M4" synapse="Acetylcholine">
      <connection id="22" preCellId="../M2R/0/M2R" postCellId="../M4/0/M4" preSegmentId="3" postSegmentId="7" preFractionAlong="0.974990465268697" postFractionAlong="0.6931110595470572"/>
    </projection>
    <projection id="NCXLS_M2R_I2R" presynapticPopulation="M2R" postsynapticPopulation="I2R" synapse="Acetylcholine">
      <connection id="23" preCellId="../M2R/0/M2R" postCellId="../I2R/0/I2R" preSegmentId="4" postSegmentId="4" preFractionAlong="0.8276273793621446" postFractionAlong="0.2221891762083007"/>
    </projection>
    <projection id="NCXLS_M2R_NSML" presynapticPopulation="M2R" postsynapticPopulation="NSML" synapse="Acetylcholine">
      <connection id="24" preCellId="../M2R/0/M2R" postCellId="../NSML/0/NSML" preSegmentId="5" postSegmentId="6" preFractionAlong="0.295614360210846" postFractionAlong="0.7748602686966518"/>
    </projection>
    <electricalProjection id="NCXLS_M2R_M3L_GJ" presynapticPopulation="M2R" postsynapticPopulation="M3L">
      <electricalConnection id="25" preCell="0" postCell="0" synapse="Generic_GJ" preSegment="4" postSegment="7" preFractionAlong="0.26008513613644635" postFractionAlong="0.9345872814168397"/>
    </electricalProjection>
    <projection id="NCXLS_M2R_M2L" presynapticPopulation="M2R" postsynapticPopulation="M2L" synapse="Acetylcholine">
      <connection id="26" preCellId="../M2R/0/M2R" postCellId="../M2L/0/M2L" preSegmentId="4" postSegmentId="5" preFractionAlong="0.029190840494468073" postFractionAlong="0.612924850522739"/>
    </projection>
    <projection id="NCXLS_M2R_I4" presynapticPopulation="M2R" postsynapticPopulation="I4" synapse="Acetylcholine">
      <connection id="27" preCellId="../M2R/0/M2R" postCellId="../I4/0/I4" preSegmentId="8" postSegmentId="1" preFractionAlong="0.9003394834405374" postFractionAlong="0.38852877273702"/>
    </projection>
    <projection id="NCXLS_M1_M4" presynapticPopulation="M1" postsynapticPopulation="M4" synapse="Acetylcholine">
      <connection id="28" preCellId="../M1/0/M1" postCellId="../M4/0/M4" preSegmentId="4" postSegmentId="2" preFractionAlong="0.18082533115237387" postFractionAlong="0.02190107592636792"/>
    </projection>
    <projection id="NCXLS_M1_M5" presynapticPopulation="M1" postsynapticPopulation="M5" synapse="Acetylcholine">
      <connection id="29" preCellId="../M1/0/M1" postCellId="../M5/0/M5" preSegmentId="8" postSegmentId="2" preFractionAlong="0.5156418674007825" postFractionAlong="0.926471204559658"/>
    </projection>
    <projection id="NCXLS_M1_I1L" presynapticPopulation="M1" postsynapticPopulation="I1L" synapse="Acetylcholine">
      <connection id="30" preCellId="../M1/0/M1" postCellId="../I1L/0/I1L" preSegmentId="6" postSegmentId="8" preFractionAlong="0.9905151154502125" postFractionAlong="0.509228813848111"/>
    </projection>
    <projection id="NCXLS_M1_I2L" presynapticPopulation="M1" postsynapticPopulation="I2L" synapse="Acetylcholine">
      <connection id="31" preCellId="../M1/0/M1" postCellId="../I2L/0/I2L" preSegmentId="4" postSegmentId="8" preFractionAlong="0.4704712510750304" postFractionAlong="0.18232876255507124"/>
    </projection>
    <projection id="NCXLS_M1_MI" presynapticPopulation="M1" postsynapticPopulation="MI" synapse="Acetylcholine">
      <connection id="32" preCellId="../M1/0/M1" postCellId="../MI/0/MI" preSegmentId="8" postSegmentId="5" preFractionAlong="0.7581831102701669" postFractionAlong="0.8231128908522648"/>
    </projection>
    <projection id="NCXLS_M1_I2R" presynapticPopulation="M1" postsynapticPopulation="I2R" synapse="Acetylcholine">
      <connection id="33" preCellId="../M1/0/M1" postCellId="../I2R/0/I2R" preSegmentId="3" postSegmentId="5" preFractionAlong="0.682125955506534" postFractionAlong="0.7903682248650875"/>
    </projection>
    <projection id="NCXLS_M1_MCR" presynapticPopulation="M1" postsynapticPopulation="MCR" synapse="Acetylcholine">
      <connection id="34" preCellId="../M1/0/M1" postCellId="../MCR/0/MCR" preSegmentId="7" postSegmentId="4" preFractionAlong="0.7403940300078714" postFractionAlong="0.7762777549589974"/>
    </projection>
    <projection id="NCXLS_M1_M2L" presynapticPopulation="M1" postsynapticPopulation="M2L" synapse="Glutamate">
      <connection id="35" preCellId="../M1/0/M1" postCellId="../M2L/0/M2L" preSegmentId="1" postSegmentId="8" preFractionAlong="0.312131223490555" postFractionAlong="0.9556441806277962"/>
    </projection>
    <projection id="NCXLS_M1_I1R" presynapticPopulation="M1" postsynapticPopulation="I1R" synapse="Acetylcholine">
      <connection id="36" preCellId="../M1/0/M1" postCellId="../I1R/0/I1R" preSegmentId="3" postSegmentId="7" preFractionAlong="0.18670198455830744" postFractionAlong="0.5133387070264082"/>
    </projection>
    <electricalProjection id="NCXLS_M3L_M3R_GJ" presynapticPopulation="M3L" postsynapticPopulation="M3R">
      <electricalConnection id="37" preCell="0" postCell="0" synapse="Generic_GJ" preSegment="5" postSegment="7" preFractionAlong="0.5942683060300878" postFractionAlong="0.35769436255300624"/>
    </electricalProjection>
    <projection id="NCXLS_M3L_I6" presynapticPopulation="M3L" postsynapticPopulation="I6" synapse="Acetylcholine">
      <connection id="38" preCellId="../M3L/0/M3L" postCellId="../I6/0/I6" preSegmentId="5" postSegmentId="5" preFractionAlong="0.07269200591879643" postFractionAlong="0.04147986289445238"/>
    </projection>
    <projection id="NCXLS_M3L_I5" presynapticPopulation="M3L" postsynapticPopulation="I5" synapse="Acetylcholine">
      <connection id="39" preCellId="../M3L/0/M3L" postCellId="../I5/0/I5" preSegmentId="7" postSegmentId="7" preFractionAlong="0.08735981466413778" postFractionAlong="0.5473812334694351"/>
    </projection>
    <electricalProjection id="NCXLS_M3L_M2R_GJ" presynapticPopulation="M3L" postsynapticPopulation="M2R">
      <electricalConnection id="40" preCell="0" postCell="0" synapse="Generic_GJ" preSegment="5" postSegment="7" preFractionAlong="0.8602056372067265" postFractionAlong="0.44574862306807217"/>
    </electricalProjection>
    <projection id="NCXLS_M3L_NSMR" presynapticPopulation="M3L" postsynapticPopulation="NSMR" synapse="Acetylcholine">
      <connection id="41" preCellId="../M3L/0/M3L" postCellId="../NSMR/0/NSMR" preSegmentId="8" postSegmentId="8" preFractionAlong="0.31985303892971007" postFractionAlong="0.24316757352572904"/>
    </projection>
    <projection id="NCXLS_M3L_I4" presynapticPopulation="M3L" postsynapticPopulation="I4" synapse="Acetylcholine">
      <connection id="42" preCellId="../M3L/0/M3L" postCellId="../I4/0/I4" preSegmentId="4" postSegmentId="1" preFractionAlong="0.9302998154332999" postFractionAlong="0.5738815907652576"/>
    </projection>
    <projection id="NCXLS_I3_M5" presynapticPopulation="I3" postsynapticPopulation="M5" synapse="Acetylcholine">
      <connection id="43" preCellId="../I3/0/I3" postCellId="../M5/0/M5" preSegmentId="3" postSegmentId="7" preFractionAlong="0.6991833749902954" postFractionAlong="0.4391008057493109"/>
    </projection>
    <projection id="NCXLS_MCR_M4" presynapticPopulation="MCR" postsynapticPopulation="M4" synapse="Acetylcholine">
      <connection id="44" preCellId="../MCR/0/MCR" postCellId="../M4/0/M4" preSegmentId="2" postSegmentId="1" preFractionAlong="0.842244042083875" postFractionAlong="0.5489629092958968"/>
    </projection>
    <projection id="NCXLS_MCR_I2R" presynapticPopulation="MCR" postsynapticPopulation="I2R" synapse="Acetylcholine">
      <connection id="45" preCellId="../MCR/0/MCR" postCellId="../I2R/0/I2R" preSegmentId="7" postSegmentId="7" preFractionAlong="0.944817071550007" postFractionAlong="0.7957472077895101"/>
    </projection>
    <projection id="NCXLS_MCR_M2L" presynapticPopulation="MCR" postsynapticPopulation="M2L" synapse="Acetylcholine">
      <connection id="46" preCellId="../MCR/0/MCR" postCellId="../M2L/0/M2L" preSegmentId="3" postSegmentId="2" preFractionAlong="0.9027510149740777" postFractionAlong="0.48310109209391006"/>
    </projection>
    <electricalProjection id="NCXLS_M2L_M3R_GJ" presynapticPopulation="M2L" postsynapticPopulation="M3R">
      <electricalConnection id="47" preCell="0" postCell="0" synapse="Generic_GJ" preSegment="9" postSegment="1" preFractionAlong="0.8859023776825637" postFractionAlong="0.0003070750337554884"/>
    </electricalProjection>
    <projection id="NCXLS_M2L_MCL" presynapticPopulation="M2L" postsynapticPopulation="MCL" synapse="Acetylcholine">
      <connection id="48" preCellId="../M2L/0/M2L" postCellId="../MCL/0/MCL" preSegmentId="6" postSegmentId="9" preFractionAlong="0.22652864522699934" postFractionAlong="0.4952030088510355"/>
    </projection>
    <electricalProjection id="NCXLS_M2L_M5_GJ" presynapticPopulation="M2L" postsynapticPopulation="M5">
      <electricalConnection id="49" preCell="0" postCell="0" synapse="Generic_GJ" preSegment="5" postSegment="6" preFractionAlong="0.8164602534328347" postFractionAlong="0.7715701704845336"/>
    </electricalProjection>
    <projection id="NCXLS_M2L_I1L" presynapticPopulation="M2L" postsynapticPopulation="I1L" synapse="Acetylcholine">
      <connection id="50" preCellId="../M2L/0/M2L" postCellId="../I1L/0/I1L" preSegmentId="4" postSegmentId="1" preFractionAlong="0.9317976544659986" postFractionAlong="0.5503832353083729"/>
    </projection>
    <projection id="NCXLS_M2L_I6" presynapticPopulation="M2L" postsynapticPopulation="I6" synapse="Acetylcholine">
      <connection id="51" preCellId="../M2L/0/M2L" postCellId="../I6/0/I6" preSegmentId="6" postSegmentId="8" preFractionAlong="0.6646594135390986" postFractionAlong="0.5613690172183667"/>
    </projection>
    <projection id="NCXLS_M2L_I5" presynapticPopulation="M2L" postsynapticPopulation="I5" synapse="Acetylcholine">
      <connection id="52" preCellId="../M2L/0/M2L" postCellId="../I5/0/I5" preSegmentId="3" postSegmentId="6" preFractionAlong="0.6688175939601658" postFractionAlong="0.5935961349482209"/>
    </projection>
    <projection id="NCXLS_M2L_MI" presynapticPopulation="M2L" postsynapticPopulation="MI" synapse="Acetylcholine">
      <connection id="53" preCellId="../M2L/0/M2L" postCellId="../MI/0/MI" preSegmentId="1" postSegmentId="2" preFractionAlong="0.6306243738653324" postFractionAlong="0.1721729688289686"/>
    </projection>
    <electricalProjection id="NCXLS_M2L_M2R_GJ" presynapticPopulation="M2L" postsynapticPopulation="M2R">
      <electricalConnection id="54" preCell="0" postCell="0" synapse="Generic_GJ" preSegment="5" postSegment="1" preFractionAlong="0.5471830820679408" postFractionAlong="0.6594385611161038"/>
    </electricalProjection>
    <projection id="NCXLS_M2L_NSML" presynapticPopulation="M2L" postsynapticPopulation="NSML" synapse="Acetylcholine">
      <connection id="55" preCellId="../M2L/0/M2L" postCellId="../NSML/0/NSML" preSegmentId="4" postSegmentId="7" preFractionAlong="0.4219306307317797" postFractionAlong="0.7649392396719134"/>
    </projection>
    <electricalProjection id="NCXLS_M2L_M1_GJ" presynapticPopulation="M2L" postsynapticPopulation="M1">
      <electricalConnection id="56" preCell="0" postCell="0" synapse="Generic_GJ" preSegment="3" postSegment="6" preFractionAlong="0.4545961069547201" postFractionAlong="0.7862182306426042"/>
    </electricalProjection>
    <projection id="NCXLS_M2L_M3L" presynapticPopulation="M2L" postsynapticPopulation="M3L" synapse="Acetylcholine">
      <connection id="57" preCellId="../M2L/0/M2L" postCellId="../M3L/0/M3L" preSegmentId="9" postSegmentId="2" preFractionAlong="0.6833254325358847" postFractionAlong="0.2427325524497712"/>
    </projection>
    <projection id="NCXLS_M2L_NSMR" presynapticPopulation="M2L" postsynapticPopulation="NSMR" synapse="Acetylcholine">
      <connection id="58" preCellId="../M2L/0/M2L" postCellId="../NSMR/0/NSMR" preSegmentId="7" postSegmentId="3" preFractionAlong="0.9875538288615654" postFractionAlong="0.6423598237167781"/>
    </projection>
    <projection id="NCXLS_M2L_I3" presynapticPopulation="M2L" postsynapticPopulation="I3" synapse="Acetylcholine">
      <connection id="59" preCellId="../M2L/0/M2L" postCellId="../I3/0/I3" preSegmentId="9" postSegmentId="5" preFractionAlong="0.26609609240954823" postFractionAlong="0.4407494003715766"/>
    </projection>
    <projection id="NCXLS_M2L_MCR" presynapticPopulation="M2L" postsynapticPopulation="MCR" synapse="Acetylcholine">
      <connection id="60" preCellId="../M2L/0/M2L" postCellId="../MCR/0/MCR" preSegmentId="3" postSegmentId="7" preFractionAlong="0.9270794050436362" postFractionAlong="0.4874761446534416"/>
    </projection>
    <projection id="NCXLS_M2L_I4" presynapticPopulation="M2L" postsynapticPopulation="I4" synapse="Acetylcholine">
      <connection id="61" preCellId="../M2L/0/M2L" postCellId="../I4/0/I4" preSegmentId="1" postSegmentId="5" preFractionAlong="0.9206138979503482" postFractionAlong="0.9150999076078628"/>
    </projection>
    <projection id="NCXLS_M2L_I1R" presynapticPopulation="M2L" postsynapticPopulation="I1R" synapse="Acetylcholine">
      <connection id="62" preCellId="../M2L/0/M2L" postCellId="../I1R/0/I1R" preSegmentId="8" postSegmentId="7" preFractionAlong="0.7024971168239118" postFractionAlong="0.6629958963989008"/>
    </projection>
  </network>
</neuroml>
