<?xml version='1.0' encoding='UTF-8'?>
<neuroml xmlns="http://www.neuroml.org/schema/neuroml2" xmlns:xsi="http://www.w3.org/2001/XMLSchema-instance" xsi:schemaLocation="http://www.neuroml.org/schema/neuroml2 https://raw.githubusercontent.com/NeuroML/NeuroML2/development/Schemas/NeuroML2/NeuroML_v2beta4.xsd" id="gvft_network_bio_prior_lamW_0.367_DF_0.037_t60.net">
  <notes>NeuroML2 network generated from GVFT simulation on 2025-05-04 00:16:31
</notes>
  <include href="M3R.cell.nml"/>
  <include href="M1.cell.nml"/>
  <include href="I2L.cell.nml"/>
  <include href="MCL.cell.nml"/>
  <include href="I6.cell.nml"/>
  <include href="I5.cell.nml"/>
  <include href="M4.cell.nml"/>
  <include href="I1R.cell.nml"/>
  <include href="MCR.cell.nml"/>
  <include href="I3.cell.nml"/>
  <include href="M3L.cell.nml"/>
  <include href="NSML.cell.nml"/>
  <include href="M2L.cell.nml"/>
  <include href="M5.cell.nml"/>
  <include href="I4.cell.nml"/>
  <include href="MI.cell.nml"/>
  <include href="NSMR.cell.nml"/>
  <include href="I2R.cell.nml"/>
  <include href="M2R.cell.nml"/>
  <include href="I1L.cell.nml"/>
  <include href="Serotonin_Glutamate.synapse.nml"/>
  <include href="Acetylcholine.synapse.nml"/>
  <include href="Generic_GJ.synapse.nml"/>
  <include href="Glutamate.synapse.nml"/>
  <network id="gvft_network_bio_prior_lamW_0.367_DF_0.037_t60.net" type="networkWithTemperature" temperature="20.0 degC">
    <population id="M1" component="M1" type="populationList" size="1">
      <instance id="0">
        <location x="0.71859294" y="-0.18592966" z="0.0"/>
      </instance>
    </population>
    <population id="M2L" component="M2L" type="populationList" size="1">
      <instance id="0">
        <location x="0.7085427" y="-0.33668342" z="0.0"/>
      </instance>
    </population>
    <population id="M2R" component="M2R" type="populationList" size="1">
      <instance id="0">
        <location x="0.44723618" y="-0.025125638" z="0.0"/>
      </instance>
    </population>
    <population id="M3L" component="M3L" type="populationList" size="1">
      <instance id="0">
        <location x="-0.69849247" y="0.49748746" z="0.0"/>
      </instance>
    </population>
    <population id="M3R" component="M3R" type="populationList" size="1">
      <instance id="0">
        <location x="-0.10552765" y="-0.1155779" z="0.0"/>
      </instance>
    </population>
    <population id="M4" component="M4" type="populationList" size="1">
      <instance id="0">
        <location x="0.42713568" y="-0.12562814" z="0.0"/>
      </instance>
    </population>
    <population id="M5" component="M5" type="populationList" size="1">
      <instance id="0">
        <location x="-0.3266332" y="1.0" z="0.0"/>
      </instance>
    </population>
    <population id="I1L" component="I1L" type="populationList" size="1">
      <instance id="0">
        <location x="-0.94974875" y="-0.21608041" z="0.0"/>
      </instance>
    </population>
    <population id="I1R" component="I1R" type="populationList" size="1">
      <instance id="0">
        <location x="-0.94974875" y="0.9798995" z="0.0"/>
      </instance>
    </population>
    <population id="I2L" component="I2L" type="populationList" size="1">
      <instance id="0">
        <location x="-0.55778897" y="0.45728645" z="0.0"/>
      </instance>
    </population>
    <population id="I2R" component="I2R" type="populationList" size="1">
      <instance id="0">
        <location x="0.2562814" y="-0.90954775" z="0.0"/>
      </instance>
    </population>
    <population id="I3" component="I3" type="populationList" size="1">
      <instance id="0">
        <location x="0.71859294" y="0.42713568" z="0.0"/>
      </instance>
    </population>
    <population id="I4" component="I4" type="populationList" size="1">
      <instance id="0">
        <location x="-0.37688443" y="0.5276382" z="0.0"/>
      </instance>
    </population>
    <population id="I5" component="I5" type="populationList" size="1">
      <instance id="0">
        <location x="0.43718594" y="-0.7085427" z="0.0"/>
      </instance>
    </population>
    <population id="I6" component="I6" type="populationList" size="1">
      <instance id="0">
        <location x="-0.26633167" y="0.8291457" z="0.0"/>
      </instance>
    </population>
    <population id="MCL" component="MCL" type="populationList" size="1">
      <instance id="0">
        <location x="-0.14572865" y="0.1557789" z="0.0"/>
      </instance>
    </population>
    <population id="MCR" component="MCR" type="populationList" size="1">
      <instance id="0">
        <location x="0.5477387" y="0.1557789" z="0.0"/>
      </instance>
    </population>
    <population id="MI" component="MI" type="populationList" size="1">
      <instance id="0">
        <location x="0.5477387" y="-0.6482412" z="0.0"/>
      </instance>
    </population>
    <population id="NSML" component="NSML" type="populationList" size="1">
      <instance id="0">
        <location x="0.095477395" y="0.38693467" z="0.0"/>
      </instance>
    </population>
    <population id="NSMR" component="NSMR" type="populationList" size="1">
      <instance id="0">
        <location x="0.0050251363" y="0.39698493" z="0.0"/>
      </instance>
    </population>
    <projection id="NCXLS_MCL_I4" presynapticPopulation="MCL" postsynapticPopulation="I4" synapse="Acetylcholine">
      <connection id="0" preCellId="../MCL/0/MCL" postCellId="../I4/0/I4" preSegmentId="1" postSegmentId="9" preFractionAlong="0.6507971417200795" postFractionAlong="0.8131846701995957"/>
    </projection>
    <projection id="NCXLS_MCL_M5" presynapticPopulation="MCL" postsynapticPopulation="M5" synapse="Acetylcholine">
      <connection id="1" preCellId="../MCL/0/MCL" postCellId="../M5/0/M5" preSegmentId="4" postSegmentId="8" preFractionAlong="0.32770334884511887" postFractionAlong="0.9231323193405726"/>
    </projection>
    <projection id="NCXLS_MCL_M3L" presynapticPopulation="MCL" postsynapticPopulation="M3L" synapse="Acetylcholine">
      <connection id="2" preCellId="../MCL/0/MCL" postCellId="../M3L/0/M3L" preSegmentId="8" postSegmentId="9" preFractionAlong="0.3161089815021412" postFractionAlong="0.2529528513335707"/>
    </projection>
    <projection id="NCXLS_MCL_I1R" presynapticPopulation="MCL" postsynapticPopulation="I1R" synapse="Acetylcholine">
      <connection id="3" preCellId="../MCL/0/MCL" postCellId="../I1R/0/I1R" preSegmentId="4" postSegmentId="8" preFractionAlong="0.8043219414341211" postFractionAlong="0.7297927321183237"/>
    </projection>
    <projection id="NCXLS_MCL_I6" presynapticPopulation="MCL" postsynapticPopulation="I6" synapse="Acetylcholine">
      <connection id="4" preCellId="../MCL/0/MCL" postCellId="../I6/0/I6" preSegmentId="6" postSegmentId="3" preFractionAlong="0.31195000918581606" postFractionAlong="0.8559007631505159"/>
    </projection>
    <projection id="NCXLS_MCL_I2L" presynapticPopulation="MCL" postsynapticPopulation="I2L" synapse="Acetylcholine">
      <connection id="5" preCellId="../MCL/0/MCL" postCellId="../I2L/0/I2L" preSegmentId="5" postSegmentId="3" preFractionAlong="0.8132549511218989" postFractionAlong="0.48775370957097863"/>
    </projection>
    <projection id="NCXLS_MCL_I1L" presynapticPopulation="MCL" postsynapticPopulation="I1L" synapse="Acetylcholine">
      <connection id="6" preCellId="../MCL/0/MCL" postCellId="../I1L/0/I1L" preSegmentId="4" postSegmentId="4" preFractionAlong="0.254926566020909" postFractionAlong="0.9149150410844089"/>
    </projection>
    <projection id="NCXLS_M4_MCL" presynapticPopulation="M4" postsynapticPopulation="MCL" synapse="Acetylcholine">
      <connection id="7" preCellId="../M4/0/M4" postCellId="../MCL/0/MCL" preSegmentId="3" postSegmentId="3" preFractionAlong="0.7509732596671058" postFractionAlong="0.7108566734662811"/>
    </projection>
    <projection id="NCXLS_M4_I4" presynapticPopulation="M4" postsynapticPopulation="I4" synapse="Acetylcholine">
      <connection id="8" preCellId="../M4/0/M4" postCellId="../I4/0/I4" preSegmentId="2" postSegmentId="1" preFractionAlong="0.8469234181097952" postFractionAlong="0.2812947955282449"/>
    </projection>
    <projection id="NCXLS_M4_M3R" presynapticPopulation="M4" postsynapticPopulation="M3R" synapse="Acetylcholine">
      <connection id="9" preCellId="../M4/0/M4" postCellId="../M3R/0/M3R" preSegmentId="3" postSegmentId="6" preFractionAlong="0.4888059077349419" postFractionAlong="0.7315486825385661"/>
    </projection>
    <projection id="NCXLS_M4_MI" presynapticPopulation="M4" postsynapticPopulation="MI" synapse="Acetylcholine">
      <connection id="10" preCellId="../M4/0/M4" postCellId="../MI/0/MI" preSegmentId="4" postSegmentId="7" preFractionAlong="0.8033127563841809" postFractionAlong="0.3941561801339458"/>
    </projection>
    <projection id="NCXLS_M4_M3L" presynapticPopulation="M4" postsynapticPopulation="M3L" synapse="Acetylcholine">
      <connection id="11" preCellId="../M4/0/M4" postCellId="../M3L/0/M3L" preSegmentId="1" postSegmentId="5" preFractionAlong="0.7618711339537392" postFractionAlong="0.2311153048481117"/>
    </projection>
    <projection id="NCXLS_M4_I1R" presynapticPopulation="M4" postsynapticPopulation="I1R" synapse="Acetylcholine">
      <connection id="12" preCellId="../M4/0/M4" postCellId="../I1R/0/I1R" preSegmentId="5" postSegmentId="1" preFractionAlong="0.9850955233397977" postFractionAlong="0.23526943784670684"/>
    </projection>
    <projection id="NCXLS_M4_I2R" presynapticPopulation="M4" postsynapticPopulation="I2R" synapse="Acetylcholine">
      <connection id="13" preCellId="../M4/0/M4" postCellId="../I2R/0/I2R" preSegmentId="5" postSegmentId="6" preFractionAlong="0.6524581484879536" postFractionAlong="0.20488722869177545"/>
    </projection>
    <projection id="NCXLS_M4_I2L" presynapticPopulation="M4" postsynapticPopulation="I2L" synapse="Acetylcholine">
      <connection id="14" preCellId="../M4/0/M4" postCellId="../I2L/0/I2L" preSegmentId="1" postSegmentId="3" preFractionAlong="0.6364450278487571" postFractionAlong="0.5755977487667954"/>
    </projection>
    <projection id="NCXLS_M4_I5" presynapticPopulation="M4" postsynapticPopulation="I5" synapse="Acetylcholine">
      <connection id="15" preCellId="../M4/0/M4" postCellId="../I5/0/I5" preSegmentId="6" postSegmentId="5" preFractionAlong="0.6151232896516171" postFractionAlong="0.5022379736882281"/>
    </projection>
    <projection id="NCXLS_M4_I1L" presynapticPopulation="M4" postsynapticPopulation="I1L" synapse="Acetylcholine">
      <connection id="16" preCellId="../M4/0/M4" postCellId="../I1L/0/I1L" preSegmentId="6" postSegmentId="3" preFractionAlong="0.3290105773074007" postFractionAlong="0.424261863628575"/>
    </projection>
    <projection id="NCXLS_I4_I3" presynapticPopulation="I4" postsynapticPopulation="I3" synapse="Acetylcholine">
      <connection id="17" preCellId="../I4/0/I4" postCellId="../I3/0/I3" preSegmentId="1" postSegmentId="6" preFractionAlong="0.26970076524568376" postFractionAlong="0.3900470651638448"/>
    </projection>
    <projection id="NCXLS_I4_M5" presynapticPopulation="I4" postsynapticPopulation="M5" synapse="Glutamate">
      <connection id="18" preCellId="../I4/0/I4" postCellId="../M5/0/M5" preSegmentId="1" postSegmentId="2" preFractionAlong="0.04108778296742521" postFractionAlong="0.3894516630243503"/>
    </projection>
    <projection id="NCXLS_I4_I1R" presynapticPopulation="I4" postsynapticPopulation="I1R" synapse="Acetylcholine">
      <connection id="19" preCellId="../I4/0/I4" postCellId="../I1R/0/I1R" preSegmentId="5" postSegmentId="6" preFractionAlong="0.5917510066641541" postFractionAlong="0.3572789301040441"/>
    </projection>
    <projection id="NCXLS_I4_I6" presynapticPopulation="I4" postsynapticPopulation="I6" synapse="Acetylcholine">
      <connection id="20" preCellId="../I4/0/I4" postCellId="../I6/0/I6" preSegmentId="6" postSegmentId="9" preFractionAlong="0.9179619807013564" postFractionAlong="0.17161254794897562"/>
    </projection>
    <projection id="NCXLS_M3R_MCL" presynapticPopulation="M3R" postsynapticPopulation="MCL" synapse="Acetylcholine">
      <connection id="21" preCellId="../M3R/0/M3R" postCellId="../MCL/0/MCL" preSegmentId="5" postSegmentId="9" preFractionAlong="0.9174652255548038" postFractionAlong="0.8953271799439111"/>
    </projection>
    <projection id="NCXLS_M3R_M4" presynapticPopulation="M3R" postsynapticPopulation="M4" synapse="Acetylcholine">
      <connection id="22" preCellId="../M3R/0/M3R" postCellId="../M4/0/M4" preSegmentId="9" postSegmentId="5" preFractionAlong="0.7396099986033267" postFractionAlong="0.1069999714835993"/>
    </projection>
    <projection id="NCXLS_M3R_I4" presynapticPopulation="M3R" postsynapticPopulation="I4" synapse="Acetylcholine">
      <connection id="23" preCellId="../M3R/0/M3R" postCellId="../I4/0/I4" preSegmentId="6" postSegmentId="2" preFractionAlong="0.4507246091045378" postFractionAlong="0.5998265693563105"/>
    </projection>
    <projection id="NCXLS_M3R_I3" presynapticPopulation="M3R" postsynapticPopulation="I3" synapse="Acetylcholine">
      <connection id="24" preCellId="../M3R/0/M3R" postCellId="../I3/0/I3" preSegmentId="1" postSegmentId="9" preFractionAlong="0.7793930542442218" postFractionAlong="0.9206160842256454"/>
    </projection>
    <projection id="NCXLS_M3R_M5" presynapticPopulation="M3R" postsynapticPopulation="M5" synapse="Glutamate">
      <connection id="25" preCellId="../M3R/0/M3R" postCellId="../M5/0/M5" preSegmentId="7" postSegmentId="9" preFractionAlong="0.7134190609006716" postFractionAlong="0.07455188487023212"/>
    </projection>
    <projection id="NCXLS_M3R_M3L" presynapticPopulation="M3R" postsynapticPopulation="M3L" synapse="Glutamate">
      <connection id="26" preCellId="../M3R/0/M3R" postCellId="../M3L/0/M3L" preSegmentId="7" postSegmentId="9" preFractionAlong="0.8839225419612625" postFractionAlong="0.5437773088398854"/>
    </projection>
    <projection id="NCXLS_M3R_I1R" presynapticPopulation="M3R" postsynapticPopulation="I1R" synapse="Acetylcholine">
      <connection id="27" preCellId="../M3R/0/M3R" postCellId="../I1R/0/I1R" preSegmentId="9" postSegmentId="5" preFractionAlong="0.4893019738368687" postFractionAlong="0.8685891415610018"/>
    </projection>
    <projection id="NCXLS_M3R_M2R" presynapticPopulation="M3R" postsynapticPopulation="M2R" synapse="Acetylcholine">
      <connection id="28" preCellId="../M3R/0/M3R" postCellId="../M2R/0/M2R" preSegmentId="8" postSegmentId="4" preFractionAlong="0.24706664542420886" postFractionAlong="0.8755478724654308"/>
    </projection>
    <projection id="NCXLS_M3R_I6" presynapticPopulation="M3R" postsynapticPopulation="I6" synapse="Acetylcholine">
      <connection id="29" preCellId="../M3R/0/M3R" postCellId="../I6/0/I6" preSegmentId="5" postSegmentId="3" preFractionAlong="0.45806886236880606" postFractionAlong="0.44004146765420227"/>
    </projection>
    <projection id="NCXLS_M3R_NSML" presynapticPopulation="M3R" postsynapticPopulation="NSML" synapse="Acetylcholine">
      <connection id="30" preCellId="../M3R/0/M3R" postCellId="../NSML/0/NSML" preSegmentId="9" postSegmentId="7" preFractionAlong="0.21313847535904318" postFractionAlong="0.19093678435076555"/>
    </projection>
    <projection id="NCXLS_M3R_I2L" presynapticPopulation="M3R" postsynapticPopulation="I2L" synapse="Acetylcholine">
      <connection id="31" preCellId="../M3R/0/M3R" postCellId="../I2L/0/I2L" preSegmentId="2" postSegmentId="7" preFractionAlong="0.6064636851755649" postFractionAlong="0.7412511707164868"/>
    </projection>
    <projection id="NCXLS_M3R_MCR" presynapticPopulation="M3R" postsynapticPopulation="MCR" synapse="Acetylcholine">
      <connection id="32" preCellId="../M3R/0/M3R" postCellId="../MCR/0/MCR" preSegmentId="1" postSegmentId="5" preFractionAlong="0.48806245991347197" postFractionAlong="0.16336402190091048"/>
    </projection>
    <projection id="NCXLS_M3R_NSMR" presynapticPopulation="M3R" postsynapticPopulation="NSMR" synapse="Acetylcholine">
      <connection id="33" preCellId="../M3R/0/M3R" postCellId="../NSMR/0/NSMR" preSegmentId="3" postSegmentId="3" preFractionAlong="0.24188464798278753" postFractionAlong="0.06277115649919152"/>
    </projection>
    <projection id="NCXLS_MI_I2R" presynapticPopulation="MI" postsynapticPopulation="I2R" synapse="Acetylcholine">
      <connection id="34" preCellId="../MI/0/MI" postCellId="../I2R/0/I2R" preSegmentId="3" postSegmentId="6" preFractionAlong="0.20342750215413752" postFractionAlong="0.2862003970649839"/>
    </projection>
    <projection id="NCXLS_MI_I5" presynapticPopulation="MI" postsynapticPopulation="I5" synapse="Acetylcholine">
      <connection id="35" preCellId="../MI/0/MI" postCellId="../I5/0/I5" preSegmentId="9" postSegmentId="8" preFractionAlong="0.9157638641811174" postFractionAlong="0.40628060922895026"/>
    </projection>
    <projection id="NCXLS_M5_MCL" presynapticPopulation="M5" postsynapticPopulation="MCL" synapse="Acetylcholine">
      <connection id="36" preCellId="../M5/0/M5" postCellId="../MCL/0/MCL" preSegmentId="5" postSegmentId="3" preFractionAlong="0.7362059768552255" postFractionAlong="0.6774255192128897"/>
    </projection>
    <projection id="NCXLS_M5_I4" presynapticPopulation="M5" postsynapticPopulation="I4" synapse="Acetylcholine">
      <connection id="37" preCellId="../M5/0/M5" postCellId="../I4/0/I4" preSegmentId="2" postSegmentId="9" preFractionAlong="0.014488680595083236" postFractionAlong="0.7507587602823569"/>
    </projection>
    <projection id="NCXLS_M5_M3R" presynapticPopulation="M5" postsynapticPopulation="M3R" synapse="Acetylcholine">
      <connection id="38" preCellId="../M5/0/M5" postCellId="../M3R/0/M3R" preSegmentId="2" postSegmentId="6" preFractionAlong="0.5783066494477291" postFractionAlong="0.9506244692703166"/>
    </projection>
    <electricalProjection id="NCXLS_M5_M3L_GJ" presynapticPopulation="M5" postsynapticPopulation="M3L">
      <electricalConnection id="39" preCell="0" postCell="0" synapse="Generic_GJ" preSegment="6" postSegment="3" preFractionAlong="0.6442728659696768" postFractionAlong="0.5674941994810628"/>
    </electricalProjection>
    <projection id="NCXLS_M5_I1R" presynapticPopulation="M5" postsynapticPopulation="I1R" synapse="Acetylcholine">
      <connection id="40" preCellId="../M5/0/M5" postCellId="../I1R/0/I1R" preSegmentId="3" postSegmentId="2" preFractionAlong="0.4295411753952091" postFractionAlong="0.9910481727989501"/>
    </projection>
    <projection id="NCXLS_M5_I6" presynapticPopulation="M5" postsynapticPopulation="I6" synapse="Acetylcholine">
      <connection id="41" preCellId="../M5/0/M5" postCellId="../I6/0/I6" preSegmentId="9" postSegmentId="2" preFractionAlong="0.8207008362860635" postFractionAlong="0.9441285990153796"/>
    </projection>
    <projection id="NCXLS_M5_I2R" presynapticPopulation="M5" postsynapticPopulation="I2R" synapse="Acetylcholine">
      <connection id="42" preCellId="../M5/0/M5" postCellId="../I2R/0/I2R" preSegmentId="3" postSegmentId="9" preFractionAlong="0.33448060812405667" postFractionAlong="0.3244654912738899"/>
    </projection>
    <projection id="NCXLS_M5_I2L" presynapticPopulation="M5" postsynapticPopulation="I2L" synapse="Acetylcholine">
      <connection id="43" preCellId="../M5/0/M5" postCellId="../I2L/0/I2L" preSegmentId="8" postSegmentId="8" preFractionAlong="0.7252231627851354" postFractionAlong="0.9961151701929123"/>
    </projection>
    <projection id="NCXLS_M5_I1L" presynapticPopulation="M5" postsynapticPopulation="I1L" synapse="Acetylcholine">
      <connection id="44" preCellId="../M5/0/M5" postCellId="../I1L/0/I1L" preSegmentId="4" postSegmentId="1" preFractionAlong="0.8784858477569103" postFractionAlong="0.6030542679324817"/>
    </projection>
    <projection id="NCXLS_M3L_MCL" presynapticPopulation="M3L" postsynapticPopulation="MCL" synapse="Acetylcholine">
      <connection id="45" preCellId="../M3L/0/M3L" postCellId="../MCL/0/MCL" preSegmentId="5" postSegmentId="9" preFractionAlong="0.7383921652861428" postFractionAlong="0.9041407489043"/>
    </projection>
    <projection id="NCXLS_M3L_M4" presynapticPopulation="M3L" postsynapticPopulation="M4" synapse="Glutamate">
      <connection id="46" preCellId="../M3L/0/M3L" postCellId="../M4/0/M4" preSegmentId="8" postSegmentId="6" preFractionAlong="0.17539033497361256" postFractionAlong="0.696221915004867"/>
    </projection>
    <projection id="NCXLS_M3L_I4" presynapticPopulation="M3L" postsynapticPopulation="I4" synapse="Acetylcholine">
      <connection id="47" preCellId="../M3L/0/M3L" postCellId="../I4/0/I4" preSegmentId="2" postSegmentId="3" preFractionAlong="0.7721996552093382" postFractionAlong="0.22753633126583261"/>
    </projection>
    <electricalProjection id="NCXLS_M3L_M3R_GJ" presynapticPopulation="M3L" postsynapticPopulation="M3R">
      <electricalConnection id="48" preCell="0" postCell="0" synapse="Generic_GJ" preSegment="6" postSegment="3" preFractionAlong="0.36239345201381123" postFractionAlong="0.38582028887402586"/>
    </electricalProjection>
    <projection id="NCXLS_M3L_I3" presynapticPopulation="M3L" postsynapticPopulation="I3" synapse="Acetylcholine">
      <connection id="49" preCellId="../M3L/0/M3L" postCellId="../I3/0/I3" preSegmentId="8" postSegmentId="7" preFractionAlong="0.13632419683394315" postFractionAlong="0.5624753354498523"/>
    </projection>
    <projection id="NCXLS_M3L_MI" presynapticPopulation="M3L" postsynapticPopulation="MI" synapse="Acetylcholine">
      <connection id="50" preCellId="../M3L/0/M3L" postCellId="../MI/0/MI" preSegmentId="1" postSegmentId="7" preFractionAlong="0.8131053793945268" postFractionAlong="0.3373287768335921"/>
    </projection>
    <projection id="NCXLS_M3L_M2R" presynapticPopulation="M3L" postsynapticPopulation="M2R" synapse="Acetylcholine">
      <connection id="51" preCellId="../M3L/0/M3L" postCellId="../M2R/0/M2R" preSegmentId="6" postSegmentId="5" preFractionAlong="0.02194146759756399" postFractionAlong="0.7687109087674142"/>
    </projection>
    <projection id="NCXLS_M3L_I6" presynapticPopulation="M3L" postsynapticPopulation="I6" synapse="Acetylcholine">
      <connection id="52" preCellId="../M3L/0/M3L" postCellId="../I6/0/I6" preSegmentId="3" postSegmentId="5" preFractionAlong="0.7615073096765237" postFractionAlong="0.8661779216450524"/>
    </projection>
    <projection id="NCXLS_M3L_I2R" presynapticPopulation="M3L" postsynapticPopulation="I2R" synapse="Acetylcholine">
      <connection id="53" preCellId="../M3L/0/M3L" postCellId="../I2R/0/I2R" preSegmentId="9" postSegmentId="7" preFractionAlong="0.8159045863814569" postFractionAlong="0.3122855758892552"/>
    </projection>
    <projection id="NCXLS_M3L_M1" presynapticPopulation="M3L" postsynapticPopulation="M1" synapse="Glutamate">
      <connection id="54" preCellId="../M3L/0/M3L" postCellId="../M1/0/M1" preSegmentId="4" postSegmentId="6" preFractionAlong="0.8121071955393001" postFractionAlong="0.5781784816626232"/>
    </projection>
    <projection id="NCXLS_M3L_NSML" presynapticPopulation="M3L" postsynapticPopulation="NSML" synapse="Acetylcholine">
      <connection id="55" preCellId="../M3L/0/M3L" postCellId="../NSML/0/NSML" preSegmentId="5" postSegmentId="7" preFractionAlong="0.1305733307866399" postFractionAlong="0.7148467752101705"/>
    </projection>
    <projection id="NCXLS_M3L_I2L" presynapticPopulation="M3L" postsynapticPopulation="I2L" synapse="Acetylcholine">
      <connection id="56" preCellId="../M3L/0/M3L" postCellId="../I2L/0/I2L" preSegmentId="8" postSegmentId="2" preFractionAlong="0.9929081920521134" postFractionAlong="0.6288098017941077"/>
    </projection>
    <projection id="NCXLS_M3L_MCR" presynapticPopulation="M3L" postsynapticPopulation="MCR" synapse="Acetylcholine">
      <connection id="57" preCellId="../M3L/0/M3L" postCellId="../MCR/0/MCR" preSegmentId="6" postSegmentId="7" preFractionAlong="0.9045910158531684" postFractionAlong="0.6750519182919879"/>
    </projection>
    <projection id="NCXLS_M3L_I5" presynapticPopulation="M3L" postsynapticPopulation="I5" synapse="Acetylcholine">
      <connection id="58" preCellId="../M3L/0/M3L" postCellId="../I5/0/I5" preSegmentId="6" postSegmentId="5" preFractionAlong="0.8697737995835221" postFractionAlong="0.7475781194759751"/>
    </projection>
    <electricalProjection id="NCXLS_M3L_M2L_GJ" presynapticPopulation="M3L" postsynapticPopulation="M2L">
      <electricalConnection id="59" preCell="0" postCell="0" synapse="Generic_GJ" preSegment="7" postSegment="5" preFractionAlong="0.8676888771811421" postFractionAlong="0.9756521313912715"/>
    </electricalProjection>
    <projection id="NCXLS_M3L_NSMR" presynapticPopulation="M3L" postsynapticPopulation="NSMR" synapse="Acetylcholine">
      <connection id="60" preCellId="../M3L/0/M3L" postCellId="../NSMR/0/NSMR" preSegmentId="4" postSegmentId="2" preFractionAlong="0.1671367891843364" postFractionAlong="0.25289627349037136"/>
    </projection>
    <projection id="NCXLS_M3L_I1L" presynapticPopulation="M3L" postsynapticPopulation="I1L" synapse="Acetylcholine">
      <connection id="61" preCellId="../M3L/0/M3L" postCellId="../I1L/0/I1L" preSegmentId="5" postSegmentId="3" preFractionAlong="0.9409646143463672" postFractionAlong="0.2152852250771915"/>
    </projection>
    <projection id="NCXLS_I1R_I1L" presynapticPopulation="I1R" postsynapticPopulation="I1L" synapse="Glutamate">
      <connection id="62" preCellId="../I1R/0/I1R" postCellId="../I1L/0/I1L" preSegmentId="9" postSegmentId="2" preFractionAlong="0.3048131346144355" postFractionAlong="0.4483363414581806"/>
    </projection>
    <projection id="NCXLS_M2R_MCL" presynapticPopulation="M2R" postsynapticPopulation="MCL" synapse="Acetylcholine">
      <connection id="63" preCellId="../M2R/0/M2R" postCellId="../MCL/0/MCL" preSegmentId="1" postSegmentId="3" preFractionAlong="0.6218395864940193" postFractionAlong="0.3568551531379567"/>
    </projection>
    <electricalProjection id="NCXLS_M2R_M4_GJ" presynapticPopulation="M2R" postsynapticPopulation="M4">
      <electricalConnection id="64" preCell="0" postCell="0" synapse="Generic_GJ" preSegment="8" postSegment="8" preFractionAlong="0.23059943485018308" postFractionAlong="0.5868893174255047"/>
    </electricalProjection>
    <projection id="NCXLS_M2R_I4" presynapticPopulation="M2R" postsynapticPopulation="I4" synapse="Acetylcholine">
      <connection id="65" preCellId="../M2R/0/M2R" postCellId="../I4/0/I4" preSegmentId="7" postSegmentId="2" preFractionAlong="0.7147986077330956" postFractionAlong="0.6251214837525967"/>
    </projection>
    <projection id="NCXLS_M2R_M3R" presynapticPopulation="M2R" postsynapticPopulation="M3R" synapse="Glutamate">
      <connection id="66" preCellId="../M2R/0/M2R" postCellId="../M3R/0/M3R" preSegmentId="7" postSegmentId="1" preFractionAlong="0.7492929116644371" postFractionAlong="0.07298271473095086"/>
    </projection>
    <projection id="NCXLS_M2R_MI" presynapticPopulation="M2R" postsynapticPopulation="MI" synapse="Acetylcholine">
      <connection id="67" preCellId="../M2R/0/M2R" postCellId="../MI/0/MI" preSegmentId="1" postSegmentId="6" preFractionAlong="0.7160136409328436" postFractionAlong="0.6539213699257515"/>
    </projection>
    <projection id="NCXLS_M2R_M3L" presynapticPopulation="M2R" postsynapticPopulation="M3L" synapse="Glutamate">
      <connection id="68" preCellId="../M2R/0/M2R" postCellId="../M3L/0/M3L" preSegmentId="4" postSegmentId="2" preFractionAlong="0.611336346952953" postFractionAlong="0.736439642113269"/>
    </projection>
    <projection id="NCXLS_M2R_I1R" presynapticPopulation="M2R" postsynapticPopulation="I1R" synapse="Acetylcholine">
      <connection id="69" preCellId="../M2R/0/M2R" postCellId="../I1R/0/I1R" preSegmentId="8" postSegmentId="4" preFractionAlong="0.7004759013215406" postFractionAlong="0.9162338333132151"/>
    </projection>
    <projection id="NCXLS_M2R_I2R" presynapticPopulation="M2R" postsynapticPopulation="I2R" synapse="Acetylcholine">
      <connection id="70" preCellId="../M2R/0/M2R" postCellId="../I2R/0/I2R" preSegmentId="7" postSegmentId="7" preFractionAlong="0.9383865211333915" postFractionAlong="0.30965930837327327"/>
    </projection>
    <projection id="NCXLS_M2R_I2L" presynapticPopulation="M2R" postsynapticPopulation="I2L" synapse="Acetylcholine">
      <connection id="71" preCellId="../M2R/0/M2R" postCellId="../I2L/0/I2L" preSegmentId="9" postSegmentId="9" preFractionAlong="0.2801848012742173" postFractionAlong="0.7972996581819937"/>
    </projection>
    <projection id="NCXLS_M2R_I5" presynapticPopulation="M2R" postsynapticPopulation="I5" synapse="Acetylcholine">
      <connection id="72" preCellId="../M2R/0/M2R" postCellId="../I5/0/I5" preSegmentId="5" postSegmentId="3" preFractionAlong="0.9934163572758093" postFractionAlong="0.4256463329723189"/>
    </projection>
    <projection id="NCXLS_M2R_I1L" presynapticPopulation="M2R" postsynapticPopulation="I1L" synapse="Acetylcholine">
      <connection id="73" preCellId="../M2R/0/M2R" postCellId="../I1L/0/I1L" preSegmentId="9" postSegmentId="6" preFractionAlong="0.8079617307637607" postFractionAlong="0.9608761351199334"/>
    </projection>
    <projection id="NCXLS_I6_I3" presynapticPopulation="I6" postsynapticPopulation="I3" synapse="Acetylcholine">
      <connection id="74" preCellId="../I6/0/I6" postCellId="../I3/0/I3" preSegmentId="3" postSegmentId="2" preFractionAlong="0.5250532078015666" postFractionAlong="0.5456960755331153"/>
    </projection>
    <projection id="NCXLS_I6_M5" presynapticPopulation="I6" postsynapticPopulation="M5" synapse="Acetylcholine">
      <connection id="75" preCellId="../I6/0/I6" postCellId="../M5/0/M5" preSegmentId="6" postSegmentId="5" preFractionAlong="0.9468388821751473" postFractionAlong="0.7269409439386563"/>
    </projection>
    <projection id="NCXLS_I6_MCR" presynapticPopulation="I6" postsynapticPopulation="MCR" synapse="Acetylcholine">
      <connection id="76" preCellId="../I6/0/I6" postCellId="../MCR/0/MCR" preSegmentId="3" postSegmentId="1" preFractionAlong="0.5528400087640528" postFractionAlong="0.7545379761511037"/>
    </projection>
    <projection id="NCXLS_M1_MCL" presynapticPopulation="M1" postsynapticPopulation="MCL" synapse="Acetylcholine">
      <connection id="77" preCellId="../M1/0/M1" postCellId="../MCL/0/MCL" preSegmentId="6" postSegmentId="4" preFractionAlong="0.6169782808672586" postFractionAlong="0.2896460103807249"/>
    </projection>
    <projection id="NCXLS_M1_M4" presynapticPopulation="M1" postsynapticPopulation="M4" synapse="Glutamate">
      <connection id="78" preCellId="../M1/0/M1" postCellId="../M4/0/M4" preSegmentId="8" postSegmentId="8" preFractionAlong="0.6948257054559152" postFractionAlong="0.3749098380089979"/>
    </projection>
    <projection id="NCXLS_M1_I4" presynapticPopulation="M1" postsynapticPopulation="I4" synapse="Acetylcholine">
      <connection id="79" preCellId="../M1/0/M1" postCellId="../I4/0/I4" preSegmentId="5" postSegmentId="5" preFractionAlong="0.20768208296445678" postFractionAlong="0.9480525429208718"/>
    </projection>
    <projection id="NCXLS_M1_M3R" presynapticPopulation="M1" postsynapticPopulation="M3R" synapse="Acetylcholine">
      <connection id="80" preCellId="../M1/0/M1" postCellId="../M3R/0/M3R" preSegmentId="3" postSegmentId="7" preFractionAlong="0.9355551191991839" postFractionAlong="0.6653280525803787"/>
    </projection>
    <projection id="NCXLS_M1_I3" presynapticPopulation="M1" postsynapticPopulation="I3" synapse="Acetylcholine">
      <connection id="81" preCellId="../M1/0/M1" postCellId="../I3/0/I3" preSegmentId="2" postSegmentId="4" preFractionAlong="0.3252762092417024" postFractionAlong="0.44048168929841414"/>
    </projection>
    <projection id="NCXLS_M1_M5" presynapticPopulation="M1" postsynapticPopulation="M5" synapse="Acetylcholine">
      <connection id="82" preCellId="../M1/0/M1" postCellId="../M5/0/M5" preSegmentId="1" postSegmentId="8" preFractionAlong="0.327551764840762" postFractionAlong="0.40938683681644916"/>
    </projection>
    <projection id="NCXLS_M1_M3L" presynapticPopulation="M1" postsynapticPopulation="M3L" synapse="Glutamate">
      <connection id="83" preCellId="../M1/0/M1" postCellId="../M3L/0/M3L" preSegmentId="6" postSegmentId="4" preFractionAlong="0.9792999974174053" postFractionAlong="0.49700297251031667"/>
    </projection>
    <projection id="NCXLS_M1_I1R" presynapticPopulation="M1" postsynapticPopulation="I1R" synapse="Acetylcholine">
      <connection id="84" preCellId="../M1/0/M1" postCellId="../I1R/0/I1R" preSegmentId="6" postSegmentId="2" preFractionAlong="0.18164101406746547" postFractionAlong="0.4307568483609884"/>
    </projection>
    <projection id="NCXLS_M1_M2R" presynapticPopulation="M1" postsynapticPopulation="M2R" synapse="Glutamate">
      <connection id="85" preCellId="../M1/0/M1" postCellId="../M2R/0/M2R" preSegmentId="8" postSegmentId="8" preFractionAlong="0.6857331015524998" postFractionAlong="0.10986547781937006"/>
    </projection>
    <projection id="NCXLS_M1_I6" presynapticPopulation="M1" postsynapticPopulation="I6" synapse="Acetylcholine">
      <connection id="86" preCellId="../M1/0/M1" postCellId="../I6/0/I6" preSegmentId="2" postSegmentId="8" preFractionAlong="0.5798342336703631" postFractionAlong="0.9967282140794629"/>
    </projection>
    <projection id="NCXLS_M1_NSML" presynapticPopulation="M1" postsynapticPopulation="NSML" synapse="Acetylcholine">
      <connection id="87" preCellId="../M1/0/M1" postCellId="../NSML/0/NSML" preSegmentId="8" postSegmentId="5" preFractionAlong="0.07648977325413198" postFractionAlong="0.30643919092327754"/>
    </projection>
    <projection id="NCXLS_M1_I2L" presynapticPopulation="M1" postsynapticPopulation="I2L" synapse="Acetylcholine">
      <connection id="88" preCellId="../M1/0/M1" postCellId="../I2L/0/I2L" preSegmentId="1" postSegmentId="9" preFractionAlong="0.016406428726948752" postFractionAlong="0.08236213180828056"/>
    </projection>
    <projection id="NCXLS_M1_MCR" presynapticPopulation="M1" postsynapticPopulation="MCR" synapse="Acetylcholine">
      <connection id="89" preCellId="../M1/0/M1" postCellId="../MCR/0/MCR" preSegmentId="9" postSegmentId="2" preFractionAlong="0.5540020816855962" postFractionAlong="0.7677715701934723"/>
    </projection>
    <projection id="NCXLS_M1_NSMR" presynapticPopulation="M1" postsynapticPopulation="NSMR" synapse="Acetylcholine">
      <connection id="90" preCellId="../M1/0/M1" postCellId="../NSMR/0/NSMR" preSegmentId="5" postSegmentId="1" preFractionAlong="0.3972328397276593" postFractionAlong="0.8706945022561537"/>
    </projection>
    <projection id="NCXLS_M1_I1L" presynapticPopulation="M1" postsynapticPopulation="I1L" synapse="Acetylcholine">
      <connection id="91" preCellId="../M1/0/M1" postCellId="../I1L/0/I1L" preSegmentId="8" postSegmentId="4" preFractionAlong="0.35654214321427224" postFractionAlong="0.9405592607568448"/>
    </projection>
    <projection id="NCXLS_MCR_I3" presynapticPopulation="MCR" postsynapticPopulation="I3" synapse="Acetylcholine">
      <connection id="92" preCellId="../MCR/0/MCR" postCellId="../I3/0/I3" preSegmentId="8" postSegmentId="6" preFractionAlong="0.09500276182293066" postFractionAlong="0.06928490144422583"/>
    </projection>
    <projection id="NCXLS_MCR_M1" presynapticPopulation="MCR" postsynapticPopulation="M1" synapse="Acetylcholine">
      <connection id="93" preCellId="../MCR/0/MCR" postCellId="../M1/0/M1" preSegmentId="3" postSegmentId="8" preFractionAlong="0.641711482284288" postFractionAlong="0.3272936435708872"/>
    </projection>
    <electricalProjection id="NCXLS_I5_I2R_GJ" presynapticPopulation="I5" postsynapticPopulation="I2R">
      <electricalConnection id="94" preCell="0" postCell="0" synapse="Generic_GJ" preSegment="9" postSegment="1" preFractionAlong="0.061033718573237805" postFractionAlong="0.8573346449228768"/>
    </electricalProjection>
    <electricalProjection id="NCXLS_I5_I1L_GJ" presynapticPopulation="I5" postsynapticPopulation="I1L">
      <electricalConnection id="95" preCell="0" postCell="0" synapse="Generic_GJ" preSegment="3" postSegment="8" preFractionAlong="0.9854962713920856" postFractionAlong="0.9365049809018454"/>
    </electricalProjection>
    <projection id="NCXLS_M2L_MCL" presynapticPopulation="M2L" postsynapticPopulation="MCL" synapse="Acetylcholine">
      <connection id="96" preCellId="../M2L/0/M2L" postCellId="../MCL/0/MCL" preSegmentId="7" postSegmentId="7" preFractionAlong="0.31401471024483485" postFractionAlong="0.11854093697564827"/>
    </projection>
    <projection id="NCXLS_M2L_M4" presynapticPopulation="M2L" postsynapticPopulation="M4" synapse="Glutamate">
      <connection id="97" preCellId="../M2L/0/M2L" postCellId="../M4/0/M4" preSegmentId="1" postSegmentId="3" preFractionAlong="0.5520042798853176" postFractionAlong="0.2111604699627524"/>
    </projection>
    <projection id="NCXLS_M2L_I4" presynapticPopulation="M2L" postsynapticPopulation="I4" synapse="Acetylcholine">
      <connection id="98" preCellId="../M2L/0/M2L" postCellId="../I4/0/I4" preSegmentId="9" postSegmentId="7" preFractionAlong="0.7193558317505231" postFractionAlong="0.02000516442616851"/>
    </projection>
    <projection id="NCXLS_M2L_M3R" presynapticPopulation="M2L" postsynapticPopulation="M3R" synapse="Acetylcholine">
      <connection id="99" preCellId="../M2L/0/M2L" postCellId="../M3R/0/M3R" preSegmentId="5" postSegmentId="7" preFractionAlong="0.0596738603371072" postFractionAlong="0.47218360663446746"/>
    </projection>
    <projection id="NCXLS_M2L_MI" presynapticPopulation="M2L" postsynapticPopulation="MI" synapse="Acetylcholine">
      <connection id="100" preCellId="../M2L/0/M2L" postCellId="../MI/0/MI" preSegmentId="6" postSegmentId="8" preFractionAlong="0.349976030978181" postFractionAlong="0.23105461954550788"/>
    </projection>
    <electricalProjection id="NCXLS_M2L_M3L_GJ" presynapticPopulation="M2L" postsynapticPopulation="M3L">
      <electricalConnection id="101" preCell="0" postCell="0" synapse="Generic_GJ" preSegment="3" postSegment="2" preFractionAlong="0.15266186976349116" postFractionAlong="0.3665117555589056"/>
    </electricalProjection>
    <projection id="NCXLS_M2L_I1R" presynapticPopulation="M2L" postsynapticPopulation="I1R" synapse="Acetylcholine">
      <connection id="102" preCellId="../M2L/0/M2L" postCellId="../I1R/0/I1R" preSegmentId="5" postSegmentId="5" preFractionAlong="0.24708788480321153" postFractionAlong="0.639670675559954"/>
    </projection>
    <projection id="NCXLS_M2L_I2R" presynapticPopulation="M2L" postsynapticPopulation="I2R" synapse="Acetylcholine">
      <connection id="103" preCellId="../M2L/0/M2L" postCellId="../I2R/0/I2R" preSegmentId="3" postSegmentId="2" preFractionAlong="0.572529873623784" postFractionAlong="0.8192862362841031"/>
    </projection>
    <projection id="NCXLS_M2L_I2L" presynapticPopulation="M2L" postsynapticPopulation="I2L" synapse="Acetylcholine">
      <connection id="104" preCellId="../M2L/0/M2L" postCellId="../I2L/0/I2L" preSegmentId="6" postSegmentId="2" preFractionAlong="0.15117169828232546" postFractionAlong="0.9147317347788052"/>
    </projection>
    <projection id="NCXLS_M2L_I5" presynapticPopulation="M2L" postsynapticPopulation="I5" synapse="Acetylcholine">
      <connection id="105" preCellId="../M2L/0/M2L" postCellId="../I5/0/I5" preSegmentId="5" postSegmentId="3" preFractionAlong="0.005302510932846061" postFractionAlong="0.7373736335395861"/>
    </projection>
    <projection id="NCXLS_M2L_I1L" presynapticPopulation="M2L" postsynapticPopulation="I1L" synapse="Acetylcholine">
      <connection id="106" preCellId="../M2L/0/M2L" postCellId="../I1L/0/I1L" preSegmentId="1" postSegmentId="7" preFractionAlong="0.563941769644487" postFractionAlong="0.4043261228494788"/>
    </projection>
  </network>
</neuroml>
