<?xml version='1.0' encoding='UTF-8'?>
<neuroml xmlns="http://www.neuroml.org/schema/neuroml2" xmlns:xsi="http://www.w3.org/2001/XMLSchema-instance" xsi:schemaLocation="http://www.neuroml.org/schema/neuroml2 https://raw.githubusercontent.com/NeuroML/NeuroML2/development/Schemas/NeuroML2/NeuroML_v2beta4.xsd" id="gvft_network_bio_prior_lamW_0.411_DF_0.037_t100.net">
  <notes>NeuroML2 network generated from GVFT simulation on 2025-05-04 00:15:22
</notes>
  <include href="M3R.cell.nml"/>
  <include href="M1.cell.nml"/>
  <include href="I2L.cell.nml"/>
  <include href="MCL.cell.nml"/>
  <include href="I6.cell.nml"/>
  <include href="I5.cell.nml"/>
  <include href="M4.cell.nml"/>
  <include href="I1R.cell.nml"/>
  <include href="MCR.cell.nml"/>
  <include href="I3.cell.nml"/>
  <include href="M3L.cell.nml"/>
  <include href="NSML.cell.nml"/>
  <include href="M2L.cell.nml"/>
  <include href="M5.cell.nml"/>
  <include href="I4.cell.nml"/>
  <include href="MI.cell.nml"/>
  <include href="NSMR.cell.nml"/>
  <include href="I2R.cell.nml"/>
  <include href="M2R.cell.nml"/>
  <include href="I1L.cell.nml"/>
  <include href="Serotonin_Glutamate.synapse.nml"/>
  <include href="Acetylcholine.synapse.nml"/>
  <include href="Generic_GJ.synapse.nml"/>
  <include href="Glutamate.synapse.nml"/>
  <network id="gvft_network_bio_prior_lamW_0.411_DF_0.037_t100.net" type="networkWithTemperature" temperature="20.0 degC">
    <population id="M1" component="M1" type="populationList" size="1">
      <instance id="0">
        <location x="-0.8592965" y="0.2964824" z="0.0"/>
      </instance>
    </population>
    <population id="M2L" component="M2L" type="populationList" size="1">
      <instance id="0">
        <location x="0.49748746" y="-0.57788944" z="0.0"/>
      </instance>
    </population>
    <population id="M2R" component="M2R" type="populationList" size="1">
      <instance id="0">
        <location x="-0.879397" y="-0.7889447" z="0.0"/>
      </instance>
    </population>
    <population id="M3L" component="M3L" type="populationList" size="1">
      <instance id="0">
        <location x="-0.20603016" y="0.04522614" z="0.0"/>
      </instance>
    </population>
    <population id="M3R" component="M3R" type="populationList" size="1">
      <instance id="0">
        <location x="-0.0753769" y="0.44723618" z="0.0"/>
      </instance>
    </population>
    <population id="M4" component="M4" type="populationList" size="1">
      <instance id="0">
        <location x="0.67839193" y="0.26633167" z="0.0"/>
      </instance>
    </population>
    <population id="M5" component="M5" type="populationList" size="1">
      <instance id="0">
        <location x="0.46733668" y="-0.9396985" z="0.0"/>
      </instance>
    </population>
    <population id="I1L" component="I1L" type="populationList" size="1">
      <instance id="0">
        <location x="0.959799" y="0.59799" z="0.0"/>
      </instance>
    </population>
    <population id="I1R" component="I1R" type="populationList" size="1">
      <instance id="0">
        <location x="0.8492462" y="0.61809045" z="0.0"/>
      </instance>
    </population>
    <population id="I2L" component="I2L" type="populationList" size="1">
      <instance id="0">
        <location x="-0.26633167" y="-0.76884425" z="0.0"/>
      </instance>
    </population>
    <population id="I2R" component="I2R" type="populationList" size="1">
      <instance id="0">
        <location x="-0.76884425" y="-0.65829146" z="0.0"/>
      </instance>
    </population>
    <population id="I3" component="I3" type="populationList" size="1">
      <instance id="0">
        <location x="-0.55778897" y="-0.015075387" z="0.0"/>
      </instance>
    </population>
    <population id="I4" component="I4" type="populationList" size="1">
      <instance id="0">
        <location x="0.51758796" y="-0.8190955" z="0.0"/>
      </instance>
    </population>
    <population id="I5" component="I5" type="populationList" size="1">
      <instance id="0">
        <location x="0.9396985" y="-0.8994975" z="0.0"/>
      </instance>
    </population>
    <population id="I6" component="I6" type="populationList" size="1">
      <instance id="0">
        <location x="-0.68844223" y="0.24623117" z="0.0"/>
      </instance>
    </population>
    <population id="MCL" component="MCL" type="populationList" size="1">
      <instance id="0">
        <location x="-0.24623117" y="0.7889447" z="0.0"/>
      </instance>
    </population>
    <population id="MCR" component="MCR" type="populationList" size="1">
      <instance id="0">
        <location x="0.46733668" y="-0.72864324" z="0.0"/>
      </instance>
    </population>
    <population id="MI" component="MI" type="populationList" size="1">
      <instance id="0">
        <location x="0.6683417" y="0.44723618" z="0.0"/>
      </instance>
    </population>
    <population id="NSML" component="NSML" type="populationList" size="1">
      <instance id="0">
        <location x="0.26633167" y="-0.5879397" z="0.0"/>
      </instance>
    </population>
    <population id="NSMR" component="NSMR" type="populationList" size="1">
      <instance id="0">
        <location x="0.28643218" y="0.42713568" z="0.0"/>
      </instance>
    </population>
    <projection id="NCXLS_M3L_M2R" presynapticPopulation="M3L" postsynapticPopulation="M2R" synapse="Acetylcholine">
      <connection id="0" preCellId="../M3L/0/M3L" postCellId="../M2R/0/M2R" preSegmentId="7" postSegmentId="5" preFractionAlong="0.17775320361553637" postFractionAlong="0.5464214242139388"/>
    </projection>
    <projection id="NCXLS_M3L_I4" presynapticPopulation="M3L" postsynapticPopulation="I4" synapse="Acetylcholine">
      <connection id="1" preCellId="../M3L/0/M3L" postCellId="../I4/0/I4" preSegmentId="4" postSegmentId="1" preFractionAlong="0.05815112056640115" postFractionAlong="0.5265156165216303"/>
    </projection>
    <projection id="NCXLS_M3L_M2L" presynapticPopulation="M3L" postsynapticPopulation="M2L" synapse="Glutamate">
      <connection id="2" preCellId="../M3L/0/M3L" postCellId="../M2L/0/M2L" preSegmentId="8" postSegmentId="4" preFractionAlong="0.26425987784965566" postFractionAlong="0.8348657553333153"/>
    </projection>
    <projection id="NCXLS_M3L_NSML" presynapticPopulation="M3L" postsynapticPopulation="NSML" synapse="Acetylcholine">
      <connection id="3" preCellId="../M3L/0/M3L" postCellId="../NSML/0/NSML" preSegmentId="9" postSegmentId="9" preFractionAlong="0.9591934864585215" postFractionAlong="0.005941755844354413"/>
    </projection>
    <projection id="NCXLS_M3L_M5" presynapticPopulation="M3L" postsynapticPopulation="M5" synapse="Acetylcholine">
      <connection id="4" preCellId="../M3L/0/M3L" postCellId="../M5/0/M5" preSegmentId="4" postSegmentId="8" preFractionAlong="0.9046384271149494" postFractionAlong="0.013822204097494684"/>
    </projection>
    <projection id="NCXLS_M3L_I2L" presynapticPopulation="M3L" postsynapticPopulation="I2L" synapse="Acetylcholine">
      <connection id="5" preCellId="../M3L/0/M3L" postCellId="../I2L/0/I2L" preSegmentId="3" postSegmentId="7" preFractionAlong="0.18683440629458303" postFractionAlong="0.6196641516197087"/>
    </projection>
    <projection id="NCXLS_M3L_I2R" presynapticPopulation="M3L" postsynapticPopulation="I2R" synapse="Acetylcholine">
      <connection id="6" preCellId="../M3L/0/M3L" postCellId="../I2R/0/I2R" preSegmentId="5" postSegmentId="4" preFractionAlong="0.4637317359313208" postFractionAlong="0.10354357195278396"/>
    </projection>
    <projection id="NCXLS_M3L_I5" presynapticPopulation="M3L" postsynapticPopulation="I5" synapse="Acetylcholine">
      <connection id="7" preCellId="../M3L/0/M3L" postCellId="../I5/0/I5" preSegmentId="3" postSegmentId="9" preFractionAlong="0.7930123987693986" postFractionAlong="0.9885904790263319"/>
    </projection>
    <projection id="NCXLS_M3L_MCR" presynapticPopulation="M3L" postsynapticPopulation="MCR" synapse="Acetylcholine">
      <connection id="8" preCellId="../M3L/0/M3L" postCellId="../MCR/0/MCR" preSegmentId="5" postSegmentId="3" preFractionAlong="0.5435402377305709" postFractionAlong="0.47363075548460953"/>
    </projection>
    <projection id="NCXLS_M3L_I3" presynapticPopulation="M3L" postsynapticPopulation="I3" synapse="Acetylcholine">
      <connection id="9" preCellId="../M3L/0/M3L" postCellId="../I3/0/I3" preSegmentId="7" postSegmentId="5" preFractionAlong="0.8080147490627835" postFractionAlong="0.26083108002500877"/>
    </projection>
    <projection id="NCXLS_M2R_M3L" presynapticPopulation="M2R" postsynapticPopulation="M3L" synapse="Acetylcholine">
      <connection id="10" preCellId="../M2R/0/M2R" postCellId="../M3L/0/M3L" preSegmentId="1" postSegmentId="4" preFractionAlong="0.033187630225001485" postFractionAlong="0.517014723886716"/>
    </projection>
    <projection id="NCXLS_M2R_MI" presynapticPopulation="M2R" postsynapticPopulation="MI" synapse="Acetylcholine">
      <connection id="11" preCellId="../M2R/0/M2R" postCellId="../MI/0/MI" preSegmentId="7" postSegmentId="1" preFractionAlong="0.6106187301963539" postFractionAlong="0.9668522322446306"/>
    </projection>
    <projection id="NCXLS_M2R_M4" presynapticPopulation="M2R" postsynapticPopulation="M4" synapse="Glutamate">
      <connection id="12" preCellId="../M2R/0/M2R" postCellId="../M4/0/M4" preSegmentId="2" postSegmentId="2" preFractionAlong="0.8001582366647964" postFractionAlong="0.6417370448140233"/>
    </projection>
    <projection id="NCXLS_M2R_M3R" presynapticPopulation="M2R" postsynapticPopulation="M3R" synapse="Acetylcholine">
      <connection id="13" preCellId="../M2R/0/M2R" postCellId="../M3R/0/M3R" preSegmentId="5" postSegmentId="4" preFractionAlong="0.5738240691889402" postFractionAlong="0.4660035143530129"/>
    </projection>
    <projection id="NCXLS_M2R_I1L" presynapticPopulation="M2R" postsynapticPopulation="I1L" synapse="Acetylcholine">
      <connection id="14" preCellId="../M2R/0/M2R" postCellId="../I1L/0/I1L" preSegmentId="9" postSegmentId="9" preFractionAlong="0.1825971310870993" postFractionAlong="0.6165878380712464"/>
    </projection>
    <projection id="NCXLS_M2R_I2R" presynapticPopulation="M2R" postsynapticPopulation="I2R" synapse="Acetylcholine">
      <connection id="15" preCellId="../M2R/0/M2R" postCellId="../I2R/0/I2R" preSegmentId="3" postSegmentId="6" preFractionAlong="0.000554184585253914" postFractionAlong="0.6083194014000671"/>
    </projection>
    <projection id="NCXLS_M2R_MCL" presynapticPopulation="M2R" postsynapticPopulation="MCL" synapse="Acetylcholine">
      <connection id="16" preCellId="../M2R/0/M2R" postCellId="../MCL/0/MCL" preSegmentId="6" postSegmentId="2" preFractionAlong="0.37517639831310245" postFractionAlong="0.4860034482382267"/>
    </projection>
    <projection id="NCXLS_M2R_M1" presynapticPopulation="M2R" postsynapticPopulation="M1" synapse="Acetylcholine">
      <connection id="17" preCellId="../M2R/0/M2R" postCellId="../M1/0/M1" preSegmentId="2" postSegmentId="4" preFractionAlong="0.3561391620149682" postFractionAlong="0.9637676499423089"/>
    </projection>
    <projection id="NCXLS_M2R_I1R" presynapticPopulation="M2R" postsynapticPopulation="I1R" synapse="Acetylcholine">
      <connection id="18" preCellId="../M2R/0/M2R" postCellId="../I1R/0/I1R" preSegmentId="2" postSegmentId="1" preFractionAlong="0.5364303967894921" postFractionAlong="0.7420925925582444"/>
    </projection>
    <projection id="NCXLS_M2R_I3" presynapticPopulation="M2R" postsynapticPopulation="I3" synapse="Acetylcholine">
      <connection id="19" preCellId="../M2R/0/M2R" postCellId="../I3/0/I3" preSegmentId="1" postSegmentId="5" preFractionAlong="0.8906785956054708" postFractionAlong="0.7163310272566953"/>
    </projection>
    <projection id="NCXLS_M2R_I6" presynapticPopulation="M2R" postsynapticPopulation="I6" synapse="Acetylcholine">
      <connection id="20" preCellId="../M2R/0/M2R" postCellId="../I6/0/I6" preSegmentId="9" postSegmentId="8" preFractionAlong="0.348505799831591" postFractionAlong="0.8329977422394179"/>
    </projection>
    <projection id="NCXLS_M2R_NSMR" presynapticPopulation="M2R" postsynapticPopulation="NSMR" synapse="Acetylcholine">
      <connection id="21" preCellId="../M2R/0/M2R" postCellId="../NSMR/0/NSMR" preSegmentId="4" postSegmentId="1" preFractionAlong="0.6913864452150186" postFractionAlong="0.3258355948449989"/>
    </projection>
    <electricalProjection id="NCXLS_M2L_M3L_GJ" presynapticPopulation="M2L" postsynapticPopulation="M3L">
      <electricalConnection id="22" preCell="0" postCell="0" synapse="Generic_GJ" preSegment="4" postSegment="4" preFractionAlong="0.9003760223475992" postFractionAlong="0.21854846152056295"/>
    </electricalProjection>
    <projection id="NCXLS_M2L_MI" presynapticPopulation="M2L" postsynapticPopulation="MI" synapse="Acetylcholine">
      <connection id="23" preCellId="../M2L/0/M2L" postCellId="../MI/0/MI" preSegmentId="9" postSegmentId="4" preFractionAlong="0.2283201737969427" postFractionAlong="0.38185762522183253"/>
    </projection>
    <projection id="NCXLS_M2L_M4" presynapticPopulation="M2L" postsynapticPopulation="M4" synapse="Acetylcholine">
      <connection id="24" preCellId="../M2L/0/M2L" postCellId="../M4/0/M4" preSegmentId="9" postSegmentId="4" preFractionAlong="0.07608937134957627" postFractionAlong="0.6036019202212376"/>
    </projection>
    <electricalProjection id="NCXLS_M2L_M3R_GJ" presynapticPopulation="M2L" postsynapticPopulation="M3R">
      <electricalConnection id="25" preCell="0" postCell="0" synapse="Generic_GJ" preSegment="2" postSegment="2" preFractionAlong="0.06767353665798337" postFractionAlong="0.9933898787390681"/>
    </electricalProjection>
    <projection id="NCXLS_M2L_I1L" presynapticPopulation="M2L" postsynapticPopulation="I1L" synapse="Acetylcholine">
      <connection id="26" preCellId="../M2L/0/M2L" postCellId="../I1L/0/I1L" preSegmentId="3" postSegmentId="1" preFractionAlong="0.2889829042417996" postFractionAlong="0.7387480290356228"/>
    </projection>
    <projection id="NCXLS_M2L_MCL" presynapticPopulation="M2L" postsynapticPopulation="MCL" synapse="Acetylcholine">
      <connection id="27" preCellId="../M2L/0/M2L" postCellId="../MCL/0/MCL" preSegmentId="9" postSegmentId="1" preFractionAlong="0.3809457626738071" postFractionAlong="0.40753438015364507"/>
    </projection>
    <projection id="NCXLS_M2L_M1" presynapticPopulation="M2L" postsynapticPopulation="M1" synapse="Glutamate">
      <connection id="28" preCellId="../M2L/0/M2L" postCellId="../M1/0/M1" preSegmentId="7" postSegmentId="1" preFractionAlong="0.7461505038267879" postFractionAlong="0.05060138712180473"/>
    </projection>
    <projection id="NCXLS_M2L_I1R" presynapticPopulation="M2L" postsynapticPopulation="I1R" synapse="Acetylcholine">
      <connection id="29" preCellId="../M2L/0/M2L" postCellId="../I1R/0/I1R" preSegmentId="3" postSegmentId="2" preFractionAlong="0.9810386266812119" postFractionAlong="0.020014693172932807"/>
    </projection>
    <projection id="NCXLS_M2L_I3" presynapticPopulation="M2L" postsynapticPopulation="I3" synapse="Acetylcholine">
      <connection id="30" preCellId="../M2L/0/M2L" postCellId="../I3/0/I3" preSegmentId="6" postSegmentId="9" preFractionAlong="0.3417023791091982" postFractionAlong="0.27698957538720925"/>
    </projection>
    <projection id="NCXLS_M2L_I6" presynapticPopulation="M2L" postsynapticPopulation="I6" synapse="Acetylcholine">
      <connection id="31" preCellId="../M2L/0/M2L" postCellId="../I6/0/I6" preSegmentId="2" postSegmentId="9" preFractionAlong="0.9372620447778404" postFractionAlong="0.5862678431932681"/>
    </projection>
    <projection id="NCXLS_M2L_NSMR" presynapticPopulation="M2L" postsynapticPopulation="NSMR" synapse="Acetylcholine">
      <connection id="32" preCellId="../M2L/0/M2L" postCellId="../NSMR/0/NSMR" preSegmentId="9" postSegmentId="6" preFractionAlong="0.5251757899342241" postFractionAlong="0.8347379547769676"/>
    </projection>
    <projection id="NCXLS_MI_I1L" presynapticPopulation="MI" postsynapticPopulation="I1L" synapse="Acetylcholine">
      <connection id="33" preCellId="../MI/0/MI" postCellId="../I1L/0/I1L" preSegmentId="3" postSegmentId="9" preFractionAlong="0.43185286573803683" postFractionAlong="0.35530360100122993"/>
    </projection>
    <projection id="NCXLS_MI_I1R" presynapticPopulation="MI" postsynapticPopulation="I1R" synapse="Acetylcholine">
      <connection id="34" preCellId="../MI/0/MI" postCellId="../I1R/0/I1R" preSegmentId="7" postSegmentId="8" preFractionAlong="0.3370713620905832" postFractionAlong="0.031271377747267404"/>
    </projection>
    <projection id="NCXLS_M4_I4" presynapticPopulation="M4" postsynapticPopulation="I4" synapse="Acetylcholine">
      <connection id="35" preCellId="../M4/0/M4" postCellId="../I4/0/I4" preSegmentId="4" postSegmentId="5" preFractionAlong="0.8338093088728618" postFractionAlong="0.39504053568149844"/>
    </projection>
    <electricalProjection id="NCXLS_M4_M2L_GJ" presynapticPopulation="M4" postsynapticPopulation="M2L">
      <electricalConnection id="36" preCell="0" postCell="0" synapse="Generic_GJ" preSegment="8" postSegment="3" preFractionAlong="0.6282565938100043" postFractionAlong="0.4506671206067313"/>
    </electricalProjection>
    <projection id="NCXLS_M4_NSML" presynapticPopulation="M4" postsynapticPopulation="NSML" synapse="Acetylcholine">
      <connection id="37" preCellId="../M4/0/M4" postCellId="../NSML/0/NSML" preSegmentId="6" postSegmentId="6" preFractionAlong="0.6442054818406923" postFractionAlong="0.918191773229734"/>
    </projection>
    <projection id="NCXLS_M4_M5" presynapticPopulation="M4" postsynapticPopulation="M5" synapse="Acetylcholine">
      <connection id="38" preCellId="../M4/0/M4" postCellId="../M5/0/M5" preSegmentId="6" postSegmentId="6" preFractionAlong="0.5976870299435008" postFractionAlong="0.9270121129250806"/>
    </projection>
    <projection id="NCXLS_M4_I2L" presynapticPopulation="M4" postsynapticPopulation="I2L" synapse="Acetylcholine">
      <connection id="39" preCellId="../M4/0/M4" postCellId="../I2L/0/I2L" preSegmentId="9" postSegmentId="7" preFractionAlong="0.04924440140828912" postFractionAlong="0.1363853929336768"/>
    </projection>
    <projection id="NCXLS_M4_I5" presynapticPopulation="M4" postsynapticPopulation="I5" synapse="Acetylcholine">
      <connection id="40" preCellId="../M4/0/M4" postCellId="../I5/0/I5" preSegmentId="1" postSegmentId="8" preFractionAlong="0.8258634210423188" postFractionAlong="0.26469837771100657"/>
    </projection>
    <projection id="NCXLS_M4_MCR" presynapticPopulation="M4" postsynapticPopulation="MCR" synapse="Acetylcholine">
      <connection id="41" preCellId="../M4/0/M4" postCellId="../MCR/0/MCR" preSegmentId="6" postSegmentId="5" preFractionAlong="0.0040252788539707485" postFractionAlong="0.40164517721204185"/>
    </projection>
    <electricalProjection id="NCXLS_M5_M2R_GJ" presynapticPopulation="M5" postsynapticPopulation="M2R">
      <electricalConnection id="42" preCell="0" postCell="0" synapse="Generic_GJ" preSegment="3" postSegment="2" preFractionAlong="0.7906061983060746" postFractionAlong="0.2801127023065654"/>
    </electricalProjection>
    <projection id="NCXLS_M5_I2L" presynapticPopulation="M5" postsynapticPopulation="I2L" synapse="Acetylcholine">
      <connection id="43" preCellId="../M5/0/M5" postCellId="../I2L/0/I2L" preSegmentId="5" postSegmentId="9" preFractionAlong="0.39752232910721585" postFractionAlong="0.42341670930627184"/>
    </projection>
    <projection id="NCXLS_M5_I2R" presynapticPopulation="M5" postsynapticPopulation="I2R" synapse="Acetylcholine">
      <connection id="44" preCellId="../M5/0/M5" postCellId="../I2R/0/I2R" preSegmentId="2" postSegmentId="3" preFractionAlong="0.21779100001237928" postFractionAlong="0.6933626151747102"/>
    </projection>
    <projection id="NCXLS_M5_M1" presynapticPopulation="M5" postsynapticPopulation="M1" synapse="Acetylcholine">
      <connection id="45" preCellId="../M5/0/M5" postCellId="../M1/0/M1" preSegmentId="1" postSegmentId="9" preFractionAlong="0.7131642687573406" postFractionAlong="0.584467418058375"/>
    </projection>
    <projection id="NCXLS_M5_I3" presynapticPopulation="M5" postsynapticPopulation="I3" synapse="Acetylcholine">
      <connection id="46" preCellId="../M5/0/M5" postCellId="../I3/0/I3" preSegmentId="6" postSegmentId="1" preFractionAlong="0.23143663046342466" postFractionAlong="0.2517444642825304"/>
    </projection>
    <projection id="NCXLS_M5_I6" presynapticPopulation="M5" postsynapticPopulation="I6" synapse="Acetylcholine">
      <connection id="47" preCellId="../M5/0/M5" postCellId="../I6/0/I6" preSegmentId="8" postSegmentId="5" preFractionAlong="0.6318896722018543" postFractionAlong="0.522250524356765"/>
    </projection>
    <projection id="NCXLS_M3R_MI" presynapticPopulation="M3R" postsynapticPopulation="MI" synapse="Acetylcholine">
      <connection id="48" preCellId="../M3R/0/M3R" postCellId="../MI/0/MI" preSegmentId="5" postSegmentId="8" preFractionAlong="0.8085861694290979" postFractionAlong="0.9202711976015386"/>
    </projection>
    <projection id="NCXLS_M3R_M4" presynapticPopulation="M3R" postsynapticPopulation="M4" synapse="Acetylcholine">
      <connection id="49" preCellId="../M3R/0/M3R" postCellId="../M4/0/M4" preSegmentId="9" postSegmentId="3" preFractionAlong="0.6844490484631971" postFractionAlong="0.6228292369611795"/>
    </projection>
    <projection id="NCXLS_M3R_I1L" presynapticPopulation="M3R" postsynapticPopulation="I1L" synapse="Acetylcholine">
      <connection id="50" preCellId="../M3R/0/M3R" postCellId="../I1L/0/I1L" preSegmentId="1" postSegmentId="2" preFractionAlong="0.8447903602895617" postFractionAlong="0.1957751114131362"/>
    </projection>
    <projection id="NCXLS_M3R_MCL" presynapticPopulation="M3R" postsynapticPopulation="MCL" synapse="Acetylcholine">
      <connection id="51" preCellId="../M3R/0/M3R" postCellId="../MCL/0/MCL" preSegmentId="7" postSegmentId="1" preFractionAlong="0.4367065856894923" postFractionAlong="0.8552303633440688"/>
    </projection>
    <projection id="NCXLS_M3R_I1R" presynapticPopulation="M3R" postsynapticPopulation="I1R" synapse="Acetylcholine">
      <connection id="52" preCellId="../M3R/0/M3R" postCellId="../I1R/0/I1R" preSegmentId="6" postSegmentId="6" preFractionAlong="0.7478922540260833" postFractionAlong="0.5568151179693931"/>
    </projection>
    <projection id="NCXLS_M3R_NSMR" presynapticPopulation="M3R" postsynapticPopulation="NSMR" synapse="Acetylcholine">
      <connection id="53" preCellId="../M3R/0/M3R" postCellId="../NSMR/0/NSMR" preSegmentId="5" postSegmentId="8" preFractionAlong="0.10344611669293491" postFractionAlong="0.3475642811617412"/>
    </projection>
    <projection id="NCXLS_MCL_MI" presynapticPopulation="MCL" postsynapticPopulation="MI" synapse="Acetylcholine">
      <connection id="54" preCellId="../MCL/0/MCL" postCellId="../MI/0/MI" preSegmentId="4" postSegmentId="6" preFractionAlong="0.4828174943504111" postFractionAlong="0.3556873898943743"/>
    </projection>
    <projection id="NCXLS_MCL_M4" presynapticPopulation="MCL" postsynapticPopulation="M4" synapse="Acetylcholine">
      <connection id="55" preCellId="../MCL/0/MCL" postCellId="../M4/0/M4" preSegmentId="2" postSegmentId="6" preFractionAlong="0.6864198939976419" postFractionAlong="0.21586639765948856"/>
    </projection>
    <projection id="NCXLS_MCL_I1L" presynapticPopulation="MCL" postsynapticPopulation="I1L" synapse="Acetylcholine">
      <connection id="56" preCellId="../MCL/0/MCL" postCellId="../I1L/0/I1L" preSegmentId="7" postSegmentId="4" preFractionAlong="0.6191496593147331" postFractionAlong="0.16370965250905034"/>
    </projection>
    <projection id="NCXLS_MCL_I5" presynapticPopulation="MCL" postsynapticPopulation="I5" synapse="Acetylcholine">
      <connection id="57" preCellId="../MCL/0/MCL" postCellId="../I5/0/I5" preSegmentId="8" postSegmentId="4" preFractionAlong="0.8644769036178283" postFractionAlong="0.2854477871998655"/>
    </projection>
    <projection id="NCXLS_MCL_I1R" presynapticPopulation="MCL" postsynapticPopulation="I1R" synapse="Acetylcholine">
      <connection id="58" preCellId="../MCL/0/MCL" postCellId="../I1R/0/I1R" preSegmentId="1" postSegmentId="1" preFractionAlong="0.9791121697448023" postFractionAlong="0.5955026005728078"/>
    </projection>
    <projection id="NCXLS_MCL_NSMR" presynapticPopulation="MCL" postsynapticPopulation="NSMR" synapse="Acetylcholine">
      <connection id="59" preCellId="../MCL/0/MCL" postCellId="../NSMR/0/NSMR" preSegmentId="9" postSegmentId="5" preFractionAlong="0.4453196182237519" postFractionAlong="0.06036584351505736"/>
    </projection>
    <projection id="NCXLS_M1_M3L" presynapticPopulation="M1" postsynapticPopulation="M3L" synapse="Glutamate">
      <connection id="60" preCellId="../M1/0/M1" postCellId="../M3L/0/M3L" preSegmentId="3" postSegmentId="8" preFractionAlong="0.8987405450859782" postFractionAlong="0.4703300883047672"/>
    </projection>
    <electricalProjection id="NCXLS_M1_M2R_GJ" presynapticPopulation="M1" postsynapticPopulation="M2R">
      <electricalConnection id="61" preCell="0" postCell="0" synapse="Generic_GJ" preSegment="6" postSegment="4" preFractionAlong="0.829327460062097" postFractionAlong="0.03449382886859387"/>
    </electricalProjection>
    <projection id="NCXLS_M1_I4" presynapticPopulation="M1" postsynapticPopulation="I4" synapse="Acetylcholine">
      <connection id="62" preCellId="../M1/0/M1" postCellId="../I4/0/I4" preSegmentId="2" postSegmentId="6" preFractionAlong="0.9593291082338672" postFractionAlong="0.9493363085249241"/>
    </projection>
    <projection id="NCXLS_M1_M2L" presynapticPopulation="M1" postsynapticPopulation="M2L" synapse="Glutamate">
      <connection id="63" preCellId="../M1/0/M1" postCellId="../M2L/0/M2L" preSegmentId="4" postSegmentId="2" preFractionAlong="0.20144012992236626" postFractionAlong="0.9937700423443627"/>
    </projection>
    <projection id="NCXLS_M1_NSML" presynapticPopulation="M1" postsynapticPopulation="NSML" synapse="Acetylcholine">
      <connection id="64" preCellId="../M1/0/M1" postCellId="../NSML/0/NSML" preSegmentId="8" postSegmentId="1" preFractionAlong="0.5728660039668526" postFractionAlong="0.16642018552245252"/>
    </projection>
    <electricalProjection id="NCXLS_M1_M5_GJ" presynapticPopulation="M1" postsynapticPopulation="M5">
      <electricalConnection id="65" preCell="0" postCell="0" synapse="Generic_GJ" preSegment="7" postSegment="2" preFractionAlong="0.8664151295248242" postFractionAlong="0.021806793124395596"/>
    </electricalProjection>
    <projection id="NCXLS_M1_I2L" presynapticPopulation="M1" postsynapticPopulation="I2L" synapse="Acetylcholine">
      <connection id="66" preCellId="../M1/0/M1" postCellId="../I2L/0/I2L" preSegmentId="4" postSegmentId="4" preFractionAlong="0.16955799437013552" postFractionAlong="0.8174764393049206"/>
    </projection>
    <projection id="NCXLS_M1_I2R" presynapticPopulation="M1" postsynapticPopulation="I2R" synapse="Acetylcholine">
      <connection id="67" preCellId="../M1/0/M1" postCellId="../I2R/0/I2R" preSegmentId="7" postSegmentId="7" preFractionAlong="0.7894079523393898" postFractionAlong="0.7505973625073212"/>
    </projection>
    <projection id="NCXLS_M1_I5" presynapticPopulation="M1" postsynapticPopulation="I5" synapse="Acetylcholine">
      <connection id="68" preCellId="../M1/0/M1" postCellId="../I5/0/I5" preSegmentId="7" postSegmentId="2" preFractionAlong="0.6109736467958812" postFractionAlong="0.9099296989772162"/>
    </projection>
    <projection id="NCXLS_M1_MCR" presynapticPopulation="M1" postsynapticPopulation="MCR" synapse="Acetylcholine">
      <connection id="69" preCellId="../M1/0/M1" postCellId="../MCR/0/MCR" preSegmentId="5" postSegmentId="4" preFractionAlong="0.563378958225615" postFractionAlong="0.07621368478019885"/>
    </projection>
    <projection id="NCXLS_M1_I3" presynapticPopulation="M1" postsynapticPopulation="I3" synapse="Acetylcholine">
      <connection id="70" preCellId="../M1/0/M1" postCellId="../I3/0/I3" preSegmentId="6" postSegmentId="1" preFractionAlong="0.08245807798395388" postFractionAlong="0.7359472017232224"/>
    </projection>
    <projection id="NCXLS_M1_I6" presynapticPopulation="M1" postsynapticPopulation="I6" synapse="Acetylcholine">
      <connection id="71" preCellId="../M1/0/M1" postCellId="../I6/0/I6" preSegmentId="9" postSegmentId="2" preFractionAlong="0.08928107627914939" postFractionAlong="0.38744161735523475"/>
    </projection>
    <projection id="NCXLS_I1R_MCL" presynapticPopulation="I1R" postsynapticPopulation="MCL" synapse="Acetylcholine">
      <connection id="72" preCellId="../I1R/0/I1R" postCellId="../MCL/0/MCL" preSegmentId="7" postSegmentId="9" preFractionAlong="0.1907504031233812" postFractionAlong="0.007174438350453838"/>
    </projection>
    <projection id="NCXLS_MCR_M2R" presynapticPopulation="MCR" postsynapticPopulation="M2R" synapse="Acetylcholine">
      <connection id="73" preCellId="../MCR/0/MCR" postCellId="../M2R/0/M2R" preSegmentId="9" postSegmentId="8" preFractionAlong="0.5382184337322946" postFractionAlong="0.9192772111827322"/>
    </projection>
    <projection id="NCXLS_MCR_I4" presynapticPopulation="MCR" postsynapticPopulation="I4" synapse="Acetylcholine">
      <connection id="74" preCellId="../MCR/0/MCR" postCellId="../I4/0/I4" preSegmentId="3" postSegmentId="9" preFractionAlong="0.7056035413643416" postFractionAlong="0.3576770913057742"/>
    </projection>
    <projection id="NCXLS_MCR_M5" presynapticPopulation="MCR" postsynapticPopulation="M5" synapse="Acetylcholine">
      <connection id="75" preCellId="../MCR/0/MCR" postCellId="../M5/0/M5" preSegmentId="4" postSegmentId="7" preFractionAlong="0.45979401327486125" postFractionAlong="0.19376879489122578"/>
    </projection>
    <projection id="NCXLS_MCR_I2L" presynapticPopulation="MCR" postsynapticPopulation="I2L" synapse="Acetylcholine">
      <connection id="76" preCellId="../MCR/0/MCR" postCellId="../I2L/0/I2L" preSegmentId="5" postSegmentId="1" preFractionAlong="0.2348402715355853" postFractionAlong="0.07307265225327231"/>
    </projection>
    <projection id="NCXLS_MCR_I2R" presynapticPopulation="MCR" postsynapticPopulation="I2R" synapse="Acetylcholine">
      <connection id="77" preCellId="../MCR/0/MCR" postCellId="../I2R/0/I2R" preSegmentId="3" postSegmentId="1" preFractionAlong="0.8443335491993377" postFractionAlong="0.7658523040370093"/>
    </projection>
    <projection id="NCXLS_NSMR_MI" presynapticPopulation="NSMR" postsynapticPopulation="MI" synapse="Serotonin_Glutamate">
      <connection id="78" preCellId="../NSMR/0/NSMR" postCellId="../MI/0/MI" preSegmentId="1" postSegmentId="7" preFractionAlong="0.4787022008507855" postFractionAlong="0.1861321543680995"/>
    </projection>
    <projection id="NCXLS_NSMR_I1L" presynapticPopulation="NSMR" postsynapticPopulation="I1L" synapse="Serotonin_Glutamate">
      <connection id="79" preCellId="../NSMR/0/NSMR" postCellId="../I1L/0/I1L" preSegmentId="8" postSegmentId="8" preFractionAlong="0.7781256612865217" postFractionAlong="0.8939783918831082"/>
    </projection>
    <projection id="NCXLS_NSMR_I1R" presynapticPopulation="NSMR" postsynapticPopulation="I1R" synapse="Serotonin_Glutamate">
      <connection id="80" preCellId="../NSMR/0/NSMR" postCellId="../I1R/0/I1R" preSegmentId="9" postSegmentId="1" preFractionAlong="0.08650926893974753" postFractionAlong="0.056947948698448214"/>
    </projection>
  </network>
</neuroml>
