<?xml version='1.0' encoding='UTF-8'?>
<neuroml xmlns="http://www.neuroml.org/schema/neuroml2" xmlns:xsi="http://www.w3.org/2001/XMLSchema-instance" xsi:schemaLocation="http://www.neuroml.org/schema/neuroml2 https://raw.githubusercontent.com/NeuroML/NeuroML2/development/Schemas/NeuroML2/NeuroML_v2beta4.xsd" id="gvft_network_bio_prior_lamW_0.411_DF_0.037_t80.net">
  <notes>NeuroML2 network generated from GVFT simulation on 2025-05-04 00:15:17
</notes>
  <include href="M3R.cell.nml"/>
  <include href="M1.cell.nml"/>
  <include href="I2L.cell.nml"/>
  <include href="MCL.cell.nml"/>
  <include href="I6.cell.nml"/>
  <include href="I5.cell.nml"/>
  <include href="M4.cell.nml"/>
  <include href="I1R.cell.nml"/>
  <include href="MCR.cell.nml"/>
  <include href="I3.cell.nml"/>
  <include href="M3L.cell.nml"/>
  <include href="NSML.cell.nml"/>
  <include href="M2L.cell.nml"/>
  <include href="M5.cell.nml"/>
  <include href="I4.cell.nml"/>
  <include href="MI.cell.nml"/>
  <include href="NSMR.cell.nml"/>
  <include href="I2R.cell.nml"/>
  <include href="M2R.cell.nml"/>
  <include href="I1L.cell.nml"/>
  <include href="Serotonin_Glutamate.synapse.nml"/>
  <include href="Acetylcholine.synapse.nml"/>
  <include href="Generic_GJ.synapse.nml"/>
  <include href="Glutamate.synapse.nml"/>
  <network id="gvft_network_bio_prior_lamW_0.411_DF_0.037_t80.net" type="networkWithTemperature" temperature="20.0 degC">
    <population id="M1" component="M1" type="populationList" size="1">
      <instance id="0">
        <location x="0.919598" y="-0.6482412" z="0.0"/>
      </instance>
    </population>
    <population id="M2L" component="M2L" type="populationList" size="1">
      <instance id="0">
        <location x="0.19597991" y="0.2964824" z="0.0"/>
      </instance>
    </population>
    <population id="M2R" component="M2R" type="populationList" size="1">
      <instance id="0">
        <location x="-0.31658292" y="0.67839193" z="0.0"/>
      </instance>
    </population>
    <population id="M3L" component="M3L" type="populationList" size="1">
      <instance id="0">
        <location x="-0.37688443" y="-0.24623117" z="0.0"/>
      </instance>
    </population>
    <population id="M3R" component="M3R" type="populationList" size="1">
      <instance id="0">
        <location x="-1.0" y="-0.2763819" z="0.0"/>
      </instance>
    </population>
    <population id="M4" component="M4" type="populationList" size="1">
      <instance id="0">
        <location x="-0.12562814" y="-0.2763819" z="0.0"/>
      </instance>
    </population>
    <population id="M5" component="M5" type="populationList" size="1">
      <instance id="0">
        <location x="0.23618092" y="0.43718594" z="0.0"/>
      </instance>
    </population>
    <population id="I1L" component="I1L" type="populationList" size="1">
      <instance id="0">
        <location x="-0.9798995" y="0.68844223" z="0.0"/>
      </instance>
    </population>
    <population id="I1R" component="I1R" type="populationList" size="1">
      <instance id="0">
        <location x="-0.8592965" y="0.7487437" z="0.0"/>
      </instance>
    </population>
    <population id="I2L" component="I2L" type="populationList" size="1">
      <instance id="0">
        <location x="-0.51758796" y="0.53768843" z="0.0"/>
      </instance>
    </population>
    <population id="I2R" component="I2R" type="populationList" size="1">
      <instance id="0">
        <location x="-0.7085427" y="-0.9698492" z="0.0"/>
      </instance>
    </population>
    <population id="I3" component="I3" type="populationList" size="1">
      <instance id="0">
        <location x="0.3467337" y="0.80904526" z="0.0"/>
      </instance>
    </population>
    <population id="I4" component="I4" type="populationList" size="1">
      <instance id="0">
        <location x="0.31658292" y="-0.9296482" z="0.0"/>
      </instance>
    </population>
    <population id="I5" component="I5" type="populationList" size="1">
      <instance id="0">
        <location x="-0.19597991" y="-0.8190955" z="0.0"/>
      </instance>
    </population>
    <population id="I6" component="I6" type="populationList" size="1">
      <instance id="0">
        <location x="0.7386935" y="-0.9396985" z="0.0"/>
      </instance>
    </population>
    <population id="MCL" component="MCL" type="populationList" size="1">
      <instance id="0">
        <location x="0.1356784" y="-0.5477387" z="0.0"/>
      </instance>
    </population>
    <population id="MCR" component="MCR" type="populationList" size="1">
      <instance id="0">
        <location x="0.41708544" y="0.19597991" z="0.0"/>
      </instance>
    </population>
    <population id="MI" component="MI" type="populationList" size="1">
      <instance id="0">
        <location x="-0.86934674" y="-0.53768843" z="0.0"/>
      </instance>
    </population>
    <population id="NSML" component="NSML" type="populationList" size="1">
      <instance id="0">
        <location x="-0.919598" y="0.35678393" z="0.0"/>
      </instance>
    </population>
    <population id="NSMR" component="NSMR" type="populationList" size="1">
      <instance id="0">
        <location x="-0.83919597" y="0.42713568" z="0.0"/>
      </instance>
    </population>
    <projection id="NCXLS_M2R_I4" presynapticPopulation="M2R" postsynapticPopulation="I4" synapse="Acetylcholine">
      <connection id="0" preCellId="../M2R/0/M2R" postCellId="../I4/0/I4" preSegmentId="9" postSegmentId="4" preFractionAlong="0.6098655479010957" postFractionAlong="0.44330679336974044"/>
    </projection>
    <projection id="NCXLS_M2R_M3R" presynapticPopulation="M2R" postsynapticPopulation="M3R" synapse="Glutamate">
      <connection id="1" preCellId="../M2R/0/M2R" postCellId="../M3R/0/M3R" preSegmentId="5" postSegmentId="3" preFractionAlong="0.5448019782759769" postFractionAlong="0.08280427471454577"/>
    </projection>
    <projection id="NCXLS_M2R_M1" presynapticPopulation="M2R" postsynapticPopulation="M1" synapse="Acetylcholine">
      <connection id="2" preCellId="../M2R/0/M2R" postCellId="../M1/0/M1" preSegmentId="5" postSegmentId="6" preFractionAlong="0.6319574653900288" postFractionAlong="0.5569675337604484"/>
    </projection>
    <projection id="NCXLS_M2R_MCR" presynapticPopulation="M2R" postsynapticPopulation="MCR" synapse="Acetylcholine">
      <connection id="3" preCellId="../M2R/0/M2R" postCellId="../MCR/0/MCR" preSegmentId="9" postSegmentId="5" preFractionAlong="0.18323071874215557" postFractionAlong="0.008866278133623395"/>
    </projection>
    <projection id="NCXLS_M2R_I5" presynapticPopulation="M2R" postsynapticPopulation="I5" synapse="Acetylcholine">
      <connection id="4" preCellId="../M2R/0/M2R" postCellId="../I5/0/I5" preSegmentId="3" postSegmentId="6" preFractionAlong="0.5465942634972446" postFractionAlong="0.08827819296840944"/>
    </projection>
    <projection id="NCXLS_M2R_I6" presynapticPopulation="M2R" postsynapticPopulation="I6" synapse="Acetylcholine">
      <connection id="5" preCellId="../M2R/0/M2R" postCellId="../I6/0/I6" preSegmentId="2" postSegmentId="6" preFractionAlong="0.4550896661064078" postFractionAlong="0.34745775057859396"/>
    </projection>
    <projection id="NCXLS_M2R_M5" presynapticPopulation="M2R" postsynapticPopulation="M5" synapse="Acetylcholine">
      <connection id="6" preCellId="../M2R/0/M2R" postCellId="../M5/0/M5" preSegmentId="9" postSegmentId="2" preFractionAlong="0.17090528994427356" postFractionAlong="0.4327508691109996"/>
    </projection>
    <projection id="NCXLS_M2R_M2L" presynapticPopulation="M2R" postsynapticPopulation="M2L" synapse="Acetylcholine">
      <connection id="7" preCellId="../M2R/0/M2R" postCellId="../M2L/0/M2L" preSegmentId="2" postSegmentId="9" preFractionAlong="0.8037606948804797" postFractionAlong="0.8863316582473657"/>
    </projection>
    <projection id="NCXLS_M2R_MI" presynapticPopulation="M2R" postsynapticPopulation="MI" synapse="Acetylcholine">
      <connection id="8" preCellId="../M2R/0/M2R" postCellId="../MI/0/MI" preSegmentId="4" postSegmentId="6" preFractionAlong="0.40014955390584517" postFractionAlong="0.8940546127021446"/>
    </projection>
    <projection id="NCXLS_M2R_I3" presynapticPopulation="M2R" postsynapticPopulation="I3" synapse="Acetylcholine">
      <connection id="9" preCellId="../M2R/0/M2R" postCellId="../I3/0/I3" preSegmentId="8" postSegmentId="8" preFractionAlong="0.5442539093508629" postFractionAlong="0.9564981247770985"/>
    </projection>
    <projection id="NCXLS_M2R_M3L" presynapticPopulation="M2R" postsynapticPopulation="M3L" synapse="Acetylcholine">
      <connection id="10" preCellId="../M2R/0/M2R" postCellId="../M3L/0/M3L" preSegmentId="1" postSegmentId="5" preFractionAlong="0.6386437600345539" postFractionAlong="0.17106009253335164"/>
    </projection>
    <projection id="NCXLS_M2R_MCL" presynapticPopulation="M2R" postsynapticPopulation="MCL" synapse="Acetylcholine">
      <connection id="11" preCellId="../M2R/0/M2R" postCellId="../MCL/0/MCL" preSegmentId="5" postSegmentId="4" preFractionAlong="0.19503023178915435" postFractionAlong="0.11432311411912521"/>
    </projection>
    <projection id="NCXLS_M2R_M4" presynapticPopulation="M2R" postsynapticPopulation="M4" synapse="Acetylcholine">
      <connection id="12" preCellId="../M2R/0/M2R" postCellId="../M4/0/M4" preSegmentId="2" postSegmentId="6" preFractionAlong="0.3639195768044755" postFractionAlong="0.06154264690989619"/>
    </projection>
    <projection id="NCXLS_M2R_I2R" presynapticPopulation="M2R" postsynapticPopulation="I2R" synapse="Acetylcholine">
      <connection id="13" preCellId="../M2R/0/M2R" postCellId="../I2R/0/I2R" preSegmentId="2" postSegmentId="5" preFractionAlong="0.8518824898598457" postFractionAlong="0.6259351142194509"/>
    </projection>
    <projection id="NCXLS_M3R_M2R" presynapticPopulation="M3R" postsynapticPopulation="M2R" synapse="Acetylcholine">
      <connection id="14" preCellId="../M3R/0/M3R" postCellId="../M2R/0/M2R" preSegmentId="5" postSegmentId="6" preFractionAlong="0.766723862954201" postFractionAlong="0.6707102283340756"/>
    </projection>
    <projection id="NCXLS_M3R_I2L" presynapticPopulation="M3R" postsynapticPopulation="I2L" synapse="Acetylcholine">
      <connection id="15" preCellId="../M3R/0/M3R" postCellId="../I2L/0/I2L" preSegmentId="8" postSegmentId="6" preFractionAlong="0.5150603457578695" postFractionAlong="0.6915342250769767"/>
    </projection>
    <projection id="NCXLS_M3R_I1L" presynapticPopulation="M3R" postsynapticPopulation="I1L" synapse="Acetylcholine">
      <connection id="16" preCellId="../M3R/0/M3R" postCellId="../I1L/0/I1L" preSegmentId="2" postSegmentId="2" preFractionAlong="0.9733791957751172" postFractionAlong="0.2621639104087994"/>
    </projection>
    <electricalProjection id="NCXLS_M3R_M5_GJ" presynapticPopulation="M3R" postsynapticPopulation="M5">
      <electricalConnection id="17" preCell="0" postCell="0" synapse="Generic_GJ" preSegment="5" postSegment="1" preFractionAlong="0.561797852662138" postFractionAlong="0.013604395450668272"/>
    </electricalProjection>
    <projection id="NCXLS_M3R_I1R" presynapticPopulation="M3R" postsynapticPopulation="I1R" synapse="Acetylcholine">
      <connection id="18" preCellId="../M3R/0/M3R" postCellId="../I1R/0/I1R" preSegmentId="4" postSegmentId="7" preFractionAlong="0.07338401665200855" postFractionAlong="0.405225782929334"/>
    </projection>
    <projection id="NCXLS_M3R_I3" presynapticPopulation="M3R" postsynapticPopulation="I3" synapse="Acetylcholine">
      <connection id="19" preCellId="../M3R/0/M3R" postCellId="../I3/0/I3" preSegmentId="5" postSegmentId="9" preFractionAlong="0.8352172606087689" postFractionAlong="0.20973899393856588"/>
    </projection>
    <projection id="NCXLS_M3R_NSML" presynapticPopulation="M3R" postsynapticPopulation="NSML" synapse="Acetylcholine">
      <connection id="20" preCellId="../M3R/0/M3R" postCellId="../NSML/0/NSML" preSegmentId="8" postSegmentId="5" preFractionAlong="0.8700479966063919" postFractionAlong="0.7462660613322051"/>
    </projection>
    <projection id="NCXLS_M3R_NSMR" presynapticPopulation="M3R" postsynapticPopulation="NSMR" synapse="Acetylcholine">
      <connection id="21" preCellId="../M3R/0/M3R" postCellId="../NSMR/0/NSMR" preSegmentId="8" postSegmentId="2" preFractionAlong="0.07189941865749605" postFractionAlong="0.7156737768553395"/>
    </projection>
    <projection id="NCXLS_M1_I4" presynapticPopulation="M1" postsynapticPopulation="I4" synapse="Acetylcholine">
      <connection id="22" preCellId="../M1/0/M1" postCellId="../I4/0/I4" preSegmentId="5" postSegmentId="9" preFractionAlong="0.7660799991182212" postFractionAlong="0.4452947723752104"/>
    </projection>
    <projection id="NCXLS_M1_M2R" presynapticPopulation="M1" postsynapticPopulation="M2R" synapse="Acetylcholine">
      <connection id="23" preCellId="../M1/0/M1" postCellId="../M2R/0/M2R" preSegmentId="7" postSegmentId="2" preFractionAlong="0.9022202865403741" postFractionAlong="0.049767196588575535"/>
    </projection>
    <projection id="NCXLS_M1_I2L" presynapticPopulation="M1" postsynapticPopulation="I2L" synapse="Acetylcholine">
      <connection id="24" preCellId="../M1/0/M1" postCellId="../I2L/0/I2L" preSegmentId="3" postSegmentId="9" preFractionAlong="0.689543183657598" postFractionAlong="0.9066831386482925"/>
    </projection>
    <projection id="NCXLS_M1_I1L" presynapticPopulation="M1" postsynapticPopulation="I1L" synapse="Acetylcholine">
      <connection id="25" preCellId="../M1/0/M1" postCellId="../I1L/0/I1L" preSegmentId="7" postSegmentId="7" preFractionAlong="0.02584866384007345" postFractionAlong="0.9900872456327712"/>
    </projection>
    <electricalProjection id="NCXLS_M1_M3R_GJ" presynapticPopulation="M1" postsynapticPopulation="M3R">
      <electricalConnection id="26" preCell="0" postCell="0" synapse="Generic_GJ" preSegment="9" postSegment="1" preFractionAlong="0.7571666254125197" postFractionAlong="0.10343516664876229"/>
    </electricalProjection>
    <projection id="NCXLS_M1_MCR" presynapticPopulation="M1" postsynapticPopulation="MCR" synapse="Acetylcholine">
      <connection id="27" preCellId="../M1/0/M1" postCellId="../MCR/0/MCR" preSegmentId="2" postSegmentId="4" preFractionAlong="0.3941704545835062" postFractionAlong="0.17010688201207602"/>
    </projection>
    <projection id="NCXLS_M1_I5" presynapticPopulation="M1" postsynapticPopulation="I5" synapse="Acetylcholine">
      <connection id="28" preCellId="../M1/0/M1" postCellId="../I5/0/I5" preSegmentId="1" postSegmentId="3" preFractionAlong="0.9098043289501905" postFractionAlong="0.938337202621459"/>
    </projection>
    <projection id="NCXLS_M1_I6" presynapticPopulation="M1" postsynapticPopulation="I6" synapse="Acetylcholine">
      <connection id="29" preCellId="../M1/0/M1" postCellId="../I6/0/I6" preSegmentId="5" postSegmentId="6" preFractionAlong="0.7274357374154816" postFractionAlong="0.30920773652932665"/>
    </projection>
    <projection id="NCXLS_M1_M5" presynapticPopulation="M1" postsynapticPopulation="M5" synapse="Acetylcholine">
      <connection id="30" preCellId="../M1/0/M1" postCellId="../M5/0/M5" preSegmentId="6" postSegmentId="9" preFractionAlong="0.49602989425354427" postFractionAlong="0.3477397822959257"/>
    </projection>
    <projection id="NCXLS_M1_M2L" presynapticPopulation="M1" postsynapticPopulation="M2L" synapse="Acetylcholine">
      <connection id="31" preCellId="../M1/0/M1" postCellId="../M2L/0/M2L" preSegmentId="3" postSegmentId="6" preFractionAlong="0.7015635404895175" postFractionAlong="0.718601662842142"/>
    </projection>
    <projection id="NCXLS_M1_MI" presynapticPopulation="M1" postsynapticPopulation="MI" synapse="Acetylcholine">
      <connection id="32" preCellId="../M1/0/M1" postCellId="../MI/0/MI" preSegmentId="5" postSegmentId="7" preFractionAlong="0.14246314808710858" postFractionAlong="0.6406389213201227"/>
    </projection>
    <projection id="NCXLS_M1_I1R" presynapticPopulation="M1" postsynapticPopulation="I1R" synapse="Acetylcholine">
      <connection id="33" preCellId="../M1/0/M1" postCellId="../I1R/0/I1R" preSegmentId="1" postSegmentId="1" preFractionAlong="0.6115315946147739" postFractionAlong="0.23946477953446677"/>
    </projection>
    <projection id="NCXLS_M1_I3" presynapticPopulation="M1" postsynapticPopulation="I3" synapse="Acetylcholine">
      <connection id="34" preCellId="../M1/0/M1" postCellId="../I3/0/I3" preSegmentId="5" postSegmentId="9" preFractionAlong="0.919558862813285" postFractionAlong="0.6537200927599808"/>
    </projection>
    <projection id="NCXLS_M1_NSML" presynapticPopulation="M1" postsynapticPopulation="NSML" synapse="Acetylcholine">
      <connection id="35" preCellId="../M1/0/M1" postCellId="../NSML/0/NSML" preSegmentId="7" postSegmentId="6" preFractionAlong="0.3354639511826475" postFractionAlong="0.5254405701523811"/>
    </projection>
    <projection id="NCXLS_M1_NSMR" presynapticPopulation="M1" postsynapticPopulation="NSMR" synapse="Acetylcholine">
      <connection id="36" preCellId="../M1/0/M1" postCellId="../NSMR/0/NSMR" preSegmentId="4" postSegmentId="6" preFractionAlong="0.17389217506474486" postFractionAlong="0.565152304677289"/>
    </projection>
    <projection id="NCXLS_M1_M3L" presynapticPopulation="M1" postsynapticPopulation="M3L" synapse="Glutamate">
      <connection id="37" preCellId="../M1/0/M1" postCellId="../M3L/0/M3L" preSegmentId="1" postSegmentId="2" preFractionAlong="0.7608075414310771" postFractionAlong="0.850780382630682"/>
    </projection>
    <projection id="NCXLS_M1_MCL" presynapticPopulation="M1" postsynapticPopulation="MCL" synapse="Acetylcholine">
      <connection id="38" preCellId="../M1/0/M1" postCellId="../MCL/0/MCL" preSegmentId="2" postSegmentId="6" preFractionAlong="0.5515874589482459" postFractionAlong="0.11571239426352209"/>
    </projection>
    <projection id="NCXLS_M1_M4" presynapticPopulation="M1" postsynapticPopulation="M4" synapse="Glutamate">
      <connection id="39" preCellId="../M1/0/M1" postCellId="../M4/0/M4" preSegmentId="8" postSegmentId="9" preFractionAlong="0.4584050530305287" postFractionAlong="0.8486277987209782"/>
    </projection>
    <projection id="NCXLS_M1_I2R" presynapticPopulation="M1" postsynapticPopulation="I2R" synapse="Acetylcholine">
      <connection id="40" preCellId="../M1/0/M1" postCellId="../I2R/0/I2R" preSegmentId="9" postSegmentId="8" preFractionAlong="0.14908974876824777" postFractionAlong="0.9850338450059597"/>
    </projection>
    <projection id="NCXLS_I5_I2R" presynapticPopulation="I5" postsynapticPopulation="I2R" synapse="Acetylcholine">
      <connection id="41" preCellId="../I5/0/I5" postCellId="../I2R/0/I2R" preSegmentId="7" postSegmentId="9" preFractionAlong="0.771313633225014" postFractionAlong="0.4115116028992104"/>
    </projection>
    <projection id="NCXLS_M5_M2R" presynapticPopulation="M5" postsynapticPopulation="M2R" synapse="Acetylcholine">
      <connection id="42" preCellId="../M5/0/M5" postCellId="../M2R/0/M2R" preSegmentId="4" postSegmentId="6" preFractionAlong="0.34160226093303414" postFractionAlong="0.43317704897588727"/>
    </projection>
    <projection id="NCXLS_M5_I2L" presynapticPopulation="M5" postsynapticPopulation="I2L" synapse="Acetylcholine">
      <connection id="43" preCellId="../M5/0/M5" postCellId="../I2L/0/I2L" preSegmentId="8" postSegmentId="1" preFractionAlong="0.1406954238607463" postFractionAlong="0.2196746779947074"/>
    </projection>
    <projection id="NCXLS_M5_I1L" presynapticPopulation="M5" postsynapticPopulation="I1L" synapse="Acetylcholine">
      <connection id="44" preCellId="../M5/0/M5" postCellId="../I1L/0/I1L" preSegmentId="6" postSegmentId="7" preFractionAlong="0.4189408420801276" postFractionAlong="0.779336265319487"/>
    </projection>
    <projection id="NCXLS_M5_I1R" presynapticPopulation="M5" postsynapticPopulation="I1R" synapse="Acetylcholine">
      <connection id="45" preCellId="../M5/0/M5" postCellId="../I1R/0/I1R" preSegmentId="1" postSegmentId="3" preFractionAlong="0.9825487615395994" postFractionAlong="0.18076991930090314"/>
    </projection>
    <projection id="NCXLS_M5_I3" presynapticPopulation="M5" postsynapticPopulation="I3" synapse="Acetylcholine">
      <connection id="46" preCellId="../M5/0/M5" postCellId="../I3/0/I3" preSegmentId="6" postSegmentId="2" preFractionAlong="0.8476451466520427" postFractionAlong="0.5927006378378993"/>
    </projection>
    <electricalProjection id="NCXLS_M2L_M2R_GJ" presynapticPopulation="M2L" postsynapticPopulation="M2R">
      <electricalConnection id="47" preCell="0" postCell="0" synapse="Generic_GJ" preSegment="8" postSegment="7" preFractionAlong="0.5557035407203013" postFractionAlong="0.48474135739969204"/>
    </electricalProjection>
    <projection id="NCXLS_M2L_I2L" presynapticPopulation="M2L" postsynapticPopulation="I2L" synapse="Acetylcholine">
      <connection id="48" preCellId="../M2L/0/M2L" postCellId="../I2L/0/I2L" preSegmentId="8" postSegmentId="4" preFractionAlong="0.9359740847107243" postFractionAlong="0.989206525798093"/>
    </projection>
    <projection id="NCXLS_M2L_I1L" presynapticPopulation="M2L" postsynapticPopulation="I1L" synapse="Acetylcholine">
      <connection id="49" preCellId="../M2L/0/M2L" postCellId="../I1L/0/I1L" preSegmentId="8" postSegmentId="8" preFractionAlong="0.1559262521738315" postFractionAlong="0.2535497759319092"/>
    </projection>
    <electricalProjection id="NCXLS_M2L_M3R_GJ" presynapticPopulation="M2L" postsynapticPopulation="M3R">
      <electricalConnection id="50" preCell="0" postCell="0" synapse="Generic_GJ" preSegment="9" postSegment="1" preFractionAlong="0.7679375516180111" postFractionAlong="0.8529243581784497"/>
    </electricalProjection>
    <projection id="NCXLS_M2L_MI" presynapticPopulation="M2L" postsynapticPopulation="MI" synapse="Acetylcholine">
      <connection id="51" preCellId="../M2L/0/M2L" postCellId="../MI/0/MI" preSegmentId="7" postSegmentId="6" preFractionAlong="0.9642201998380311" postFractionAlong="0.5788730435721895"/>
    </projection>
    <projection id="NCXLS_M2L_I1R" presynapticPopulation="M2L" postsynapticPopulation="I1R" synapse="Acetylcholine">
      <connection id="52" preCellId="../M2L/0/M2L" postCellId="../I1R/0/I1R" preSegmentId="8" postSegmentId="2" preFractionAlong="0.8376706294551841" postFractionAlong="0.2196445430512427"/>
    </projection>
    <projection id="NCXLS_M2L_NSML" presynapticPopulation="M2L" postsynapticPopulation="NSML" synapse="Acetylcholine">
      <connection id="53" preCellId="../M2L/0/M2L" postCellId="../NSML/0/NSML" preSegmentId="4" postSegmentId="8" preFractionAlong="0.8982211239095694" postFractionAlong="0.3129877141804547"/>
    </projection>
    <projection id="NCXLS_M2L_NSMR" presynapticPopulation="M2L" postsynapticPopulation="NSMR" synapse="Acetylcholine">
      <connection id="54" preCellId="../M2L/0/M2L" postCellId="../NSMR/0/NSMR" preSegmentId="3" postSegmentId="3" preFractionAlong="0.46437032018204105" postFractionAlong="0.5161245842024867"/>
    </projection>
    <projection id="NCXLS_M2L_M3L" presynapticPopulation="M2L" postsynapticPopulation="M3L" synapse="Glutamate">
      <connection id="55" preCellId="../M2L/0/M2L" postCellId="../M3L/0/M3L" preSegmentId="9" postSegmentId="9" preFractionAlong="0.04516775649747773" postFractionAlong="0.6532579594838668"/>
    </projection>
    <projection id="NCXLS_M2L_M4" presynapticPopulation="M2L" postsynapticPopulation="M4" synapse="Glutamate">
      <connection id="56" preCellId="../M2L/0/M2L" postCellId="../M4/0/M4" preSegmentId="9" postSegmentId="6" preFractionAlong="0.7792031367651079" postFractionAlong="0.19074826370580278"/>
    </projection>
    <projection id="NCXLS_M2L_I2R" presynapticPopulation="M2L" postsynapticPopulation="I2R" synapse="Acetylcholine">
      <connection id="57" preCellId="../M2L/0/M2L" postCellId="../I2R/0/I2R" preSegmentId="5" postSegmentId="6" preFractionAlong="0.5129607482592392" postFractionAlong="0.24623710120620945"/>
    </projection>
    <projection id="NCXLS_NSML_I1L" presynapticPopulation="NSML" postsynapticPopulation="I1L" synapse="Serotonin_Glutamate">
      <connection id="58" preCellId="../NSML/0/NSML" postCellId="../I1L/0/I1L" preSegmentId="7" postSegmentId="2" preFractionAlong="0.3138187803271616" postFractionAlong="0.2451530295515314"/>
    </projection>
    <projection id="NCXLS_NSML_I1R" presynapticPopulation="NSML" postsynapticPopulation="I1R" synapse="Serotonin_Glutamate">
      <connection id="59" preCellId="../NSML/0/NSML" postCellId="../I1R/0/I1R" preSegmentId="1" postSegmentId="8" preFractionAlong="0.017592487993914885" postFractionAlong="0.2680117320860753"/>
    </projection>
    <projection id="NCXLS_NSMR_I1L" presynapticPopulation="NSMR" postsynapticPopulation="I1L" synapse="Serotonin_Glutamate">
      <connection id="60" preCellId="../NSMR/0/NSMR" postCellId="../I1L/0/I1L" preSegmentId="3" postSegmentId="6" preFractionAlong="0.7869900833848252" postFractionAlong="0.3342633747792092"/>
    </projection>
    <projection id="NCXLS_NSMR_I1R" presynapticPopulation="NSMR" postsynapticPopulation="I1R" synapse="Serotonin_Glutamate">
      <connection id="61" preCellId="../NSMR/0/NSMR" postCellId="../I1R/0/I1R" preSegmentId="5" postSegmentId="7" preFractionAlong="0.6149100858019407" postFractionAlong="0.8223635138124306"/>
    </projection>
    <electricalProjection id="NCXLS_M3L_M2R_GJ" presynapticPopulation="M3L" postsynapticPopulation="M2R">
      <electricalConnection id="62" preCell="0" postCell="0" synapse="Generic_GJ" preSegment="5" postSegment="9" preFractionAlong="0.3711116637765881" postFractionAlong="0.6974990360370945"/>
    </electricalProjection>
    <projection id="NCXLS_M3L_I2L" presynapticPopulation="M3L" postsynapticPopulation="I2L" synapse="Acetylcholine">
      <connection id="63" preCellId="../M3L/0/M3L" postCellId="../I2L/0/I2L" preSegmentId="8" postSegmentId="5" preFractionAlong="0.02910145132297659" postFractionAlong="0.023099673424247125"/>
    </projection>
    <projection id="NCXLS_M3L_I1L" presynapticPopulation="M3L" postsynapticPopulation="I1L" synapse="Acetylcholine">
      <connection id="64" preCellId="../M3L/0/M3L" postCellId="../I1L/0/I1L" preSegmentId="8" postSegmentId="9" preFractionAlong="0.7890048845606946" postFractionAlong="0.33021522516002744"/>
    </projection>
    <projection id="NCXLS_M3L_MCR" presynapticPopulation="M3L" postsynapticPopulation="MCR" synapse="Acetylcholine">
      <connection id="65" preCellId="../M3L/0/M3L" postCellId="../MCR/0/MCR" preSegmentId="7" postSegmentId="6" preFractionAlong="0.4048930968230663" postFractionAlong="0.17024942596174208"/>
    </projection>
    <projection id="NCXLS_M3L_M5" presynapticPopulation="M3L" postsynapticPopulation="M5" synapse="Glutamate">
      <connection id="66" preCellId="../M3L/0/M3L" postCellId="../M5/0/M5" preSegmentId="1" postSegmentId="4" preFractionAlong="0.6487218801549056" postFractionAlong="0.39019596724990235"/>
    </projection>
    <projection id="NCXLS_M3L_M2L" presynapticPopulation="M3L" postsynapticPopulation="M2L" synapse="Acetylcholine">
      <connection id="67" preCellId="../M3L/0/M3L" postCellId="../M2L/0/M2L" preSegmentId="2" postSegmentId="4" preFractionAlong="0.6265463217476971" postFractionAlong="0.0812805233206938"/>
    </projection>
    <projection id="NCXLS_M3L_I1R" presynapticPopulation="M3L" postsynapticPopulation="I1R" synapse="Acetylcholine">
      <connection id="68" preCellId="../M3L/0/M3L" postCellId="../I1R/0/I1R" preSegmentId="2" postSegmentId="2" preFractionAlong="0.779711525180385" postFractionAlong="0.1168347364106812"/>
    </projection>
    <projection id="NCXLS_M3L_I3" presynapticPopulation="M3L" postsynapticPopulation="I3" synapse="Acetylcholine">
      <connection id="69" preCellId="../M3L/0/M3L" postCellId="../I3/0/I3" preSegmentId="7" postSegmentId="1" preFractionAlong="0.30744959496135194" postFractionAlong="0.55939524463847"/>
    </projection>
    <projection id="NCXLS_M3L_NSML" presynapticPopulation="M3L" postsynapticPopulation="NSML" synapse="Acetylcholine">
      <connection id="70" preCellId="../M3L/0/M3L" postCellId="../NSML/0/NSML" preSegmentId="7" postSegmentId="7" preFractionAlong="0.34544638580551346" postFractionAlong="0.7612714296253603"/>
    </projection>
    <projection id="NCXLS_M3L_NSMR" presynapticPopulation="M3L" postsynapticPopulation="NSMR" synapse="Acetylcholine">
      <connection id="71" preCellId="../M3L/0/M3L" postCellId="../NSMR/0/NSMR" preSegmentId="8" postSegmentId="2" preFractionAlong="0.957868559877576" postFractionAlong="0.1578008770256658"/>
    </projection>
    <projection id="NCXLS_MCL_I4" presynapticPopulation="MCL" postsynapticPopulation="I4" synapse="Acetylcholine">
      <connection id="72" preCellId="../MCL/0/MCL" postCellId="../I4/0/I4" preSegmentId="7" postSegmentId="3" preFractionAlong="0.8068713932688795" postFractionAlong="0.6247957073338625"/>
    </projection>
    <projection id="NCXLS_MCL_M1" presynapticPopulation="MCL" postsynapticPopulation="M1" synapse="Acetylcholine">
      <connection id="73" preCellId="../MCL/0/MCL" postCellId="../M1/0/M1" preSegmentId="4" postSegmentId="7" preFractionAlong="0.12400299462414255" postFractionAlong="0.9218536737859097"/>
    </projection>
    <projection id="NCXLS_MCL_I5" presynapticPopulation="MCL" postsynapticPopulation="I5" synapse="Acetylcholine">
      <connection id="74" preCellId="../MCL/0/MCL" postCellId="../I5/0/I5" preSegmentId="8" postSegmentId="9" preFractionAlong="0.5736665975490097" postFractionAlong="0.9142087896808119"/>
    </projection>
    <projection id="NCXLS_MCL_I6" presynapticPopulation="MCL" postsynapticPopulation="I6" synapse="Acetylcholine">
      <connection id="75" preCellId="../MCL/0/MCL" postCellId="../I6/0/I6" preSegmentId="1" postSegmentId="9" preFractionAlong="0.5437014196449175" postFractionAlong="0.4716528013283886"/>
    </projection>
    <projection id="NCXLS_M4_I4" presynapticPopulation="M4" postsynapticPopulation="I4" synapse="Acetylcholine">
      <connection id="76" preCellId="../M4/0/M4" postCellId="../I4/0/I4" preSegmentId="3" postSegmentId="6" preFractionAlong="0.4086576822098361" postFractionAlong="0.05259147124067853"/>
    </projection>
    <projection id="NCXLS_M4_I5" presynapticPopulation="M4" postsynapticPopulation="I5" synapse="Acetylcholine">
      <connection id="77" preCellId="../M4/0/M4" postCellId="../I5/0/I5" preSegmentId="8" postSegmentId="2" preFractionAlong="0.9880866567365598" postFractionAlong="0.4384188647019115"/>
    </projection>
    <projection id="NCXLS_M4_I6" presynapticPopulation="M4" postsynapticPopulation="I6" synapse="Acetylcholine">
      <connection id="78" preCellId="../M4/0/M4" postCellId="../I6/0/I6" preSegmentId="1" postSegmentId="2" preFractionAlong="0.7930617209035477" postFractionAlong="0.3983103678635713"/>
    </projection>
    <projection id="NCXLS_M4_MI" presynapticPopulation="M4" postsynapticPopulation="MI" synapse="Acetylcholine">
      <connection id="79" preCellId="../M4/0/M4" postCellId="../MI/0/MI" preSegmentId="2" postSegmentId="9" preFractionAlong="0.9155167287166966" postFractionAlong="0.8525106362892052"/>
    </projection>
    <projection id="NCXLS_M4_MCL" presynapticPopulation="M4" postsynapticPopulation="MCL" synapse="Acetylcholine">
      <connection id="80" preCellId="../M4/0/M4" postCellId="../MCL/0/MCL" preSegmentId="9" postSegmentId="7" preFractionAlong="0.9307257945453972" postFractionAlong="0.9324277829788153"/>
    </projection>
    <projection id="NCXLS_M4_I2R" presynapticPopulation="M4" postsynapticPopulation="I2R" synapse="Acetylcholine">
      <connection id="81" preCellId="../M4/0/M4" postCellId="../I2R/0/I2R" preSegmentId="5" postSegmentId="2" preFractionAlong="0.12537888410818765" postFractionAlong="0.16055781076317022"/>
    </projection>
  </network>
</neuroml>
