<?xml version='1.0' encoding='UTF-8'?>
<neuroml xmlns="http://www.neuroml.org/schema/neuroml2" xmlns:xsi="http://www.w3.org/2001/XMLSchema-instance" xsi:schemaLocation="http://www.neuroml.org/schema/neuroml2 https://raw.githubusercontent.com/NeuroML/NeuroML2/development/Schemas/NeuroML2/NeuroML_v2beta4.xsd" id="gvft_network_bio_prior_lamW_0.411_DF_0.037_t90.net">
  <notes>NeuroML2 network generated from GVFT simulation on 2025-05-04 00:15:20
</notes>
  <include href="M3R.cell.nml"/>
  <include href="M1.cell.nml"/>
  <include href="I2L.cell.nml"/>
  <include href="MCL.cell.nml"/>
  <include href="I6.cell.nml"/>
  <include href="I5.cell.nml"/>
  <include href="M4.cell.nml"/>
  <include href="I1R.cell.nml"/>
  <include href="MCR.cell.nml"/>
  <include href="I3.cell.nml"/>
  <include href="M3L.cell.nml"/>
  <include href="NSML.cell.nml"/>
  <include href="M2L.cell.nml"/>
  <include href="M5.cell.nml"/>
  <include href="I4.cell.nml"/>
  <include href="MI.cell.nml"/>
  <include href="NSMR.cell.nml"/>
  <include href="I2R.cell.nml"/>
  <include href="M2R.cell.nml"/>
  <include href="I1L.cell.nml"/>
  <include href="Serotonin_Glutamate.synapse.nml"/>
  <include href="Acetylcholine.synapse.nml"/>
  <include href="Generic_GJ.synapse.nml"/>
  <include href="Glutamate.synapse.nml"/>
  <network id="gvft_network_bio_prior_lamW_0.411_DF_0.037_t90.net" type="networkWithTemperature" temperature="20.0 degC">
    <population id="M1" component="M1" type="populationList" size="1">
      <instance id="0">
        <location x="-0.5075377" y="-0.919598" z="0.0"/>
      </instance>
    </population>
    <population id="M2L" component="M2L" type="populationList" size="1">
      <instance id="0">
        <location x="0.4874372" y="-0.6080402" z="0.0"/>
      </instance>
    </population>
    <population id="M2R" component="M2R" type="populationList" size="1">
      <instance id="0">
        <location x="0.69849247" y="-0.2964824" z="0.0"/>
      </instance>
    </population>
    <population id="M3L" component="M3L" type="populationList" size="1">
      <instance id="0">
        <location x="0.44723618" y="-0.095477395" z="0.0"/>
      </instance>
    </population>
    <population id="M3R" component="M3R" type="populationList" size="1">
      <instance id="0">
        <location x="-0.24623117" y="-0.43718594" z="0.0"/>
      </instance>
    </population>
    <population id="M4" component="M4" type="populationList" size="1">
      <instance id="0">
        <location x="0.0050251363" y="-0.879397" z="0.0"/>
      </instance>
    </population>
    <population id="M5" component="M5" type="populationList" size="1">
      <instance id="0">
        <location x="-0.30653268" y="0.04522614" z="0.0"/>
      </instance>
    </population>
    <population id="I1L" component="I1L" type="populationList" size="1">
      <instance id="0">
        <location x="-0.51758796" y="0.14572865" z="0.0"/>
      </instance>
    </population>
    <population id="I1R" component="I1R" type="populationList" size="1">
      <instance id="0">
        <location x="-0.71859294" y="0.9798995" z="0.0"/>
      </instance>
    </population>
    <population id="I2L" component="I2L" type="populationList" size="1">
      <instance id="0">
        <location x="-0.3266332" y="0.8592965" z="0.0"/>
      </instance>
    </population>
    <population id="I2R" component="I2R" type="populationList" size="1">
      <instance id="0">
        <location x="0.35678393" y="-0.46733668" z="0.0"/>
      </instance>
    </population>
    <population id="I3" component="I3" type="populationList" size="1">
      <instance id="0">
        <location x="0.41708544" y="0.2964824" z="0.0"/>
      </instance>
    </population>
    <population id="I4" component="I4" type="populationList" size="1">
      <instance id="0">
        <location x="0.6080402" y="0.5075377" z="0.0"/>
      </instance>
    </population>
    <population id="I5" component="I5" type="populationList" size="1">
      <instance id="0">
        <location x="0.16582915" y="-0.38693467" z="0.0"/>
      </instance>
    </population>
    <population id="I6" component="I6" type="populationList" size="1">
      <instance id="0">
        <location x="0.23618092" y="-0.9698492" z="0.0"/>
      </instance>
    </population>
    <population id="MCL" component="MCL" type="populationList" size="1">
      <instance id="0">
        <location x="0.9798995" y="0.33668342" z="0.0"/>
      </instance>
    </population>
    <population id="MCR" component="MCR" type="populationList" size="1">
      <instance id="0">
        <location x="-0.9396985" y="-0.26633167" z="0.0"/>
      </instance>
    </population>
    <population id="MI" component="MI" type="populationList" size="1">
      <instance id="0">
        <location x="0.0050251363" y="0.24623117" z="0.0"/>
      </instance>
    </population>
    <population id="NSML" component="NSML" type="populationList" size="1">
      <instance id="0">
        <location x="-0.919598" y="-0.2964824" z="0.0"/>
      </instance>
    </population>
    <population id="NSMR" component="NSMR" type="populationList" size="1">
      <instance id="0">
        <location x="-0.2562814" y="0.1557789" z="0.0"/>
      </instance>
    </population>
    <projection id="NCXLS_MCR_I2L" presynapticPopulation="MCR" postsynapticPopulation="I2L" synapse="Acetylcholine">
      <connection id="0" preCellId="../MCR/0/MCR" postCellId="../I2L/0/I2L" preSegmentId="1" postSegmentId="5" preFractionAlong="0.3089203495949695" postFractionAlong="0.4545078900704814"/>
    </projection>
    <projection id="NCXLS_MCR_NSMR" presynapticPopulation="MCR" postsynapticPopulation="NSMR" synapse="Acetylcholine">
      <connection id="1" preCellId="../MCR/0/MCR" postCellId="../NSMR/0/NSMR" preSegmentId="4" postSegmentId="7" preFractionAlong="0.18798387207603384" postFractionAlong="0.5408595788250777"/>
    </projection>
    <projection id="NCXLS_MCR_I1L" presynapticPopulation="MCR" postsynapticPopulation="I1L" synapse="Acetylcholine">
      <connection id="2" preCellId="../MCR/0/MCR" postCellId="../I1L/0/I1L" preSegmentId="5" postSegmentId="9" preFractionAlong="0.1866839259143167" postFractionAlong="0.4063998528544974"/>
    </projection>
    <projection id="NCXLS_MCR_I1R" presynapticPopulation="MCR" postsynapticPopulation="I1R" synapse="Acetylcholine">
      <connection id="3" preCellId="../MCR/0/MCR" postCellId="../I1R/0/I1R" preSegmentId="7" postSegmentId="9" preFractionAlong="0.18920900530577645" postFractionAlong="0.6169011290397374"/>
    </projection>
    <projection id="NCXLS_M5_MCR" presynapticPopulation="M5" postsynapticPopulation="MCR" synapse="Acetylcholine">
      <connection id="4" preCellId="../M5/0/M5" postCellId="../MCR/0/MCR" preSegmentId="2" postSegmentId="8" preFractionAlong="0.5577047619066712" postFractionAlong="0.29029748304403435"/>
    </projection>
    <projection id="NCXLS_M5_I1L" presynapticPopulation="M5" postsynapticPopulation="I1L" synapse="Acetylcholine">
      <connection id="5" preCellId="../M5/0/M5" postCellId="../I1L/0/I1L" preSegmentId="5" postSegmentId="6" preFractionAlong="0.9707281639857944" postFractionAlong="0.2547923557313042"/>
    </projection>
    <projection id="NCXLS_M5_NSML" presynapticPopulation="M5" postsynapticPopulation="NSML" synapse="Acetylcholine">
      <connection id="6" preCellId="../M5/0/M5" postCellId="../NSML/0/NSML" preSegmentId="3" postSegmentId="7" preFractionAlong="0.2391767948573762" postFractionAlong="0.5900933994880078"/>
    </projection>
    <projection id="NCXLS_M5_I1R" presynapticPopulation="M5" postsynapticPopulation="I1R" synapse="Acetylcholine">
      <connection id="7" preCellId="../M5/0/M5" postCellId="../I1R/0/I1R" preSegmentId="7" postSegmentId="8" preFractionAlong="0.3627366479724836" postFractionAlong="0.01692935242553506"/>
    </projection>
    <electricalProjection id="NCXLS_M5_M1_GJ" presynapticPopulation="M5" postsynapticPopulation="M1">
      <electricalConnection id="8" preCell="0" postCell="0" synapse="Generic_GJ" preSegment="4" postSegment="9" preFractionAlong="0.0013198689843296751" postFractionAlong="0.307943707661932"/>
    </electricalProjection>
    <projection id="NCXLS_NSMR_I2L" presynapticPopulation="NSMR" postsynapticPopulation="I2L" synapse="Serotonin_Glutamate">
      <connection id="9" preCellId="../NSMR/0/NSMR" postCellId="../I2L/0/I2L" preSegmentId="6" postSegmentId="1" preFractionAlong="0.3934481532236358" postFractionAlong="0.13185198964339695"/>
    </projection>
    <projection id="NCXLS_NSMR_I1L" presynapticPopulation="NSMR" postsynapticPopulation="I1L" synapse="Serotonin_Glutamate">
      <connection id="10" preCellId="../NSMR/0/NSMR" postCellId="../I1L/0/I1L" preSegmentId="8" postSegmentId="8" preFractionAlong="0.69244035251813" postFractionAlong="0.6301855690545725"/>
    </projection>
    <projection id="NCXLS_NSMR_I1R" presynapticPopulation="NSMR" postsynapticPopulation="I1R" synapse="Serotonin_Glutamate">
      <connection id="11" preCellId="../NSMR/0/NSMR" postCellId="../I1R/0/I1R" preSegmentId="5" postSegmentId="1" preFractionAlong="0.45200828798708115" postFractionAlong="0.5190917303397282"/>
    </projection>
    <projection id="NCXLS_MI_I3" presynapticPopulation="MI" postsynapticPopulation="I3" synapse="Acetylcholine">
      <connection id="12" preCellId="../MI/0/MI" postCellId="../I3/0/I3" preSegmentId="7" postSegmentId="7" preFractionAlong="0.42770117081923853" postFractionAlong="0.7015993498995969"/>
    </projection>
    <projection id="NCXLS_MI_M3L" presynapticPopulation="MI" postsynapticPopulation="M3L" synapse="Serotonin_Glutamate">
      <connection id="13" preCellId="../MI/0/MI" postCellId="../M3L/0/M3L" preSegmentId="3" postSegmentId="2" preFractionAlong="0.3385859719415736" postFractionAlong="0.22417227674690177"/>
    </projection>
    <projection id="NCXLS_MI_MCL" presynapticPopulation="MI" postsynapticPopulation="MCL" synapse="Serotonin_Glutamate">
      <connection id="14" preCellId="../MI/0/MI" postCellId="../MCL/0/MCL" preSegmentId="1" postSegmentId="4" preFractionAlong="0.24637133314762727" postFractionAlong="0.3948569655282109"/>
    </projection>
    <projection id="NCXLS_MI_M2R" presynapticPopulation="MI" postsynapticPopulation="M2R" synapse="Serotonin_Glutamate">
      <connection id="15" preCellId="../MI/0/MI" postCellId="../M2R/0/M2R" preSegmentId="1" postSegmentId="6" preFractionAlong="0.8917917114831578" postFractionAlong="0.3155474736449152"/>
    </projection>
    <projection id="NCXLS_MI_I4" presynapticPopulation="MI" postsynapticPopulation="I4" synapse="Glutamate">
      <connection id="16" preCellId="../MI/0/MI" postCellId="../I4/0/I4" preSegmentId="3" postSegmentId="9" preFractionAlong="0.7298740126426408" postFractionAlong="0.7492753368241044"/>
    </projection>
    <projection id="NCXLS_M3L_MCR" presynapticPopulation="M3L" postsynapticPopulation="MCR" synapse="Acetylcholine">
      <connection id="17" preCellId="../M3L/0/M3L" postCellId="../MCR/0/MCR" preSegmentId="9" postSegmentId="8" preFractionAlong="0.4683243073685551" postFractionAlong="0.8618281308246027"/>
    </projection>
    <projection id="NCXLS_M3L_M5" presynapticPopulation="M3L" postsynapticPopulation="M5" synapse="Acetylcholine">
      <connection id="18" preCellId="../M3L/0/M3L" postCellId="../M5/0/M5" preSegmentId="1" postSegmentId="5" preFractionAlong="0.6834527434210503" postFractionAlong="0.5879337330342645"/>
    </projection>
    <projection id="NCXLS_M3L_NSMR" presynapticPopulation="M3L" postsynapticPopulation="NSMR" synapse="Acetylcholine">
      <connection id="19" preCellId="../M3L/0/M3L" postCellId="../NSMR/0/NSMR" preSegmentId="1" postSegmentId="3" preFractionAlong="0.3905743775924688" postFractionAlong="0.31807654442812994"/>
    </projection>
    <projection id="NCXLS_M3L_I1L" presynapticPopulation="M3L" postsynapticPopulation="I1L" synapse="Acetylcholine">
      <connection id="20" preCellId="../M3L/0/M3L" postCellId="../I1L/0/I1L" preSegmentId="5" postSegmentId="2" preFractionAlong="0.23277228357521673" postFractionAlong="0.9235936304613274"/>
    </projection>
    <projection id="NCXLS_M3L_MI" presynapticPopulation="M3L" postsynapticPopulation="MI" synapse="Acetylcholine">
      <connection id="21" preCellId="../M3L/0/M3L" postCellId="../MI/0/MI" preSegmentId="1" postSegmentId="7" preFractionAlong="0.3161015817828243" postFractionAlong="0.7633390532427098"/>
    </projection>
    <projection id="NCXLS_M3L_I5" presynapticPopulation="M3L" postsynapticPopulation="I5" synapse="Acetylcholine">
      <connection id="22" preCellId="../M3L/0/M3L" postCellId="../I5/0/I5" preSegmentId="7" postSegmentId="8" preFractionAlong="0.5265247107711399" postFractionAlong="0.2503345637346731"/>
    </projection>
    <projection id="NCXLS_M3L_NSML" presynapticPopulation="M3L" postsynapticPopulation="NSML" synapse="Acetylcholine">
      <connection id="23" preCellId="../M3L/0/M3L" postCellId="../NSML/0/NSML" preSegmentId="7" postSegmentId="1" preFractionAlong="0.1993405342625726" postFractionAlong="0.8223910929462823"/>
    </projection>
    <projection id="NCXLS_M3L_I2R" presynapticPopulation="M3L" postsynapticPopulation="I2R" synapse="Acetylcholine">
      <connection id="24" preCellId="../M3L/0/M3L" postCellId="../I2R/0/I2R" preSegmentId="4" postSegmentId="8" preFractionAlong="0.5963597582193679" postFractionAlong="0.3441718831678193"/>
    </projection>
    <projection id="NCXLS_M3L_M3R" presynapticPopulation="M3L" postsynapticPopulation="M3R" synapse="Glutamate">
      <connection id="25" preCellId="../M3L/0/M3L" postCellId="../M3R/0/M3R" preSegmentId="5" postSegmentId="4" preFractionAlong="0.07369125237043472" postFractionAlong="0.9414255948352722"/>
    </projection>
    <projection id="NCXLS_M3L_M2L" presynapticPopulation="M3L" postsynapticPopulation="M2L" synapse="Acetylcholine">
      <connection id="26" preCellId="../M3L/0/M3L" postCellId="../M2L/0/M2L" preSegmentId="7" postSegmentId="3" preFractionAlong="0.20360271573465483" postFractionAlong="0.28093743834221874"/>
    </projection>
    <projection id="NCXLS_M3L_M4" presynapticPopulation="M3L" postsynapticPopulation="M4" synapse="Glutamate">
      <connection id="27" preCellId="../M3L/0/M3L" postCellId="../M4/0/M4" preSegmentId="8" postSegmentId="1" preFractionAlong="0.8957434451243126" postFractionAlong="0.18817159584612386"/>
    </projection>
    <electricalProjection id="NCXLS_M3L_M1_GJ" presynapticPopulation="M3L" postsynapticPopulation="M1">
      <electricalConnection id="28" preCell="0" postCell="0" synapse="Generic_GJ" preSegment="2" postSegment="2" preFractionAlong="0.5862207115272452" postFractionAlong="0.9192542465263115"/>
    </electricalProjection>
    <projection id="NCXLS_M3L_I6" presynapticPopulation="M3L" postsynapticPopulation="I6" synapse="Acetylcholine">
      <connection id="29" preCellId="../M3L/0/M3L" postCellId="../I6/0/I6" preSegmentId="6" postSegmentId="4" preFractionAlong="0.1900854125998448" postFractionAlong="0.6517744788191033"/>
    </projection>
    <projection id="NCXLS_NSML_I2L" presynapticPopulation="NSML" postsynapticPopulation="I2L" synapse="Serotonin_Glutamate">
      <connection id="30" preCellId="../NSML/0/NSML" postCellId="../I2L/0/I2L" preSegmentId="2" postSegmentId="2" preFractionAlong="0.45253364402930063" postFractionAlong="0.5065538158814177"/>
    </projection>
    <projection id="NCXLS_NSML_MCR" presynapticPopulation="NSML" postsynapticPopulation="MCR" synapse="Serotonin_Glutamate">
      <connection id="31" preCellId="../NSML/0/NSML" postCellId="../MCR/0/MCR" preSegmentId="5" postSegmentId="4" preFractionAlong="0.11471232218718319" postFractionAlong="0.9428054879896225"/>
    </projection>
    <projection id="NCXLS_NSML_I1R" presynapticPopulation="NSML" postsynapticPopulation="I1R" synapse="Serotonin_Glutamate">
      <connection id="32" preCellId="../NSML/0/NSML" postCellId="../I1R/0/I1R" preSegmentId="7" postSegmentId="7" preFractionAlong="0.9230008393898834" postFractionAlong="0.3258354395041454"/>
    </projection>
    <projection id="NCXLS_MCL_I2R" presynapticPopulation="MCL" postsynapticPopulation="I2R" synapse="Acetylcholine">
      <connection id="33" preCellId="../MCL/0/MCL" postCellId="../I2R/0/I2R" preSegmentId="4" postSegmentId="1" preFractionAlong="0.7807732348871894" postFractionAlong="0.3637860515990571"/>
    </projection>
    <projection id="NCXLS_MCL_M2R" presynapticPopulation="MCL" postsynapticPopulation="M2R" synapse="Acetylcholine">
      <connection id="34" preCellId="../MCL/0/MCL" postCellId="../M2R/0/M2R" preSegmentId="9" postSegmentId="8" preFractionAlong="0.5888825052029606" postFractionAlong="0.5762805932836943"/>
    </projection>
    <projection id="NCXLS_MCL_M2L" presynapticPopulation="MCL" postsynapticPopulation="M2L" synapse="Acetylcholine">
      <connection id="35" preCellId="../MCL/0/MCL" postCellId="../M2L/0/M2L" preSegmentId="7" postSegmentId="8" preFractionAlong="0.24907683217159182" postFractionAlong="0.5718392898565416"/>
    </projection>
    <projection id="NCXLS_MCL_M4" presynapticPopulation="MCL" postsynapticPopulation="M4" synapse="Acetylcholine">
      <connection id="36" preCellId="../MCL/0/MCL" postCellId="../M4/0/M4" preSegmentId="6" postSegmentId="6" preFractionAlong="0.5819603540191924" postFractionAlong="0.9089979943728113"/>
    </projection>
    <projection id="NCXLS_MCL_I6" presynapticPopulation="MCL" postsynapticPopulation="I6" synapse="Acetylcholine">
      <connection id="37" preCellId="../MCL/0/MCL" postCellId="../I6/0/I6" preSegmentId="2" postSegmentId="6" preFractionAlong="0.07165061423148467" postFractionAlong="0.9435035356332391"/>
    </projection>
    <projection id="NCXLS_M2R_I2L" presynapticPopulation="M2R" postsynapticPopulation="I2L" synapse="Acetylcholine">
      <connection id="38" preCellId="../M2R/0/M2R" postCellId="../I2L/0/I2L" preSegmentId="6" postSegmentId="4" preFractionAlong="0.838881080505121" postFractionAlong="0.3668683942862294"/>
    </projection>
    <projection id="NCXLS_M2R_MCR" presynapticPopulation="M2R" postsynapticPopulation="MCR" synapse="Acetylcholine">
      <connection id="39" preCellId="../M2R/0/M2R" postCellId="../MCR/0/MCR" preSegmentId="4" postSegmentId="3" preFractionAlong="0.22239143551203222" postFractionAlong="0.9521738374562813"/>
    </projection>
    <projection id="NCXLS_M2R_M5" presynapticPopulation="M2R" postsynapticPopulation="M5" synapse="Acetylcholine">
      <connection id="40" preCellId="../M2R/0/M2R" postCellId="../M5/0/M5" preSegmentId="6" postSegmentId="4" preFractionAlong="0.9982689762040686" postFractionAlong="0.049188990232022056"/>
    </projection>
    <projection id="NCXLS_M2R_I3" presynapticPopulation="M2R" postsynapticPopulation="I3" synapse="Acetylcholine">
      <connection id="41" preCellId="../M2R/0/M2R" postCellId="../I3/0/I3" preSegmentId="5" postSegmentId="7" preFractionAlong="0.30063192858167553" postFractionAlong="0.5713515657069453"/>
    </projection>
    <projection id="NCXLS_M2R_NSMR" presynapticPopulation="M2R" postsynapticPopulation="NSMR" synapse="Acetylcholine">
      <connection id="42" preCellId="../M2R/0/M2R" postCellId="../NSMR/0/NSMR" preSegmentId="9" postSegmentId="4" preFractionAlong="0.7839123805872337" postFractionAlong="0.3324477182476383"/>
    </projection>
    <projection id="NCXLS_M2R_I1L" presynapticPopulation="M2R" postsynapticPopulation="I1L" synapse="Acetylcholine">
      <connection id="43" preCellId="../M2R/0/M2R" postCellId="../I1L/0/I1L" preSegmentId="5" postSegmentId="6" preFractionAlong="0.7156392360669593" postFractionAlong="0.8890421176901612"/>
    </projection>
    <projection id="NCXLS_M2R_MI" presynapticPopulation="M2R" postsynapticPopulation="MI" synapse="Acetylcholine">
      <connection id="44" preCellId="../M2R/0/M2R" postCellId="../MI/0/MI" preSegmentId="3" postSegmentId="6" preFractionAlong="0.6083090281035596" postFractionAlong="0.3883931803838869"/>
    </projection>
    <projection id="NCXLS_M2R_I5" presynapticPopulation="M2R" postsynapticPopulation="I5" synapse="Acetylcholine">
      <connection id="45" preCellId="../M2R/0/M2R" postCellId="../I5/0/I5" preSegmentId="8" postSegmentId="8" preFractionAlong="0.877545542559473" postFractionAlong="0.10378192817667187"/>
    </projection>
    <projection id="NCXLS_M2R_M3L" presynapticPopulation="M2R" postsynapticPopulation="M3L" synapse="Acetylcholine">
      <connection id="46" preCellId="../M2R/0/M2R" postCellId="../M3L/0/M3L" preSegmentId="9" postSegmentId="5" preFractionAlong="0.7761165984135006" postFractionAlong="0.431651762593961"/>
    </projection>
    <projection id="NCXLS_M2R_NSML" presynapticPopulation="M2R" postsynapticPopulation="NSML" synapse="Acetylcholine">
      <connection id="47" preCellId="../M2R/0/M2R" postCellId="../NSML/0/NSML" preSegmentId="5" postSegmentId="1" preFractionAlong="0.4113226968232696" postFractionAlong="0.6028447467863508"/>
    </projection>
    <projection id="NCXLS_M2R_MCL" presynapticPopulation="M2R" postsynapticPopulation="MCL" synapse="Acetylcholine">
      <connection id="48" preCellId="../M2R/0/M2R" postCellId="../MCL/0/MCL" preSegmentId="1" postSegmentId="7" preFractionAlong="0.4929924291045318" postFractionAlong="0.20849447495426054"/>
    </projection>
    <projection id="NCXLS_M2R_M3R" presynapticPopulation="M2R" postsynapticPopulation="M3R" synapse="Acetylcholine">
      <connection id="49" preCellId="../M2R/0/M2R" postCellId="../M3R/0/M3R" preSegmentId="2" postSegmentId="5" preFractionAlong="0.3609714559862718" postFractionAlong="0.1456520910643565"/>
    </projection>
    <projection id="NCXLS_M2R_I1R" presynapticPopulation="M2R" postsynapticPopulation="I1R" synapse="Acetylcholine">
      <connection id="50" preCellId="../M2R/0/M2R" postCellId="../I1R/0/I1R" preSegmentId="7" postSegmentId="6" preFractionAlong="0.3440997640297365" postFractionAlong="0.9904716723472566"/>
    </projection>
    <projection id="NCXLS_M2R_I4" presynapticPopulation="M2R" postsynapticPopulation="I4" synapse="Acetylcholine">
      <connection id="51" preCellId="../M2R/0/M2R" postCellId="../I4/0/I4" preSegmentId="4" postSegmentId="1" preFractionAlong="0.8417057652229475" postFractionAlong="0.1701012461881699"/>
    </projection>
    <projection id="NCXLS_M3R_I3" presynapticPopulation="M3R" postsynapticPopulation="I3" synapse="Acetylcholine">
      <connection id="52" preCellId="../M3R/0/M3R" postCellId="../I3/0/I3" preSegmentId="5" postSegmentId="8" preFractionAlong="0.6677560251985356" postFractionAlong="0.8547783462955792"/>
    </projection>
    <projection id="NCXLS_M3R_I5" presynapticPopulation="M3R" postsynapticPopulation="I5" synapse="Acetylcholine">
      <connection id="53" preCellId="../M3R/0/M3R" postCellId="../I5/0/I5" preSegmentId="1" postSegmentId="3" preFractionAlong="0.5799833204520839" postFractionAlong="0.23746890722274572"/>
    </projection>
    <projection id="NCXLS_M3R_M3L" presynapticPopulation="M3R" postsynapticPopulation="M3L" synapse="Glutamate">
      <connection id="54" preCellId="../M3R/0/M3R" postCellId="../M3L/0/M3L" preSegmentId="1" postSegmentId="6" preFractionAlong="0.9971731279111168" postFractionAlong="0.5660475729241843"/>
    </projection>
    <projection id="NCXLS_M3R_MCL" presynapticPopulation="M3R" postsynapticPopulation="MCL" synapse="Acetylcholine">
      <connection id="55" preCellId="../M3R/0/M3R" postCellId="../MCL/0/MCL" preSegmentId="6" postSegmentId="2" preFractionAlong="0.25107902402934534" postFractionAlong="0.49967024372905344"/>
    </projection>
    <projection id="NCXLS_M3R_I2R" presynapticPopulation="M3R" postsynapticPopulation="I2R" synapse="Acetylcholine">
      <connection id="56" preCellId="../M3R/0/M3R" postCellId="../I2R/0/I2R" preSegmentId="4" postSegmentId="4" preFractionAlong="0.4417964904426055" postFractionAlong="0.7427908347497"/>
    </projection>
    <electricalProjection id="NCXLS_M3R_M2R_GJ" presynapticPopulation="M3R" postsynapticPopulation="M2R">
      <electricalConnection id="57" preCell="0" postCell="0" synapse="Generic_GJ" preSegment="3" postSegment="3" preFractionAlong="0.6710901744959188" postFractionAlong="0.9579125508901479"/>
    </electricalProjection>
    <projection id="NCXLS_M3R_M2L" presynapticPopulation="M3R" postsynapticPopulation="M2L" synapse="Acetylcholine">
      <connection id="58" preCellId="../M3R/0/M3R" postCellId="../M2L/0/M2L" preSegmentId="1" postSegmentId="1" preFractionAlong="0.6040179965751782" postFractionAlong="0.9906281082658567"/>
    </projection>
    <projection id="NCXLS_M3R_I4" presynapticPopulation="M3R" postsynapticPopulation="I4" synapse="Acetylcholine">
      <connection id="59" preCellId="../M3R/0/M3R" postCellId="../I4/0/I4" preSegmentId="6" postSegmentId="4" preFractionAlong="0.03213086611593108" postFractionAlong="0.7106878795587983"/>
    </projection>
    <projection id="NCXLS_M3R_M4" presynapticPopulation="M3R" postsynapticPopulation="M4" synapse="Glutamate">
      <connection id="60" preCellId="../M3R/0/M3R" postCellId="../M4/0/M4" preSegmentId="1" postSegmentId="1" preFractionAlong="0.19275201041271228" postFractionAlong="0.6883967049269083"/>
    </projection>
    <projection id="NCXLS_M3R_I6" presynapticPopulation="M3R" postsynapticPopulation="I6" synapse="Acetylcholine">
      <connection id="61" preCellId="../M3R/0/M3R" postCellId="../I6/0/I6" preSegmentId="8" postSegmentId="1" preFractionAlong="0.9246474785591563" postFractionAlong="0.10359714999747949"/>
    </projection>
    <projection id="NCXLS_M2L_I2L" presynapticPopulation="M2L" postsynapticPopulation="I2L" synapse="Acetylcholine">
      <connection id="62" preCellId="../M2L/0/M2L" postCellId="../I2L/0/I2L" preSegmentId="4" postSegmentId="8" preFractionAlong="0.3140079252735116" postFractionAlong="0.2714150075196725"/>
    </projection>
    <projection id="NCXLS_M2L_MCR" presynapticPopulation="M2L" postsynapticPopulation="MCR" synapse="Acetylcholine">
      <connection id="63" preCellId="../M2L/0/M2L" postCellId="../MCR/0/MCR" preSegmentId="4" postSegmentId="5" preFractionAlong="0.6454418331834965" postFractionAlong="0.947522980551238"/>
    </projection>
    <electricalProjection id="NCXLS_M2L_M5_GJ" presynapticPopulation="M2L" postsynapticPopulation="M5">
      <electricalConnection id="64" preCell="0" postCell="0" synapse="Generic_GJ" preSegment="3" postSegment="4" preFractionAlong="0.6829416946253303" postFractionAlong="0.9034002408930234"/>
    </electricalProjection>
    <projection id="NCXLS_M2L_I3" presynapticPopulation="M2L" postsynapticPopulation="I3" synapse="Acetylcholine">
      <connection id="65" preCellId="../M2L/0/M2L" postCellId="../I3/0/I3" preSegmentId="6" postSegmentId="8" preFractionAlong="0.08605454468610119" postFractionAlong="0.05546569726504935"/>
    </projection>
    <projection id="NCXLS_M2L_NSMR" presynapticPopulation="M2L" postsynapticPopulation="NSMR" synapse="Acetylcholine">
      <connection id="66" preCellId="../M2L/0/M2L" postCellId="../NSMR/0/NSMR" preSegmentId="9" postSegmentId="3" preFractionAlong="0.534659566749085" postFractionAlong="0.020194923084332905"/>
    </projection>
    <projection id="NCXLS_M2L_I1L" presynapticPopulation="M2L" postsynapticPopulation="I1L" synapse="Acetylcholine">
      <connection id="67" preCellId="../M2L/0/M2L" postCellId="../I1L/0/I1L" preSegmentId="1" postSegmentId="3" preFractionAlong="0.7169769010638771" postFractionAlong="0.5826009367844994"/>
    </projection>
    <projection id="NCXLS_M2L_MI" presynapticPopulation="M2L" postsynapticPopulation="MI" synapse="Acetylcholine">
      <connection id="68" preCellId="../M2L/0/M2L" postCellId="../MI/0/MI" preSegmentId="7" postSegmentId="2" preFractionAlong="0.4454054285778348" postFractionAlong="0.3550947663631898"/>
    </projection>
    <projection id="NCXLS_M2L_I5" presynapticPopulation="M2L" postsynapticPopulation="I5" synapse="Acetylcholine">
      <connection id="69" preCellId="../M2L/0/M2L" postCellId="../I5/0/I5" preSegmentId="7" postSegmentId="6" preFractionAlong="0.8703290345540943" postFractionAlong="0.7758614386586519"/>
    </projection>
    <projection id="NCXLS_M2L_M3L" presynapticPopulation="M2L" postsynapticPopulation="M3L" synapse="Glutamate">
      <connection id="70" preCellId="../M2L/0/M2L" postCellId="../M3L/0/M3L" preSegmentId="5" postSegmentId="3" preFractionAlong="0.8903091977745643" postFractionAlong="0.4717671511498236"/>
    </projection>
    <projection id="NCXLS_M2L_NSML" presynapticPopulation="M2L" postsynapticPopulation="NSML" synapse="Acetylcholine">
      <connection id="71" preCellId="../M2L/0/M2L" postCellId="../NSML/0/NSML" preSegmentId="2" postSegmentId="4" preFractionAlong="0.14003923126435214" postFractionAlong="0.6707195257070481"/>
    </projection>
    <projection id="NCXLS_M2L_MCL" presynapticPopulation="M2L" postsynapticPopulation="MCL" synapse="Acetylcholine">
      <connection id="72" preCellId="../M2L/0/M2L" postCellId="../MCL/0/MCL" preSegmentId="2" postSegmentId="1" preFractionAlong="0.012857534116974989" postFractionAlong="0.10997923576541713"/>
    </projection>
    <projection id="NCXLS_M2L_I2R" presynapticPopulation="M2L" postsynapticPopulation="I2R" synapse="Acetylcholine">
      <connection id="73" preCellId="../M2L/0/M2L" postCellId="../I2R/0/I2R" preSegmentId="7" postSegmentId="8" preFractionAlong="0.5801718699913038" postFractionAlong="0.19301213398589256"/>
    </projection>
    <projection id="NCXLS_M2L_M2R" presynapticPopulation="M2L" postsynapticPopulation="M2R" synapse="Acetylcholine">
      <connection id="74" preCellId="../M2L/0/M2L" postCellId="../M2R/0/M2R" preSegmentId="8" postSegmentId="1" preFractionAlong="0.617740500624998" postFractionAlong="0.14070783082557425"/>
    </projection>
    <projection id="NCXLS_M2L_M3R" presynapticPopulation="M2L" postsynapticPopulation="M3R" synapse="Acetylcholine">
      <connection id="75" preCellId="../M2L/0/M2L" postCellId="../M3R/0/M3R" preSegmentId="1" postSegmentId="7" preFractionAlong="0.9330940731098543" postFractionAlong="0.22550310252096262"/>
    </projection>
    <projection id="NCXLS_M2L_I1R" presynapticPopulation="M2L" postsynapticPopulation="I1R" synapse="Acetylcholine">
      <connection id="76" preCellId="../M2L/0/M2L" postCellId="../I1R/0/I1R" preSegmentId="7" postSegmentId="7" preFractionAlong="0.04322315141777899" postFractionAlong="0.3424999930081374"/>
    </projection>
    <projection id="NCXLS_M2L_I4" presynapticPopulation="M2L" postsynapticPopulation="I4" synapse="Acetylcholine">
      <connection id="77" preCellId="../M2L/0/M2L" postCellId="../I4/0/I4" preSegmentId="9" postSegmentId="5" preFractionAlong="0.8829261188948626" postFractionAlong="0.5722433959684513"/>
    </projection>
    <projection id="NCXLS_I4_MCL" presynapticPopulation="I4" postsynapticPopulation="MCL" synapse="Acetylcholine">
      <connection id="78" preCellId="../I4/0/I4" postCellId="../MCL/0/MCL" preSegmentId="8" postSegmentId="8" preFractionAlong="0.47406421690551215" postFractionAlong="0.9276337194810736"/>
    </projection>
    <electricalProjection id="NCXLS_M4_M3L_GJ" presynapticPopulation="M4" postsynapticPopulation="M3L">
      <electricalConnection id="79" preCell="0" postCell="0" synapse="Generic_GJ" preSegment="2" postSegment="4" preFractionAlong="0.8074987316566608" postFractionAlong="0.13523982798472256"/>
    </electricalProjection>
    <projection id="NCXLS_M4_MCL" presynapticPopulation="M4" postsynapticPopulation="MCL" synapse="Acetylcholine">
      <connection id="80" preCellId="../M4/0/M4" postCellId="../MCL/0/MCL" preSegmentId="2" postSegmentId="8" preFractionAlong="0.605675222173172" postFractionAlong="0.36552879690727913"/>
    </projection>
    <projection id="NCXLS_M4_I2R" presynapticPopulation="M4" postsynapticPopulation="I2R" synapse="Acetylcholine">
      <connection id="81" preCellId="../M4/0/M4" postCellId="../I2R/0/I2R" preSegmentId="6" postSegmentId="6" preFractionAlong="0.6553260713826526" postFractionAlong="0.4884318604532778"/>
    </projection>
    <projection id="NCXLS_M4_M2R" presynapticPopulation="M4" postsynapticPopulation="M2R" synapse="Glutamate">
      <connection id="82" preCellId="../M4/0/M4" postCellId="../M2R/0/M2R" preSegmentId="8" postSegmentId="5" preFractionAlong="0.6694985765506946" postFractionAlong="0.026693158586854282"/>
    </projection>
    <projection id="NCXLS_M4_M2L" presynapticPopulation="M4" postsynapticPopulation="M2L" synapse="Acetylcholine">
      <connection id="83" preCellId="../M4/0/M4" postCellId="../M2L/0/M2L" preSegmentId="7" postSegmentId="9" preFractionAlong="0.16312111586711353" postFractionAlong="0.8121017282172212"/>
    </projection>
    <projection id="NCXLS_M4_I6" presynapticPopulation="M4" postsynapticPopulation="I6" synapse="Acetylcholine">
      <connection id="84" preCellId="../M4/0/M4" postCellId="../I6/0/I6" preSegmentId="3" postSegmentId="2" preFractionAlong="0.12801606520343634" postFractionAlong="0.4746457232758885"/>
    </projection>
    <projection id="NCXLS_M1_I2L" presynapticPopulation="M1" postsynapticPopulation="I2L" synapse="Acetylcholine">
      <connection id="85" preCellId="../M1/0/M1" postCellId="../I2L/0/I2L" preSegmentId="1" postSegmentId="6" preFractionAlong="0.4459239599513427" postFractionAlong="0.069486824752653"/>
    </projection>
    <projection id="NCXLS_M1_MCR" presynapticPopulation="M1" postsynapticPopulation="MCR" synapse="Acetylcholine">
      <connection id="86" preCellId="../M1/0/M1" postCellId="../MCR/0/MCR" preSegmentId="1" postSegmentId="3" preFractionAlong="0.4689428434408158" postFractionAlong="0.26162027729067383"/>
    </projection>
    <projection id="NCXLS_M1_M5" presynapticPopulation="M1" postsynapticPopulation="M5" synapse="Acetylcholine">
      <connection id="87" preCellId="../M1/0/M1" postCellId="../M5/0/M5" preSegmentId="6" postSegmentId="5" preFractionAlong="0.8943898536984908" postFractionAlong="0.05717965453026652"/>
    </projection>
    <projection id="NCXLS_M1_I3" presynapticPopulation="M1" postsynapticPopulation="I3" synapse="Acetylcholine">
      <connection id="88" preCellId="../M1/0/M1" postCellId="../I3/0/I3" preSegmentId="5" postSegmentId="6" preFractionAlong="0.1116366871708786" postFractionAlong="0.4410348058456205"/>
    </projection>
    <projection id="NCXLS_M1_NSMR" presynapticPopulation="M1" postsynapticPopulation="NSMR" synapse="Acetylcholine">
      <connection id="89" preCellId="../M1/0/M1" postCellId="../NSMR/0/NSMR" preSegmentId="1" postSegmentId="4" preFractionAlong="0.640347346297737" postFractionAlong="0.46830094759995833"/>
    </projection>
    <projection id="NCXLS_M1_I1L" presynapticPopulation="M1" postsynapticPopulation="I1L" synapse="Acetylcholine">
      <connection id="90" preCellId="../M1/0/M1" postCellId="../I1L/0/I1L" preSegmentId="7" postSegmentId="1" preFractionAlong="0.34238176600918835" postFractionAlong="0.26665965838820116"/>
    </projection>
    <projection id="NCXLS_M1_MI" presynapticPopulation="M1" postsynapticPopulation="MI" synapse="Acetylcholine">
      <connection id="91" preCellId="../M1/0/M1" postCellId="../MI/0/MI" preSegmentId="8" postSegmentId="2" preFractionAlong="0.028992744998979858" postFractionAlong="0.7707286153065659"/>
    </projection>
    <projection id="NCXLS_M1_I5" presynapticPopulation="M1" postsynapticPopulation="I5" synapse="Acetylcholine">
      <connection id="92" preCellId="../M1/0/M1" postCellId="../I5/0/I5" preSegmentId="6" postSegmentId="5" preFractionAlong="0.40363552625250454" postFractionAlong="0.3167910744946142"/>
    </projection>
    <projection id="NCXLS_M1_M3L" presynapticPopulation="M1" postsynapticPopulation="M3L" synapse="Acetylcholine">
      <connection id="93" preCellId="../M1/0/M1" postCellId="../M3L/0/M3L" preSegmentId="2" postSegmentId="2" preFractionAlong="0.11446456597454413" postFractionAlong="0.11988407158488701"/>
    </projection>
    <projection id="NCXLS_M1_NSML" presynapticPopulation="M1" postsynapticPopulation="NSML" synapse="Acetylcholine">
      <connection id="94" preCellId="../M1/0/M1" postCellId="../NSML/0/NSML" preSegmentId="9" postSegmentId="8" preFractionAlong="0.9994590671864021" postFractionAlong="0.7101418825625281"/>
    </projection>
    <projection id="NCXLS_M1_MCL" presynapticPopulation="M1" postsynapticPopulation="MCL" synapse="Acetylcholine">
      <connection id="95" preCellId="../M1/0/M1" postCellId="../MCL/0/MCL" preSegmentId="6" postSegmentId="2" preFractionAlong="0.37352210367956207" postFractionAlong="0.07758845168936468"/>
    </projection>
    <projection id="NCXLS_M1_M3R" presynapticPopulation="M1" postsynapticPopulation="M3R" synapse="Acetylcholine">
      <connection id="96" preCellId="../M1/0/M1" postCellId="../M3R/0/M3R" preSegmentId="9" postSegmentId="1" preFractionAlong="0.37346857198304895" postFractionAlong="0.7428780757183507"/>
    </projection>
    <projection id="NCXLS_M1_I1R" presynapticPopulation="M1" postsynapticPopulation="I1R" synapse="Acetylcholine">
      <connection id="97" preCellId="../M1/0/M1" postCellId="../I1R/0/I1R" preSegmentId="9" postSegmentId="1" preFractionAlong="0.40698808879012505" postFractionAlong="0.43110648734553736"/>
    </projection>
    <projection id="NCXLS_M1_I4" presynapticPopulation="M1" postsynapticPopulation="I4" synapse="Acetylcholine">
      <connection id="98" preCellId="../M1/0/M1" postCellId="../I4/0/I4" preSegmentId="5" postSegmentId="6" preFractionAlong="0.6814070600384377" postFractionAlong="0.3152098471611"/>
    </projection>
  </network>
</neuroml>
