<?xml version='1.0' encoding='UTF-8'?>
<neuroml xmlns="http://www.neuroml.org/schema/neuroml2" xmlns:xsi="http://www.w3.org/2001/XMLSchema-instance" xsi:schemaLocation="http://www.neuroml.org/schema/neuroml2 https://raw.githubusercontent.com/NeuroML/NeuroML2/development/Schemas/NeuroML2/NeuroML_v2beta4.xsd" id="gvft_network_bio_prior_lamW_0_456_DF_0_033_t10_net">
  <notes>NeuroML2 network generated from GVFT simulation on 2025-05-04 14:47:47
</notes>
  <include href="AVAL.cell.nml"/>
  <include href="AVAR.cell.nml"/>
  <include href="AVKL.cell.nml"/>
  <include href="AVKR.cell.nml"/>
  <include href="RIS.cell.nml"/>
  <include href="RMDDL.cell.nml"/>
  <include href="RMDDR.cell.nml"/>
  <include href="RMDVL.cell.nml"/>
  <include href="RMDVR.cell.nml"/>
  <include href="SMBVL.cell.nml"/>
  <include href="SMBVR.cell.nml"/>
  <include href="URXL.cell.nml"/>
  <include href="URXR.cell.nml"/>
  <include href="I4.cell.nml"/>
  <include href="I1L.cell.nml"/>
  <include href="I1R.cell.nml"/>
  <include href="M2R.cell.nml"/>
  <include href="M4.cell.nml"/>
  <include href="I6.cell.nml"/>
  <include href="I2R.cell.nml"/>
  <include href="M3R.cell.nml"/>
  <include href="I5.cell.nml"/>
  <include href="MCR.cell.nml"/>
  <include href="M3L.cell.nml"/>
  <include href="MI.cell.nml"/>
  <include href="M1.cell.nml"/>
  <include href="MCL.cell.nml"/>
  <include href="I2L.cell.nml"/>
  <include href="M5.cell.nml"/>
  <include href="NSMR.cell.nml"/>
  <include href="M2L.cell.nml"/>
  <include href="NSML.cell.nml"/>
  <include href="I3.cell.nml"/>
  <include href="Generic_GJ.synapse.nml"/>
  <include href="Glutamate.synapse.nml"/>
  <include href="Acetylcholine.synapse.nml"/>
  <include href="Serotonin_Glutamate.synapse.nml"/>
  <network id="gvft_network_bio_prior_lamW_0_456_DF_0_033_t10_net" type="networkWithTemperature" temperature="20.0 degC">
    <population id="M1" component="M1" type="populationList" size="1">
      <instance id="0">
        <location x="0.6683417" y="-0.9698492" z="0.0"/>
      </instance>
    </population>
    <population id="M2L" component="M2L" type="populationList" size="1">
      <instance id="0">
        <location x="-0.6482412" y="0.53768843" z="0.0"/>
      </instance>
    </population>
    <population id="M2R" component="M2R" type="populationList" size="1">
      <instance id="0">
        <location x="-0.6281407" y="-0.3266332" z="0.0"/>
      </instance>
    </population>
    <population id="M3L" component="M3L" type="populationList" size="1">
      <instance id="0">
        <location x="-0.28643218" y="0.37688443" z="0.0"/>
      </instance>
    </population>
    <population id="M3R" component="M3R" type="populationList" size="1">
      <instance id="0">
        <location x="-0.025125638" y="-0.095477395" z="0.0"/>
      </instance>
    </population>
    <population id="M4" component="M4" type="populationList" size="1">
      <instance id="0">
        <location x="-0.61809045" y="-0.5276382" z="0.0"/>
      </instance>
    </population>
    <population id="M5" component="M5" type="populationList" size="1">
      <instance id="0">
        <location x="-0.22613066" y="-0.3467337" z="0.0"/>
      </instance>
    </population>
    <population id="I1L" component="I1L" type="populationList" size="1">
      <instance id="0">
        <location x="-0.055276394" y="-0.79899496" z="0.0"/>
      </instance>
    </population>
    <population id="I1R" component="I1R" type="populationList" size="1">
      <instance id="0">
        <location x="-0.6281407" y="0.2562814" z="0.0"/>
      </instance>
    </population>
    <population id="I2L" component="I2L" type="populationList" size="1">
      <instance id="0">
        <location x="-0.879397" y="-0.8894472" z="0.0"/>
      </instance>
    </population>
    <population id="I2R" component="I2R" type="populationList" size="1">
      <instance id="0">
        <location x="0.71859294" y="-0.36683416" z="0.0"/>
      </instance>
    </population>
    <population id="I3" component="I3" type="populationList" size="1">
      <instance id="0">
        <location x="-0.33668342" y="0.46733668" z="0.0"/>
      </instance>
    </population>
    <population id="I4" component="I4" type="populationList" size="1">
      <instance id="0">
        <location x="-0.8190955" y="-0.65829146" z="0.0"/>
      </instance>
    </population>
    <population id="I5" component="I5" type="populationList" size="1">
      <instance id="0">
        <location x="0.12562814" y="0.23618092" z="0.0"/>
      </instance>
    </population>
    <population id="I6" component="I6" type="populationList" size="1">
      <instance id="0">
        <location x="-0.6281407" y="0.24623117" z="0.0"/>
      </instance>
    </population>
    <population id="MCL" component="MCL" type="populationList" size="1">
      <instance id="0">
        <location x="0.79899496" y="0.0753769" z="0.0"/>
      </instance>
    </population>
    <population id="MCR" component="MCR" type="populationList" size="1">
      <instance id="0">
        <location x="-0.0753769" y="-0.49748746" z="0.0"/>
      </instance>
    </population>
    <population id="MI" component="MI" type="populationList" size="1">
      <instance id="0">
        <location x="-0.4874372" y="-0.71859294" z="0.0"/>
      </instance>
    </population>
    <population id="NSML" component="NSML" type="populationList" size="1">
      <instance id="0">
        <location x="-0.9798995" y="-0.76884425" z="0.0"/>
      </instance>
    </population>
    <population id="NSMR" component="NSMR" type="populationList" size="1">
      <instance id="0">
        <location x="0.43718594" y="-0.33668342" z="0.0"/>
      </instance>
    </population>
    <population id="AVAL" component="AVAL" type="populationList" size="1">
      <instance id="0">
        <location x="5.0" y="0.0" z="0.0"/>
      </instance>
    </population>
    <population id="AVAR" component="AVAR" type="populationList" size="1">
      <instance id="0">
        <location x="5.0" y="0.0" z="0.0"/>
      </instance>
    </population>
    <population id="AVKL" component="AVKL" type="populationList" size="1">
      <instance id="0">
        <location x="5.0" y="0.0" z="0.0"/>
      </instance>
    </population>
    <population id="AVKR" component="AVKR" type="populationList" size="1">
      <instance id="0">
        <location x="5.0" y="0.0" z="0.0"/>
      </instance>
    </population>
    <population id="RIS" component="RIS" type="populationList" size="1">
      <instance id="0">
        <location x="5.0" y="0.0" z="0.0"/>
      </instance>
    </population>
    <population id="RMDDL" component="RMDDL" type="populationList" size="1">
      <instance id="0">
        <location x="5.0" y="0.0" z="0.0"/>
      </instance>
    </population>
    <population id="RMDDR" component="RMDDR" type="populationList" size="1">
      <instance id="0">
        <location x="5.0" y="0.0" z="0.0"/>
      </instance>
    </population>
    <population id="RMDVL" component="RMDVL" type="populationList" size="1">
      <instance id="0">
        <location x="5.0" y="0.0" z="0.0"/>
      </instance>
    </population>
    <population id="RMDVR" component="RMDVR" type="populationList" size="1">
      <instance id="0">
        <location x="5.0" y="0.0" z="0.0"/>
      </instance>
    </population>
    <population id="SMBVL" component="SMBVL" type="populationList" size="1">
      <instance id="0">
        <location x="5.0" y="0.0" z="0.0"/>
      </instance>
    </population>
    <population id="SMBVR" component="SMBVR" type="populationList" size="1">
      <instance id="0">
        <location x="5.0" y="0.0" z="0.0"/>
      </instance>
    </population>
    <population id="URXL" component="URXL" type="populationList" size="1">
      <instance id="0">
        <location x="5.0" y="0.0" z="0.0"/>
      </instance>
    </population>
    <population id="URXR" component="URXR" type="populationList" size="1">
      <instance id="0">
        <location x="5.0" y="0.0" z="0.0"/>
      </instance>
    </population>
    <electricalProjection id="NCXLS_M2L_M3L_GJ" presynapticPopulation="M2L" postsynapticPopulation="M3L">
      <electricalConnection id="0" preCell="0" postCell="0" synapse="Generic_GJ" preSegment="2" postSegment="3" preFractionAlong="0.04283732118899841" postFractionAlong="0.6757909636279851"/>
    </electricalProjection>
    <electricalProjection id="NCXLS_M2L_M2R_GJ" presynapticPopulation="M2L" postsynapticPopulation="M2R">
      <electricalConnection id="1" preCell="0" postCell="0" synapse="Generic_GJ" preSegment="7" postSegment="3" preFractionAlong="0.7633390532427098" postFractionAlong="0.022139953033871396"/>
    </electricalProjection>
    <electricalProjection id="NCXLS_M2L_M5_GJ" presynapticPopulation="M2L" postsynapticPopulation="M5">
      <electricalConnection id="2" preCell="0" postCell="0" synapse="Generic_GJ" preSegment="1" postSegment="5" preFractionAlong="0.2503345637346731" postFractionAlong="0.11432207180851417"/>
    </electricalProjection>
    <electricalProjection id="NCXLS_M1_M3R_GJ" presynapticPopulation="M1" postsynapticPopulation="M3R">
      <electricalConnection id="3" preCell="0" postCell="0" synapse="Generic_GJ" preSegment="7" postSegment="1" preFractionAlong="0.1993405342625726" postFractionAlong="0.8223910929462823"/>
    </electricalProjection>
    <electricalProjection id="NCXLS_M3L_M4_GJ" presynapticPopulation="M3L" postsynapticPopulation="M4">
      <electricalConnection id="4" preCell="0" postCell="0" synapse="Generic_GJ" preSegment="4" postSegment="8" preFractionAlong="0.5963597582193679" postFractionAlong="0.3441718831678193"/>
    </electricalProjection>
    <electricalProjection id="NCXLS_M3L_M3R_GJ" presynapticPopulation="M3L" postsynapticPopulation="M3R">
      <electricalConnection id="5" preCell="0" postCell="0" synapse="Generic_GJ" preSegment="5" postSegment="4" preFractionAlong="0.07369125237043472" postFractionAlong="0.9414255948352722"/>
    </electricalProjection>
    <electricalProjection id="NCXLS_M3L_M2R_GJ" presynapticPopulation="M3L" postsynapticPopulation="M2R">
      <electricalConnection id="6" preCell="0" postCell="0" synapse="Generic_GJ" preSegment="7" postSegment="3" preFractionAlong="0.20360271573465483" postFractionAlong="0.28093743834221874"/>
    </electricalProjection>
    <electricalProjection id="NCXLS_M3R_M2L_GJ" presynapticPopulation="M3R" postsynapticPopulation="M2L">
      <electricalConnection id="7" preCell="0" postCell="0" synapse="Generic_GJ" preSegment="8" postSegment="1" preFractionAlong="0.8957434451243126" postFractionAlong="0.18817159584612386"/>
    </electricalProjection>
    <electricalProjection id="NCXLS_M3R_M4_GJ" presynapticPopulation="M3R" postsynapticPopulation="M4">
      <electricalConnection id="8" preCell="0" postCell="0" synapse="Generic_GJ" preSegment="2" postSegment="2" preFractionAlong="0.5862207115272452" postFractionAlong="0.9192542465263115"/>
    </electricalProjection>
    <electricalProjection id="NCXLS_M3R_M2R_GJ" presynapticPopulation="M3R" postsynapticPopulation="M2R">
      <electricalConnection id="9" preCell="0" postCell="0" synapse="Generic_GJ" preSegment="6" postSegment="4" preFractionAlong="0.1900854125998448" postFractionAlong="0.6517744788191033"/>
    </electricalProjection>
    <electricalProjection id="NCXLS_M5_M3L_GJ" presynapticPopulation="M5" postsynapticPopulation="M3L">
      <electricalConnection id="10" preCell="0" postCell="0" synapse="Generic_GJ" preSegment="2" postSegment="2" preFractionAlong="0.45253364402930063" postFractionAlong="0.5065538158814177"/>
    </electricalProjection>
    <electricalProjection id="NCXLS_M5_M3R_GJ" presynapticPopulation="M5" postsynapticPopulation="M3R">
      <electricalConnection id="11" preCell="0" postCell="0" synapse="Generic_GJ" preSegment="5" postSegment="4" preFractionAlong="0.11471232218718319" postFractionAlong="0.9428054879896225"/>
    </electricalProjection>
    <projection id="NCXLS_I3_M2L" presynapticPopulation="I3" postsynapticPopulation="M2L" synapse="Acetylcholine">
      <connection id="12" preCellId="../I3/0/I3" postCellId="../M2L/0/M2L" preSegmentId="7" postSegmentId="7" preFractionAlong="0.9230008393898834" postFractionAlong="0.3258354395041454"/>
    </projection>
    <projection id="NCXLS_M2L_I3" presynapticPopulation="M2L" postsynapticPopulation="I3" synapse="Acetylcholine">
      <connection id="13" preCellId="../M2L/0/M2L" postCellId="../I3/0/I3" preSegmentId="4" postSegmentId="1" preFractionAlong="0.7807732348871894" postFractionAlong="0.3637860515990571"/>
    </projection>
    <projection id="NCXLS_M2L_MI" presynapticPopulation="M2L" postsynapticPopulation="MI" synapse="Acetylcholine">
      <connection id="14" preCellId="../M2L/0/M2L" postCellId="../MI/0/MI" preSegmentId="9" postSegmentId="8" preFractionAlong="0.5888825052029606" postFractionAlong="0.5762805932836943"/>
    </projection>
    <projection id="NCXLS_M2L_I4" presynapticPopulation="M2L" postsynapticPopulation="I4" synapse="Acetylcholine">
      <connection id="15" preCellId="../M2L/0/M2L" postCellId="../I4/0/I4" preSegmentId="7" postSegmentId="8" preFractionAlong="0.24907683217159182" postFractionAlong="0.5718392898565416"/>
    </projection>
    <projection id="NCXLS_M2L_I2R" presynapticPopulation="M2L" postsynapticPopulation="I2R" synapse="Acetylcholine">
      <connection id="16" preCellId="../M2L/0/M2L" postCellId="../I2R/0/I2R" preSegmentId="6" postSegmentId="6" preFractionAlong="0.5819603540191924" postFractionAlong="0.9089979943728113"/>
    </projection>
    <projection id="NCXLS_M2L_I1L" presynapticPopulation="M2L" postsynapticPopulation="I1L" synapse="Acetylcholine">
      <connection id="17" preCellId="../M2L/0/M2L" postCellId="../I1L/0/I1L" preSegmentId="2" postSegmentId="6" preFractionAlong="0.07165061423148467" postFractionAlong="0.9435035356332391"/>
    </projection>
    <projection id="NCXLS_M2L_I2L" presynapticPopulation="M2L" postsynapticPopulation="I2L" synapse="Acetylcholine">
      <connection id="18" preCellId="../M2L/0/M2L" postCellId="../I2L/0/I2L" preSegmentId="6" postSegmentId="4" preFractionAlong="0.838881080505121" postFractionAlong="0.3668683942862294"/>
    </projection>
    <projection id="NCXLS_M2L_M1" presynapticPopulation="M2L" postsynapticPopulation="M1" synapse="Acetylcholine">
      <connection id="19" preCellId="../M2L/0/M2L" postCellId="../M1/0/M1" preSegmentId="4" postSegmentId="3" preFractionAlong="0.22239143551203222" postFractionAlong="0.9521738374562813"/>
    </projection>
    <projection id="NCXLS_M2L_MCR" presynapticPopulation="M2L" postsynapticPopulation="MCR" synapse="Acetylcholine">
      <connection id="20" preCellId="../M2L/0/M2L" postCellId="../MCR/0/MCR" preSegmentId="6" postSegmentId="4" preFractionAlong="0.9982689762040686" postFractionAlong="0.049188990232022056"/>
    </projection>
    <projection id="NCXLS_M2L_NSML" presynapticPopulation="M2L" postsynapticPopulation="NSML" synapse="Acetylcholine">
      <connection id="21" preCellId="../M2L/0/M2L" postCellId="../NSML/0/NSML" preSegmentId="5" postSegmentId="7" preFractionAlong="0.30063192858167553" postFractionAlong="0.5713515657069453"/>
    </projection>
    <projection id="NCXLS_M2L_I6" presynapticPopulation="M2L" postsynapticPopulation="I6" synapse="Acetylcholine">
      <connection id="22" preCellId="../M2L/0/M2L" postCellId="../I6/0/I6" preSegmentId="9" postSegmentId="4" preFractionAlong="0.7839123805872337" postFractionAlong="0.3324477182476383"/>
    </projection>
    <projection id="NCXLS_M2L_M4" presynapticPopulation="M2L" postsynapticPopulation="M4" synapse="Acetylcholine">
      <connection id="23" preCellId="../M2L/0/M2L" postCellId="../M4/0/M4" preSegmentId="5" postSegmentId="6" preFractionAlong="0.7156392360669593" postFractionAlong="0.8890421176901612"/>
    </projection>
    <projection id="NCXLS_M2L_M3R" presynapticPopulation="M2L" postsynapticPopulation="M3R" synapse="Glutamate">
      <connection id="24" preCellId="../M2L/0/M2L" postCellId="../M3R/0/M3R" preSegmentId="3" postSegmentId="6" preFractionAlong="0.6083090281035596" postFractionAlong="0.3883931803838869"/>
    </projection>
    <projection id="NCXLS_M2L_MCL" presynapticPopulation="M2L" postsynapticPopulation="MCL" synapse="Acetylcholine">
      <connection id="25" preCellId="../M2L/0/M2L" postCellId="../MCL/0/MCL" preSegmentId="8" postSegmentId="8" preFractionAlong="0.877545542559473" postFractionAlong="0.10378192817667187"/>
    </projection>
    <projection id="NCXLS_M2L_I5" presynapticPopulation="M2L" postsynapticPopulation="I5" synapse="Acetylcholine">
      <connection id="26" preCellId="../M2L/0/M2L" postCellId="../I5/0/I5" preSegmentId="9" postSegmentId="5" preFractionAlong="0.7761165984135006" postFractionAlong="0.431651762593961"/>
    </projection>
    <projection id="NCXLS_M2L_I1R" presynapticPopulation="M2L" postsynapticPopulation="I1R" synapse="Acetylcholine">
      <connection id="27" preCellId="../M2L/0/M2L" postCellId="../I1R/0/I1R" preSegmentId="5" postSegmentId="1" preFractionAlong="0.4113226968232696" postFractionAlong="0.6028447467863508"/>
    </projection>
    <projection id="NCXLS_M2L_NSMR" presynapticPopulation="M2L" postsynapticPopulation="NSMR" synapse="Acetylcholine">
      <connection id="28" preCellId="../M2L/0/M2L" postCellId="../NSMR/0/NSMR" preSegmentId="1" postSegmentId="7" preFractionAlong="0.4929924291045318" postFractionAlong="0.20849447495426054"/>
    </projection>
    <projection id="NCXLS_MI_M2L" presynapticPopulation="MI" postsynapticPopulation="M2L" synapse="Acetylcholine">
      <connection id="29" preCellId="../MI/0/MI" postCellId="../M2L/0/M2L" preSegmentId="2" postSegmentId="5" preFractionAlong="0.3609714559862718" postFractionAlong="0.1456520910643565"/>
    </projection>
    <projection id="NCXLS_MI_I4" presynapticPopulation="MI" postsynapticPopulation="I4" synapse="Acetylcholine">
      <connection id="30" preCellId="../MI/0/MI" postCellId="../I4/0/I4" preSegmentId="7" postSegmentId="6" preFractionAlong="0.3440997640297365" postFractionAlong="0.9904716723472566"/>
    </projection>
    <projection id="NCXLS_MI_I2L" presynapticPopulation="MI" postsynapticPopulation="I2L" synapse="Glutamate">
      <connection id="31" preCellId="../MI/0/MI" postCellId="../I2L/0/I2L" preSegmentId="4" postSegmentId="1" preFractionAlong="0.8417057652229475" postFractionAlong="0.1701012461881699"/>
    </projection>
    <projection id="NCXLS_MI_NSML" presynapticPopulation="MI" postsynapticPopulation="NSML" synapse="Serotonin_Glutamate">
      <connection id="32" preCellId="../MI/0/MI" postCellId="../NSML/0/NSML" preSegmentId="5" postSegmentId="8" preFractionAlong="0.6677560251985356" postFractionAlong="0.8547783462955792"/>
    </projection>
    <projection id="NCXLS_MI_I6" presynapticPopulation="MI" postsynapticPopulation="I6" synapse="Serotonin_Glutamate">
      <connection id="33" preCellId="../MI/0/MI" postCellId="../I6/0/I6" preSegmentId="1" postSegmentId="3" preFractionAlong="0.5799833204520839" postFractionAlong="0.23746890722274572"/>
    </projection>
    <projection id="NCXLS_MI_M4" presynapticPopulation="MI" postsynapticPopulation="M4" synapse="Acetylcholine">
      <connection id="34" preCellId="../MI/0/MI" postCellId="../M4/0/M4" preSegmentId="1" postSegmentId="6" preFractionAlong="0.9971731279111168" postFractionAlong="0.5660475729241843"/>
    </projection>
    <projection id="NCXLS_MI_M2R" presynapticPopulation="MI" postsynapticPopulation="M2R" synapse="Acetylcholine">
      <connection id="35" preCellId="../MI/0/MI" postCellId="../M2R/0/M2R" preSegmentId="6" postSegmentId="2" preFractionAlong="0.25107902402934534" postFractionAlong="0.49967024372905344"/>
    </projection>
    <projection id="NCXLS_MI_I1R" presynapticPopulation="MI" postsynapticPopulation="I1R" synapse="Glutamate">
      <connection id="36" preCellId="../MI/0/MI" postCellId="../I1R/0/I1R" preSegmentId="4" postSegmentId="4" preFractionAlong="0.4417964904426055" postFractionAlong="0.7427908347497"/>
    </projection>
    <projection id="NCXLS_M1_I3" presynapticPopulation="M1" postsynapticPopulation="I3" synapse="Acetylcholine">
      <connection id="37" preCellId="../M1/0/M1" postCellId="../I3/0/I3" preSegmentId="3" postSegmentId="3" preFractionAlong="0.6710901744959188" postFractionAlong="0.9579125508901479"/>
    </projection>
    <projection id="NCXLS_M1_M2L" presynapticPopulation="M1" postsynapticPopulation="M2L" synapse="Glutamate">
      <connection id="38" preCellId="../M1/0/M1" postCellId="../M2L/0/M2L" preSegmentId="1" postSegmentId="1" preFractionAlong="0.6040179965751782" postFractionAlong="0.9906281082658567"/>
    </projection>
    <projection id="NCXLS_M1_MI" presynapticPopulation="M1" postsynapticPopulation="MI" synapse="Acetylcholine">
      <connection id="39" preCellId="../M1/0/M1" postCellId="../MI/0/MI" preSegmentId="6" postSegmentId="4" preFractionAlong="0.03213086611593108" postFractionAlong="0.7106878795587983"/>
    </projection>
    <projection id="NCXLS_M1_I4" presynapticPopulation="M1" postsynapticPopulation="I4" synapse="Acetylcholine">
      <connection id="40" preCellId="../M1/0/M1" postCellId="../I4/0/I4" preSegmentId="1" postSegmentId="1" preFractionAlong="0.19275201041271228" postFractionAlong="0.6883967049269083"/>
    </projection>
    <projection id="NCXLS_M1_I1L" presynapticPopulation="M1" postsynapticPopulation="I1L" synapse="Acetylcholine">
      <connection id="41" preCellId="../M1/0/M1" postCellId="../I1L/0/I1L" preSegmentId="8" postSegmentId="1" preFractionAlong="0.9246474785591563" postFractionAlong="0.10359714999747949"/>
    </projection>
    <projection id="NCXLS_M1_I2L" presynapticPopulation="M1" postsynapticPopulation="I2L" synapse="Acetylcholine">
      <connection id="42" preCellId="../M1/0/M1" postCellId="../I2L/0/I2L" preSegmentId="4" postSegmentId="8" preFractionAlong="0.3140079252735116" postFractionAlong="0.2714150075196725"/>
    </projection>
    <projection id="NCXLS_M1_M3L" presynapticPopulation="M1" postsynapticPopulation="M3L" synapse="Acetylcholine">
      <connection id="43" preCellId="../M1/0/M1" postCellId="../M3L/0/M3L" preSegmentId="4" postSegmentId="5" preFractionAlong="0.6454418331834965" postFractionAlong="0.947522980551238"/>
    </projection>
    <projection id="NCXLS_M1_MCR" presynapticPopulation="M1" postsynapticPopulation="MCR" synapse="Acetylcholine">
      <connection id="44" preCellId="../M1/0/M1" postCellId="../MCR/0/MCR" preSegmentId="3" postSegmentId="4" preFractionAlong="0.6829416946253303" postFractionAlong="0.9034002408930234"/>
    </projection>
    <projection id="NCXLS_M1_NSML" presynapticPopulation="M1" postsynapticPopulation="NSML" synapse="Acetylcholine">
      <connection id="45" preCellId="../M1/0/M1" postCellId="../NSML/0/NSML" preSegmentId="6" postSegmentId="8" preFractionAlong="0.08605454468610119" postFractionAlong="0.05546569726504935"/>
    </projection>
    <projection id="NCXLS_M1_I6" presynapticPopulation="M1" postsynapticPopulation="I6" synapse="Acetylcholine">
      <connection id="46" preCellId="../M1/0/M1" postCellId="../I6/0/I6" preSegmentId="9" postSegmentId="3" preFractionAlong="0.534659566749085" postFractionAlong="0.020194923084332905"/>
    </projection>
    <projection id="NCXLS_M1_M4" presynapticPopulation="M1" postsynapticPopulation="M4" synapse="Glutamate">
      <connection id="47" preCellId="../M1/0/M1" postCellId="../M4/0/M4" preSegmentId="1" postSegmentId="3" preFractionAlong="0.7169769010638771" postFractionAlong="0.5826009367844994"/>
    </projection>
    <projection id="NCXLS_M1_M2R" presynapticPopulation="M1" postsynapticPopulation="M2R" synapse="Acetylcholine">
      <connection id="48" preCellId="../M1/0/M1" postCellId="../M2R/0/M2R" preSegmentId="7" postSegmentId="2" preFractionAlong="0.4454054285778348" postFractionAlong="0.3550947663631898"/>
    </projection>
    <projection id="NCXLS_M1_M5" presynapticPopulation="M1" postsynapticPopulation="M5" synapse="Acetylcholine">
      <connection id="49" preCellId="../M1/0/M1" postCellId="../M5/0/M5" preSegmentId="7" postSegmentId="6" preFractionAlong="0.8703290345540943" postFractionAlong="0.7758614386586519"/>
    </projection>
    <projection id="NCXLS_M1_I5" presynapticPopulation="M1" postsynapticPopulation="I5" synapse="Acetylcholine">
      <connection id="50" preCellId="../M1/0/M1" postCellId="../I5/0/I5" preSegmentId="5" postSegmentId="3" preFractionAlong="0.8903091977745643" postFractionAlong="0.4717671511498236"/>
    </projection>
    <projection id="NCXLS_M1_I1R" presynapticPopulation="M1" postsynapticPopulation="I1R" synapse="Acetylcholine">
      <connection id="51" preCellId="../M1/0/M1" postCellId="../I1R/0/I1R" preSegmentId="2" postSegmentId="4" preFractionAlong="0.14003923126435214" postFractionAlong="0.6707195257070481"/>
    </projection>
    <projection id="NCXLS_M1_NSMR" presynapticPopulation="M1" postsynapticPopulation="NSMR" synapse="Acetylcholine">
      <connection id="52" preCellId="../M1/0/M1" postCellId="../NSMR/0/NSMR" preSegmentId="2" postSegmentId="1" preFractionAlong="0.012857534116974989" postFractionAlong="0.10997923576541713"/>
    </projection>
    <projection id="NCXLS_M3L_M2L" presynapticPopulation="M3L" postsynapticPopulation="M2L" synapse="Glutamate">
      <connection id="53" preCellId="../M3L/0/M3L" postCellId="../M2L/0/M2L" preSegmentId="7" postSegmentId="8" preFractionAlong="0.5801718699913038" postFractionAlong="0.19301213398589256"/>
    </projection>
    <projection id="NCXLS_M3L_MI" presynapticPopulation="M3L" postsynapticPopulation="MI" synapse="Acetylcholine">
      <connection id="54" preCellId="../M3L/0/M3L" postCellId="../MI/0/MI" preSegmentId="8" postSegmentId="1" preFractionAlong="0.617740500624998" postFractionAlong="0.14070783082557425"/>
    </projection>
    <projection id="NCXLS_M3L_I4" presynapticPopulation="M3L" postsynapticPopulation="I4" synapse="Acetylcholine">
      <connection id="55" preCellId="../M3L/0/M3L" postCellId="../I4/0/I4" preSegmentId="1" postSegmentId="7" preFractionAlong="0.9330940731098543" postFractionAlong="0.22550310252096262"/>
    </projection>
    <projection id="NCXLS_M3L_I1L" presynapticPopulation="M3L" postsynapticPopulation="I1L" synapse="Acetylcholine">
      <connection id="56" preCellId="../M3L/0/M3L" postCellId="../I1L/0/I1L" preSegmentId="7" postSegmentId="7" preFractionAlong="0.04322315141777899" postFractionAlong="0.3424999930081374"/>
    </projection>
    <projection id="NCXLS_M3L_I2L" presynapticPopulation="M3L" postsynapticPopulation="I2L" synapse="Acetylcholine">
      <connection id="57" preCellId="../M3L/0/M3L" postCellId="../I2L/0/I2L" preSegmentId="9" postSegmentId="5" preFractionAlong="0.8829261188948626" postFractionAlong="0.5722433959684513"/>
    </projection>
    <projection id="NCXLS_M3L_MCR" presynapticPopulation="M3L" postsynapticPopulation="MCR" synapse="Acetylcholine">
      <connection id="58" preCellId="../M3L/0/M3L" postCellId="../MCR/0/MCR" preSegmentId="8" postSegmentId="8" preFractionAlong="0.47406421690551215" postFractionAlong="0.9276337194810736"/>
    </projection>
    <projection id="NCXLS_M3L_NSML" presynapticPopulation="M3L" postsynapticPopulation="NSML" synapse="Acetylcholine">
      <connection id="59" preCellId="../M3L/0/M3L" postCellId="../NSML/0/NSML" preSegmentId="2" postSegmentId="4" preFractionAlong="0.8074987316566608" postFractionAlong="0.13523982798472256"/>
    </projection>
    <projection id="NCXLS_M3L_I6" presynapticPopulation="M3L" postsynapticPopulation="I6" synapse="Acetylcholine">
      <connection id="60" preCellId="../M3L/0/M3L" postCellId="../I6/0/I6" preSegmentId="2" postSegmentId="8" preFractionAlong="0.605675222173172" postFractionAlong="0.36552879690727913"/>
    </projection>
    <projection id="NCXLS_M3L_M5" presynapticPopulation="M3L" postsynapticPopulation="M5" synapse="Acetylcholine">
      <connection id="61" preCellId="../M3L/0/M3L" postCellId="../M5/0/M5" preSegmentId="6" postSegmentId="6" preFractionAlong="0.6553260713826526" postFractionAlong="0.4884318604532778"/>
    </projection>
    <projection id="NCXLS_M3L_I1R" presynapticPopulation="M3L" postsynapticPopulation="I1R" synapse="Acetylcholine">
      <connection id="62" preCellId="../M3L/0/M3L" postCellId="../I1R/0/I1R" preSegmentId="8" postSegmentId="5" preFractionAlong="0.6694985765506946" postFractionAlong="0.026693158586854282"/>
    </projection>
    <projection id="NCXLS_MCR_I2R" presynapticPopulation="MCR" postsynapticPopulation="I2R" synapse="Acetylcholine">
      <connection id="63" preCellId="../MCR/0/MCR" postCellId="../I2R/0/I2R" preSegmentId="7" postSegmentId="9" preFractionAlong="0.16312111586711353" postFractionAlong="0.8121017282172212"/>
    </projection>
    <projection id="NCXLS_MCR_I1L" presynapticPopulation="MCR" postsynapticPopulation="I1L" synapse="Acetylcholine">
      <connection id="64" preCellId="../MCR/0/MCR" postCellId="../I1L/0/I1L" preSegmentId="3" postSegmentId="2" preFractionAlong="0.12801606520343634" postFractionAlong="0.4746457232758885"/>
    </projection>
    <projection id="NCXLS_MCR_M1" presynapticPopulation="MCR" postsynapticPopulation="M1" synapse="Acetylcholine">
      <connection id="65" preCellId="../MCR/0/MCR" postCellId="../M1/0/M1" preSegmentId="1" postSegmentId="6" preFractionAlong="0.4459239599513427" postFractionAlong="0.069486824752653"/>
    </projection>
    <projection id="NCXLS_MCR_MCL" presynapticPopulation="MCR" postsynapticPopulation="MCL" synapse="Acetylcholine">
      <connection id="66" preCellId="../MCR/0/MCR" postCellId="../MCL/0/MCL" preSegmentId="1" postSegmentId="3" preFractionAlong="0.4689428434408158" postFractionAlong="0.26162027729067383"/>
    </projection>
    <projection id="NCXLS_MCR_NSMR" presynapticPopulation="MCR" postsynapticPopulation="NSMR" synapse="Acetylcholine">
      <connection id="67" preCellId="../MCR/0/MCR" postCellId="../NSMR/0/NSMR" preSegmentId="6" postSegmentId="5" preFractionAlong="0.8943898536984908" postFractionAlong="0.05717965453026652"/>
    </projection>
    <projection id="NCXLS_NSML_I1L" presynapticPopulation="NSML" postsynapticPopulation="I1L" synapse="Serotonin_Glutamate">
      <connection id="68" preCellId="../NSML/0/NSML" postCellId="../I1L/0/I1L" preSegmentId="5" postSegmentId="6" preFractionAlong="0.1116366871708786" postFractionAlong="0.4410348058456205"/>
    </projection>
    <projection id="NCXLS_NSML_I2L" presynapticPopulation="NSML" postsynapticPopulation="I2L" synapse="Serotonin_Glutamate">
      <connection id="69" preCellId="../NSML/0/NSML" postCellId="../I2L/0/I2L" preSegmentId="1" postSegmentId="4" preFractionAlong="0.640347346297737" postFractionAlong="0.46830094759995833"/>
    </projection>
    <projection id="NCXLS_NSML_M1" presynapticPopulation="NSML" postsynapticPopulation="M1" synapse="Serotonin_Glutamate">
      <connection id="70" preCellId="../NSML/0/NSML" postCellId="../M1/0/M1" preSegmentId="7" postSegmentId="1" preFractionAlong="0.34238176600918835" postFractionAlong="0.26665965838820116"/>
    </projection>
    <projection id="NCXLS_I6_M2L" presynapticPopulation="I6" postsynapticPopulation="M2L" synapse="Acetylcholine">
      <connection id="71" preCellId="../I6/0/I6" postCellId="../M2L/0/M2L" preSegmentId="8" postSegmentId="2" preFractionAlong="0.028992744998979858" postFractionAlong="0.7707286153065659"/>
    </projection>
    <projection id="NCXLS_I6_I1R" presynapticPopulation="I6" postsynapticPopulation="I1R" synapse="Acetylcholine">
      <connection id="72" preCellId="../I6/0/I6" postCellId="../I1R/0/I1R" preSegmentId="6" postSegmentId="5" preFractionAlong="0.40363552625250454" postFractionAlong="0.3167910744946142"/>
    </projection>
    <projection id="NCXLS_M4_MI" presynapticPopulation="M4" postsynapticPopulation="MI" synapse="Acetylcholine">
      <connection id="73" preCellId="../M4/0/M4" postCellId="../MI/0/MI" preSegmentId="2" postSegmentId="2" preFractionAlong="0.11446456597454413" postFractionAlong="0.11988407158488701"/>
    </projection>
    <projection id="NCXLS_M4_I2R" presynapticPopulation="M4" postsynapticPopulation="I2R" synapse="Acetylcholine">
      <connection id="74" preCellId="../M4/0/M4" postCellId="../I2R/0/I2R" preSegmentId="9" postSegmentId="8" preFractionAlong="0.9994590671864021" postFractionAlong="0.7101418825625281"/>
    </projection>
    <projection id="NCXLS_M4_I1L" presynapticPopulation="M4" postsynapticPopulation="I1L" synapse="Acetylcholine">
      <connection id="75" preCellId="../M4/0/M4" postCellId="../I1L/0/I1L" preSegmentId="6" postSegmentId="2" preFractionAlong="0.37352210367956207" postFractionAlong="0.07758845168936468"/>
    </projection>
    <projection id="NCXLS_M4_I2L" presynapticPopulation="M4" postsynapticPopulation="I2L" synapse="Acetylcholine">
      <connection id="76" preCellId="../M4/0/M4" postCellId="../I2L/0/I2L" preSegmentId="9" postSegmentId="1" preFractionAlong="0.37346857198304895" postFractionAlong="0.7428780757183507"/>
    </projection>
    <projection id="NCXLS_M4_M1" presynapticPopulation="M4" postsynapticPopulation="M1" synapse="Acetylcholine">
      <connection id="77" preCellId="../M4/0/M4" postCellId="../M1/0/M1" preSegmentId="9" postSegmentId="1" preFractionAlong="0.40698808879012505" postFractionAlong="0.43110648734553736"/>
    </projection>
    <projection id="NCXLS_M4_MCR" presynapticPopulation="M4" postsynapticPopulation="MCR" synapse="Acetylcholine">
      <connection id="78" preCellId="../M4/0/M4" postCellId="../MCR/0/MCR" preSegmentId="5" postSegmentId="6" preFractionAlong="0.6814070600384377" postFractionAlong="0.3152098471611"/>
    </projection>
    <projection id="NCXLS_M4_MCL" presynapticPopulation="M4" postsynapticPopulation="MCL" synapse="Acetylcholine">
      <connection id="79" preCellId="../M4/0/M4" postCellId="../MCL/0/MCL" preSegmentId="2" postSegmentId="2" preFractionAlong="0.4753603574556491" postFractionAlong="0.7510238591384141"/>
    </projection>
    <projection id="NCXLS_M4_M5" presynapticPopulation="M4" postsynapticPopulation="M5" synapse="Acetylcholine">
      <connection id="80" preCellId="../M4/0/M4" postCellId="../M5/0/M5" preSegmentId="3" postSegmentId="4" preFractionAlong="0.8691741420473429" postFractionAlong="0.38695270408775984"/>
    </projection>
    <projection id="NCXLS_M4_NSMR" presynapticPopulation="M4" postsynapticPopulation="NSMR" synapse="Acetylcholine">
      <connection id="81" preCellId="../M4/0/M4" postCellId="../NSMR/0/NSMR" preSegmentId="3" postSegmentId="9" preFractionAlong="0.9982439138632666" postFractionAlong="0.4824720229900654"/>
    </projection>
    <projection id="NCXLS_M3R_MI" presynapticPopulation="M3R" postsynapticPopulation="MI" synapse="Acetylcholine">
      <connection id="82" preCellId="../M3R/0/M3R" postCellId="../MI/0/MI" preSegmentId="7" postSegmentId="7" preFractionAlong="0.9263693370991793" postFractionAlong="0.08489505445030365"/>
    </projection>
    <projection id="NCXLS_M3R_I4" presynapticPopulation="M3R" postsynapticPopulation="I4" synapse="Acetylcholine">
      <connection id="83" preCellId="../M3R/0/M3R" postCellId="../I4/0/I4" preSegmentId="5" postSegmentId="7" preFractionAlong="0.07914466827820943" postFractionAlong="0.11767651264529899"/>
    </projection>
    <projection id="NCXLS_M3R_I1L" presynapticPopulation="M3R" postsynapticPopulation="I1L" synapse="Acetylcholine">
      <connection id="84" preCellId="../M3R/0/M3R" postCellId="../I1L/0/I1L" preSegmentId="3" postSegmentId="7" preFractionAlong="0.5138573592691225" postFractionAlong="0.010567122774442939"/>
    </projection>
    <projection id="NCXLS_M3R_I2L" presynapticPopulation="M3R" postsynapticPopulation="I2L" synapse="Acetylcholine">
      <connection id="85" preCellId="../M3R/0/M3R" postCellId="../I2L/0/I2L" preSegmentId="2" postSegmentId="7" preFractionAlong="0.15572601192334556" postFractionAlong="0.768867762491973"/>
    </projection>
    <projection id="NCXLS_M3R_MCR" presynapticPopulation="M3R" postsynapticPopulation="MCR" synapse="Acetylcholine">
      <connection id="86" preCellId="../M3R/0/M3R" postCellId="../MCR/0/MCR" preSegmentId="1" postSegmentId="3" preFractionAlong="0.9791532397514886" postFractionAlong="0.07344469100576145"/>
    </projection>
    <projection id="NCXLS_M3R_NSML" presynapticPopulation="M3R" postsynapticPopulation="NSML" synapse="Acetylcholine">
      <connection id="87" preCellId="../M3R/0/M3R" postCellId="../NSML/0/NSML" preSegmentId="6" postSegmentId="9" preFractionAlong="0.3787063575653773" postFractionAlong="0.8181097847441675"/>
    </projection>
    <projection id="NCXLS_M3R_I6" presynapticPopulation="M3R" postsynapticPopulation="I6" synapse="Acetylcholine">
      <connection id="88" preCellId="../M3R/0/M3R" postCellId="../I6/0/I6" preSegmentId="4" postSegmentId="7" preFractionAlong="0.5429499379481127" postFractionAlong="0.6368989721654803"/>
    </projection>
    <projection id="NCXLS_M3R_M5" presynapticPopulation="M3R" postsynapticPopulation="M5" synapse="Acetylcholine">
      <connection id="89" preCellId="../M3R/0/M3R" postCellId="../M5/0/M5" preSegmentId="4" postSegmentId="2" preFractionAlong="0.43407639419691957" postFractionAlong="0.19197550585923784"/>
    </projection>
    <projection id="NCXLS_M3R_I1R" presynapticPopulation="M3R" postsynapticPopulation="I1R" synapse="Acetylcholine">
      <connection id="90" preCellId="../M3R/0/M3R" postCellId="../I1R/0/I1R" preSegmentId="4" postSegmentId="9" preFractionAlong="0.7955633625022697" postFractionAlong="0.7636043591629952"/>
    </projection>
    <projection id="NCXLS_M2R_I3" presynapticPopulation="M2R" postsynapticPopulation="I3" synapse="Acetylcholine">
      <connection id="91" preCellId="../M2R/0/M2R" postCellId="../I3/0/I3" preSegmentId="3" postSegmentId="9" preFractionAlong="0.08851905256306758" postFractionAlong="0.908153943227503"/>
    </projection>
    <projection id="NCXLS_M2R_M2L" presynapticPopulation="M2R" postsynapticPopulation="M2L" synapse="Acetylcholine">
      <connection id="92" preCellId="../M2R/0/M2R" postCellId="../M2L/0/M2L" preSegmentId="4" postSegmentId="1" preFractionAlong="0.05815112056640115" postFractionAlong="0.5265156165216303"/>
    </projection>
    <projection id="NCXLS_M2R_I2R" presynapticPopulation="M2R" postsynapticPopulation="I2R" synapse="Acetylcholine">
      <connection id="93" preCellId="../M2R/0/M2R" postCellId="../I2R/0/I2R" preSegmentId="8" postSegmentId="4" preFractionAlong="0.26425987784965566" postFractionAlong="0.8348657553333153"/>
    </projection>
    <projection id="NCXLS_M2R_I1L" presynapticPopulation="M2R" postsynapticPopulation="I1L" synapse="Acetylcholine">
      <connection id="94" preCellId="../M2R/0/M2R" postCellId="../I1L/0/I1L" preSegmentId="9" postSegmentId="9" preFractionAlong="0.9591934864585215" postFractionAlong="0.005941755844354413"/>
    </projection>
    <projection id="NCXLS_M2R_M1" presynapticPopulation="M2R" postsynapticPopulation="M1" synapse="Acetylcholine">
      <connection id="95" preCellId="../M2R/0/M2R" postCellId="../M1/0/M1" preSegmentId="4" postSegmentId="8" preFractionAlong="0.9046384271149494" postFractionAlong="0.013822204097494684"/>
    </projection>
    <projection id="NCXLS_M2R_M3L" presynapticPopulation="M2R" postsynapticPopulation="M3L" synapse="Glutamate">
      <connection id="96" preCellId="../M2R/0/M2R" postCellId="../M3L/0/M3L" preSegmentId="3" postSegmentId="7" preFractionAlong="0.18683440629458303" postFractionAlong="0.6196641516197087"/>
    </projection>
    <projection id="NCXLS_M2R_MCR" presynapticPopulation="M2R" postsynapticPopulation="MCR" synapse="Acetylcholine">
      <connection id="97" preCellId="../M2R/0/M2R" postCellId="../MCR/0/MCR" preSegmentId="5" postSegmentId="4" preFractionAlong="0.4637317359313208" postFractionAlong="0.10354357195278396"/>
    </projection>
    <projection id="NCXLS_M2R_I6" presynapticPopulation="M2R" postsynapticPopulation="I6" synapse="Acetylcholine">
      <connection id="98" preCellId="../M2R/0/M2R" postCellId="../I6/0/I6" preSegmentId="3" postSegmentId="9" preFractionAlong="0.7930123987693986" postFractionAlong="0.9885904790263319"/>
    </projection>
    <projection id="NCXLS_M2R_M3R" presynapticPopulation="M2R" postsynapticPopulation="M3R" synapse="Acetylcholine">
      <connection id="99" preCellId="../M2R/0/M2R" postCellId="../M3R/0/M3R" preSegmentId="5" postSegmentId="3" preFractionAlong="0.5435402377305709" postFractionAlong="0.47363075548460953"/>
    </projection>
    <projection id="NCXLS_M2R_MCL" presynapticPopulation="M2R" postsynapticPopulation="MCL" synapse="Acetylcholine">
      <connection id="100" preCellId="../M2R/0/M2R" postCellId="../MCL/0/MCL" preSegmentId="7" postSegmentId="5" preFractionAlong="0.8080147490627835" postFractionAlong="0.26083108002500877"/>
    </projection>
    <projection id="NCXLS_M2R_M5" presynapticPopulation="M2R" postsynapticPopulation="M5" synapse="Glutamate">
      <connection id="101" preCellId="../M2R/0/M2R" postCellId="../M5/0/M5" preSegmentId="1" postSegmentId="4" preFractionAlong="0.033187630225001485" postFractionAlong="0.517014723886716"/>
    </projection>
    <projection id="NCXLS_M2R_I5" presynapticPopulation="M2R" postsynapticPopulation="I5" synapse="Acetylcholine">
      <connection id="102" preCellId="../M2R/0/M2R" postCellId="../I5/0/I5" preSegmentId="7" postSegmentId="1" preFractionAlong="0.6106187301963539" postFractionAlong="0.9668522322446306"/>
    </projection>
    <projection id="NCXLS_M2R_I1R" presynapticPopulation="M2R" postsynapticPopulation="I1R" synapse="Acetylcholine">
      <connection id="103" preCellId="../M2R/0/M2R" postCellId="../I1R/0/I1R" preSegmentId="2" postSegmentId="2" preFractionAlong="0.8001582366647964" postFractionAlong="0.6417370448140233"/>
    </projection>
    <projection id="NCXLS_M2R_NSMR" presynapticPopulation="M2R" postsynapticPopulation="NSMR" synapse="Acetylcholine">
      <connection id="104" preCellId="../M2R/0/M2R" postCellId="../NSMR/0/NSMR" preSegmentId="5" postSegmentId="4" preFractionAlong="0.5738240691889402" postFractionAlong="0.4660035143530129"/>
    </projection>
    <projection id="NCXLS_MCL_I3" presynapticPopulation="MCL" postsynapticPopulation="I3" synapse="Acetylcholine">
      <connection id="105" preCellId="../MCL/0/MCL" postCellId="../I3/0/I3" preSegmentId="9" postSegmentId="9" preFractionAlong="0.1825971310870993" postFractionAlong="0.6165878380712464"/>
    </projection>
    <projection id="NCXLS_MCL_M2L" presynapticPopulation="MCL" postsynapticPopulation="M2L" synapse="Acetylcholine">
      <connection id="106" preCellId="../MCL/0/MCL" postCellId="../M2L/0/M2L" preSegmentId="3" postSegmentId="6" preFractionAlong="0.000554184585253914" postFractionAlong="0.6083194014000671"/>
    </projection>
    <projection id="NCXLS_MCL_M3L" presynapticPopulation="MCL" postsynapticPopulation="M3L" synapse="Acetylcholine">
      <connection id="107" preCellId="../MCL/0/MCL" postCellId="../M3L/0/M3L" preSegmentId="6" postSegmentId="2" preFractionAlong="0.37517639831310245" postFractionAlong="0.4860034482382267"/>
    </projection>
    <projection id="NCXLS_MCL_I6" presynapticPopulation="MCL" postsynapticPopulation="I6" synapse="Acetylcholine">
      <connection id="108" preCellId="../MCL/0/MCL" postCellId="../I6/0/I6" preSegmentId="2" postSegmentId="4" preFractionAlong="0.3561391620149682" postFractionAlong="0.9637676499423089"/>
    </projection>
    <projection id="NCXLS_MCL_I5" presynapticPopulation="MCL" postsynapticPopulation="I5" synapse="Acetylcholine">
      <connection id="109" preCellId="../MCL/0/MCL" postCellId="../I5/0/I5" preSegmentId="2" postSegmentId="1" preFractionAlong="0.5364303967894921" postFractionAlong="0.7420925925582444"/>
    </projection>
    <projection id="NCXLS_MCL_I1R" presynapticPopulation="MCL" postsynapticPopulation="I1R" synapse="Acetylcholine">
      <connection id="110" preCellId="../MCL/0/MCL" postCellId="../I1R/0/I1R" preSegmentId="1" postSegmentId="5" preFractionAlong="0.8906785956054708" postFractionAlong="0.7163310272566953"/>
    </projection>
    <projection id="NCXLS_M5_I3" presynapticPopulation="M5" postsynapticPopulation="I3" synapse="Acetylcholine">
      <connection id="111" preCellId="../M5/0/M5" postCellId="../I3/0/I3" preSegmentId="9" postSegmentId="8" preFractionAlong="0.348505799831591" postFractionAlong="0.8329977422394179"/>
    </projection>
    <projection id="NCXLS_M5_M2L" presynapticPopulation="M5" postsynapticPopulation="M2L" synapse="Acetylcholine">
      <connection id="112" preCellId="../M5/0/M5" postCellId="../M2L/0/M2L" preSegmentId="4" postSegmentId="1" preFractionAlong="0.6913864452150186" postFractionAlong="0.3258355948449989"/>
    </projection>
    <projection id="NCXLS_M5_I2R" presynapticPopulation="M5" postsynapticPopulation="I2R" synapse="Acetylcholine">
      <connection id="113" preCellId="../M5/0/M5" postCellId="../I2R/0/I2R" preSegmentId="4" postSegmentId="4" preFractionAlong="0.9003760223475992" postFractionAlong="0.21854846152056295"/>
    </projection>
    <projection id="NCXLS_M5_M1" presynapticPopulation="M5" postsynapticPopulation="M1" synapse="Acetylcholine">
      <connection id="114" preCellId="../M5/0/M5" postCellId="../M1/0/M1" preSegmentId="9" postSegmentId="4" preFractionAlong="0.2283201737969427" postFractionAlong="0.38185762522183253"/>
    </projection>
    <projection id="NCXLS_M5_MCR" presynapticPopulation="M5" postsynapticPopulation="MCR" synapse="Acetylcholine">
      <connection id="115" preCellId="../M5/0/M5" postCellId="../MCR/0/MCR" preSegmentId="9" postSegmentId="4" preFractionAlong="0.07608937134957627" postFractionAlong="0.6036019202212376"/>
    </projection>
    <projection id="NCXLS_M5_MCL" presynapticPopulation="M5" postsynapticPopulation="MCL" synapse="Acetylcholine">
      <connection id="116" preCellId="../M5/0/M5" postCellId="../MCL/0/MCL" preSegmentId="2" postSegmentId="2" preFractionAlong="0.06767353665798337" postFractionAlong="0.9933898787390681"/>
    </projection>
    <projection id="NCXLS_M5_I5" presynapticPopulation="M5" postsynapticPopulation="I5" synapse="Acetylcholine">
      <connection id="117" preCellId="../M5/0/M5" postCellId="../I5/0/I5" preSegmentId="3" postSegmentId="1" preFractionAlong="0.2889829042417996" postFractionAlong="0.7387480290356228"/>
    </projection>
    <projection id="NCXLS_M5_NSMR" presynapticPopulation="M5" postsynapticPopulation="NSMR" synapse="Acetylcholine">
      <connection id="118" preCellId="../M5/0/M5" postCellId="../NSMR/0/NSMR" preSegmentId="9" postSegmentId="1" preFractionAlong="0.3809457626738071" postFractionAlong="0.40753438015364507"/>
    </projection>
    <projection id="NCXLS_I1R_M2L" presynapticPopulation="I1R" postsynapticPopulation="M2L" synapse="Acetylcholine">
      <connection id="119" preCellId="../I1R/0/I1R" postCellId="../M2L/0/M2L" preSegmentId="7" postSegmentId="1" preFractionAlong="0.7461505038267879" postFractionAlong="0.05060138712180473"/>
    </projection>
    <projection id="NCXLS_NSMR_I2R" presynapticPopulation="NSMR" postsynapticPopulation="I2R" synapse="Serotonin_Glutamate">
      <connection id="120" preCellId="../NSMR/0/NSMR" postCellId="../I2R/0/I2R" preSegmentId="3" postSegmentId="2" preFractionAlong="0.9810386266812119" postFractionAlong="0.020014693172932807"/>
    </projection>
    <projection id="NCXLS_NSMR_I1L" presynapticPopulation="NSMR" postsynapticPopulation="I1L" synapse="Serotonin_Glutamate">
      <connection id="121" preCellId="../NSMR/0/NSMR" postCellId="../I1L/0/I1L" preSegmentId="6" postSegmentId="9" preFractionAlong="0.3417023791091982" postFractionAlong="0.27698957538720925"/>
    </projection>
    <projection id="NCXLS_NSMR_M1" presynapticPopulation="NSMR" postsynapticPopulation="M1" synapse="Serotonin_Glutamate">
      <connection id="122" preCellId="../NSMR/0/NSMR" postCellId="../M1/0/M1" preSegmentId="2" postSegmentId="9" preFractionAlong="0.9372620447778404" postFractionAlong="0.5862678431932681"/>
    </projection>
    <projection id="NC_I1L_RMDDL" presynapticPopulation="I1L" postsynapticPopulation="RMDDL" synapse="Acetylcholine">
      <connection id="123" preCellId="../I1L/0/I1L" postCellId="../RMDDL/0/RMDDL" preSegmentId="9" postSegmentId="6" preFractionAlong="0.5251757899342241" postFractionAlong="0.8347379547769676"/>
    </projection>
    <projection id="NC_I1L_RMDVL" presynapticPopulation="I1L" postsynapticPopulation="RMDVL" synapse="Acetylcholine">
      <connection id="124" preCellId="../I1L/0/I1L" postCellId="../RMDVL/0/RMDVL" preSegmentId="3" postSegmentId="9" preFractionAlong="0.43185286573803683" postFractionAlong="0.35530360100122993"/>
    </projection>
    <projection id="NC_I1R_RMDDR" presynapticPopulation="I1R" postsynapticPopulation="RMDDR" synapse="Acetylcholine">
      <connection id="125" preCellId="../I1R/0/I1R" postCellId="../RMDDR/0/RMDDR" preSegmentId="7" postSegmentId="8" preFractionAlong="0.3370713620905832" postFractionAlong="0.031271377747267404"/>
    </projection>
    <projection id="NC_I1R_RMDVR" presynapticPopulation="I1R" postsynapticPopulation="RMDVR" synapse="Acetylcholine">
      <connection id="126" preCellId="../I1R/0/I1R" postCellId="../RMDVR/0/RMDVR" preSegmentId="4" postSegmentId="5" preFractionAlong="0.8338093088728618" postFractionAlong="0.39504053568149844"/>
    </projection>
    <projection id="NC_I2L_URXL" presynapticPopulation="I2L" postsynapticPopulation="URXL" synapse="Glutamate">
      <connection id="127" preCellId="../I2L/0/I2L" postCellId="../URXL/0/URXL" preSegmentId="8" postSegmentId="3" preFractionAlong="0.6282565938100043" postFractionAlong="0.4506671206067313"/>
    </projection>
    <projection id="NC_I2R_URXR" presynapticPopulation="I2R" postsynapticPopulation="URXR" synapse="Glutamate">
      <connection id="128" preCellId="../I2R/0/I2R" postCellId="../URXR/0/URXR" preSegmentId="6" postSegmentId="6" preFractionAlong="0.6442054818406923" postFractionAlong="0.918191773229734"/>
    </projection>
    <projection id="NC_AVKL_I1L" presynapticPopulation="AVKL" postsynapticPopulation="I1L" synapse="Acetylcholine">
      <connection id="129" preCellId="../AVKL/0/AVKL" postCellId="../I1L/0/I1L" preSegmentId="6" postSegmentId="6" preFractionAlong="0.5976870299435008" postFractionAlong="0.9270121129250806"/>
    </projection>
    <projection id="NC_AVKR_I1R" presynapticPopulation="AVKR" postsynapticPopulation="I1R" synapse="Acetylcholine">
      <connection id="130" preCellId="../AVKR/0/AVKR" postCellId="../I1R/0/I1R" preSegmentId="9" postSegmentId="7" preFractionAlong="0.04924440140828912" postFractionAlong="0.1363853929336768"/>
    </projection>
    <projection id="NC_RIS_I1L" presynapticPopulation="RIS" postsynapticPopulation="I1L" synapse="Glutamate">
      <connection id="131" preCellId="../RIS/0/RIS" postCellId="../I1L/0/I1L" preSegmentId="1" postSegmentId="8" preFractionAlong="0.8258634210423188" postFractionAlong="0.26469837771100657"/>
    </projection>
    <projection id="NC_RIS_I1R" presynapticPopulation="RIS" postsynapticPopulation="I1R" synapse="Glutamate">
      <connection id="132" preCellId="../RIS/0/RIS" postCellId="../I1R/0/I1R" preSegmentId="6" postSegmentId="5" preFractionAlong="0.0040252788539707485" postFractionAlong="0.40164517721204185"/>
    </projection>
    <projection id="NC_AVAL_I2L" presynapticPopulation="AVAL" postsynapticPopulation="I2L" synapse="Acetylcholine">
      <connection id="133" preCellId="../AVAL/0/AVAL" postCellId="../I2L/0/I2L" preSegmentId="3" postSegmentId="2" preFractionAlong="0.7906061983060746" postFractionAlong="0.2801127023065654"/>
    </projection>
    <projection id="NC_AVAR_I2R" presynapticPopulation="AVAR" postsynapticPopulation="I2R" synapse="Acetylcholine">
      <connection id="134" preCellId="../AVAR/0/AVAR" postCellId="../I2R/0/I2R" preSegmentId="5" postSegmentId="9" preFractionAlong="0.39752232910721585" postFractionAlong="0.42341670930627184"/>
    </projection>
    <projection id="NC_SMBVL_I4" presynapticPopulation="SMBVL" postsynapticPopulation="I4" synapse="Acetylcholine">
      <connection id="135" preCellId="../SMBVL/0/SMBVL" postCellId="../I4/0/I4" preSegmentId="2" postSegmentId="3" preFractionAlong="0.21779100001237928" postFractionAlong="0.6933626151747102"/>
    </projection>
    <projection id="NC_SMBVR_I4" presynapticPopulation="SMBVR" postsynapticPopulation="I4" synapse="Acetylcholine">
      <connection id="136" preCellId="../SMBVR/0/SMBVR" postCellId="../I4/0/I4" preSegmentId="1" postSegmentId="9" preFractionAlong="0.7131642687573406" postFractionAlong="0.584467418058375"/>
    </projection>
  </network>
</neuroml>
