<?xml version='1.0' encoding='UTF-8'?>
<neuroml xmlns="http://www.neuroml.org/schema/neuroml2" xmlns:xsi="http://www.w3.org/2001/XMLSchema-instance" xsi:schemaLocation="http://www.neuroml.org/schema/neuroml2 https://raw.githubusercontent.com/NeuroML/NeuroML2/development/Schemas/NeuroML2/NeuroML_v2beta4.xsd" id="gvft_network_bio_prior_lamW_0_456_DF_0_033_t80_net">
  <notes>NeuroML2 network generated from GVFT simulation on 2025-05-04 14:48:14
</notes>
  <include href="AVAL.cell.nml"/>
  <include href="AVAR.cell.nml"/>
  <include href="AVKL.cell.nml"/>
  <include href="AVKR.cell.nml"/>
  <include href="RIS.cell.nml"/>
  <include href="RMDDL.cell.nml"/>
  <include href="RMDDR.cell.nml"/>
  <include href="RMDVL.cell.nml"/>
  <include href="RMDVR.cell.nml"/>
  <include href="SMBVL.cell.nml"/>
  <include href="SMBVR.cell.nml"/>
  <include href="URXL.cell.nml"/>
  <include href="URXR.cell.nml"/>
  <include href="I4.cell.nml"/>
  <include href="I1L.cell.nml"/>
  <include href="I1R.cell.nml"/>
  <include href="M2R.cell.nml"/>
  <include href="M4.cell.nml"/>
  <include href="I6.cell.nml"/>
  <include href="I2R.cell.nml"/>
  <include href="M3R.cell.nml"/>
  <include href="I5.cell.nml"/>
  <include href="MCR.cell.nml"/>
  <include href="M3L.cell.nml"/>
  <include href="MI.cell.nml"/>
  <include href="M1.cell.nml"/>
  <include href="MCL.cell.nml"/>
  <include href="I2L.cell.nml"/>
  <include href="M5.cell.nml"/>
  <include href="NSMR.cell.nml"/>
  <include href="M2L.cell.nml"/>
  <include href="NSML.cell.nml"/>
  <include href="I3.cell.nml"/>
  <include href="Generic_GJ.synapse.nml"/>
  <include href="Glutamate.synapse.nml"/>
  <include href="Acetylcholine.synapse.nml"/>
  <include href="Serotonin_Glutamate.synapse.nml"/>
  <network id="gvft_network_bio_prior_lamW_0_456_DF_0_033_t80_net" type="networkWithTemperature" temperature="20.0 degC">
    <population id="M1" component="M1" type="populationList" size="1">
      <instance id="0">
        <location x="0.919598" y="-0.6482412" z="0.0"/>
      </instance>
    </population>
    <population id="M2L" component="M2L" type="populationList" size="1">
      <instance id="0">
        <location x="-0.19597991" y="-0.8190955" z="0.0"/>
      </instance>
    </population>
    <population id="M2R" component="M2R" type="populationList" size="1">
      <instance id="0">
        <location x="0.19597991" y="0.2964824" z="0.0"/>
      </instance>
    </population>
    <population id="M3L" component="M3L" type="populationList" size="1">
      <instance id="0">
        <location x="-0.31658292" y="0.67839193" z="0.0"/>
      </instance>
    </population>
    <population id="M3R" component="M3R" type="populationList" size="1">
      <instance id="0">
        <location x="-1.0" y="-0.2763819" z="0.0"/>
      </instance>
    </population>
    <population id="M4" component="M4" type="populationList" size="1">
      <instance id="0">
        <location x="-0.37688443" y="-0.24623117" z="0.0"/>
      </instance>
    </population>
    <population id="M5" component="M5" type="populationList" size="1">
      <instance id="0">
        <location x="-0.12562814" y="-0.2763819" z="0.0"/>
      </instance>
    </population>
    <population id="I1L" component="I1L" type="populationList" size="1">
      <instance id="0">
        <location x="-0.51758796" y="0.53768843" z="0.0"/>
      </instance>
    </population>
    <population id="I1R" component="I1R" type="populationList" size="1">
      <instance id="0">
        <location x="-0.9798995" y="0.68844223" z="0.0"/>
      </instance>
    </population>
    <population id="I2L" component="I2L" type="populationList" size="1">
      <instance id="0">
        <location x="-0.8592965" y="0.7487437" z="0.0"/>
      </instance>
    </population>
    <population id="I2R" component="I2R" type="populationList" size="1">
      <instance id="0">
        <location x="0.3467337" y="0.80904526" z="0.0"/>
      </instance>
    </population>
    <population id="I3" component="I3" type="populationList" size="1">
      <instance id="0">
        <location x="0.14572865" y="0.21608041" z="0.0"/>
      </instance>
    </population>
    <population id="I4" component="I4" type="populationList" size="1">
      <instance id="0">
        <location x="0.31658292" y="-0.9296482" z="0.0"/>
      </instance>
    </population>
    <population id="I5" component="I5" type="populationList" size="1">
      <instance id="0">
        <location x="-0.86934674" y="-0.53768843" z="0.0"/>
      </instance>
    </population>
    <population id="I6" component="I6" type="populationList" size="1">
      <instance id="0">
        <location x="0.41708544" y="0.19597991" z="0.0"/>
      </instance>
    </population>
    <population id="MCL" component="MCL" type="populationList" size="1">
      <instance id="0">
        <location x="-0.919598" y="0.35678393" z="0.0"/>
      </instance>
    </population>
    <population id="MCR" component="MCR" type="populationList" size="1">
      <instance id="0">
        <location x="0.1356784" y="-0.5477387" z="0.0"/>
      </instance>
    </population>
    <population id="MI" component="MI" type="populationList" size="1">
      <instance id="0">
        <location x="-0.83919597" y="0.42713568" z="0.0"/>
      </instance>
    </population>
    <population id="NSML" component="NSML" type="populationList" size="1">
      <instance id="0">
        <location x="0.23618092" y="0.43718594" z="0.0"/>
      </instance>
    </population>
    <population id="NSMR" component="NSMR" type="populationList" size="1">
      <instance id="0">
        <location x="0.7386935" y="-0.9396985" z="0.0"/>
      </instance>
    </population>
    <population id="AVAL" component="AVAL" type="populationList" size="1">
      <instance id="0">
        <location x="5.0" y="0.0" z="0.0"/>
      </instance>
    </population>
    <population id="AVAR" component="AVAR" type="populationList" size="1">
      <instance id="0">
        <location x="5.0" y="0.0" z="0.0"/>
      </instance>
    </population>
    <population id="AVKL" component="AVKL" type="populationList" size="1">
      <instance id="0">
        <location x="5.0" y="0.0" z="0.0"/>
      </instance>
    </population>
    <population id="AVKR" component="AVKR" type="populationList" size="1">
      <instance id="0">
        <location x="5.0" y="0.0" z="0.0"/>
      </instance>
    </population>
    <population id="RIS" component="RIS" type="populationList" size="1">
      <instance id="0">
        <location x="5.0" y="0.0" z="0.0"/>
      </instance>
    </population>
    <population id="RMDDL" component="RMDDL" type="populationList" size="1">
      <instance id="0">
        <location x="5.0" y="0.0" z="0.0"/>
      </instance>
    </population>
    <population id="RMDDR" component="RMDDR" type="populationList" size="1">
      <instance id="0">
        <location x="5.0" y="0.0" z="0.0"/>
      </instance>
    </population>
    <population id="RMDVL" component="RMDVL" type="populationList" size="1">
      <instance id="0">
        <location x="5.0" y="0.0" z="0.0"/>
      </instance>
    </population>
    <population id="RMDVR" component="RMDVR" type="populationList" size="1">
      <instance id="0">
        <location x="5.0" y="0.0" z="0.0"/>
      </instance>
    </population>
    <population id="SMBVL" component="SMBVL" type="populationList" size="1">
      <instance id="0">
        <location x="5.0" y="0.0" z="0.0"/>
      </instance>
    </population>
    <population id="SMBVR" component="SMBVR" type="populationList" size="1">
      <instance id="0">
        <location x="5.0" y="0.0" z="0.0"/>
      </instance>
    </population>
    <population id="URXL" component="URXL" type="populationList" size="1">
      <instance id="0">
        <location x="5.0" y="0.0" z="0.0"/>
      </instance>
    </population>
    <population id="URXR" component="URXR" type="populationList" size="1">
      <instance id="0">
        <location x="5.0" y="0.0" z="0.0"/>
      </instance>
    </population>
    <electricalProjection id="NCXLS_M3L_M2R_GJ" presynapticPopulation="M3L" postsynapticPopulation="M2R">
      <electricalConnection id="0" preCell="0" postCell="0" synapse="Generic_GJ" preSegment="9" postSegment="7" preFractionAlong="0.7771435685225458" postFractionAlong="0.9264922163672986"/>
    </electricalProjection>
    <electricalProjection id="NCXLS_M3R_M2R_GJ" presynapticPopulation="M3R" postsynapticPopulation="M2R">
      <electricalConnection id="1" preCell="0" postCell="0" synapse="Generic_GJ" preSegment="2" postSegment="7" preFractionAlong="0.7451992340275277" postFractionAlong="0.3346996945191685"/>
    </electricalProjection>
    <electricalProjection id="NCXLS_M1_M5_GJ" presynapticPopulation="M1" postsynapticPopulation="M5">
      <electricalConnection id="2" preCell="0" postCell="0" synapse="Generic_GJ" preSegment="9" postSegment="4" preFractionAlong="0.7228541796753541" postFractionAlong="0.8282830451682474"/>
    </electricalProjection>
    <electricalProjection id="NCXLS_M2L_M3R_GJ" presynapticPopulation="M2L" postsynapticPopulation="M3R">
      <electricalConnection id="3" preCell="0" postCell="0" synapse="Generic_GJ" preSegment="2" postSegment="7" preFractionAlong="0.6838230274535032" postFractionAlong="0.8624381433779964"/>
    </electricalProjection>
    <electricalProjection id="NCXLS_M2R_M3R_GJ" presynapticPopulation="M2R" postsynapticPopulation="M3R">
      <electricalConnection id="4" preCell="0" postCell="0" synapse="Generic_GJ" preSegment="9" postSegment="5" preFractionAlong="0.5599116862447463" postFractionAlong="0.9931710831940439"/>
    </electricalProjection>
    <electricalProjection id="NCXLS_M2R_M2L_GJ" presynapticPopulation="M2R" postsynapticPopulation="M2L">
      <electricalConnection id="5" preCell="0" postCell="0" synapse="Generic_GJ" preSegment="8" postSegment="9" preFractionAlong="0.1759432773249866" postFractionAlong="0.47193505278631287"/>
    </electricalProjection>
    <electricalProjection id="NCXLS_M4_M3L_GJ" presynapticPopulation="M4" postsynapticPopulation="M3L">
      <electricalConnection id="6" preCell="0" postCell="0" synapse="Generic_GJ" preSegment="8" postSegment="4" preFractionAlong="0.949976273549186" postFractionAlong="0.859822881540161"/>
    </electricalProjection>
    <electricalProjection id="NCXLS_M4_M2R_GJ" presynapticPopulation="M4" postsynapticPopulation="M2R">
      <electricalConnection id="7" preCell="0" postCell="0" synapse="Generic_GJ" preSegment="2" postSegment="5" preFractionAlong="0.17239292274700968" postFractionAlong="0.5124386744880165"/>
    </electricalProjection>
    <electricalProjection id="NCXLS_MCR_NSMR_GJ" presynapticPopulation="MCR" postsynapticPopulation="NSMR">
      <electricalConnection id="8" preCell="0" postCell="0" synapse="Generic_GJ" preSegment="6" postSegment="6" preFractionAlong="0.21907933566752946" postFractionAlong="0.060971719559531845"/>
    </electricalProjection>
    <electricalProjection id="NCXLS_M5_M3R_GJ" presynapticPopulation="M5" postsynapticPopulation="M3R">
      <electricalConnection id="9" preCell="0" postCell="0" synapse="Generic_GJ" preSegment="3" postSegment="9" preFractionAlong="0.69159711410201" postFractionAlong="0.244365491292717"/>
    </electricalProjection>
    <electricalProjection id="NCXLS_M5_M1_GJ" presynapticPopulation="M5" postsynapticPopulation="M1">
      <electricalConnection id="10" preCell="0" postCell="0" synapse="Generic_GJ" preSegment="2" postSegment="7" preFractionAlong="0.9506437849446087" postFractionAlong="0.13707444268547286"/>
    </electricalProjection>
    <projection id="NCXLS_M3L_I4" presynapticPopulation="M3L" postsynapticPopulation="I4" synapse="Acetylcholine">
      <connection id="11" preCellId="../M3L/0/M3L" postCellId="../I4/0/I4" preSegmentId="6" postSegmentId="5" preFractionAlong="0.0568419506815826" postFractionAlong="0.20666100723071557"/>
    </projection>
    <projection id="NCXLS_M3L_I1L" presynapticPopulation="M3L" postsynapticPopulation="I1L" synapse="Acetylcholine">
      <connection id="12" preCellId="../M3L/0/M3L" postCellId="../I1L/0/I1L" preSegmentId="1" postSegmentId="3" preFractionAlong="0.4040066230802025" postFractionAlong="0.8208317903747576"/>
    </projection>
    <projection id="NCXLS_M3L_M3R" presynapticPopulation="M3L" postsynapticPopulation="M3R" synapse="Acetylcholine">
      <connection id="13" preCellId="../M3L/0/M3L" postCellId="../M3R/0/M3R" preSegmentId="6" postSegmentId="4" preFractionAlong="0.040110647095723095" postFractionAlong="0.5533981952867529"/>
    </projection>
    <projection id="NCXLS_M3L_M1" presynapticPopulation="M3L" postsynapticPopulation="M1" synapse="Acetylcholine">
      <connection id="14" preCellId="../M3L/0/M3L" postCellId="../M1/0/M1" preSegmentId="9" postSegmentId="8" preFractionAlong="0.4610533305271882" postFractionAlong="0.8345719568709472"/>
    </projection>
    <projection id="NCXLS_M3L_I6" presynapticPopulation="M3L" postsynapticPopulation="I6" synapse="Acetylcholine">
      <connection id="15" preCellId="../M3L/0/M3L" postCellId="../I6/0/I6" preSegmentId="7" postSegmentId="1" preFractionAlong="0.9576043711161709" postFractionAlong="0.14778413347831776"/>
    </projection>
    <projection id="NCXLS_M3L_M2L" presynapticPopulation="M3L" postsynapticPopulation="M2L" synapse="Acetylcholine">
      <connection id="16" preCellId="../M3L/0/M3L" postCellId="../M2L/0/M2L" preSegmentId="3" postSegmentId="9" preFractionAlong="0.636136530428131" postFractionAlong="0.18752804794656086"/>
    </projection>
    <projection id="NCXLS_M3L_NSMR" presynapticPopulation="M3L" postsynapticPopulation="NSMR" synapse="Acetylcholine">
      <connection id="17" preCellId="../M3L/0/M3L" postCellId="../NSMR/0/NSMR" preSegmentId="3" postSegmentId="6" preFractionAlong="0.2427508713282266" postFractionAlong="0.08524974178207301"/>
    </projection>
    <projection id="NCXLS_M3L_NSML" presynapticPopulation="M3L" postsynapticPopulation="NSML" synapse="Acetylcholine">
      <connection id="18" preCellId="../M3L/0/M3L" postCellId="../NSML/0/NSML" preSegmentId="2" postSegmentId="5" preFractionAlong="0.47924237503933054" postFractionAlong="0.2873799152555684"/>
    </projection>
    <projection id="NCXLS_M3L_I5" presynapticPopulation="M3L" postsynapticPopulation="I5" synapse="Acetylcholine">
      <connection id="19" preCellId="../M3L/0/M3L" postCellId="../I5/0/I5" preSegmentId="7" postSegmentId="2" preFractionAlong="0.8590776944503427" postFractionAlong="0.46803469292272704"/>
    </projection>
    <projection id="NCXLS_M3L_MCL" presynapticPopulation="M3L" postsynapticPopulation="MCL" synapse="Acetylcholine">
      <connection id="20" preCellId="../M3L/0/M3L" postCellId="../MCL/0/MCL" preSegmentId="8" postSegmentId="8" preFractionAlong="0.3949749995445172" postFractionAlong="0.6501792222182673"/>
    </projection>
    <projection id="NCXLS_M3L_MI" presynapticPopulation="M3L" postsynapticPopulation="MI" synapse="Acetylcholine">
      <connection id="21" preCellId="../M3L/0/M3L" postCellId="../MI/0/MI" preSegmentId="5" postSegmentId="6" preFractionAlong="0.33892571696970963" postFractionAlong="0.25610706046045606"/>
    </projection>
    <projection id="NCXLS_M3L_M4" presynapticPopulation="M3L" postsynapticPopulation="M4" synapse="Acetylcholine">
      <connection id="22" preCellId="../M3L/0/M3L" postCellId="../M4/0/M4" preSegmentId="1" postSegmentId="8" preFractionAlong="0.30712069487206084" postFractionAlong="0.5980183648366367"/>
    </projection>
    <projection id="NCXLS_M3L_MCR" presynapticPopulation="M3L" postsynapticPopulation="MCR" synapse="Acetylcholine">
      <connection id="23" preCellId="../M3L/0/M3L" postCellId="../MCR/0/MCR" preSegmentId="2" postSegmentId="4" preFractionAlong="0.3137669762884384" postFractionAlong="0.6578472389213587"/>
    </projection>
    <projection id="NCXLS_M3L_M5" presynapticPopulation="M3L" postsynapticPopulation="M5" synapse="Glutamate">
      <connection id="24" preCellId="../M3L/0/M3L" postCellId="../M5/0/M5" preSegmentId="3" postSegmentId="1" preFractionAlong="0.7443049656751953" postFractionAlong="0.4084785311550485"/>
    </projection>
    <projection id="NCXLS_M3L_I3" presynapticPopulation="M3L" postsynapticPopulation="I3" synapse="Acetylcholine">
      <connection id="25" preCellId="../M3L/0/M3L" postCellId="../I3/0/I3" preSegmentId="1" postSegmentId="7" preFractionAlong="0.20808721485011028" postFractionAlong="0.3841891520539801"/>
    </projection>
    <projection id="NCXLS_M3R_M3L" presynapticPopulation="M3R" postsynapticPopulation="M3L" synapse="Acetylcholine">
      <connection id="26" preCellId="../M3R/0/M3R" postCellId="../M3L/0/M3L" preSegmentId="6" postSegmentId="8" preFractionAlong="0.4681838960287671" postFractionAlong="0.8101266350119591"/>
    </projection>
    <projection id="NCXLS_M3R_I1L" presynapticPopulation="M3R" postsynapticPopulation="I1L" synapse="Acetylcholine">
      <connection id="27" preCellId="../M3R/0/M3R" postCellId="../I1L/0/I1L" preSegmentId="9" postSegmentId="8" preFractionAlong="0.8544293867817304" postFractionAlong="0.7510895304423859"/>
    </projection>
    <projection id="NCXLS_M3R_I1R" presynapticPopulation="M3R" postsynapticPopulation="I1R" synapse="Acetylcholine">
      <connection id="28" preCellId="../M3R/0/M3R" postCellId="../I1R/0/I1R" preSegmentId="9" postSegmentId="6" preFractionAlong="0.26646694120920267" postFractionAlong="0.2676481623668492"/>
    </projection>
    <projection id="NCXLS_M3R_I6" presynapticPopulation="M3R" postsynapticPopulation="I6" synapse="Acetylcholine">
      <connection id="29" preCellId="../M3R/0/M3R" postCellId="../I6/0/I6" preSegmentId="3" postSegmentId="7" preFractionAlong="0.9265455414356274" postFractionAlong="0.06313016032445307"/>
    </projection>
    <projection id="NCXLS_M3R_NSML" presynapticPopulation="M3R" postsynapticPopulation="NSML" synapse="Acetylcholine">
      <connection id="30" preCellId="../M3R/0/M3R" postCellId="../NSML/0/NSML" preSegmentId="6" postSegmentId="3" preFractionAlong="0.9473449029318779" postFractionAlong="0.10039591905286105"/>
    </projection>
    <projection id="NCXLS_M3R_I2L" presynapticPopulation="M3R" postsynapticPopulation="I2L" synapse="Acetylcholine">
      <connection id="31" preCellId="../M3R/0/M3R" postCellId="../I2L/0/I2L" preSegmentId="9" postSegmentId="1" preFractionAlong="0.012168345382033152" postFractionAlong="0.6302388123829044"/>
    </projection>
    <projection id="NCXLS_M3R_I2R" presynapticPopulation="M3R" postsynapticPopulation="I2R" synapse="Acetylcholine">
      <connection id="32" preCellId="../M3R/0/M3R" postCellId="../I2R/0/I2R" preSegmentId="4" postSegmentId="1" preFractionAlong="0.1051882848789717" postFractionAlong="0.32283777773130984"/>
    </projection>
    <projection id="NCXLS_M3R_MCL" presynapticPopulation="M3R" postsynapticPopulation="MCL" synapse="Acetylcholine">
      <connection id="33" preCellId="../M3R/0/M3R" postCellId="../MCL/0/MCL" preSegmentId="5" postSegmentId="9" preFractionAlong="0.7157876963462942" postFractionAlong="0.15349700182570514"/>
    </projection>
    <projection id="NCXLS_M3R_MI" presynapticPopulation="M3R" postsynapticPopulation="MI" synapse="Acetylcholine">
      <connection id="34" preCellId="../M3R/0/M3R" postCellId="../MI/0/MI" preSegmentId="7" postSegmentId="8" preFractionAlong="0.5787178554398685" postFractionAlong="0.6357388320267334"/>
    </projection>
    <projection id="NCXLS_M3R_M4" presynapticPopulation="M3R" postsynapticPopulation="M4" synapse="Acetylcholine">
      <connection id="35" preCellId="../M3R/0/M3R" postCellId="../M4/0/M4" preSegmentId="4" postSegmentId="9" preFractionAlong="0.30583152911841294" postFractionAlong="0.9313056456368877"/>
    </projection>
    <projection id="NCXLS_M3R_I3" presynapticPopulation="M3R" postsynapticPopulation="I3" synapse="Acetylcholine">
      <connection id="36" preCellId="../M3R/0/M3R" postCellId="../I3/0/I3" preSegmentId="1" postSegmentId="5" preFractionAlong="0.011521012026043387" postFractionAlong="0.5169985832126177"/>
    </projection>
    <projection id="NCXLS_M1_I4" presynapticPopulation="M1" postsynapticPopulation="I4" synapse="Acetylcholine">
      <connection id="37" preCellId="../M1/0/M1" postCellId="../I4/0/I4" preSegmentId="6" postSegmentId="6" preFractionAlong="0.6590621958253117" postFractionAlong="0.5655235303815722"/>
    </projection>
    <projection id="NCXLS_M1_M3L" presynapticPopulation="M1" postsynapticPopulation="M3L" synapse="Glutamate">
      <connection id="38" preCellId="../M1/0/M1" postCellId="../M3L/0/M3L" preSegmentId="6" postSegmentId="4" preFractionAlong="0.01316277143189759" postFractionAlong="0.7362375967151179"/>
    </projection>
    <projection id="NCXLS_M1_I1L" presynapticPopulation="M1" postsynapticPopulation="I1L" synapse="Acetylcholine">
      <connection id="39" preCellId="../M1/0/M1" postCellId="../I1L/0/I1L" preSegmentId="6" postSegmentId="2" preFractionAlong="0.92152685639754" postFractionAlong="0.5365770177834341"/>
    </projection>
    <projection id="NCXLS_M1_I1R" presynapticPopulation="M1" postsynapticPopulation="I1R" synapse="Acetylcholine">
      <connection id="40" preCellId="../M1/0/M1" postCellId="../I1R/0/I1R" preSegmentId="6" postSegmentId="3" preFractionAlong="0.2592281950671309" postFractionAlong="0.3091342922536541"/>
    </projection>
    <projection id="NCXLS_M1_M3R" presynapticPopulation="M1" postsynapticPopulation="M3R" synapse="Glutamate">
      <connection id="41" preCellId="../M1/0/M1" postCellId="../M3R/0/M3R" preSegmentId="4" postSegmentId="2" preFractionAlong="0.009561712850478243" postFractionAlong="0.7979467708924225"/>
    </projection>
    <projection id="NCXLS_M1_I6" presynapticPopulation="M1" postsynapticPopulation="I6" synapse="Acetylcholine">
      <connection id="42" preCellId="../M1/0/M1" postCellId="../I6/0/I6" preSegmentId="3" postSegmentId="1" preFractionAlong="0.589443220604249" postFractionAlong="0.05537913414795792"/>
    </projection>
    <projection id="NCXLS_M1_M2L" presynapticPopulation="M1" postsynapticPopulation="M2L" synapse="Acetylcholine">
      <connection id="43" preCellId="../M1/0/M1" postCellId="../M2L/0/M2L" preSegmentId="4" postSegmentId="3" preFractionAlong="0.3072422507495741" postFractionAlong="0.3719549577376997"/>
    </projection>
    <projection id="NCXLS_M1_M2R" presynapticPopulation="M1" postsynapticPopulation="M2R" synapse="Acetylcholine">
      <connection id="44" preCellId="../M1/0/M1" postCellId="../M2R/0/M2R" preSegmentId="4" postSegmentId="2" preFractionAlong="0.9671640551360522" postFractionAlong="0.9499609008768916"/>
    </projection>
    <projection id="NCXLS_M1_NSMR" presynapticPopulation="M1" postsynapticPopulation="NSMR" synapse="Acetylcholine">
      <connection id="45" preCellId="../M1/0/M1" postCellId="../NSMR/0/NSMR" preSegmentId="4" postSegmentId="1" preFractionAlong="0.9095515907751013" postFractionAlong="0.21727877876713642"/>
    </projection>
    <projection id="NCXLS_M1_NSML" presynapticPopulation="M1" postsynapticPopulation="NSML" synapse="Acetylcholine">
      <connection id="46" preCellId="../M1/0/M1" postCellId="../NSML/0/NSML" preSegmentId="6" postSegmentId="6" preFractionAlong="0.21091655614067983" postFractionAlong="0.7639555303101377"/>
    </projection>
    <projection id="NCXLS_M1_I5" presynapticPopulation="M1" postsynapticPopulation="I5" synapse="Acetylcholine">
      <connection id="47" preCellId="../M1/0/M1" postCellId="../I5/0/I5" preSegmentId="6" postSegmentId="8" preFractionAlong="0.8848588964833388" postFractionAlong="0.24714878365636628"/>
    </projection>
    <projection id="NCXLS_M1_I2L" presynapticPopulation="M1" postsynapticPopulation="I2L" synapse="Acetylcholine">
      <connection id="48" preCellId="../M1/0/M1" postCellId="../I2L/0/I2L" preSegmentId="3" postSegmentId="5" preFractionAlong="0.37410573731650554" postFractionAlong="0.37494771723866394"/>
    </projection>
    <projection id="NCXLS_M1_I2R" presynapticPopulation="M1" postsynapticPopulation="I2R" synapse="Acetylcholine">
      <connection id="49" preCellId="../M1/0/M1" postCellId="../I2R/0/I2R" preSegmentId="9" postSegmentId="5" preFractionAlong="0.940746723077666" postFractionAlong="0.7504943844950965"/>
    </projection>
    <projection id="NCXLS_M1_MCL" presynapticPopulation="M1" postsynapticPopulation="MCL" synapse="Acetylcholine">
      <connection id="50" preCellId="../M1/0/M1" postCellId="../MCL/0/MCL" preSegmentId="7" postSegmentId="4" preFractionAlong="0.7656132840221652" postFractionAlong="0.7397949926578588"/>
    </projection>
    <projection id="NCXLS_M1_MI" presynapticPopulation="M1" postsynapticPopulation="MI" synapse="Acetylcholine">
      <connection id="51" preCellId="../M1/0/M1" postCellId="../MI/0/MI" preSegmentId="7" postSegmentId="9" preFractionAlong="0.6067476903255307" postFractionAlong="0.45275065185803587"/>
    </projection>
    <projection id="NCXLS_M1_M4" presynapticPopulation="M1" postsynapticPopulation="M4" synapse="Glutamate">
      <connection id="52" preCellId="../M1/0/M1" postCellId="../M4/0/M4" preSegmentId="6" postSegmentId="8" preFractionAlong="0.15386296945383704" postFractionAlong="0.9764156242738286"/>
    </projection>
    <projection id="NCXLS_M1_MCR" presynapticPopulation="M1" postsynapticPopulation="MCR" synapse="Acetylcholine">
      <connection id="53" preCellId="../M1/0/M1" postCellId="../MCR/0/MCR" preSegmentId="9" postSegmentId="4" preFractionAlong="0.14315631166407194" postFractionAlong="0.32901261378393265"/>
    </projection>
    <projection id="NCXLS_M1_I3" presynapticPopulation="M1" postsynapticPopulation="I3" synapse="Acetylcholine">
      <connection id="54" preCellId="../M1/0/M1" postCellId="../I3/0/I3" preSegmentId="5" postSegmentId="5" preFractionAlong="0.8965082351115314" postFractionAlong="0.03203726676972818"/>
    </projection>
    <projection id="NCXLS_M2L_M3L" presynapticPopulation="M2L" postsynapticPopulation="M3L" synapse="Acetylcholine">
      <connection id="55" preCellId="../M2L/0/M2L" postCellId="../M3L/0/M3L" preSegmentId="6" postSegmentId="4" preFractionAlong="0.663713252520194" postFractionAlong="0.06243428402801077"/>
    </projection>
    <projection id="NCXLS_M2L_I1L" presynapticPopulation="M2L" postsynapticPopulation="I1L" synapse="Acetylcholine">
      <connection id="56" preCellId="../M2L/0/M2L" postCellId="../I1L/0/I1L" preSegmentId="6" postSegmentId="5" preFractionAlong="0.18514088504203552" postFractionAlong="0.2253624253203238"/>
    </projection>
    <projection id="NCXLS_M2L_I1R" presynapticPopulation="M2L" postsynapticPopulation="I1R" synapse="Acetylcholine">
      <connection id="57" preCellId="../M2L/0/M2L" postCellId="../I1R/0/I1R" preSegmentId="3" postSegmentId="5" preFractionAlong="0.46875106043441406" postFractionAlong="0.4993955991710657"/>
    </projection>
    <projection id="NCXLS_M2L_M2R" presynapticPopulation="M2L" postsynapticPopulation="M2R" synapse="Acetylcholine">
      <connection id="58" preCellId="../M2L/0/M2L" postCellId="../M2R/0/M2R" preSegmentId="4" postSegmentId="4" preFractionAlong="0.61705424610421" postFractionAlong="0.13538204330945602"/>
    </projection>
    <projection id="NCXLS_M2L_NSML" presynapticPopulation="M2L" postsynapticPopulation="NSML" synapse="Acetylcholine">
      <connection id="59" preCellId="../M2L/0/M2L" postCellId="../NSML/0/NSML" preSegmentId="5" postSegmentId="5" preFractionAlong="0.5683550459866207" postFractionAlong="0.10864877913293047"/>
    </projection>
    <projection id="NCXLS_M2L_I5" presynapticPopulation="M2L" postsynapticPopulation="I5" synapse="Acetylcholine">
      <connection id="60" preCellId="../M2L/0/M2L" postCellId="../I5/0/I5" preSegmentId="9" postSegmentId="2" preFractionAlong="0.2426943984557346" postFractionAlong="0.5174655536537264"/>
    </projection>
    <projection id="NCXLS_M2L_I2L" presynapticPopulation="M2L" postsynapticPopulation="I2L" synapse="Acetylcholine">
      <connection id="61" preCellId="../M2L/0/M2L" postCellId="../I2L/0/I2L" preSegmentId="6" postSegmentId="9" preFractionAlong="0.4333420303683231" postFractionAlong="0.905350902327037"/>
    </projection>
    <projection id="NCXLS_M2L_I2R" presynapticPopulation="M2L" postsynapticPopulation="I2R" synapse="Acetylcholine">
      <connection id="62" preCellId="../M2L/0/M2L" postCellId="../I2R/0/I2R" preSegmentId="9" postSegmentId="6" preFractionAlong="0.3643293847285948" postFractionAlong="0.6282404259422626"/>
    </projection>
    <projection id="NCXLS_M2L_MCL" presynapticPopulation="M2L" postsynapticPopulation="MCL" synapse="Acetylcholine">
      <connection id="63" preCellId="../M2L/0/M2L" postCellId="../MCL/0/MCL" preSegmentId="4" postSegmentId="1" preFractionAlong="0.46818097976484496" postFractionAlong="0.7027443721197214"/>
    </projection>
    <projection id="NCXLS_M2L_MI" presynapticPopulation="M2L" postsynapticPopulation="MI" synapse="Acetylcholine">
      <connection id="64" preCellId="../M2L/0/M2L" postCellId="../MI/0/MI" preSegmentId="5" postSegmentId="3" preFractionAlong="0.02761605726227012" postFractionAlong="0.8104273690648183"/>
    </projection>
    <projection id="NCXLS_M2L_M4" presynapticPopulation="M2L" postsynapticPopulation="M4" synapse="Glutamate">
      <connection id="65" preCellId="../M2L/0/M2L" postCellId="../M4/0/M4" preSegmentId="5" postSegmentId="8" preFractionAlong="0.11333408544770585" postFractionAlong="0.6798748141696267"/>
    </projection>
    <projection id="NCXLS_M2L_M5" presynapticPopulation="M2L" postsynapticPopulation="M5" synapse="Glutamate">
      <connection id="66" preCellId="../M2L/0/M2L" postCellId="../M5/0/M5" preSegmentId="2" postSegmentId="4" preFractionAlong="0.6469656840213087" postFractionAlong="0.516848456307926"/>
    </projection>
    <projection id="NCXLS_M2L_I3" presynapticPopulation="M2L" postsynapticPopulation="I3" synapse="Acetylcholine">
      <connection id="67" preCellId="../M2L/0/M2L" postCellId="../I3/0/I3" preSegmentId="7" postSegmentId="5" preFractionAlong="0.9895632818291398" postFractionAlong="0.11583465834136975"/>
    </projection>
    <projection id="NCXLS_M2R_I4" presynapticPopulation="M2R" postsynapticPopulation="I4" synapse="Acetylcholine">
      <connection id="68" preCellId="../M2R/0/M2R" postCellId="../I4/0/I4" preSegmentId="2" postSegmentId="8" preFractionAlong="0.4256534478156052" postFractionAlong="0.20022394040730662"/>
    </projection>
    <projection id="NCXLS_M2R_M3L" presynapticPopulation="M2R" postsynapticPopulation="M3L" synapse="Acetylcholine">
      <connection id="69" preCellId="../M2R/0/M2R" postCellId="../M3L/0/M3L" preSegmentId="4" postSegmentId="7" preFractionAlong="0.8597038882047439" postFractionAlong="0.21471872754289212"/>
    </projection>
    <projection id="NCXLS_M2R_I1L" presynapticPopulation="M2R" postsynapticPopulation="I1L" synapse="Acetylcholine">
      <connection id="70" preCellId="../M2R/0/M2R" postCellId="../I1L/0/I1L" preSegmentId="1" postSegmentId="4" preFractionAlong="0.5395035904500061" postFractionAlong="0.08823432528563446"/>
    </projection>
    <projection id="NCXLS_M2R_I1R" presynapticPopulation="M2R" postsynapticPopulation="I1R" synapse="Acetylcholine">
      <connection id="71" preCellId="../M2R/0/M2R" postCellId="../I1R/0/I1R" preSegmentId="4" postSegmentId="5" preFractionAlong="0.46198082566640997" postFractionAlong="0.9007820001884255"/>
    </projection>
    <projection id="NCXLS_M2R_I5" presynapticPopulation="M2R" postsynapticPopulation="I5" synapse="Acetylcholine">
      <connection id="72" preCellId="../M2R/0/M2R" postCellId="../I5/0/I5" preSegmentId="4" postSegmentId="4" preFractionAlong="0.37529807537312" postFractionAlong="0.7172991516875343"/>
    </projection>
    <projection id="NCXLS_M2R_I2L" presynapticPopulation="M2R" postsynapticPopulation="I2L" synapse="Acetylcholine">
      <connection id="73" preCellId="../M2R/0/M2R" postCellId="../I2L/0/I2L" preSegmentId="6" postSegmentId="8" preFractionAlong="0.23259359897575904" postFractionAlong="0.3429026435508816"/>
    </projection>
    <projection id="NCXLS_M2R_MCL" presynapticPopulation="M2R" postsynapticPopulation="MCL" synapse="Acetylcholine">
      <connection id="74" preCellId="../M2R/0/M2R" postCellId="../MCL/0/MCL" preSegmentId="1" postSegmentId="1" preFractionAlong="0.3317775090046472" postFractionAlong="0.4607422172611716"/>
    </projection>
    <projection id="NCXLS_M2R_MI" presynapticPopulation="M2R" postsynapticPopulation="MI" synapse="Acetylcholine">
      <connection id="75" preCellId="../M2R/0/M2R" postCellId="../MI/0/MI" preSegmentId="4" postSegmentId="1" preFractionAlong="0.3134105862196249" postFractionAlong="0.9024535392055206"/>
    </projection>
    <projection id="NCXLS_M2R_M4" presynapticPopulation="M2R" postsynapticPopulation="M4" synapse="Glutamate">
      <connection id="76" preCellId="../M2R/0/M2R" postCellId="../M4/0/M4" preSegmentId="5" postSegmentId="1" preFractionAlong="0.5189954564321649" postFractionAlong="0.672511369297406"/>
    </projection>
    <projection id="NCXLS_M2R_MCR" presynapticPopulation="M2R" postsynapticPopulation="MCR" synapse="Acetylcholine">
      <connection id="77" preCellId="../M2R/0/M2R" postCellId="../MCR/0/MCR" preSegmentId="1" postSegmentId="6" preFractionAlong="0.1449920420027052" postFractionAlong="0.40451640882346274"/>
    </projection>
    <projection id="NCXLS_M2R_M5" presynapticPopulation="M2R" postsynapticPopulation="M5" synapse="Glutamate">
      <connection id="78" preCellId="../M2R/0/M2R" postCellId="../M5/0/M5" preSegmentId="5" postSegmentId="4" preFractionAlong="0.19503948473304944" postFractionAlong="0.8437913444665007"/>
    </projection>
    <projection id="NCXLS_M2R_I3" presynapticPopulation="M2R" postsynapticPopulation="I3" synapse="Acetylcholine">
      <connection id="79" preCellId="../M2R/0/M2R" postCellId="../I3/0/I3" preSegmentId="3" postSegmentId="8" preFractionAlong="0.28168183364816834" postFractionAlong="0.31532535538014594"/>
    </projection>
    <projection id="NCXLS_NSML_M3L" presynapticPopulation="NSML" postsynapticPopulation="M3L" synapse="Serotonin_Glutamate">
      <connection id="80" preCellId="../NSML/0/NSML" postCellId="../M3L/0/M3L" preSegmentId="7" postSegmentId="1" preFractionAlong="0.4985074665241014" postFractionAlong="0.6158355154644322"/>
    </projection>
    <projection id="NCXLS_NSML_I2R" presynapticPopulation="NSML" postsynapticPopulation="I2R" synapse="Serotonin_Glutamate">
      <connection id="81" preCellId="../NSML/0/NSML" postCellId="../I2R/0/I2R" preSegmentId="2" postSegmentId="1" preFractionAlong="0.9384129454447588" postFractionAlong="0.6656975480739203"/>
    </projection>
    <projection id="NCXLS_MCL_M3L" presynapticPopulation="MCL" postsynapticPopulation="M3L" synapse="Acetylcholine">
      <connection id="82" preCellId="../MCL/0/MCL" postCellId="../M3L/0/M3L" preSegmentId="6" postSegmentId="8" preFractionAlong="0.13573753126091392" postFractionAlong="0.1907815700915636"/>
    </projection>
    <projection id="NCXLS_MCL_I1L" presynapticPopulation="MCL" postsynapticPopulation="I1L" synapse="Acetylcholine">
      <connection id="83" preCellId="../MCL/0/MCL" postCellId="../I1L/0/I1L" preSegmentId="3" postSegmentId="9" preFractionAlong="0.7306773700294364" postFractionAlong="0.0889352447554681"/>
    </projection>
    <projection id="NCXLS_MCL_I1R" presynapticPopulation="MCL" postsynapticPopulation="I1R" synapse="Acetylcholine">
      <connection id="84" preCellId="../MCL/0/MCL" postCellId="../I1R/0/I1R" preSegmentId="6" postSegmentId="3" preFractionAlong="0.9113833233280016" postFractionAlong="0.556667686337004"/>
    </projection>
    <projection id="NCXLS_MCL_I2L" presynapticPopulation="MCL" postsynapticPopulation="I2L" synapse="Acetylcholine">
      <connection id="85" preCellId="../MCL/0/MCL" postCellId="../I2L/0/I2L" preSegmentId="2" postSegmentId="9" preFractionAlong="0.681681590112417" postFractionAlong="0.9343300082169445"/>
    </projection>
    <projection id="NCXLS_MCL_I2R" presynapticPopulation="MCL" postsynapticPopulation="I2R" synapse="Acetylcholine">
      <connection id="86" preCellId="../MCL/0/MCL" postCellId="../I2R/0/I2R" preSegmentId="3" postSegmentId="7" preFractionAlong="0.7649393184016161" postFractionAlong="0.5065693120572092"/>
    </projection>
    <projection id="NCXLS_MCL_MI" presynapticPopulation="MCL" postsynapticPopulation="MI" synapse="Acetylcholine">
      <connection id="87" preCellId="../MCL/0/MCL" postCellId="../MI/0/MI" preSegmentId="7" postSegmentId="4" preFractionAlong="0.7575367867972292" postFractionAlong="0.6522565177735441"/>
    </projection>
    <projection id="NCXLS_MI_M3L" presynapticPopulation="MI" postsynapticPopulation="M3L" synapse="Acetylcholine">
      <connection id="88" preCellId="../MI/0/MI" postCellId="../M3L/0/M3L" preSegmentId="7" postSegmentId="1" preFractionAlong="0.866943495941869" postFractionAlong="0.6267694617578073"/>
    </projection>
    <projection id="NCXLS_MI_I1L" presynapticPopulation="MI" postsynapticPopulation="I1L" synapse="Acetylcholine">
      <connection id="89" preCellId="../MI/0/MI" postCellId="../I1L/0/I1L" preSegmentId="6" postSegmentId="5" preFractionAlong="0.5020576469023181" postFractionAlong="0.5873171721347009"/>
    </projection>
    <projection id="NCXLS_MI_I1R" presynapticPopulation="MI" postsynapticPopulation="I1R" synapse="Acetylcholine">
      <connection id="90" preCellId="../MI/0/MI" postCellId="../I1R/0/I1R" preSegmentId="9" postSegmentId="2" preFractionAlong="0.32009310907555144" postFractionAlong="0.7003851331432934"/>
    </projection>
    <projection id="NCXLS_MI_I2L" presynapticPopulation="MI" postsynapticPopulation="I2L" synapse="Glutamate">
      <connection id="91" preCellId="../MI/0/MI" postCellId="../I2L/0/I2L" preSegmentId="7" postSegmentId="4" preFractionAlong="0.8290686462160908" postFractionAlong="0.761007290185914"/>
    </projection>
    <projection id="NCXLS_M4_I1L" presynapticPopulation="M4" postsynapticPopulation="I1L" synapse="Acetylcholine">
      <connection id="92" preCellId="../M4/0/M4" postCellId="../I1L/0/I1L" preSegmentId="2" postSegmentId="8" preFractionAlong="0.7191643817788894" postFractionAlong="0.6685131814678218"/>
    </projection>
    <projection id="NCXLS_M4_I1R" presynapticPopulation="M4" postsynapticPopulation="I1R" synapse="Acetylcholine">
      <connection id="93" preCellId="../M4/0/M4" postCellId="../I1R/0/I1R" preSegmentId="5" postSegmentId="3" preFractionAlong="0.23648398592275421" postFractionAlong="0.36587170314897566"/>
    </projection>
    <projection id="NCXLS_M4_I6" presynapticPopulation="M4" postsynapticPopulation="I6" synapse="Acetylcholine">
      <connection id="94" preCellId="../M4/0/M4" postCellId="../I6/0/I6" preSegmentId="7" postSegmentId="3" preFractionAlong="0.3252253005314737" postFractionAlong="0.08960706039242117"/>
    </projection>
    <projection id="NCXLS_M4_NSML" presynapticPopulation="M4" postsynapticPopulation="NSML" synapse="Acetylcholine">
      <connection id="95" preCellId="../M4/0/M4" postCellId="../NSML/0/NSML" preSegmentId="2" postSegmentId="3" preFractionAlong="0.2790201774186454" postFractionAlong="0.14430248241185317"/>
    </projection>
    <projection id="NCXLS_M4_I2L" presynapticPopulation="M4" postsynapticPopulation="I2L" synapse="Acetylcholine">
      <connection id="96" preCellId="../M4/0/M4" postCellId="../I2L/0/I2L" preSegmentId="7" postSegmentId="2" preFractionAlong="0.10241312312679851" postFractionAlong="0.6426944165480497"/>
    </projection>
    <projection id="NCXLS_M4_I2R" presynapticPopulation="M4" postsynapticPopulation="I2R" synapse="Acetylcholine">
      <connection id="97" preCellId="../M4/0/M4" postCellId="../I2R/0/I2R" preSegmentId="5" postSegmentId="8" preFractionAlong="0.8340069130733858" postFractionAlong="0.17111133333742967"/>
    </projection>
    <projection id="NCXLS_M4_MCL" presynapticPopulation="M4" postsynapticPopulation="MCL" synapse="Acetylcholine">
      <connection id="98" preCellId="../M4/0/M4" postCellId="../MCL/0/MCL" preSegmentId="1" postSegmentId="3" preFractionAlong="0.7497675583342468" postFractionAlong="0.6703759104353387"/>
    </projection>
    <projection id="NCXLS_M4_MI" presynapticPopulation="M4" postsynapticPopulation="MI" synapse="Acetylcholine">
      <connection id="99" preCellId="../M4/0/M4" postCellId="../MI/0/MI" preSegmentId="5" postSegmentId="2" preFractionAlong="0.2556436715589626" postFractionAlong="0.46414179806343414"/>
    </projection>
    <projection id="NCXLS_M4_M5" presynapticPopulation="M4" postsynapticPopulation="M5" synapse="Acetylcholine">
      <connection id="100" preCellId="../M4/0/M4" postCellId="../M5/0/M5" preSegmentId="5" postSegmentId="4" preFractionAlong="0.9129854064310087" postFractionAlong="0.3771170641716802"/>
    </projection>
    <projection id="NCXLS_M4_I3" presynapticPopulation="M4" postsynapticPopulation="I3" synapse="Acetylcholine">
      <connection id="101" preCellId="../M4/0/M4" postCellId="../I3/0/I3" preSegmentId="2" postSegmentId="4" preFractionAlong="0.6240284371728138" postFractionAlong="0.4390946215718754"/>
    </projection>
    <projection id="NCXLS_MCR_I4" presynapticPopulation="MCR" postsynapticPopulation="I4" synapse="Acetylcholine">
      <connection id="102" preCellId="../MCR/0/MCR" postCellId="../I4/0/I4" preSegmentId="7" postSegmentId="9" preFractionAlong="0.9595534142998999" postFractionAlong="0.7326856913968013"/>
    </projection>
    <projection id="NCXLS_MCR_M1" presynapticPopulation="MCR" postsynapticPopulation="M1" synapse="Acetylcholine">
      <connection id="103" preCellId="../MCR/0/MCR" postCellId="../M1/0/M1" preSegmentId="9" postSegmentId="8" preFractionAlong="0.152732394453709" postFractionAlong="0.3638272935633775"/>
    </projection>
    <projection id="NCXLS_MCR_M2L" presynapticPopulation="MCR" postsynapticPopulation="M2L" synapse="Acetylcholine">
      <connection id="104" preCellId="../MCR/0/MCR" postCellId="../M2L/0/M2L" preSegmentId="7" postSegmentId="9" preFractionAlong="0.32332010374864084" postFractionAlong="0.43931630785765274"/>
    </projection>
    <projection id="NCXLS_M5_I4" presynapticPopulation="M5" postsynapticPopulation="I4" synapse="Acetylcholine">
      <connection id="105" preCellId="../M5/0/M5" postCellId="../I4/0/I4" preSegmentId="3" postSegmentId="3" preFractionAlong="0.7475662341798232" postFractionAlong="0.5177881704805695"/>
    </projection>
    <projection id="NCXLS_M5_M2L" presynapticPopulation="M5" postsynapticPopulation="M2L" synapse="Acetylcholine">
      <connection id="106" preCellId="../M5/0/M5" postCellId="../M2L/0/M2L" preSegmentId="8" postSegmentId="9" preFractionAlong="0.06600643312993248" postFractionAlong="0.3837405695128313"/>
    </projection>
    <projection id="NCXLS_M5_NSMR" presynapticPopulation="M5" postsynapticPopulation="NSMR" synapse="Acetylcholine">
      <connection id="107" preCellId="../M5/0/M5" postCellId="../NSMR/0/NSMR" preSegmentId="2" postSegmentId="4" preFractionAlong="0.913226228134345" postFractionAlong="0.029708305346752617"/>
    </projection>
    <projection id="NCXLS_M5_I5" presynapticPopulation="M5" postsynapticPopulation="I5" synapse="Acetylcholine">
      <connection id="108" preCellId="../M5/0/M5" postCellId="../I5/0/I5" preSegmentId="8" postSegmentId="3" preFractionAlong="0.2237824361164109" postFractionAlong="0.8152052811654619"/>
    </projection>
    <projection id="NCXLS_M5_MCR" presynapticPopulation="M5" postsynapticPopulation="MCR" synapse="Acetylcholine">
      <connection id="109" preCellId="../M5/0/M5" postCellId="../MCR/0/MCR" preSegmentId="6" postSegmentId="3" preFractionAlong="0.7768809957583076" postFractionAlong="0.7870695027239316"/>
    </projection>
    <projection id="NC_I1L_RMDDL" presynapticPopulation="I1L" postsynapticPopulation="RMDDL" synapse="Acetylcholine">
      <connection id="110" preCellId="../I1L/0/I1L" postCellId="../RMDDL/0/RMDDL" preSegmentId="3" postSegmentId="4" preFractionAlong="0.7591624811633813" postFractionAlong="0.5987737041336165"/>
    </projection>
    <projection id="NC_I1L_RMDVL" presynapticPopulation="I1L" postsynapticPopulation="RMDVL" synapse="Acetylcholine">
      <connection id="111" preCellId="../I1L/0/I1L" postCellId="../RMDVL/0/RMDVL" preSegmentId="7" postSegmentId="3" preFractionAlong="0.943379718994751" postFractionAlong="0.40143816199886495"/>
    </projection>
    <projection id="NC_I1R_RMDDR" presynapticPopulation="I1R" postsynapticPopulation="RMDDR" synapse="Acetylcholine">
      <connection id="112" preCellId="../I1R/0/I1R" postCellId="../RMDDR/0/RMDDR" preSegmentId="2" postSegmentId="9" preFractionAlong="0.12273931954430894" postFractionAlong="0.5401074389217909"/>
    </projection>
    <projection id="NC_I1R_RMDVR" presynapticPopulation="I1R" postsynapticPopulation="RMDVR" synapse="Acetylcholine">
      <connection id="113" preCellId="../I1R/0/I1R" postCellId="../RMDVR/0/RMDVR" preSegmentId="1" postSegmentId="3" preFractionAlong="0.7768623528361118" postFractionAlong="0.8607197057335678"/>
    </projection>
    <projection id="NC_I2L_URXL" presynapticPopulation="I2L" postsynapticPopulation="URXL" synapse="Glutamate">
      <connection id="114" preCellId="../I2L/0/I2L" postCellId="../URXL/0/URXL" preSegmentId="9" postSegmentId="2" preFractionAlong="0.3040745888313513" postFractionAlong="0.6607353676247317"/>
    </projection>
    <projection id="NC_I2R_URXR" presynapticPopulation="I2R" postsynapticPopulation="URXR" synapse="Glutamate">
      <connection id="115" preCellId="../I2R/0/I2R" postCellId="../URXR/0/URXR" preSegmentId="1" postSegmentId="6" preFractionAlong="0.12052500222632356" postFractionAlong="0.7627648111211612"/>
    </projection>
    <projection id="NC_AVKL_I1L" presynapticPopulation="AVKL" postsynapticPopulation="I1L" synapse="Acetylcholine">
      <connection id="116" preCellId="../AVKL/0/AVKL" postCellId="../I1L/0/I1L" preSegmentId="7" postSegmentId="5" preFractionAlong="0.3765196406964849" postFractionAlong="0.9035391853604525"/>
    </projection>
    <projection id="NC_AVKR_I1R" presynapticPopulation="AVKR" postsynapticPopulation="I1R" synapse="Acetylcholine">
      <connection id="117" preCellId="../AVKR/0/AVKR" postCellId="../I1R/0/I1R" preSegmentId="7" postSegmentId="3" preFractionAlong="0.10844361775126188" postFractionAlong="0.7243569348298357"/>
    </projection>
    <projection id="NC_RIS_I1L" presynapticPopulation="RIS" postsynapticPopulation="I1L" synapse="Glutamate">
      <connection id="118" preCellId="../RIS/0/RIS" postCellId="../I1L/0/I1L" preSegmentId="7" postSegmentId="1" preFractionAlong="0.7412642565144733" postFractionAlong="0.9222497012503753"/>
    </projection>
    <projection id="NC_RIS_I1R" presynapticPopulation="RIS" postsynapticPopulation="I1R" synapse="Glutamate">
      <connection id="119" preCellId="../RIS/0/RIS" postCellId="../I1R/0/I1R" preSegmentId="3" postSegmentId="3" preFractionAlong="0.684722537221332" postFractionAlong="0.5155199159143766"/>
    </projection>
    <projection id="NC_AVAL_I2L" presynapticPopulation="AVAL" postsynapticPopulation="I2L" synapse="Acetylcholine">
      <connection id="120" preCellId="../AVAL/0/AVAL" postCellId="../I2L/0/I2L" preSegmentId="7" postSegmentId="1" preFractionAlong="0.340277462168857" postFractionAlong="0.002011264345435748"/>
    </projection>
    <projection id="NC_AVAR_I2R" presynapticPopulation="AVAR" postsynapticPopulation="I2R" synapse="Acetylcholine">
      <connection id="121" preCellId="../AVAR/0/AVAR" postCellId="../I2R/0/I2R" preSegmentId="7" postSegmentId="2" preFractionAlong="0.7456089284998436" postFractionAlong="0.446349664382626"/>
    </projection>
    <projection id="NC_SMBVL_I4" presynapticPopulation="SMBVL" postsynapticPopulation="I4" synapse="Acetylcholine">
      <connection id="122" preCellId="../SMBVL/0/SMBVL" postCellId="../I4/0/I4" preSegmentId="6" postSegmentId="5" preFractionAlong="0.5357597995185033" postFractionAlong="0.33595554072829237"/>
    </projection>
    <projection id="NC_SMBVR_I4" presynapticPopulation="SMBVR" postsynapticPopulation="I4" synapse="Acetylcholine">
      <connection id="123" preCellId="../SMBVR/0/SMBVR" postCellId="../I4/0/I4" preSegmentId="7" postSegmentId="9" preFractionAlong="0.8915188161064341" postFractionAlong="0.07142764673293578"/>
    </projection>
  </network>
</neuroml>
