<?xml version='1.0' encoding='UTF-8'?>
<neuroml xmlns="http://www.neuroml.org/schema/neuroml2" xmlns:xsi="http://www.w3.org/2001/XMLSchema-instance" xsi:schemaLocation="http://www.neuroml.org/schema/neuroml2 https://raw.githubusercontent.com/NeuroML/NeuroML2/development/Schemas/NeuroML2/NeuroML_v2beta4.xsd" id="gvft_network_bio_prior_lamW_0.500_DF_0.033_t10.net">
  <notes>NeuroML2 network generated from GVFT simulation on 2025-05-04 11:18:05
</notes>
  <include href="I1L.cell.nml"/>
  <include href="I1R.cell.nml"/>
  <include href="I2L.cell.nml"/>
  <include href="I2R.cell.nml"/>
  <include href="I3.cell.nml"/>
  <include href="I4.cell.nml"/>
  <include href="M1.cell.nml"/>
  <include href="M2L.cell.nml"/>
  <include href="M2R.cell.nml"/>
  <include href="MI.cell.nml"/>
  <include href="NSML.cell.nml"/>
  <include href="NSMR.cell.nml"/>
  <include href="Acetylcholine.synapse.nml"/>
  <include href="Generic_GJ.nml"/>
  <include href="Glutamate.synapse.nml"/>
  <include href="Serotonin_Glutamate.synapse.nml"/>
  <network id="gvft_network_bio_prior_lamW_0.500_DF_0.033_t10.net" type="networkWithTemperature" temperature="20.0 degC">
    <population id="I1L" component="I1L" type="populationList" size="3">
      <instance id="0">
        <location x="-0.3366834223270416" y="0.4673366844654083" z="0.0"/>
      </instance>
      <instance id="1">
        <location x="0.12562814354896545" y="0.23618091642856598" z="0.0"/>
      </instance>
      <instance id="2">
        <location x="0.17587940394878387" y="0.5879396796226501" z="0.0"/>
      </instance>
    </population>
    <population id="I1R" component="I1R" type="populationList" size="1">
      <instance id="0">
        <location x="-0.8190954923629761" y="-0.6582914590835571" z="0.0"/>
      </instance>
    </population>
    <population id="I2L" component="I2L" type="populationList" size="1">
      <instance id="0">
        <location x="-0.8793969750404358" y="-0.8894472122192383" z="0.0"/>
      </instance>
    </population>
    <population id="I2R" component="I2R" type="populationList" size="1">
      <instance id="0">
        <location x="-0.979899525642395" y="-0.7688442468643188" z="0.0"/>
      </instance>
    </population>
    <population id="I3" component="I3" type="populationList" size="1">
      <instance id="0">
        <location x="-0.6281406879425049" y="0.25628140568733215" z="0.0"/>
      </instance>
    </population>
    <population id="I4" component="I4" type="populationList" size="1">
      <instance id="0">
        <location x="-0.05527639389038086" y="-0.7989949584007263" z="0.0"/>
      </instance>
    </population>
    <population id="M1" component="M1" type="populationList" size="1">
      <instance id="0">
        <location x="-0.6281406879425049" y="-0.32663318514823914" z="0.0"/>
      </instance>
    </population>
    <population id="M2L" component="M2L" type="populationList" size="1">
      <instance id="0">
        <location x="0.7989949584007263" y="0.07537689805030823" z="0.0"/>
      </instance>
    </population>
    <population id="M2R" component="M2R" type="populationList" size="4">
      <instance id="0">
        <location x="-0.6482412219047546" y="0.5376884341239929" z="0.0"/>
      </instance>
      <instance id="1">
        <location x="-0.4874371886253357" y="-0.7185929417610168" z="0.0"/>
      </instance>
      <instance id="2">
        <location x="-0.2864321768283844" y="0.37688443064689636" z="0.0"/>
      </instance>
      <instance id="3">
        <location x="-0.025125637650489807" y="-0.095477394759655" z="0.0"/>
      </instance>
    </population>
    <population id="MI" component="MI" type="populationList" size="1">
      <instance id="0">
        <location x="0.6683416962623596" y="-0.9698492288589478" z="0.0"/>
      </instance>
    </population>
    <population id="NSML" component="NSML" type="populationList" size="4">
      <instance id="0">
        <location x="-0.2261306643486023" y="-0.3467336893081665" z="0.0"/>
      </instance>
      <instance id="1">
        <location x="0.7185929417610168" y="-0.3668341636657715" z="0.0"/>
      </instance>
      <instance id="2">
        <location x="-0.07537689805030823" y="-0.49748745560646057" z="0.0"/>
      </instance>
      <instance id="3">
        <location x="-0.6180904507637024" y="-0.5276381969451904" z="0.0"/>
      </instance>
    </population>
    <population id="NSMR" component="NSMR" type="populationList" size="1">
      <instance id="0">
        <location x="-0.6281406879425049" y="0.24623116850852966" z="0.0"/>
      </instance>
    </population>
    <projection id="NCXLS_I1L_M2R" presynapticPopulation="I1L" postsynapticPopulation="M2R" synapse="Glutamate">
      <connection id="0" preCellId="../I1L/0/I1L" postCellId="../M2R/0/M2R" preSegmentId="2" postSegmentId="8" preFractionAlong="0.8634431335103334" postFractionAlong="0.3230435846186024"/>
    </projection>
    <projection id="NCXLS_M2R_I1L" presynapticPopulation="M2R" postsynapticPopulation="I1L" synapse="Acetylcholine">
      <connection id="1" preCellId="../M2R/0/M2R" postCellId="../I1L/0/I1L" preSegmentId="2" postSegmentId="5" preFractionAlong="0.41507812900779906" postFractionAlong="0.14909567867143392"/>
      <connection id="17" preCellId="../M2R/0/M2R" postCellId="../I1L/1/I1L" preSegmentId="6" postSegmentId="6" preFractionAlong="0.7599971583309685" postFractionAlong="0.34899493530191095"/>
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    </projection>
    <projection id="NCXLS_M2R_M2R" presynapticPopulation="M2R" postsynapticPopulation="M2R" synapse="Acetylcholine">
      <connection id="2" preCellId="../M2R/0/M2R" postCellId="../M2R/1/M2R" preSegmentId="3" postSegmentId="1" preFractionAlong="0.4043124312197588" postFractionAlong="0.875329082637908"/>
      <connection id="8" preCellId="../M2R/0/M2R" postCellId="../M2R/2/M2R" preSegmentId="6" postSegmentId="3" preFractionAlong="0.13705968353658127" postFractionAlong="0.8490708749034921"/>
      <connection id="50" preCellId="../M2R/2/M2R" postCellId="../M2R/0/M2R" preSegmentId="7" postSegmentId="2" preFractionAlong="0.10157454423538137" postFractionAlong="0.3283520738107182"/>
      <connection id="61" preCellId="../M2R/2/M2R" postCellId="../M2R/3/M2R" preSegmentId="1" postSegmentId="3" preFractionAlong="0.7785530255185421" postFractionAlong="0.7761394036915221"/>
    </projection>
    <projection id="NCXLS_M2R_I1R" presynapticPopulation="M2R" postsynapticPopulation="I1R" synapse="Acetylcholine">
      <connection id="3" preCellId="../M2R/0/M2R" postCellId="../I1R/0/I1R" preSegmentId="8" postSegmentId="6" preFractionAlong="0.5478708106372198" postFractionAlong="0.02396138512426982"/>
      <connection id="22" preCellId="../M2R/1/M2R" postCellId="../I1R/0/I1R" preSegmentId="8" postSegmentId="1" preFractionAlong="0.11405029770539876" postFractionAlong="0.34767174146891133"/>
      <connection id="52" preCellId="../M2R/2/M2R" postCellId="../I1R/0/I1R" preSegmentId="6" postSegmentId="8" preFractionAlong="0.7847743211627893" postFractionAlong="0.48549589116587255"/>
      <connection id="111" preCellId="../M2R/3/M2R" postCellId="../I1R/0/I1R" preSegmentId="5" postSegmentId="1" preFractionAlong="0.5280584218921246" postFractionAlong="0.4112273626316605"/>
    </projection>
    <projection id="NCXLS_M2R_NSML" presynapticPopulation="M2R" postsynapticPopulation="NSML" synapse="Acetylcholine">
      <connection id="4" preCellId="../M2R/0/M2R" postCellId="../NSML/1/NSML" preSegmentId="8" postSegmentId="6" preFractionAlong="0.5809138982462784" postFractionAlong="0.6255895834697527"/>
      <connection id="16" preCellId="../M2R/0/M2R" postCellId="../NSML/0/NSML" preSegmentId="5" postSegmentId="2" preFractionAlong="0.47303512508370027" postFractionAlong="0.8020625593108031"/>
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    </projection>
    <projection id="NCXLS_M2R_I4" presynapticPopulation="M2R" postsynapticPopulation="I4" synapse="Acetylcholine">
      <connection id="5" preCellId="../M2R/0/M2R" postCellId="../I4/0/I4" preSegmentId="7" postSegmentId="6" preFractionAlong="0.2110383302086154" postFractionAlong="0.07433087235358016"/>
      <connection id="53" preCellId="../M2R/2/M2R" postCellId="../I4/0/I4" preSegmentId="8" postSegmentId="4" preFractionAlong="0.08235299033675814" postFractionAlong="0.5502955231831296"/>
      <connection id="112" preCellId="../M2R/3/M2R" postCellId="../I4/0/I4" preSegmentId="2" postSegmentId="2" preFractionAlong="0.9986984818412868" postFractionAlong="0.07171052088493268"/>
    </projection>
    <projection id="NCXLS_M2R_I2L" presynapticPopulation="M2R" postsynapticPopulation="I2L" synapse="Acetylcholine">
      <connection id="6" preCellId="../M2R/0/M2R" postCellId="../I2L/0/I2L" preSegmentId="5" postSegmentId="4" preFractionAlong="0.627439007682151" postFractionAlong="0.5661859843173752"/>
      <connection id="23" preCellId="../M2R/1/M2R" postCellId="../I2L/0/I2L" preSegmentId="6" postSegmentId="4" preFractionAlong="0.6079711675981625" postFractionAlong="0.10258456033102081"/>
      <connection id="54" preCellId="../M2R/2/M2R" postCellId="../I2L/0/I2L" preSegmentId="6" postSegmentId="1" preFractionAlong="0.6149341779171474" postFractionAlong="0.9771877391324183"/>
      <connection id="113" preCellId="../M2R/3/M2R" postCellId="../I2L/0/I2L" preSegmentId="3" postSegmentId="2" preFractionAlong="0.21725740049386455" postFractionAlong="0.9710724586278197"/>
    </projection>
    <projection id="NCXLS_M2R_MI" presynapticPopulation="M2R" postsynapticPopulation="MI" synapse="Glutamate">
      <connection id="7" preCellId="../M2R/0/M2R" postCellId="../MI/0/MI" preSegmentId="2" postSegmentId="5" preFractionAlong="0.5492512713778943" postFractionAlong="0.27302879567585936"/>
    </projection>
    <electricalProjection id="NCXLS_M2R_NSML_GJ" presynapticPopulation="M2R" postsynapticPopulation="NSML">
      <electricalConnection id="9" preCell="0" postCell="2" synapse="Generic_GJ" preSegment="2" postSegment="5" preFractionAlong="0.18651101250405977" postFractionAlong="0.17720937982123952"/>
      <electricalConnection id="12" preCell="0" postCell="3" synapse="Generic_GJ" preSegment="8" postSegment="2" preFractionAlong="0.3017792231362765" postFractionAlong="0.8475647962784947"/>
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    </electricalProjection>
    <projection id="NCXLS_M2R_I2R" presynapticPopulation="M2R" postsynapticPopulation="I2R" synapse="Acetylcholine">
      <connection id="10" preCellId="../M2R/0/M2R" postCellId="../I2R/0/I2R" preSegmentId="2" postSegmentId="1" preFractionAlong="0.7427308637633193" postFractionAlong="0.6593990799053714"/>
      <connection id="25" preCellId="../M2R/1/M2R" postCellId="../I2R/0/I2R" preSegmentId="2" postSegmentId="2" preFractionAlong="0.175174863704181" postFractionAlong="0.47378336230782225"/>
      <connection id="57" preCellId="../M2R/2/M2R" postCellId="../I2R/0/I2R" preSegmentId="1" postSegmentId="2" preFractionAlong="0.9920384737785946" postFractionAlong="0.1028328160641574"/>
      <connection id="116" preCellId="../M2R/3/M2R" postCellId="../I2R/0/I2R" preSegmentId="3" postSegmentId="8" preFractionAlong="0.1122115392472729" postFractionAlong="0.5731279232725647"/>
    </projection>
    <projection id="NCXLS_M2R_NSMR" presynapticPopulation="M2R" postsynapticPopulation="NSMR" synapse="Acetylcholine">
      <connection id="11" preCellId="../M2R/0/M2R" postCellId="../NSMR/0/NSMR" preSegmentId="5" postSegmentId="2" preFractionAlong="0.26197556427851754" postFractionAlong="0.9794507631128238"/>
      <connection id="26" preCellId="../M2R/1/M2R" postCellId="../NSMR/0/NSMR" preSegmentId="5" postSegmentId="1" preFractionAlong="0.028264701049977692" postFractionAlong="0.014910264154807895"/>
    </projection>
    <electricalProjection id="NCXLS_M2R_M1_GJ" presynapticPopulation="M2R" postsynapticPopulation="M1">
      <electricalConnection id="13" preCell="0" postCell="0" synapse="Generic_GJ" preSegment="4" postSegment="6" preFractionAlong="0.29708054987799837" postFractionAlong="0.4265528542416397"/>
      <electricalConnection id="28" preCell="1" postCell="0" synapse="Generic_GJ" preSegment="5" postSegment="7" preFractionAlong="0.13802760893789678" postFractionAlong="0.6733915791158308"/>
      <electricalConnection id="60" preCell="2" postCell="0" synapse="Generic_GJ" preSegment="7" postSegment="7" preFractionAlong="0.20941981680028088" postFractionAlong="0.970076618910001"/>
      <electricalConnection id="119" preCell="3" postCell="0" synapse="Generic_GJ" preSegment="3" postSegment="6" preFractionAlong="0.8322257805043787" postFractionAlong="0.4587682899565929"/>
    </electricalProjection>
    <electricalProjection id="NCXLS_M2R_M2L_GJ" presynapticPopulation="M2R" postsynapticPopulation="M2L">
      <electricalConnection id="14" preCell="0" postCell="0" synapse="Generic_GJ" preSegment="1" postSegment="8" preFractionAlong="0.11105244437810935" postFractionAlong="0.7227620328396968"/>
    </electricalProjection>
    <electricalProjection id="NCXLS_M2R_M2R_GJ" presynapticPopulation="M2R" postsynapticPopulation="M2R">
      <electricalConnection id="15" preCell="0" postCell="3" synapse="Generic_GJ" preSegment="7" postSegment="6" preFractionAlong="0.8200593657462536" postFractionAlong="0.9956087115144261"/>
      <electricalConnection id="21" preCell="1" postCell="0" synapse="Generic_GJ" preSegment="2" postSegment="6" preFractionAlong="0.2725311690402068" postFractionAlong="0.2741738575114666"/>
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    </electricalProjection>
    <projection id="NCXLS_M2R_I3" presynapticPopulation="M2R" postsynapticPopulation="I3" synapse="Acetylcholine">
      <connection id="18" preCellId="../M2R/0/M2R" postCellId="../I3/0/I3" preSegmentId="6" postSegmentId="5" preFractionAlong="0.5949683573414702" postFractionAlong="0.9739405835732572"/>
      <connection id="29" preCellId="../M2R/1/M2R" postCellId="../I3/0/I3" preSegmentId="3" postSegmentId="8" preFractionAlong="0.2944640988411602" postFractionAlong="0.013659883435292008"/>
      <connection id="63" preCellId="../M2R/2/M2R" postCellId="../I3/0/I3" preSegmentId="6" postSegmentId="6" preFractionAlong="0.5611101087684007" postFractionAlong="0.5335085861345135"/>
      <connection id="121" preCellId="../M2R/3/M2R" postCellId="../I3/0/I3" preSegmentId="8" postSegmentId="7" preFractionAlong="0.04905357258779386" postFractionAlong="0.8865306707051678"/>
    </projection>
    <projection id="NCXLS_MI_I1L" presynapticPopulation="MI" postsynapticPopulation="I1L" synapse="Acetylcholine">
      <connection id="31" preCellId="../MI/0/MI" postCellId="../I1L/0/I1L" preSegmentId="6" postSegmentId="2" preFractionAlong="0.6281826045103551" postFractionAlong="0.5472374278792835"/>
      <connection id="47" preCellId="../MI/0/MI" postCellId="../I1L/1/I1L" preSegmentId="8" postSegmentId="3" preFractionAlong="0.2325946369638504" postFractionAlong="0.6168857832608161"/>
      <connection id="49" preCellId="../MI/0/MI" postCellId="../I1L/2/I1L" preSegmentId="1" postSegmentId="2" preFractionAlong="0.4428705061058905" postFractionAlong="0.4911409691346621"/>
    </projection>
    <projection id="NCXLS_MI_M2R" presynapticPopulation="MI" postsynapticPopulation="M2R" synapse="Acetylcholine">
      <connection id="32" preCellId="../MI/0/MI" postCellId="../M2R/0/M2R" preSegmentId="4" postSegmentId="6" preFractionAlong="0.3438224912587524" postFractionAlong="0.6140311984486506"/>
      <connection id="33" preCellId="../MI/0/MI" postCellId="../M2R/1/M2R" preSegmentId="8" postSegmentId="6" preFractionAlong="0.7532134387388773" postFractionAlong="0.5534000268334149"/>
      <connection id="38" preCellId="../MI/0/MI" postCellId="../M2R/2/M2R" preSegmentId="6" postSegmentId="6" preFractionAlong="0.5499884158659529" postFractionAlong="0.41341657517390873"/>
      <connection id="45" preCellId="../MI/0/MI" postCellId="../M2R/3/M2R" preSegmentId="5" postSegmentId="5" preFractionAlong="0.7626861704546085" postFractionAlong="0.06835171485056624"/>
    </projection>
    <projection id="NCXLS_MI_I1R" presynapticPopulation="MI" postsynapticPopulation="I1R" synapse="Acetylcholine">
      <connection id="34" preCellId="../MI/0/MI" postCellId="../I1R/0/I1R" preSegmentId="6" postSegmentId="2" preFractionAlong="0.36505127754180544" postFractionAlong="0.8794173102643961"/>
    </projection>
    <projection id="NCXLS_MI_NSML" presynapticPopulation="MI" postsynapticPopulation="NSML" synapse="Acetylcholine">
      <connection id="35" preCellId="../MI/0/MI" postCellId="../NSML/1/NSML" preSegmentId="6" postSegmentId="8" preFractionAlong="0.987982644420261" postFractionAlong="0.6643754108515623"/>
      <connection id="42" preCellId="../MI/0/MI" postCellId="../NSML/3/NSML" preSegmentId="1" postSegmentId="5" preFractionAlong="0.31119244435437654" postFractionAlong="0.4496798508851573"/>
    </projection>
    <projection id="NCXLS_MI_I4" presynapticPopulation="MI" postsynapticPopulation="I4" synapse="Acetylcholine">
      <connection id="36" preCellId="../MI/0/MI" postCellId="../I4/0/I4" preSegmentId="5" postSegmentId="4" preFractionAlong="0.037997837304742155" postFractionAlong="0.6055292748912722"/>
    </projection>
    <projection id="NCXLS_MI_I2L" presynapticPopulation="MI" postsynapticPopulation="I2L" synapse="Acetylcholine">
      <connection id="37" preCellId="../MI/0/MI" postCellId="../I2L/0/I2L" preSegmentId="7" postSegmentId="1" preFractionAlong="0.10577890689406699" postFractionAlong="0.2779220107693591"/>
    </projection>
    <electricalProjection id="NCXLS_MI_NSML_GJ" presynapticPopulation="MI" postsynapticPopulation="NSML">
      <electricalConnection id="39" preCell="0" postCell="2" synapse="Generic_GJ" preSegment="1" postSegment="3" preFractionAlong="0.7141215274023056" postFractionAlong="0.7028508233960326"/>
      <electricalConnection id="46" preCell="0" postCell="0" synapse="Generic_GJ" preSegment="7" postSegment="7" preFractionAlong="0.8982235188321621" postFractionAlong="0.5813392169322986"/>
    </electricalProjection>
    <projection id="NCXLS_MI_I2R" presynapticPopulation="MI" postsynapticPopulation="I2R" synapse="Acetylcholine">
      <connection id="40" preCellId="../MI/0/MI" postCellId="../I2R/0/I2R" preSegmentId="1" postSegmentId="7" preFractionAlong="0.5102626462206492" postFractionAlong="0.4337844022073727"/>
    </projection>
    <projection id="NCXLS_MI_NSMR" presynapticPopulation="MI" postsynapticPopulation="NSMR" synapse="Acetylcholine">
      <connection id="41" preCellId="../MI/0/MI" postCellId="../NSMR/0/NSMR" preSegmentId="7" postSegmentId="1" preFractionAlong="0.2333954517284067" postFractionAlong="0.9412590641776477"/>
    </projection>
    <electricalProjection id="NCXLS_MI_M1_GJ" presynapticPopulation="MI" postsynapticPopulation="M1">
      <electricalConnection id="43" preCell="0" postCell="0" synapse="Generic_GJ" preSegment="8" postSegment="5" preFractionAlong="0.16161606073029744" postFractionAlong="0.2928356224602604"/>
    </electricalProjection>
    <projection id="NCXLS_MI_M2L" presynapticPopulation="MI" postsynapticPopulation="M2L" synapse="Acetylcholine">
      <connection id="44" preCellId="../MI/0/MI" postCellId="../M2L/0/M2L" preSegmentId="2" postSegmentId="3" preFractionAlong="0.3154892064822239" postFractionAlong="0.792501681861466"/>
    </projection>
    <projection id="NCXLS_MI_I3" presynapticPopulation="MI" postsynapticPopulation="I3" synapse="Acetylcholine">
      <connection id="48" preCellId="../MI/0/MI" postCellId="../I3/0/I3" preSegmentId="6" postSegmentId="2" preFractionAlong="0.9915977755299852" postFractionAlong="0.9832159866537458"/>
    </projection>
    <electricalProjection id="NCXLS_M2R_MI_GJ" presynapticPopulation="M2R" postsynapticPopulation="MI">
      <electricalConnection id="55" preCell="2" postCell="0" synapse="Generic_GJ" preSegment="4" postSegment="5" preFractionAlong="0.21212539872193992" postFractionAlong="0.47309453809937474"/>
      <electricalConnection id="114" preCell="3" postCell="0" synapse="Generic_GJ" preSegment="5" postSegment="4" preFractionAlong="0.654927734772136" postFractionAlong="0.8801066672064047"/>
    </electricalProjection>
    <electricalProjection id="NCXLS_M2R_NSMR_GJ" presynapticPopulation="M2R" postsynapticPopulation="NSMR">
      <electricalConnection id="58" preCell="2" postCell="0" synapse="Generic_GJ" preSegment="4" postSegment="8" preFractionAlong="0.8556026270540281" postFractionAlong="0.9272648702069862"/>
      <electricalConnection id="117" preCell="3" postCell="0" synapse="Generic_GJ" preSegment="1" postSegment="2" preFractionAlong="0.3666671778746331" postFractionAlong="0.9778959877861265"/>
    </electricalProjection>
    <electricalProjection id="NCXLS_NSML_NSML_GJ" presynapticPopulation="NSML" postsynapticPopulation="NSML">
      <electricalConnection id="64" preCell="2" postCell="1" synapse="Generic_GJ" preSegment="4" postSegment="1" preFractionAlong="0.981727217381659" postFractionAlong="0.41104256542093054"/>
      <electricalConnection id="74" preCell="3" postCell="2" synapse="Generic_GJ" preSegment="3" postSegment="1" preFractionAlong="0.4274505332424855" postFractionAlong="0.4103375943357709"/>
      <electricalConnection id="124" preCell="0" postCell="1" synapse="Generic_GJ" preSegment="6" postSegment="5" preFractionAlong="0.8328490415914426" postFractionAlong="0.6144100093171658"/>
    </electricalProjection>
    <projection id="NCXLS_NSML_I4" presynapticPopulation="NSML" postsynapticPopulation="I4" synapse="Serotonin_Glutamate">
      <connection id="65" preCellId="../NSML/2/NSML" postCellId="../I4/0/I4" preSegmentId="2" postSegmentId="3" preFractionAlong="0.09976300403813354" postFractionAlong="0.7768313694482886"/>
      <connection id="72" preCellId="../NSML/3/NSML" postCellId="../I4/0/I4" preSegmentId="6" postSegmentId="4" preFractionAlong="0.2918231875739673" postFractionAlong="0.7651115104398498"/>
    </projection>
    <projection id="NCXLS_NSML_MI" presynapticPopulation="NSML" postsynapticPopulation="MI" synapse="Serotonin_Glutamate">
      <connection id="66" preCellId="../NSML/2/NSML" postCellId="../MI/0/MI" preSegmentId="4" postSegmentId="1" preFractionAlong="0.039390162889686664" postFractionAlong="0.3632461785621772"/>
      <connection id="125" preCellId="../NSML/0/NSML" postCellId="../MI/0/MI" preSegmentId="7" postSegmentId="5" preFractionAlong="0.23196845215778583" postFractionAlong="0.12113857384890148"/>
    </projection>
    <projection id="NCXLS_I2R_I2L" presynapticPopulation="I2R" postsynapticPopulation="I2L" synapse="Acetylcholine">
      <connection id="67" preCellId="../I2R/0/I2R" postCellId="../I2L/0/I2L" preSegmentId="2" postSegmentId="1" preFractionAlong="0.11925016768146657" postFractionAlong="0.9240344924302546"/>
    </projection>
    <electricalProjection id="NCXLS_NSMR_M2R_GJ" presynapticPopulation="NSMR" postsynapticPopulation="M2R">
      <electricalConnection id="68" preCell="0" postCell="0" synapse="Generic_GJ" preSegment="2" postSegment="1" preFractionAlong="0.9300067198331662" postFractionAlong="0.7071375179356865"/>
    </electricalProjection>
    <projection id="NCXLS_NSMR_I3" presynapticPopulation="NSMR" postsynapticPopulation="I3" synapse="Serotonin_Glutamate">
      <connection id="69" preCellId="../NSMR/0/NSMR" postCellId="../I3/0/I3" preSegmentId="3" postSegmentId="6" preFractionAlong="0.3907503477090932" postFractionAlong="0.7408093647327442"/>
    </projection>
    <projection id="NCXLS_NSML_M2R" presynapticPopulation="NSML" postsynapticPopulation="M2R" synapse="Serotonin_Glutamate">
      <connection id="70" preCellId="../NSML/3/NSML" postCellId="../M2R/1/M2R" preSegmentId="8" postSegmentId="1" preFractionAlong="0.6716429214549452" postFractionAlong="0.38916461651348"/>
      <connection id="76" preCellId="../NSML/3/NSML" postCellId="../M2R/3/M2R" preSegmentId="2" postSegmentId="7" preFractionAlong="0.4910679496535785" postFractionAlong="0.5991756352105778"/>
      <connection id="126" preCellId="../NSML/0/NSML" postCellId="../M2R/2/M2R" preSegmentId="2" postSegmentId="4" preFractionAlong="0.5078620376159938" postFractionAlong="0.9983069303819881"/>
    </projection>
    <projection id="NCXLS_NSML_NSML" presynapticPopulation="NSML" postsynapticPopulation="NSML" synapse="Serotonin_Glutamate">
      <connection id="71" preCellId="../NSML/3/NSML" postCellId="../NSML/1/NSML" preSegmentId="3" postSegmentId="2" preFractionAlong="0.9898674840378934" postFractionAlong="0.2139228704997177"/>
      <connection id="77" preCellId="../NSML/3/NSML" postCellId="../NSML/0/NSML" preSegmentId="3" postSegmentId="4" preFractionAlong="0.38291640732977406" postFractionAlong="0.9442236744737867"/>
    </projection>
    <electricalProjection id="NCXLS_NSML_MI_GJ" presynapticPopulation="NSML" postsynapticPopulation="MI">
      <electricalConnection id="73" preCell="3" postCell="0" synapse="Generic_GJ" preSegment="2" postSegment="6" preFractionAlong="0.2924454609973959" postFractionAlong="0.0813903166329829"/>
    </electricalProjection>
    <electricalProjection id="NCXLS_NSML_M2L_GJ" presynapticPopulation="NSML" postsynapticPopulation="M2L">
      <electricalConnection id="75" preCell="3" postCell="0" synapse="Generic_GJ" preSegment="5" postSegment="8" preFractionAlong="0.4698020756976796" postFractionAlong="0.25641836957542063"/>
    </electricalProjection>
    <projection id="NCXLS_NSML_I1L" presynapticPopulation="NSML" postsynapticPopulation="I1L" synapse="Serotonin_Glutamate">
      <connection id="78" preCellId="../NSML/3/NSML" postCellId="../I1L/1/I1L" preSegmentId="8" postSegmentId="6" preFractionAlong="0.3445018551424617" postFractionAlong="0.6256671806315931"/>
      <connection id="122" preCellId="../NSML/0/NSML" postCellId="../I1L/0/I1L" preSegmentId="2" postSegmentId="1" preFractionAlong="0.25209865956229993" postFractionAlong="0.9548897100092579"/>
      <connection id="130" preCellId="../NSML/0/NSML" postCellId="../I1L/1/I1L" preSegmentId="7" postSegmentId="6" preFractionAlong="0.424867927068011" postFractionAlong="0.28888729937422675"/>
      <connection id="132" preCellId="../NSML/0/NSML" postCellId="../I1L/2/I1L" preSegmentId="6" postSegmentId="3" preFractionAlong="0.2959369676715412" postFractionAlong="0.24480896141213337"/>
    </projection>
    <projection id="NCXLS_M1_I1L" presynapticPopulation="M1" postsynapticPopulation="I1L" synapse="Acetylcholine">
      <connection id="79" preCellId="../M1/0/M1" postCellId="../I1L/0/I1L" preSegmentId="7" postSegmentId="4" preFractionAlong="0.27399060047259005" postFractionAlong="0.5051167184706744"/>
      <connection id="90" preCellId="../M1/0/M1" postCellId="../I1L/1/I1L" preSegmentId="7" postSegmentId="2" preFractionAlong="0.7932296782733221" postFractionAlong="0.15015364418387522"/>
      <connection id="92" preCellId="../M1/0/M1" postCellId="../I1L/2/I1L" preSegmentId="1" postSegmentId="7" preFractionAlong="0.4669994195332202" postFractionAlong="0.8120332930259939"/>
    </projection>
    <electricalProjection id="NCXLS_M1_M2R_GJ" presynapticPopulation="M1" postsynapticPopulation="M2R">
      <electricalConnection id="80" preCell="0" postCell="0" synapse="Generic_GJ" preSegment="1" postSegment="8" preFractionAlong="0.17239614329845265" postFractionAlong="0.7196639255967116"/>
    </electricalProjection>
    <projection id="NCXLS_M1_NSML" presynapticPopulation="M1" postsynapticPopulation="NSML" synapse="Acetylcholine">
      <connection id="81" preCellId="../M1/0/M1" postCellId="../NSML/1/NSML" preSegmentId="8" postSegmentId="6" preFractionAlong="0.6796751311406348" postFractionAlong="0.35121963066756967"/>
    </projection>
    <projection id="NCXLS_M1_I4" presynapticPopulation="M1" postsynapticPopulation="I4" synapse="Acetylcholine">
      <connection id="82" preCellId="../M1/0/M1" postCellId="../I4/0/I4" preSegmentId="6" postSegmentId="6" preFractionAlong="0.6842096705883705" postFractionAlong="0.21554328510454535"/>
    </projection>
    <projection id="NCXLS_M1_MI" presynapticPopulation="M1" postsynapticPopulation="MI" synapse="Acetylcholine">
      <connection id="83" preCellId="../M1/0/M1" postCellId="../MI/0/MI" preSegmentId="3" postSegmentId="7" preFractionAlong="0.188174646052918" postFractionAlong="0.008304841123329743"/>
    </projection>
    <projection id="NCXLS_M1_M2R" presynapticPopulation="M1" postsynapticPopulation="M2R" synapse="Acetylcholine">
      <connection id="84" preCellId="../M1/0/M1" postCellId="../M2R/2/M2R" preSegmentId="7" postSegmentId="2" preFractionAlong="0.43170297865641905" postFractionAlong="0.9693496144198253"/>
      <connection id="88" preCellId="../M1/0/M1" postCellId="../M2R/3/M2R" preSegmentId="4" postSegmentId="7" preFractionAlong="0.8823965347663638" postFractionAlong="0.956563928561169"/>
    </projection>
    <electricalProjection id="NCXLS_M1_NSML_GJ" presynapticPopulation="M1" postsynapticPopulation="NSML">
      <electricalConnection id="85" preCell="0" postCell="2" synapse="Generic_GJ" preSegment="2" postSegment="6" preFractionAlong="0.587366779457486" postFractionAlong="0.2009740327912396"/>
      <electricalConnection id="89" preCell="0" postCell="0" synapse="Generic_GJ" preSegment="7" postSegment="3" preFractionAlong="0.10557564221946336" postFractionAlong="0.1883468732894501"/>
    </electricalProjection>
    <projection id="NCXLS_M1_NSMR" presynapticPopulation="M1" postsynapticPopulation="NSMR" synapse="Acetylcholine">
      <connection id="86" preCellId="../M1/0/M1" postCellId="../NSMR/0/NSMR" preSegmentId="4" postSegmentId="8" preFractionAlong="0.7837029887609752" postFractionAlong="0.1126071490393118"/>
    </projection>
    <electricalProjection id="NCXLS_M1_M2L_GJ" presynapticPopulation="M1" postsynapticPopulation="M2L">
      <electricalConnection id="87" preCell="0" postCell="0" synapse="Generic_GJ" preSegment="2" postSegment="6" preFractionAlong="0.19462964720322462" postFractionAlong="0.6129773415893603"/>
    </electricalProjection>
    <projection id="NCXLS_M1_I3" presynapticPopulation="M1" postsynapticPopulation="I3" synapse="Acetylcholine">
      <connection id="91" preCellId="../M1/0/M1" postCellId="../I3/0/I3" preSegmentId="1" postSegmentId="8" preFractionAlong="0.32357760403951186" postFractionAlong="0.3412020723921535"/>
    </projection>
    <projection id="NCXLS_M2L_I1L" presynapticPopulation="M2L" postsynapticPopulation="I1L" synapse="Acetylcholine">
      <connection id="93" preCellId="../M2L/0/M2L" postCellId="../I1L/0/I1L" preSegmentId="8" postSegmentId="3" preFractionAlong="0.7899482697670385" postFractionAlong="0.06423524805742087"/>
      <connection id="107" preCellId="../M2L/0/M2L" postCellId="../I1L/1/I1L" preSegmentId="4" postSegmentId="8" preFractionAlong="0.2608084271927763" postFractionAlong="0.6827438396270411"/>
      <connection id="109" preCellId="../M2L/0/M2L" postCellId="../I1L/2/I1L" preSegmentId="7" postSegmentId="8" preFractionAlong="0.36011771548900384" postFractionAlong="0.6001239399394965"/>
    </projection>
    <electricalProjection id="NCXLS_M2L_M2R_GJ" presynapticPopulation="M2L" postsynapticPopulation="M2R">
      <electricalConnection id="94" preCell="0" postCell="0" synapse="Generic_GJ" preSegment="1" postSegment="2" preFractionAlong="0.6561497145031654" postFractionAlong="0.8549256565110712"/>
      <electricalConnection id="95" preCell="0" postCell="1" synapse="Generic_GJ" preSegment="6" postSegment="1" preFractionAlong="0.32719160582891293" postFractionAlong="0.53712074828674"/>
      <electricalConnection id="99" preCell="0" postCell="2" synapse="Generic_GJ" preSegment="8" postSegment="4" preFractionAlong="0.152652980000607" postFractionAlong="0.8305833251144513"/>
    </electricalProjection>
    <projection id="NCXLS_M2L_I1R" presynapticPopulation="M2L" postsynapticPopulation="I1R" synapse="Acetylcholine">
      <connection id="96" preCellId="../M2L/0/M2L" postCellId="../I1R/0/I1R" preSegmentId="4" postSegmentId="2" preFractionAlong="0.8111562615875056" postFractionAlong="0.7736366450057608"/>
    </projection>
    <projection id="NCXLS_M2L_I4" presynapticPopulation="M2L" postsynapticPopulation="I4" synapse="Acetylcholine">
      <connection id="97" preCellId="../M2L/0/M2L" postCellId="../I4/0/I4" preSegmentId="1" postSegmentId="8" preFractionAlong="0.4638297318166321" postFractionAlong="0.7748277666546214"/>
    </projection>
    <projection id="NCXLS_M2L_I2L" presynapticPopulation="M2L" postsynapticPopulation="I2L" synapse="Acetylcholine">
      <connection id="98" preCellId="../M2L/0/M2L" postCellId="../I2L/0/I2L" preSegmentId="1" postSegmentId="4" preFractionAlong="0.6331068227177317" postFractionAlong="0.05021312145757273"/>
    </projection>
    <projection id="NCXLS_M2L_NSML" presynapticPopulation="M2L" postsynapticPopulation="NSML" synapse="Acetylcholine">
      <connection id="100" preCellId="../M2L/0/M2L" postCellId="../NSML/2/NSML" preSegmentId="1" postSegmentId="1" preFractionAlong="0.2815538627281957" postFractionAlong="0.840888976711485"/>
    </projection>
    <projection id="NCXLS_M2L_I2R" presynapticPopulation="M2L" postsynapticPopulation="I2R" synapse="Acetylcholine">
      <connection id="101" preCellId="../M2L/0/M2L" postCellId="../I2R/0/I2R" preSegmentId="5" postSegmentId="5" preFractionAlong="0.3966087993343448" postFractionAlong="0.3700035405750314"/>
    </projection>
    <electricalProjection id="NCXLS_M2L_NSMR_GJ" presynapticPopulation="M2L" postsynapticPopulation="NSMR">
      <electricalConnection id="102" preCell="0" postCell="0" synapse="Generic_GJ" preSegment="1" postSegment="8" preFractionAlong="0.911754332001477" postFractionAlong="0.7509283935167222"/>
    </electricalProjection>
    <electricalProjection id="NCXLS_M2L_NSML_GJ" presynapticPopulation="M2L" postsynapticPopulation="NSML">
      <electricalConnection id="103" preCell="0" postCell="3" synapse="Generic_GJ" preSegment="6" postSegment="4" preFractionAlong="0.7146874494349541" postFractionAlong="0.527299133128794"/>
      <electricalConnection id="106" preCell="0" postCell="0" synapse="Generic_GJ" preSegment="1" postSegment="4" preFractionAlong="0.7557099224923928" postFractionAlong="0.4513360327392887"/>
    </electricalProjection>
    <electricalProjection id="NCXLS_M2L_M1_GJ" presynapticPopulation="M2L" postsynapticPopulation="M1">
      <electricalConnection id="104" preCell="0" postCell="0" synapse="Generic_GJ" preSegment="8" postSegment="7" preFractionAlong="0.31294561734835846" postFractionAlong="0.5741619996095829"/>
    </electricalProjection>
    <projection id="NCXLS_M2L_M2R" presynapticPopulation="M2L" postsynapticPopulation="M2R" synapse="Acetylcholine">
      <connection id="105" preCellId="../M2L/0/M2L" postCellId="../M2R/3/M2R" preSegmentId="4" postSegmentId="7" preFractionAlong="0.48956090622760573" postFractionAlong="0.45610539951721263"/>
    </projection>
    <projection id="NCXLS_M2L_I3" presynapticPopulation="M2L" postsynapticPopulation="I3" synapse="Acetylcholine">
      <connection id="108" preCellId="../M2L/0/M2L" postCellId="../I3/0/I3" preSegmentId="3" postSegmentId="1" preFractionAlong="0.6634583230160925" postFractionAlong="0.8712729076173946"/>
    </projection>
    <electricalProjection id="NCXLS_NSML_M2R_GJ" presynapticPopulation="NSML" postsynapticPopulation="M2R">
      <electricalConnection id="123" preCell="0" postCell="0" synapse="Generic_GJ" preSegment="7" postSegment="4" preFractionAlong="0.3316902516733856" postFractionAlong="0.18149762827084115"/>
      <electricalConnection id="129" preCell="0" postCell="3" synapse="Generic_GJ" preSegment="8" postSegment="3" preFractionAlong="0.1496734645836011" postFractionAlong="0.22633083973707457"/>
    </electricalProjection>
    <projection id="NCXLS_NSML_NSMR" presynapticPopulation="NSML" postsynapticPopulation="NSMR" synapse="Serotonin_Glutamate">
      <connection id="127" preCellId="../NSML/0/NSML" postCellId="../NSMR/0/NSMR" preSegmentId="7" postSegmentId="8" preFractionAlong="0.30839459196514607" postFractionAlong="0.8768585830261717"/>
    </projection>
    <projection id="NCXLS_NSML_M2L" presynapticPopulation="NSML" postsynapticPopulation="M2L" synapse="Serotonin_Glutamate">
      <connection id="128" preCellId="../NSML/0/NSML" postCellId="../M2L/0/M2L" preSegmentId="7" postSegmentId="6" preFractionAlong="0.015415166076539255" postFractionAlong="0.8168604805410224"/>
    </projection>
    <projection id="NCXLS_NSML_I3" presynapticPopulation="NSML" postsynapticPopulation="I3" synapse="Serotonin_Glutamate">
      <connection id="131" preCellId="../NSML/0/NSML" postCellId="../I3/0/I3" preSegmentId="7" postSegmentId="3" preFractionAlong="0.7622307896421693" postFractionAlong="0.9901097837349171"/>
    </projection>
    <projection id="NCXLS_I3_M2R" presynapticPopulation="I3" postsynapticPopulation="M2R" synapse="Acetylcholine">
      <connection id="133" preCellId="../I3/0/I3" postCellId="../M2R/0/M2R" preSegmentId="6" postSegmentId="1" preFractionAlong="0.13669507448903628" postFractionAlong="0.5513305496923012"/>
    </projection>
  </network>
</neuroml>
