<?xml version='1.0' encoding='UTF-8'?>
<neuroml xmlns="http://www.neuroml.org/schema/neuroml2" xmlns:xsi="http://www.w3.org/2001/XMLSchema-instance" xsi:schemaLocation="http://www.neuroml.org/schema/neuroml2 https://raw.githubusercontent.com/NeuroML/NeuroML2/development/Schemas/NeuroML2/NeuroML_v2beta4.xsd" id="gvft_network_bio_prior_lamW_0.500_DF_0.033_t70.net">
  <notes>NeuroML2 network generated from GVFT simulation on 2025-05-04 11:18:27
</notes>
  <include href="I1L.cell.nml"/>
  <include href="I1R.cell.nml"/>
  <include href="I2L.cell.nml"/>
  <include href="I2R.cell.nml"/>
  <include href="M1.cell.nml"/>
  <include href="M2L.cell.nml"/>
  <include href="M2R.cell.nml"/>
  <include href="M3L.cell.nml"/>
  <include href="NSML.cell.nml"/>
  <include href="NSMR.cell.nml"/>
  <include href="Acetylcholine.synapse.nml"/>
  <include href="Generic_GJ.nml"/>
  <include href="Glutamate.synapse.nml"/>
  <include href="Serotonin_Glutamate.synapse.nml"/>
  <network id="gvft_network_bio_prior_lamW_0.500_DF_0.033_t70.net" type="networkWithTemperature" temperature="20.0 degC">
    <population id="I1L" component="I1L" type="populationList" size="5">
      <instance id="0">
        <location x="-0.9698492288589478" y="0.7889447212219238" z="0.0"/>
      </instance>
      <instance id="1">
        <location x="-0.4673366844654083" y="-0.38693466782569885" z="0.0"/>
      </instance>
      <instance id="2">
        <location x="-0.5477386713027954" y="0.7688442468643188" z="0.0"/>
      </instance>
      <instance id="3">
        <location x="-0.3366834223270416" y="0.909547746181488" z="0.0"/>
      </instance>
      <instance id="4">
        <location x="0.2261306643486023" y="-0.37688443064689636" z="0.0"/>
      </instance>
    </population>
    <population id="I1R" component="I1R" type="populationList" size="1">
      <instance id="0">
        <location x="0.8190954923629761" y="-0.8090452551841736" z="0.0"/>
      </instance>
    </population>
    <population id="I2L" component="I2L" type="populationList" size="1">
      <instance id="0">
        <location x="0.7487437129020691" y="-0.8693467378616333" z="0.0"/>
      </instance>
    </population>
    <population id="I2R" component="I2R" type="populationList" size="1">
      <instance id="0">
        <location x="0.6884422302246094" y="-0.7487437129020691" z="0.0"/>
      </instance>
    </population>
    <population id="M1" component="M1" type="populationList" size="1">
      <instance id="0">
        <location x="0.2864321768283844" y="-0.39698493480682373" z="0.0"/>
      </instance>
    </population>
    <population id="M2L" component="M2L" type="populationList" size="1">
      <instance id="0">
        <location x="-0.9396985173225403" y="-0.5577889680862427" z="0.0"/>
      </instance>
    </population>
    <population id="M2R" component="M2R" type="populationList" size="1">
      <instance id="0">
        <location x="-0.10552764683961868" y="-0.5477386713027954" z="0.0"/>
      </instance>
    </population>
    <population id="M3L" component="M3L" type="populationList" size="4">
      <instance id="0">
        <location x="-0.45728644728660583" y="0.26633167266845703" z="0.0"/>
      </instance>
      <instance id="1">
        <location x="-0.8492462038993835" y="-0.5979899764060974" z="0.0"/>
      </instance>
      <instance id="2">
        <location x="0.06532664597034454" y="0.9698492288589478" z="0.0"/>
      </instance>
      <instance id="3">
        <location x="-0.13567839562892914" y="-0.2763819098472595" z="0.0"/>
      </instance>
    </population>
    <population id="NSML" component="NSML" type="populationList" size="3">
      <instance id="0">
        <location x="-0.095477394759655" y="-0.49748745560646057" z="0.0"/>
      </instance>
      <instance id="1">
        <location x="0.6482412219047546" y="-0.6582914590835571" z="0.0"/>
      </instance>
      <instance id="2">
        <location x="0.07537689805030823" y="-0.7989949584007263" z="0.0"/>
      </instance>
    </population>
    <population id="NSMR" component="NSMR" type="populationList" size="2">
      <instance id="0">
        <location x="0.20603016018867493" y="-0.4170854389667511" z="0.0"/>
      </instance>
      <instance id="1">
        <location x="-0.8592965006828308" y="-0.8190954923629761" z="0.0"/>
      </instance>
    </population>
    <electricalProjection id="NCXLS_NSML_M1_GJ" presynapticPopulation="NSML" postsynapticPopulation="M1">
      <electricalConnection id="0" preCell="0" postCell="0" synapse="Generic_GJ" preSegment="2" postSegment="4" preFractionAlong="0.8622516283024872" postFractionAlong="0.390515697684394"/>
    </electricalProjection>
    <projection id="NCXLS_NSML_M2L" presynapticPopulation="NSML" postsynapticPopulation="M2L" synapse="Serotonin_Glutamate">
      <connection id="1" preCellId="../NSML/0/NSML" postCellId="../M2L/0/M2L" preSegmentId="2" postSegmentId="5" preFractionAlong="0.9148159757649807" postFractionAlong="0.9733791957751172"/>
    </projection>
    <electricalProjection id="NCXLS_NSML_M3L_GJ" presynapticPopulation="NSML" postsynapticPopulation="M3L">
      <electricalConnection id="2" preCell="0" postCell="0" synapse="Generic_GJ" preSegment="7" postSegment="4" preFractionAlong="0.21285077095991378" postFractionAlong="0.08051655859151186"/>
      <electricalConnection id="4" preCell="0" postCell="2" synapse="Generic_GJ" preSegment="3" postSegment="5" preFractionAlong="0.405225782929334" postFractionAlong="0.039932189265609264"/>
      <electricalConnection id="6" preCell="0" postCell="3" synapse="Generic_GJ" preSegment="6" postSegment="4" preFractionAlong="0.7462660613322051" postFractionAlong="0.21903836164205848"/>
      <electricalConnection id="146" preCell="2" postCell="1" synapse="Generic_GJ" preSegment="4" postSegment="2" preFractionAlong="0.5438984207131475" postFractionAlong="0.739551148734993"/>
    </electricalProjection>
    <projection id="NCXLS_NSML_I1L" presynapticPopulation="NSML" postsynapticPopulation="I1L" synapse="Serotonin_Glutamate">
      <connection id="3" preCellId="../NSML/0/NSML" postCellId="../I1L/0/I1L" preSegmentId="2" postSegmentId="8" preFractionAlong="0.013604395450668272" postFractionAlong="0.41189829760993657"/>
      <connection id="5" preCellId="../NSML/0/NSML" postCellId="../I1L/1/I1L" preSegmentId="1" postSegmentId="1" preFractionAlong="0.20973899393856588" postFractionAlong="0.328308710357912"/>
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    </projection>
    <electricalProjection id="NCXLS_NSML_NSMR_GJ" presynapticPopulation="NSML" postsynapticPopulation="NSMR">
      <electricalConnection id="8" preCell="0" postCell="0" synapse="Generic_GJ" preSegment="2" postSegment="3" preFractionAlong="0.4452947723752104" postFractionAlong="0.3460024129722764"/>
    </electricalProjection>
    <electricalProjection id="NCXLS_M1_NSML_GJ" presynapticPopulation="M1" postsynapticPopulation="NSML">
      <electricalConnection id="11" preCell="0" postCell="0" synapse="Generic_GJ" preSegment="8" postSegment="1" preFractionAlong="0.8852828290969004" postFractionAlong="0.36159026642030967"/>
      <electricalConnection id="25" preCell="0" postCell="2" synapse="Generic_GJ" preSegment="6" postSegment="3" preFractionAlong="0.5666674537501646" postFractionAlong="0.6541683119919323"/>
    </electricalProjection>
    <projection id="NCXLS_M1_M2L" presynapticPopulation="M1" postsynapticPopulation="M2L" synapse="Acetylcholine">
      <connection id="12" preCellId="../M1/0/M1" postCellId="../M2L/0/M2L" preSegmentId="3" postSegmentId="1" preFractionAlong="0.6306084716506094" postFractionAlong="0.9341553437930064"/>
    </projection>
    <electricalProjection id="NCXLS_M1_M3L_GJ" presynapticPopulation="M1" postsynapticPopulation="M3L">
      <electricalConnection id="13" preCell="0" postCell="0" synapse="Generic_GJ" preSegment="3" postSegment="6" preFractionAlong="0.10343516664876229" postFractionAlong="0.23115136756267707"/>
      <electricalConnection id="15" preCell="0" postCell="1" synapse="Generic_GJ" preSegment="3" postSegment="8" preFractionAlong="0.9562591980273812" postFractionAlong="0.43372788289597775"/>
      <electricalConnection id="17" preCell="0" postCell="2" synapse="Generic_GJ" preSegment="6" postSegment="1" preFractionAlong="0.49602989425354427" postFractionAlong="0.3477397822959257"/>
      <electricalConnection id="19" preCell="0" postCell="3" synapse="Generic_GJ" preSegment="3" postSegment="5" preFractionAlong="0.5236943322446882" postFractionAlong="0.9824473570470746"/>
    </electricalProjection>
    <electricalProjection id="NCXLS_M1_M2R_GJ" presynapticPopulation="M1" postsynapticPopulation="M2R">
      <electricalConnection id="14" preCell="0" postCell="0" synapse="Generic_GJ" preSegment="2" postSegment="4" preFractionAlong="0.17010688201207602" postFractionAlong="0.4949116047766605"/>
    </electricalProjection>
    <projection id="NCXLS_M1_I1L" presynapticPopulation="M1" postsynapticPopulation="I1L" synapse="Acetylcholine">
      <connection id="16" preCellId="../M1/0/M1" postCellId="../I1L/0/I1L" preSegmentId="6" postSegmentId="6" preFractionAlong="0.9419105448514798" postFractionAlong="0.8769888309739855"/>
      <connection id="18" preCellId="../M1/0/M1" postCellId="../I1L/1/I1L" preSegmentId="5" postSegmentId="3" preFractionAlong="0.3608068262457512" postFractionAlong="0.8263592101750041"/>
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    </projection>
    <electricalProjection id="NCXLS_M1_NSMR_GJ" presynapticPopulation="M1" postsynapticPopulation="NSMR">
      <electricalConnection id="21" preCell="0" postCell="0" synapse="Generic_GJ" preSegment="5" postSegment="1" preFractionAlong="0.6115315946147739" postFractionAlong="0.23946477953446677"/>
      <electricalConnection id="23" preCell="0" postCell="1" synapse="Generic_GJ" preSegment="6" postSegment="7" preFractionAlong="0.18356290811990872" postFractionAlong="0.28488863890306104"/>
    </electricalProjection>
    <electricalProjection id="NCXLS_M2L_NSML_GJ" presynapticPopulation="M2L" postsynapticPopulation="NSML">
      <electricalConnection id="26" preCell="0" postCell="0" synapse="Generic_GJ" preSegment="4" postSegment="8" preFractionAlong="0.12642622715502805" postFractionAlong="0.7608075414310771"/>
      <electricalConnection id="38" preCell="0" postCell="1" synapse="Generic_GJ" preSegment="8" postSegment="6" preFractionAlong="0.18076991930090314" postFractionAlong="0.5909866849681349"/>
      <electricalConnection id="42" preCell="0" postCell="2" synapse="Generic_GJ" preSegment="5" postSegment="8" preFractionAlong="0.9909174747945123" postFractionAlong="0.1559262521738315"/>
    </electricalProjection>
    <electricalProjection id="NCXLS_M2L_M1_GJ" presynapticPopulation="M2L" postsynapticPopulation="M1">
      <electricalConnection id="27" preCell="0" postCell="0" synapse="Generic_GJ" preSegment="7" postSegment="4" preFractionAlong="0.25700623222243224" postFractionAlong="0.40709195615801974"/>
    </electricalProjection>
    <projection id="NCXLS_M2L_I1R" presynapticPopulation="M2L" postsynapticPopulation="I1R" synapse="Acetylcholine">
      <connection id="28" preCellId="../M2L/0/M2L" postCellId="../I1R/0/I1R" preSegmentId="6" postSegmentId="6" preFractionAlong="0.5333268427529364" postFractionAlong="0.6594901710876518"/>
    </projection>
    <electricalProjection id="NCXLS_M2L_M3L_GJ" presynapticPopulation="M2L" postsynapticPopulation="M3L">
      <electricalConnection id="29" preCell="0" postCell="0" synapse="Generic_GJ" preSegment="1" postSegment="8" preFractionAlong="0.721477082734017" postFractionAlong="0.06197100697941027"/>
      <electricalConnection id="33" preCell="0" postCell="2" synapse="Generic_GJ" preSegment="4" postSegment="8" preFractionAlong="0.532351126517139" postFractionAlong="0.8523554603874851"/>
      <electricalConnection id="35" preCell="0" postCell="3" synapse="Generic_GJ" preSegment="8" postSegment="1" preFractionAlong="0.1406954238607463" postFractionAlong="0.2196746779947074"/>
    </electricalProjection>
    <electricalProjection id="NCXLS_M2L_M2R_GJ" presynapticPopulation="M2L" postsynapticPopulation="M2R">
      <electricalConnection id="30" preCell="0" postCell="0" synapse="Generic_GJ" preSegment="7" postSegment="2" preFractionAlong="0.8276711355691941" postFractionAlong="0.45121531327839626"/>
    </electricalProjection>
    <projection id="NCXLS_M2L_I1L" presynapticPopulation="M2L" postsynapticPopulation="I1L" synapse="Acetylcholine">
      <connection id="31" preCellId="../M2L/0/M2L" postCellId="../I1L/0/I1L" preSegmentId="2" postSegmentId="2" preFractionAlong="0.9850338450059597" postFractionAlong="0.8892854620742633"/>
      <connection id="34" preCellId="../M2L/0/M2L" postCellId="../I1L/1/I1L" preSegmentId="4" postSegmentId="8" preFractionAlong="0.3352883170794706" postFractionAlong="0.9855404806740391"/>
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    </projection>
    <projection id="NCXLS_M2L_I2L" presynapticPopulation="M2L" postsynapticPopulation="I2L" synapse="Acetylcholine">
      <connection id="32" preCellId="../M2L/0/M2L" postCellId="../I2L/0/I2L" preSegmentId="8" postSegmentId="1" preFractionAlong="0.4115116028992104" postFractionAlong="0.1838457268892978"/>
    </projection>
    <electricalProjection id="NCXLS_M2L_NSMR_GJ" presynapticPopulation="M2L" postsynapticPopulation="NSMR">
      <electricalConnection id="37" preCell="0" postCell="0" synapse="Generic_GJ" preSegment="2" postSegment="5" preFractionAlong="0.779336265319487" postFractionAlong="0.35494196448924176"/>
    </electricalProjection>
    <projection id="NCXLS_M2L_I2R" presynapticPopulation="M2L" postsynapticPopulation="I2R" synapse="Acetylcholine">
      <connection id="40" preCellId="../M2L/0/M2L" postCellId="../I2R/0/I2R" preSegmentId="2" postSegmentId="7" preFractionAlong="0.5557035407203013" postFractionAlong="0.48474135739969204"/>
    </projection>
    <electricalProjection id="NCXLS_M3L_NSML_GJ" presynapticPopulation="M3L" postsynapticPopulation="NSML">
      <electricalConnection id="43" preCell="0" postCell="0" synapse="Generic_GJ" preSegment="4" postSegment="1" preFractionAlong="0.0890161247338962" postFractionAlong="0.27173851648448166"/>
      <electricalConnection id="70" preCell="1" postCell="0" synapse="Generic_GJ" preSegment="1" postSegment="3" preFractionAlong="0.1102329087212327" postFractionAlong="0.7893796334619244"/>
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    </electricalProjection>
    <electricalProjection id="NCXLS_M3L_M1_GJ" presynapticPopulation="M3L" postsynapticPopulation="M1">
      <electricalConnection id="44" preCell="0" postCell="0" synapse="Generic_GJ" preSegment="3" postSegment="7" preFractionAlong="0.8529243581784497" postFractionAlong="0.7788926451025717"/>
      <electricalConnection id="71" preCell="1" postCell="0" synapse="Generic_GJ" preSegment="7" postSegment="7" preFractionAlong="0.34544638580551346" postFractionAlong="0.7612714296253603"/>
      <electricalConnection id="101" preCell="3" postCell="0" synapse="Generic_GJ" preSegment="6" postSegment="1" preFractionAlong="0.26514900221701065" postFractionAlong="0.016893355071518457"/>
    </electricalProjection>
    <projection id="NCXLS_M3L_I1R" presynapticPopulation="M3L" postsynapticPopulation="I1R" synapse="Acetylcholine">
      <connection id="45" preCellId="../M3L/0/M3L" postCellId="../I1R/0/I1R" preSegmentId="6" postSegmentId="6" preFractionAlong="0.5139665125226456" postFractionAlong="0.7087042892136465"/>
      <connection id="73" preCellId="../M3L/1/M3L" postCellId="../I1R/0/I1R" preSegmentId="3" postSegmentId="6" preFractionAlong="0.8071797702024911" postFractionAlong="0.657494059256251"/>
      <connection id="90" preCellId="../M3L/2/M3L" postCellId="../I1R/0/I1R" preSegmentId="5" postSegmentId="2" preFractionAlong="0.4274310711602143" postFractionAlong="0.11339832734490873"/>
      <connection id="103" preCellId="../M3L/3/M3L" postCellId="../I1R/0/I1R" preSegmentId="3" postSegmentId="5" preFractionAlong="0.8795632376127812" postFractionAlong="0.5800435552980984"/>
    </projection>
    <projection id="NCXLS_M3L_M2R" presynapticPopulation="M3L" postsynapticPopulation="M2R" synapse="Acetylcholine">
      <connection id="46" preCellId="../M3L/0/M3L" postCellId="../M2R/0/M2R" preSegmentId="8" postSegmentId="2" preFractionAlong="0.8413083514997018" postFractionAlong="0.6771900939767854"/>
      <connection id="91" preCellId="../M3L/2/M3L" postCellId="../M2R/0/M2R" preSegmentId="8" postSegmentId="7" preFractionAlong="0.4572997979968979" postFractionAlong="0.550944193840603"/>
      <connection id="104" preCellId="../M3L/3/M3L" postCellId="../M2R/0/M2R" preSegmentId="3" postSegmentId="2" preFractionAlong="0.774849846534099" postFractionAlong="0.7398216343655964"/>
    </projection>
    <projection id="NCXLS_M3L_M3L" presynapticPopulation="M3L" postsynapticPopulation="M3L" synapse="Acetylcholine">
      <connection id="47" preCellId="../M3L/0/M3L" postCellId="../M3L/1/M3L" preSegmentId="4" postSegmentId="4" preFractionAlong="0.5359359931290713" postFractionAlong="0.8852289842111726"/>
      <connection id="51" preCellId="../M3L/0/M3L" postCellId="../M3L/3/M3L" preSegmentId="1" postSegmentId="8" preFractionAlong="0.3327637153356794" postFractionAlong="0.2766699421790819"/>
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    </projection>
    <projection id="NCXLS_M3L_I2L" presynapticPopulation="M3L" postsynapticPopulation="I2L" synapse="Acetylcholine">
      <connection id="48" preCellId="../M3L/0/M3L" postCellId="../I2L/0/I2L" preSegmentId="3" postSegmentId="2" preFractionAlong="0.3811476533610507" postFractionAlong="0.7776425696776891"/>
      <connection id="77" preCellId="../M3L/1/M3L" postCellId="../I2L/0/I2L" preSegmentId="6" postSegmentId="6" preFractionAlong="0.9142087896808119" postFractionAlong="0.5060053347669375"/>
      <connection id="92" preCellId="../M3L/2/M3L" postCellId="../I2L/0/I2L" preSegmentId="7" postSegmentId="8" preFractionAlong="0.9914018630496114" postFractionAlong="0.24413682080690635"/>
      <connection id="106" preCellId="../M3L/3/M3L" postCellId="../I2L/0/I2L" preSegmentId="3" postSegmentId="1" preFractionAlong="0.3633337819162643" postFractionAlong="0.6295673951687717"/>
    </projection>
    <electricalProjection id="NCXLS_M3L_M3L_GJ" presynapticPopulation="M3L" postsynapticPopulation="M3L">
      <electricalConnection id="49" preCell="0" postCell="2" synapse="Generic_GJ" preSegment="6" postSegment="5" preFractionAlong="0.8892140134241908" postFractionAlong="0.3463993197628523"/>
      <electricalConnection id="78" preCell="1" postCell="2" synapse="Generic_GJ" preSegment="6" postSegment="4" preFractionAlong="0.4716528013283886" postFractionAlong="0.2689043045614814"/>
    </electricalProjection>
    <projection id="NCXLS_M3L_I1L" presynapticPopulation="M3L" postsynapticPopulation="I1L" synapse="Acetylcholine">
      <connection id="50" preCellId="../M3L/0/M3L" postCellId="../I1L/1/I1L" preSegmentId="7" postSegmentId="5" preFractionAlong="0.8887357893866253" postFractionAlong="0.46437032018204105"/>
      <connection id="56" preCellId="../M3L/0/M3L" postCellId="../I1L/4/I1L" preSegmentId="8" postSegmentId="5" preFractionAlong="0.7684105431140342" postFractionAlong="0.757937739606166"/>
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    </projection>
    <projection id="NCXLS_M3L_NSMR" presynapticPopulation="M3L" postsynapticPopulation="NSMR" synapse="Acetylcholine">
      <connection id="52" preCellId="../M3L/0/M3L" postCellId="../NSMR/0/NSMR" preSegmentId="8" postSegmentId="5" preFractionAlong="0.11984066154120387" postFractionAlong="0.8792726411829093"/>
      <connection id="54" preCellId="../M3L/0/M3L" postCellId="../NSMR/1/NSMR" preSegmentId="6" postSegmentId="4" preFractionAlong="0.1845350507366441" postFractionAlong="0.27320350605023247"/>
      <connection id="82" preCellId="../M3L/1/M3L" postCellId="../NSMR/0/NSMR" preSegmentId="2" postSegmentId="8" preFractionAlong="0.3434442832940099" postFractionAlong="0.6134927718519796"/>
    </projection>
    <projection id="NCXLS_M3L_NSML" presynapticPopulation="M3L" postsynapticPopulation="NSML" synapse="Acetylcholine">
      <connection id="53" preCellId="../M3L/0/M3L" postCellId="../NSML/1/NSML" preSegmentId="4" postSegmentId="7" preFractionAlong="0.19074826370580278" postFractionAlong="0.6940199458245654"/>
      <connection id="57" preCellId="../M3L/0/M3L" postCellId="../NSML/2/NSML" preSegmentId="8" postSegmentId="6" preFractionAlong="0.7869900833848252" postFractionAlong="0.3342633747792092"/>
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    </projection>
    <projection id="NCXLS_M3L_I2R" presynapticPopulation="M3L" postsynapticPopulation="I2R" synapse="Acetylcholine">
      <connection id="55" preCellId="../M3L/0/M3L" postCellId="../I2R/0/I2R" preSegmentId="2" postSegmentId="6" preFractionAlong="0.6992427352454739" postFractionAlong="0.638723408817006"/>
      <connection id="85" preCellId="../M3L/1/M3L" postCellId="../I2R/0/I2R" preSegmentId="2" postSegmentId="7" preFractionAlong="0.9307257945453972" postFractionAlong="0.9324277829788153"/>
      <connection id="97" preCellId="../M3L/2/M3L" postCellId="../I2R/0/I2R" preSegmentId="4" postSegmentId="6" preFractionAlong="0.92622745020583" postFractionAlong="0.3531544022825378"/>
      <connection id="111" preCellId="../M3L/3/M3L" postCellId="../I2R/0/I2R" preSegmentId="5" postSegmentId="1" preFractionAlong="0.29029748304403435" postFractionAlong="0.8280549729692729"/>
    </projection>
    <projection id="NCXLS_M2R_NSML" presynapticPopulation="M2R" postsynapticPopulation="NSML" synapse="Acetylcholine">
      <connection id="58" preCellId="../M2R/0/M2R" postCellId="../NSML/0/NSML" preSegmentId="5" postSegmentId="7" preFractionAlong="0.6149100858019407" postFractionAlong="0.8223635138124306"/>
    </projection>
    <projection id="NCXLS_M2R_M1" presynapticPopulation="M2R" postsynapticPopulation="M1" synapse="Acetylcholine">
      <connection id="59" preCellId="../M2R/0/M2R" postCellId="../M1/0/M1" preSegmentId="7" postSegmentId="5" preFractionAlong="0.21843824498868036" postFractionAlong="0.5424101286783086"/>
    </projection>
    <electricalProjection id="NCXLS_M2R_M2L_GJ" presynapticPopulation="M2R" postsynapticPopulation="M2L">
      <electricalConnection id="60" preCell="0" postCell="0" synapse="Generic_GJ" preSegment="6" postSegment="8" preFractionAlong="0.6974990360370945" postFractionAlong="0.4757937917347358"/>
    </electricalProjection>
    <electricalProjection id="NCXLS_M2R_M3L_GJ" presynapticPopulation="M2R" postsynapticPopulation="M3L">
      <electricalConnection id="61" preCell="0" postCell="0" synapse="Generic_GJ" preSegment="5" postSegment="6" preFractionAlong="0.6780725123219167" postFractionAlong="0.684544433031324"/>
    </electricalProjection>
    <projection id="NCXLS_M2R_I1L" presynapticPopulation="M2R" postsynapticPopulation="I1L" synapse="Acetylcholine">
      <connection id="62" preCellId="../M2R/0/M2R" postCellId="../I1L/0/I1L" preSegmentId="4" postSegmentId="7" preFractionAlong="0.9842497664912904" postFractionAlong="0.8416752092714888"/>
      <connection id="64" preCellId="../M2R/0/M2R" postCellId="../I1L/1/I1L" preSegmentId="6" postSegmentId="2" preFractionAlong="0.538475976662706" postFractionAlong="0.14588924648328727"/>
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    </projection>
    <projection id="NCXLS_M2R_M3L" presynapticPopulation="M2R" postsynapticPopulation="M3L" synapse="Glutamate">
      <connection id="63" preCellId="../M2R/0/M2R" postCellId="../M3L/2/M3L" preSegmentId="1" postSegmentId="3" preFractionAlong="0.33021522516002744" postFractionAlong="0.5356316528472319"/>
      <connection id="65" preCellId="../M2R/0/M2R" postCellId="../M3L/3/M3L" preSegmentId="8" postSegmentId="4" preFractionAlong="0.6487218801549056" postFractionAlong="0.39019596724990235"/>
    </projection>
    <electricalProjection id="NCXLS_M2R_NSMR_GJ" presynapticPopulation="M2R" postsynapticPopulation="NSMR">
      <electricalConnection id="67" preCell="0" postCell="0" synapse="Generic_GJ" preSegment="1" postSegment="7" preFractionAlong="0.1707545509961964" postFractionAlong="0.03670798280462839"/>
    </electricalProjection>
    <electricalProjection id="NCXLS_M3L_M2L_GJ" presynapticPopulation="M3L" postsynapticPopulation="M2L">
      <electricalConnection id="72" preCell="1" postCell="0" synapse="Generic_GJ" preSegment="3" postSegment="8" preFractionAlong="0.37143395064673235" postFractionAlong="0.8294002201989358"/>
    </electricalProjection>
    <electricalProjection id="NCXLS_M3L_M2R_GJ" presynapticPopulation="M3L" postsynapticPopulation="M2R">
      <electricalConnection id="75" preCell="1" postCell="0" synapse="Generic_GJ" preSegment="7" postSegment="7" preFractionAlong="0.2036486411232774" postFractionAlong="0.6439979536304735"/>
    </electricalProjection>
    <projection id="NCXLS_M3L_M1" presynapticPopulation="M3L" postsynapticPopulation="M1" synapse="Acetylcholine">
      <connection id="89" preCellId="../M3L/2/M3L" postCellId="../M1/0/M1" preSegmentId="6" postSegmentId="2" preFractionAlong="0.8910506169305347" postFractionAlong="0.5936750743979018"/>
    </projection>
    <electricalProjection id="NCXLS_M3L_NSMR_GJ" presynapticPopulation="M3L" postsynapticPopulation="NSMR">
      <electricalConnection id="95" preCell="2" postCell="0" synapse="Generic_GJ" preSegment="8" postSegment="2" preFractionAlong="0.7237463854077856" postFractionAlong="0.025025101563866614"/>
      <electricalConnection id="108" preCell="3" postCell="0" synapse="Generic_GJ" preSegment="3" postSegment="1" preFractionAlong="0.1866839259143167" postFractionAlong="0.4063998528544974"/>
      <electricalConnection id="110" preCell="3" postCell="1" synapse="Generic_GJ" preSegment="1" postSegment="3" preFractionAlong="0.14060580407652679" postFractionAlong="0.07117679886367678"/>
    </electricalProjection>
    <projection id="NCXLS_M3L_M2L" presynapticPopulation="M3L" postsynapticPopulation="M2L" synapse="Acetylcholine">
      <connection id="102" preCellId="../M3L/3/M3L" postCellId="../M2L/0/M2L" preSegmentId="3" postSegmentId="4" preFractionAlong="0.8589123260956414" postFractionAlong="0.8958346766901621"/>
    </projection>
    <electricalProjection id="NCXLS_NSMR_M2L_GJ" presynapticPopulation="NSMR" postsynapticPopulation="M2L">
      <electricalConnection id="114" preCell="0" postCell="0" synapse="Generic_GJ" preSegment="8" postSegment="5" preFractionAlong="0.4432859860792395" postFractionAlong="0.4467215559898736"/>
    </electricalProjection>
    <electricalProjection id="NCXLS_NSMR_M3L_GJ" presynapticPopulation="NSMR" postsynapticPopulation="M3L">
      <electricalConnection id="115" preCell="0" postCell="0" synapse="Generic_GJ" preSegment="8" postSegment="2" preFractionAlong="0.01692935242553506" postFractionAlong="0.522095236914789"/>
      <electricalConnection id="118" preCell="0" postCell="2" synapse="Generic_GJ" preSegment="8" postSegment="8" preFractionAlong="0.69244035251813" postFractionAlong="0.6301855690545725"/>
      <electricalConnection id="120" preCell="0" postCell="3" synapse="Generic_GJ" preSegment="7" postSegment="7" preFractionAlong="0.42770117081923853" postFractionAlong="0.7015993498995969"/>
    </electricalProjection>
    <projection id="NCXLS_NSMR_M3L" presynapticPopulation="NSMR" postsynapticPopulation="M3L" synapse="Serotonin_Glutamate">
      <connection id="116" preCellId="../NSMR/0/NSMR" postCellId="../M3L/1/M3L" preSegmentId="4" postSegmentId="1" preFractionAlong="0.0013198689843296751" postFractionAlong="0.307943707661932"/>
      <connection id="130" preCellId="../NSMR/1/NSMR" postCellId="../M3L/1/M3L" preSegmentId="8" postSegmentId="5" preFractionAlong="0.6902107766994678" postFractionAlong="0.7319678383527121"/>
    </projection>
    <projection id="NCXLS_NSMR_I1L" presynapticPopulation="NSMR" postsynapticPopulation="I1L" synapse="Serotonin_Glutamate">
      <connection id="117" preCellId="../NSMR/0/NSMR" postCellId="../I1L/0/I1L" preSegmentId="6" postSegmentId="1" preFractionAlong="0.3934481532236358" postFractionAlong="0.13185198964339695"/>
      <connection id="119" preCellId="../NSMR/0/NSMR" postCellId="../I1L/1/I1L" preSegmentId="5" postSegmentId="1" preFractionAlong="0.45200828798708115" postFractionAlong="0.5190917303397282"/>
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    </projection>
    <projection id="NCXLS_NSML_I1R" presynapticPopulation="NSML" postsynapticPopulation="I1R" synapse="Serotonin_Glutamate">
      <connection id="124" preCellId="../NSML/1/NSML" postCellId="../I1R/0/I1R" preSegmentId="2" postSegmentId="1" preFractionAlong="0.7866130612179019" postFractionAlong="0.36450096454879244"/>
    </projection>
    <projection id="NCXLS_NSML_I2L" presynapticPopulation="NSML" postsynapticPopulation="I2L" synapse="Serotonin_Glutamate">
      <connection id="125" preCellId="../NSML/1/NSML" postCellId="../I2L/0/I2L" preSegmentId="5" postSegmentId="3" preFractionAlong="0.5938543647058008" postFractionAlong="0.3994003017782948"/>
    </projection>
    <projection id="NCXLS_NSML_I2R" presynapticPopulation="NSML" postsynapticPopulation="I2R" synapse="Serotonin_Glutamate">
      <connection id="126" preCellId="../NSML/1/NSML" postCellId="../I2R/0/I2R" preSegmentId="3" postSegmentId="1" preFractionAlong="0.7298740126426408" postFractionAlong="0.7492753368241044"/>
    </projection>
    <electricalProjection id="NCXLS_NSML_NSML_GJ" presynapticPopulation="NSML" postsynapticPopulation="NSML">
      <electricalConnection id="127" preCell="1" postCell="2" synapse="Generic_GJ" preSegment="1" postSegment="8" preFractionAlong="0.4683243073685551" postFractionAlong="0.8618281308246027"/>
      <electricalConnection id="142" preCell="2" postCell="0" synapse="Generic_GJ" preSegment="5" postSegment="8" preFractionAlong="0.42311343099578624" postFractionAlong="0.13721723161006594"/>
    </electricalProjection>
    <projection id="NCXLS_I1L_M3L" presynapticPopulation="I1L" postsynapticPopulation="M3L" synapse="Acetylcholine">
      <connection id="128" preCellId="../I1L/3/I1L" postCellId="../M3L/2/M3L" preSegmentId="1" postSegmentId="5" preFractionAlong="0.6834527434210503" postFractionAlong="0.5879337330342645"/>
      <connection id="134" preCellId="../I1L/4/I1L" postCellId="../M3L/0/M3L" preSegmentId="1" postSegmentId="8" preFractionAlong="0.6070286543845467" postFractionAlong="0.022686842182447542"/>
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    </projection>
    <projection id="NCXLS_NSMR_M2L" presynapticPopulation="NSMR" postsynapticPopulation="M2L" synapse="Serotonin_Glutamate">
      <connection id="129" preCellId="../NSMR/1/NSMR" postCellId="../M2L/0/M2L" preSegmentId="7" postSegmentId="1" preFractionAlong="0.2845608397616026" postFractionAlong="0.5754752778863649"/>
    </projection>
    <projection id="NCXLS_I1L_M2L" presynapticPopulation="I1L" postsynapticPopulation="M2L" synapse="Acetylcholine">
      <connection id="133" preCellId="../I1L/4/I1L" postCellId="../M2L/0/M2L" preSegmentId="5" postSegmentId="2" preFractionAlong="0.3843390279585277" postFractionAlong="0.7383916369360575"/>
    </projection>
    <electricalProjection id="NCXLS_I1L_I1L_GJ" presynapticPopulation="I1L" postsynapticPopulation="I1L">
      <electricalConnection id="136" preCell="4" postCell="0" synapse="Generic_GJ" preSegment="8" postSegment="1" preFractionAlong="0.20026615471799614" postFractionAlong="0.5792211895711068"/>
      <electricalConnection id="141" preCell="4" postCell="3" synapse="Generic_GJ" preSegment="8" postSegment="4" preFractionAlong="0.5373838424393681" postFractionAlong="0.16012824018464022"/>
    </electricalProjection>
    <projection id="NCXLS_I1L_I1L" presynapticPopulation="I1L" postsynapticPopulation="I1L" synapse="Acetylcholine">
      <connection id="138" preCellId="../I1L/4/I1L" postCellId="../I1L/1/I1L" preSegmentId="4" postSegmentId="7" preFractionAlong="0.07534411757315074" postFractionAlong="0.9466387272149526"/>
      <connection id="140" preCellId="../I1L/4/I1L" postCellId="../I1L/2/I1L" preSegmentId="4" postSegmentId="4" preFractionAlong="0.7907481185774762" postFractionAlong="0.07547791442402896"/>
    </projection>
    <electricalProjection id="NCXLS_NSML_M2L_GJ" presynapticPopulation="NSML" postsynapticPopulation="M2L">
      <electricalConnection id="143" preCell="2" postCell="0" synapse="Generic_GJ" preSegment="5" postSegment="6" preFractionAlong="0.07691063873533466" postFractionAlong="0.20509375372360994"/>
    </electricalProjection>
    <projection id="NCXLS_NSML_M3L" presynapticPopulation="NSML" postsynapticPopulation="M3L" synapse="Serotonin_Glutamate">
      <connection id="144" preCellId="../NSML/2/NSML" postCellId="../M3L/0/M3L" preSegmentId="8" postSegmentId="8" preFractionAlong="0.8089273072177914" postFractionAlong="0.45253364402930063"/>
    </projection>
    <electricalProjection id="NCXLS_NSML_M2R_GJ" presynapticPopulation="NSML" postsynapticPopulation="M2R">
      <electricalConnection id="145" preCell="2" postCell="0" synapse="Generic_GJ" preSegment="4" postSegment="6" preFractionAlong="0.0326550345942026" postFractionAlong="0.06931626137131686"/>
    </electricalProjection>
    <projection id="NCXLS_NSML_NSMR" presynapticPopulation="NSML" postsynapticPopulation="NSMR" synapse="Serotonin_Glutamate">
      <connection id="149" preCellId="../NSML/2/NSML" postCellId="../NSMR/1/NSMR" preSegmentId="5" postSegmentId="4" preFractionAlong="0.7386620535618252" postFractionAlong="0.9072895614525719"/>
    </projection>
  </network>
</neuroml>
