<?xml version='1.0' encoding='UTF-8'?>
<neuroml xmlns="http://www.neuroml.org/schema/neuroml2" xmlns:xsi="http://www.w3.org/2001/XMLSchema-instance" xsi:schemaLocation="http://www.neuroml.org/schema/neuroml2 https://raw.githubusercontent.com/NeuroML/NeuroML2/development/Schemas/NeuroML2/NeuroML_v2beta4.xsd" id="gvft_network_bio_prior_lamW_0.500_DF_0.033_t80.net">
  <notes>NeuroML2 network generated from GVFT simulation on 2025-05-04 11:18:30
</notes>
  <include href="I1L.cell.nml"/>
  <include href="I1R.cell.nml"/>
  <include href="M1.cell.nml"/>
  <include href="M2L.cell.nml"/>
  <include href="M2R.cell.nml"/>
  <include href="M3L.cell.nml"/>
  <include href="M3R.cell.nml"/>
  <include href="M4.cell.nml"/>
  <include href="M5.cell.nml"/>
  <include href="NSML.cell.nml"/>
  <include href="NSMR.cell.nml"/>
  <include href="Acetylcholine.synapse.nml"/>
  <include href="Generic_GJ.nml"/>
  <include href="Glutamate.synapse.nml"/>
  <include href="Serotonin_Glutamate.synapse.nml"/>
  <network id="gvft_network_bio_prior_lamW_0.500_DF_0.033_t80.net" type="networkWithTemperature" temperature="20.0 degC">
    <population id="I1L" component="I1L" type="populationList" size="3">
      <instance id="0">
        <location x="0.31658291816711426" y="-0.929648220539093" z="0.0"/>
      </instance>
      <instance id="1">
        <location x="0.7386934757232666" y="-0.9396985173225403" z="0.0"/>
      </instance>
      <instance id="2">
        <location x="-0.8693467378616333" y="-0.5376884341239929" z="0.0"/>
      </instance>
    </population>
    <population id="I1R" component="I1R" type="populationList" size="5">
      <instance id="0">
        <location x="-0.5175879597663879" y="0.5376884341239929" z="0.0"/>
      </instance>
      <instance id="1">
        <location x="-0.979899525642395" y="0.6884422302246094" z="0.0"/>
      </instance>
      <instance id="2">
        <location x="0.4170854389667511" y="0.19597990810871124" z="0.0"/>
      </instance>
      <instance id="3">
        <location x="-0.8592965006828308" y="0.7487437129020691" z="0.0"/>
      </instance>
      <instance id="4">
        <location x="0.3467336893081665" y="0.8090452551841736" z="0.0"/>
      </instance>
    </population>
    <population id="M1" component="M1" type="populationList" size="1">
      <instance id="0">
        <location x="-0.31658291816711426" y="0.6783919334411621" z="0.0"/>
      </instance>
    </population>
    <population id="M2L" component="M2L" type="populationList" size="1">
      <instance id="0">
        <location x="0.9195979833602905" y="-0.6482412219047546" z="0.0"/>
      </instance>
    </population>
    <population id="M2R" component="M2R" type="populationList" size="1">
      <instance id="0">
        <location x="-0.12562814354896545" y="-0.2763819098472595" z="0.0"/>
      </instance>
    </population>
    <population id="M3L" component="M3L" type="populationList" size="1">
      <instance id="0">
        <location x="-1.0" y="-0.2763819098472595" z="0.0"/>
      </instance>
    </population>
    <population id="M3R" component="M3R" type="populationList" size="1">
      <instance id="0">
        <location x="-0.19597990810871124" y="-0.8190954923629761" z="0.0"/>
      </instance>
    </population>
    <population id="M4" component="M4" type="populationList" size="1">
      <instance id="0">
        <location x="0.19597990810871124" y="0.2964824140071869" z="0.0"/>
      </instance>
    </population>
    <population id="M5" component="M5" type="populationList" size="1">
      <instance id="0">
        <location x="-0.37688443064689636" y="-0.24623116850852966" z="0.0"/>
      </instance>
    </population>
    <population id="NSML" component="NSML" type="populationList" size="3">
      <instance id="0">
        <location x="0.13567839562892914" y="-0.5477386713027954" z="0.0"/>
      </instance>
      <instance id="1">
        <location x="0.23618091642856598" y="0.43718594312667847" z="0.0"/>
      </instance>
      <instance id="2">
        <location x="-0.839195966720581" y="0.4271356761455536" z="0.0"/>
      </instance>
    </population>
    <population id="NSMR" component="NSMR" type="populationList" size="2">
      <instance id="0">
        <location x="-0.7085427045822144" y="-0.9698492288589478" z="0.0"/>
      </instance>
      <instance id="1">
        <location x="-0.9195979833602905" y="0.356783926486969" z="0.0"/>
      </instance>
    </population>
    <projection id="NCXLS_M1_I1L" presynapticPopulation="M1" postsynapticPopulation="I1L" synapse="Acetylcholine">
      <connection id="0" preCellId="../M1/0/M1" postCellId="../I1L/0/I1L" preSegmentId="1" postSegmentId="7" preFractionAlong="0.3550947663631898" postFractionAlong="0.4956613440350883"/>
      <connection id="6" preCellId="../M1/0/M1" postCellId="../I1L/1/I1L" preSegmentId="2" postSegmentId="8" preFractionAlong="0.02903990220921937" postFractionAlong="0.617740500624998"/>
      <connection id="9" preCellId="../M1/0/M1" postCellId="../I1L/2/I1L" preSegmentId="7" postSegmentId="2" preFractionAlong="0.5229873081917097" postFractionAlong="0.04322315141777899"/>
    </projection>
    <projection id="NCXLS_M1_I1R" presynapticPopulation="M1" postsynapticPopulation="I1R" synapse="Acetylcholine">
      <connection id="1" preCellId="../M1/0/M1" postCellId="../I1R/0/I1R" preSegmentId="7" postSegmentId="4" preFractionAlong="0.7758614386586519" postFractionAlong="0.08398950138915895"/>
      <connection id="4" preCellId="../M1/0/M1" postCellId="../I1R/2/I1R" preSegmentId="1" postSegmentId="2" preFractionAlong="0.01686287008210441" postFractionAlong="0.15161063793047602"/>
    </projection>
    <electricalProjection id="NCXLS_M1_M3L_GJ" presynapticPopulation="M1" postsynapticPopulation="M3L">
      <electricalConnection id="2" preCell="0" postCell="0" synapse="Generic_GJ" preSegment="6" postSegment="3" preFractionAlong="0.4717671511498236" postFractionAlong="0.7438621448859984"/>
    </electricalProjection>
    <electricalProjection id="NCXLS_M1_M2L_GJ" presynapticPopulation="M1" postsynapticPopulation="M2L">
      <electricalConnection id="3" preCell="0" postCell="0" synapse="Generic_GJ" preSegment="3" postSegment="8" preFractionAlong="0.6707195257070481" postFractionAlong="0.23632601760945793"/>
    </electricalProjection>
    <electricalProjection id="NCXLS_M1_M3R_GJ" presynapticPopulation="M1" postsynapticPopulation="M3R">
      <electricalConnection id="5" preCell="0" postCell="0" synapse="Generic_GJ" preSegment="8" postSegment="5" preFractionAlong="0.23974417293825845" postFractionAlong="0.10001809002432227"/>
    </electricalProjection>
    <electricalProjection id="NCXLS_M1_M4_GJ" presynapticPopulation="M1" postsynapticPopulation="M4">
      <electricalConnection id="7" preCell="0" postCell="0" synapse="Generic_GJ" preSegment="1" postSegment="1" preFractionAlong="0.9451614571778969" postFractionAlong="0.9330940731098543"/>
    </electricalProjection>
    <electricalProjection id="NCXLS_M1_NSML_GJ" presynapticPopulation="M1" postsynapticPopulation="NSML">
      <electricalConnection id="8" preCell="0" postCell="1" synapse="Generic_GJ" preSegment="7" postSegment="5" preFractionAlong="0.6144212982230295" postFractionAlong="0.028005319472458434"/>
      <electricalConnection id="13" preCell="0" postCell="0" synapse="Generic_GJ" preSegment="8" postSegment="4" preFractionAlong="0.13523982798472256" postFractionAlong="0.5953733665488935"/>
    </electricalProjection>
    <projection id="NCXLS_M1_NSMR" presynapticPopulation="M1" postsynapticPopulation="NSMR" synapse="Acetylcholine">
      <connection id="10" preCellId="../M1/0/M1" postCellId="../NSMR/1/NSMR" preSegmentId="8" postSegmentId="2" preFractionAlong="0.0768494618612342" postFractionAlong="0.3929444393733599"/>
    </projection>
    <projection id="NCXLS_M1_NSML" presynapticPopulation="M1" postsynapticPopulation="NSML" synapse="Acetylcholine">
      <connection id="11" preCellId="../M1/0/M1" postCellId="../NSML/2/NSML" preSegmentId="7" postSegmentId="1" preFractionAlong="0.4698899080414396" postFractionAlong="0.38372217471945447"/>
    </projection>
    <projection id="NCXLS_M1_M5" presynapticPopulation="M1" postsynapticPopulation="M5" synapse="Acetylcholine">
      <connection id="12" preCellId="../M1/0/M1" postCellId="../M5/0/M5" preSegmentId="8" postSegmentId="6" preFractionAlong="0.24493904569365632" postFractionAlong="0.10014328773835113"/>
    </projection>
    <electricalProjection id="NCXLS_M1_NSMR_GJ" presynapticPopulation="M1" postsynapticPopulation="NSMR">
      <electricalConnection id="14" preCell="0" postCell="0" synapse="Generic_GJ" preSegment="8" postSegment="2" preFractionAlong="0.2259783846551835" postFractionAlong="0.6394684394921037"/>
    </electricalProjection>
    <electricalProjection id="NCXLS_M1_M2R_GJ" presynapticPopulation="M1" postsynapticPopulation="M2R">
      <electricalConnection id="15" preCell="0" postCell="0" synapse="Generic_GJ" preSegment="6" postSegment="2" preFractionAlong="0.40014546728455913" postFractionAlong="0.5928520048922216"/>
    </electricalProjection>
    <electricalProjection id="NCXLS_M3L_M1_GJ" presynapticPopulation="M3L" postsynapticPopulation="M1">
      <electricalConnection id="16" preCell="0" postCell="0" synapse="Generic_GJ" preSegment="7" postSegment="3" preFractionAlong="0.3034842085515608" postFractionAlong="0.5590612877652517"/>
    </electricalProjection>
    <projection id="NCXLS_M3L_I1R" presynapticPopulation="M3L" postsynapticPopulation="I1R" synapse="Acetylcholine">
      <connection id="17" preCellId="../M3L/0/M3L" postCellId="../I1R/0/I1R" preSegmentId="8" postSegmentId="7" preFractionAlong="0.026693158586854282" postFractionAlong="0.46587172890767536"/>
      <connection id="18" preCellId="../M3L/0/M3L" postCellId="../I1R/1/I1R" preSegmentId="7" postSegmentId="5" preFractionAlong="0.18640541406811106" postFractionAlong="0.5605087340779731"/>
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    </projection>
    <electricalProjection id="NCXLS_M3L_M4_GJ" presynapticPopulation="M3L" postsynapticPopulation="M4">
      <electricalConnection id="20" preCell="0" postCell="0" synapse="Generic_GJ" preSegment="4" postSegment="7" preFractionAlong="0.5830064830045513" postFractionAlong="0.1470699045503434"/>
    </electricalProjection>
    <electricalProjection id="NCXLS_M3L_NSML_GJ" presynapticPopulation="M3L" postsynapticPopulation="NSML">
      <electricalConnection id="21" preCell="0" postCell="1" synapse="Generic_GJ" preSegment="6" postSegment="6" preFractionAlong="0.7442352584372388" postFractionAlong="0.9033410137067946"/>
      <electricalConnection id="25" preCell="0" postCell="2" synapse="Generic_GJ" preSegment="4" postSegment="2" preFractionAlong="0.6095203113099242" postFractionAlong="0.19129317420210723"/>
    </electricalProjection>
    <projection id="NCXLS_M3L_NSMR" presynapticPopulation="M3L" postsynapticPopulation="NSMR" synapse="Acetylcholine">
      <connection id="24" preCellId="../M3L/0/M3L" postCellId="../NSMR/1/NSMR" preSegmentId="6" postSegmentId="5" preFractionAlong="0.5690465748936742" postFractionAlong="0.03567441636053237"/>
    </projection>
    <projection id="NCXLS_M2L_I1L" presynapticPopulation="M2L" postsynapticPopulation="I1L" synapse="Acetylcholine">
      <connection id="26" preCellId="../M2L/0/M2L" postCellId="../I1L/0/I1L" preSegmentId="1" postSegmentId="4" preFractionAlong="0.640347346297737" postFractionAlong="0.46830094759995833"/>
      <connection id="33" preCellId="../M2L/0/M2L" postCellId="../I1L/1/I1L" preSegmentId="5" postSegmentId="4" preFractionAlong="0.7616813559803183" postFractionAlong="0.9383650151902594"/>
      <connection id="36" preCellId="../M2L/0/M2L" postCellId="../I1L/2/I1L" preSegmentId="7" postSegmentId="6" preFractionAlong="0.24746772950133744" postFractionAlong="0.600472863250274"/>
    </projection>
    <projection id="NCXLS_M2L_M1" presynapticPopulation="M2L" postsynapticPopulation="M1" synapse="Acetylcholine">
      <connection id="27" preCellId="../M2L/0/M2L" postCellId="../M1/0/M1" preSegmentId="7" postSegmentId="1" preFractionAlong="0.34238176600918835" postFractionAlong="0.26665965838820116"/>
    </projection>
    <projection id="NCXLS_M2L_I1R" presynapticPopulation="M2L" postsynapticPopulation="I1R" synapse="Acetylcholine">
      <connection id="28" preCellId="../M2L/0/M2L" postCellId="../I1R/0/I1R" preSegmentId="8" postSegmentId="6" preFractionAlong="0.9111357701300834" postFractionAlong="0.028992744998979858"/>
      <connection id="29" preCellId="../M2L/0/M2L" postCellId="../I1R/1/I1R" preSegmentId="2" postSegmentId="7" preFractionAlong="0.11033477382520296" postFractionAlong="0.02748519482937095"/>
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    </projection>
    <electricalProjection id="NCXLS_M2L_M3L_GJ" presynapticPopulation="M2L" postsynapticPopulation="M3L">
      <electricalConnection id="30" preCell="0" postCell="0" synapse="Generic_GJ" preSegment="8" postSegment="3" preFractionAlong="0.2693458790611043" postFractionAlong="0.8193187623469647"/>
    </electricalProjection>
    <projection id="NCXLS_M2L_M3R" presynapticPopulation="M2L" postsynapticPopulation="M3R" synapse="Acetylcholine">
      <connection id="32" preCellId="../M2L/0/M2L" postCellId="../M3R/0/M3R" preSegmentId="1" postSegmentId="8" preFractionAlong="0.6989276609452169" postFractionAlong="0.9994590671864021"/>
    </projection>
    <projection id="NCXLS_M2L_M4" presynapticPopulation="M2L" postsynapticPopulation="M4" synapse="Glutamate">
      <connection id="34" preCellId="../M2L/0/M2L" postCellId="../M4/0/M4" preSegmentId="7" postSegmentId="5" preFractionAlong="0.7047842934477269" postFractionAlong="0.850805957967449"/>
    </projection>
    <electricalProjection id="NCXLS_M2L_NSML_GJ" presynapticPopulation="M2L" postsynapticPopulation="NSML">
      <electricalConnection id="35" preCell="0" postCell="1" synapse="Generic_GJ" preSegment="1" postSegment="5" preFractionAlong="0.21096928971169937" postFractionAlong="0.5039290077242442"/>
      <electricalConnection id="40" preCell="0" postCell="2" synapse="Generic_GJ" preSegment="4" postSegment="3" preFractionAlong="0.581943641505783" postFractionAlong="0.7861154478031324"/>
      <electricalConnection id="42" preCell="0" postCell="0" synapse="Generic_GJ" preSegment="7" postSegment="8" preFractionAlong="0.9514994392273525" postFractionAlong="0.714317970610373"/>
    </electricalProjection>
    <electricalProjection id="NCXLS_M2L_NSMR_GJ" presynapticPopulation="M2L" postsynapticPopulation="NSMR">
      <electricalConnection id="39" preCell="0" postCell="1" synapse="Generic_GJ" preSegment="2" postSegment="3" preFractionAlong="0.1589650940226306" postFractionAlong="0.04734997732683943"/>
      <electricalConnection id="43" preCell="0" postCell="0" synapse="Generic_GJ" preSegment="8" postSegment="3" preFractionAlong="0.2895427477937049" postFractionAlong="0.523698386271309"/>
    </electricalProjection>
    <electricalProjection id="NCXLS_M2L_M5_GJ" presynapticPopulation="M2L" postsynapticPopulation="M5">
      <electricalConnection id="41" preCell="0" postCell="0" synapse="Generic_GJ" preSegment="1" postSegment="7" preFractionAlong="0.10855535777264846" postFractionAlong="0.7492903605492502"/>
    </electricalProjection>
    <electricalProjection id="NCXLS_M2L_M2R_GJ" presynapticPopulation="M2L" postsynapticPopulation="M2R">
      <electricalConnection id="44" preCell="0" postCell="0" synapse="Generic_GJ" preSegment="4" postSegment="8" preFractionAlong="0.11767651264529899" postFractionAlong="0.1758578813161925"/>
    </electricalProjection>
    <projection id="NCXLS_M3R_M1" presynapticPopulation="M3R" postsynapticPopulation="M1" synapse="Glutamate">
      <connection id="45" preCellId="../M3R/0/M3R" postCellId="../M1/0/M1" preSegmentId="3" postSegmentId="7" preFractionAlong="0.5138573592691225" postFractionAlong="0.010567122774442939"/>
    </projection>
    <projection id="NCXLS_M3R_I1R" presynapticPopulation="M3R" postsynapticPopulation="I1R" synapse="Acetylcholine">
      <connection id="46" preCellId="../M3R/0/M3R" postCellId="../I1R/0/I1R" preSegmentId="2" postSegmentId="8" preFractionAlong="0.4236901786604971" postFractionAlong="0.5108523649637979"/>
      <connection id="47" preCellId="../M3R/0/M3R" postCellId="../I1R/1/I1R" preSegmentId="7" postSegmentId="1" preFractionAlong="0.5517822283941036" postFractionAlong="0.9791532397514886"/>
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    </projection>
    <projection id="NCXLS_M3R_M3L" presynapticPopulation="M3R" postsynapticPopulation="M3L" synapse="Glutamate">
      <connection id="48" preCellId="../M3R/0/M3R" postCellId="../M3L/0/M3L" preSegmentId="6" postSegmentId="4" preFractionAlong="0.28391739966443064" postFractionAlong="0.24299759286082978"/>
    </projection>
    <electricalProjection id="NCXLS_M3R_M4_GJ" presynapticPopulation="M3R" postsynapticPopulation="M4">
      <electricalConnection id="50" preCell="0" postCell="0" synapse="Generic_GJ" preSegment="8" postSegment="5" preFractionAlong="0.20221508745897332" postFractionAlong="0.5429499379481127"/>
    </electricalProjection>
    <projection id="NCXLS_M3R_NSML" presynapticPopulation="M3R" postsynapticPopulation="NSML" synapse="Acetylcholine">
      <connection id="51" preCellId="../M3R/0/M3R" postCellId="../NSML/1/NSML" preSegmentId="8" postSegmentId="6" preFractionAlong="0.5218274743638449" postFractionAlong="0.43407639419691957"/>
      <connection id="56" preCellId="../M3R/0/M3R" postCellId="../NSML/2/NSML" preSegmentId="8" postSegmentId="8" preFractionAlong="0.8607020325421499" postFractionAlong="0.0976099982297075"/>
    </projection>
    <projection id="NCXLS_M3R_I1L" presynapticPopulation="M3R" postsynapticPopulation="I1L" synapse="Acetylcholine">
      <connection id="52" preCellId="../M3R/0/M3R" postCellId="../I1L/2/I1L" preSegmentId="7" postSegmentId="5" preFractionAlong="0.48821935919923853" postFractionAlong="0.4012148277113289"/>
    </projection>
    <projection id="NCXLS_M3R_NSMR" presynapticPopulation="M3R" postsynapticPopulation="NSMR" synapse="Acetylcholine">
      <connection id="55" preCellId="../M3R/0/M3R" postCellId="../NSMR/1/NSMR" preSegmentId="3" postSegmentId="1" preFractionAlong="0.05815112056640115" postFractionAlong="0.5265156165216303"/>
    </projection>
    <electricalProjection id="NCXLS_M3R_M5_GJ" presynapticPopulation="M3R" postsynapticPopulation="M5">
      <electricalConnection id="57" preCell="0" postCell="0" synapse="Generic_GJ" preSegment="4" postSegment="2" preFractionAlong="0.4065383138870131" postFractionAlong="0.8658414754199422"/>
    </electricalProjection>
    <electricalProjection id="NCXLS_M3R_NSMR_GJ" presynapticPopulation="M3R" postsynapticPopulation="NSMR">
      <electricalConnection id="58" preCell="0" postCell="0" synapse="Generic_GJ" preSegment="6" postSegment="1" preFractionAlong="0.9927246195936279" postFractionAlong="0.9591934864585215"/>
    </electricalProjection>
    <projection id="NCXLS_M3R_M2R" presynapticPopulation="M3R" postsynapticPopulation="M2R" synapse="Glutamate">
      <connection id="59" preCellId="../M3R/0/M3R" postCellId="../M2R/0/M2R" preSegmentId="8" postSegmentId="4" preFractionAlong="0.04770834145387204" postFractionAlong="0.14760681915758866"/>
    </projection>
    <projection id="NCXLS_M4_M1" presynapticPopulation="M4" postsynapticPopulation="M1" synapse="Glutamate">
      <connection id="60" preCellId="../M4/0/M4" postCellId="../M1/0/M1" preSegmentId="6" postSegmentId="8" preFractionAlong="0.8299180309869587" postFractionAlong="0.8926561953354805"/>
    </projection>
    <projection id="NCXLS_M4_I1R" presynapticPopulation="M4" postsynapticPopulation="I1R" synapse="Acetylcholine">
      <connection id="61" preCellId="../M4/0/M4" postCellId="../I1R/0/I1R" preSegmentId="3" postSegmentId="3" preFractionAlong="0.6196641516197087" postFractionAlong="0.9173619850652766"/>
      <connection id="62" preCellId="../M4/0/M4" postCellId="../I1R/1/I1R" preSegmentId="3" postSegmentId="8" preFractionAlong="0.10354357195278396" postFractionAlong="0.45781365008462493"/>
      <connection id="66" preCellId="../M4/0/M4" postCellId="../I1R/3/I1R" preSegmentId="7" postSegmentId="5" preFractionAlong="0.8080147490627835" postFractionAlong="0.26083108002500877"/>
    </projection>
    <projection id="NCXLS_M4_M3L" presynapticPopulation="M4" postsynapticPopulation="M3L" synapse="Glutamate">
      <connection id="63" preCellId="../M4/0/M4" postCellId="../M3L/0/M3L" preSegmentId="2" postSegmentId="5" preFractionAlong="0.577657996066007" postFractionAlong="0.43865868440710365"/>
    </projection>
    <electricalProjection id="NCXLS_M4_M3R_GJ" presynapticPopulation="M4" postsynapticPopulation="M3R">
      <electricalConnection id="64" preCell="0" postCell="0" synapse="Generic_GJ" preSegment="5" postSegment="5" preFractionAlong="0.9939977334136711" postFractionAlong="0.5435402377305709"/>
    </electricalProjection>
    <projection id="NCXLS_M4_I1L" presynapticPopulation="M4" postsynapticPopulation="I1L" synapse="Acetylcholine">
      <connection id="65" preCellId="../M4/0/M4" postCellId="../I1L/2/I1L" preSegmentId="3" postSegmentId="1" preFractionAlong="0.954617371504054" postFractionAlong="0.1558603675870771"/>
    </projection>
    <electricalProjection id="NCXLS_M4_NSMR_GJ" presynapticPopulation="M4" postsynapticPopulation="NSMR">
      <electricalConnection id="67" preCell="0" postCell="1" synapse="Generic_GJ" preSegment="1" postSegment="3" preFractionAlong="0.27153348290850254" postFractionAlong="0.033187630225001485"/>
      <electricalConnection id="71" preCell="0" postCell="0" synapse="Generic_GJ" preSegment="7" postSegment="5" preFractionAlong="0.8322628859701487" postFractionAlong="0.5738240691889402"/>
    </electricalProjection>
    <electricalProjection id="NCXLS_M4_NSML_GJ" presynapticPopulation="M4" postsynapticPopulation="NSML">
      <electricalConnection id="68" preCell="0" postCell="2" synapse="Generic_GJ" preSegment="6" postSegment="5" preFractionAlong="0.19668643412686138" postFractionAlong="0.7578462929324711"/>
      <electricalConnection id="70" preCell="0" postCell="0" synapse="Generic_GJ" preSegment="3" postSegment="2" preFractionAlong="0.8001582366647964" postFractionAlong="0.6417370448140233"/>
    </electricalProjection>
    <electricalProjection id="NCXLS_M4_M5_GJ" presynapticPopulation="M4" postsynapticPopulation="M5">
      <electricalConnection id="69" preCell="0" postCell="0" synapse="Generic_GJ" preSegment="5" postSegment="6" preFractionAlong="0.9236026679779178" postFractionAlong="0.7829883572657359"/>
    </electricalProjection>
    <projection id="NCXLS_M4_M2R" presynapticPopulation="M4" postsynapticPopulation="M2R" synapse="Acetylcholine">
      <connection id="72" preCellId="../M4/0/M4" postCellId="../M2R/0/M2R" preSegmentId="2" postSegmentId="8" preFractionAlong="0.636641035358728" postFractionAlong="0.2979574289583591"/>
    </projection>
    <projection id="NCXLS_NSML_M1" presynapticPopulation="NSML" postsynapticPopulation="M1" synapse="Serotonin_Glutamate">
      <connection id="73" preCellId="../NSML/1/NSML" postCellId="../M1/0/M1" preSegmentId="6" postSegmentId="6" preFractionAlong="0.6165878380712464" postFractionAlong="0.23384836908547768"/>
    </projection>
    <projection id="NCXLS_NSML_I1R" presynapticPopulation="NSML" postsynapticPopulation="I1R" synapse="Serotonin_Glutamate">
      <connection id="74" preCellId="../NSML/1/NSML" postCellId="../I1R/1/I1R" preSegmentId="3" postSegmentId="6" preFractionAlong="0.000554184585253914" postFractionAlong="0.6083194014000671"/>
      <connection id="75" preCellId="../NSML/1/NSML" postCellId="../I1R/3/I1R" preSegmentId="7" postSegmentId="3" preFractionAlong="0.752310970673456" postFractionAlong="0.37517639831310245"/>
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    </projection>
    <projection id="NCXLS_NSMR_I1R" presynapticPopulation="NSMR" postsynapticPopulation="I1R" synapse="Serotonin_Glutamate">
      <connection id="77" preCellId="../NSMR/1/NSMR" postCellId="../I1R/1/I1R" preSegmentId="7" postSegmentId="1" preFractionAlong="0.9637676499423089" postFractionAlong="0.9361469865985301"/>
      <connection id="78" preCellId="../NSMR/1/NSMR" postCellId="../I1R/3/I1R" preSegmentId="7" postSegmentId="5" preFractionAlong="0.9203002705727481" postFractionAlong="0.449139688459391"/>
    </projection>
    <projection id="NCXLS_NSMR_NSML" presynapticPopulation="NSMR" postsynapticPopulation="NSML" synapse="Serotonin_Glutamate">
      <connection id="79" preCellId="../NSMR/1/NSMR" postCellId="../NSML/2/NSML" preSegmentId="2" postSegmentId="6" preFractionAlong="0.7420925925582444" postFractionAlong="0.6961459249385411"/>
      <connection id="104" preCellId="../NSMR/0/NSMR" postCellId="../NSML/0/NSML" preSegmentId="6" postSegmentId="7" preFractionAlong="0.8871419986941438" postFractionAlong="0.04924440140828912"/>
    </projection>
    <electricalProjection id="NCXLS_NSML_M1_GJ" presynapticPopulation="NSML" postsynapticPopulation="M1">
      <electricalConnection id="80" preCell="2" postCell="0" synapse="Generic_GJ" preSegment="6" postSegment="8" preFractionAlong="0.7163310272566953" postFractionAlong="0.9978847082284605"/>
    </electricalProjection>
    <projection id="NCXLS_M5_M1" presynapticPopulation="M5" postsynapticPopulation="M1" synapse="Acetylcholine">
      <connection id="85" preCellId="../M5/0/M5" postCellId="../M1/0/M1" preSegmentId="1" postSegmentId="1" preFractionAlong="0.38185762522183253" postFractionAlong="0.6538383898166262"/>
    </projection>
    <projection id="NCXLS_M5_I1R" presynapticPopulation="M5" postsynapticPopulation="I1R" synapse="Acetylcholine">
      <connection id="86" preCellId="../M5/0/M5" postCellId="../I1R/0/I1R" preSegmentId="5" postSegmentId="4" preFractionAlong="0.6036019202212376" postFractionAlong="0.931224759178898"/>
      <connection id="87" preCellId="../M5/0/M5" postCellId="../I1R/1/I1R" preSegmentId="8" postSegmentId="2" preFractionAlong="0.06767353665798337" postFractionAlong="0.9933898787390681"/>
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    </projection>
    <electricalProjection id="NCXLS_M5_M4_GJ" presynapticPopulation="M5" postsynapticPopulation="M4">
      <electricalConnection id="89" preCell="0" postCell="0" synapse="Generic_GJ" preSegment="1" postSegment="4" preFractionAlong="0.8381759206857385" postFractionAlong="0.02163932494516374"/>
    </electricalProjection>
    <projection id="NCXLS_M5_NSML" presynapticPopulation="M5" postsynapticPopulation="NSML" synapse="Acetylcholine">
      <connection id="90" preCellId="../M5/0/M5" postCellId="../NSML/1/NSML" preSegmentId="1" postSegmentId="6" preFractionAlong="0.7573055953348754" postFractionAlong="0.5861105358981351"/>
      <connection id="94" preCellId="../M5/0/M5" postCellId="../NSML/2/NSML" preSegmentId="7" postSegmentId="7" preFractionAlong="0.057642695597393434" postFractionAlong="0.9372620447778404"/>
    </projection>
    <electricalProjection id="NCXLS_M5_NSMR_GJ" presynapticPopulation="M5" postsynapticPopulation="NSMR">
      <electricalConnection id="93" preCell="0" postCell="1" synapse="Generic_GJ" preSegment="7" postSegment="6" preFractionAlong="0.1686282108850954" postFractionAlong="0.9762312567009744"/>
    </electricalProjection>
    <projection id="NCXLS_NSML_I1L" presynapticPopulation="NSML" postsynapticPopulation="I1L" synapse="Serotonin_Glutamate">
      <connection id="95" preCellId="../NSML/0/NSML" postCellId="../I1L/0/I1L" preSegmentId="1" postSegmentId="7" preFractionAlong="0.6991931979813764" postFractionAlong="0.5251757899342241"/>
      <connection id="98" preCellId="../NSML/0/NSML" postCellId="../I1L/1/I1L" preSegmentId="6" postSegmentId="3" preFractionAlong="0.27266799026814403" postFractionAlong="0.0033788468084122725"/>
    </projection>
    <electricalProjection id="NCXLS_NSML_M2L_GJ" presynapticPopulation="NSML" postsynapticPopulation="M2L">
      <electricalConnection id="96" preCell="0" postCell="0" synapse="Generic_GJ" preSegment="6" postSegment="1" preFractionAlong="0.033133462193210894" postFractionAlong="0.26837836527714776"/>
    </electricalProjection>
    <electricalProjection id="NCXLS_NSML_M3R_GJ" presynapticPopulation="NSML" postsynapticPopulation="M3R">
      <electricalConnection id="97" preCell="0" postCell="0" synapse="Generic_GJ" preSegment="7" postSegment="5" preFractionAlong="0.07660361631371004" postFractionAlong="0.7059066693266582"/>
    </electricalProjection>
    <projection id="NCXLS_NSML_NSMR" presynapticPopulation="NSML" postsynapticPopulation="NSMR" synapse="Serotonin_Glutamate">
      <connection id="99" preCellId="../NSML/0/NSML" postCellId="../NSMR/0/NSMR" preSegmentId="6" postSegmentId="5" preFractionAlong="0.8338093088728618" postFractionAlong="0.39504053568149844"/>
    </projection>
    <projection id="NCXLS_NSMR_I1L" presynapticPopulation="NSMR" postsynapticPopulation="I1L" synapse="Serotonin_Glutamate">
      <connection id="100" preCellId="../NSMR/0/NSMR" postCellId="../I1L/0/I1L" preSegmentId="8" postSegmentId="2" preFractionAlong="0.22768662592959843" postFractionAlong="0.6221976462801331"/>
      <connection id="103" preCellId="../NSMR/0/NSMR" postCellId="../I1L/1/I1L" preSegmentId="1" postSegmentId="4" preFractionAlong="0.9270121129250806" postFractionAlong="0.3983776756594306"/>
    </projection>
    <electricalProjection id="NCXLS_NSMR_M2L_GJ" presynapticPopulation="NSMR" postsynapticPopulation="M2L">
      <electricalConnection id="101" preCell="0" postCell="0" synapse="Generic_GJ" preSegment="1" postSegment="2" preFractionAlong="0.48864389709875844" postFractionAlong="0.6442054818406923"/>
    </electricalProjection>
    <projection id="NCXLS_NSMR_M3R" presynapticPopulation="NSMR" postsynapticPopulation="M3R" synapse="Serotonin_Glutamate">
      <connection id="102" preCellId="../NSMR/0/NSMR" postCellId="../M3R/0/M3R" preSegmentId="4" postSegmentId="8" preFractionAlong="0.38133581712228426" postFractionAlong="0.7651902029810298"/>
    </projection>
    <projection id="NCXLS_M2R_I1L" presynapticPopulation="M2R" postsynapticPopulation="I1L" synapse="Acetylcholine">
      <connection id="105" preCellId="../M2R/0/M2R" postCellId="../I1L/0/I1L" preSegmentId="1" postSegmentId="7" preFractionAlong="0.08240443458404445" postFractionAlong="0.8431099565764026"/>
      <connection id="109" preCellId="../M2R/0/M2R" postCellId="../I1L/1/I1L" preSegmentId="7" postSegmentId="8" preFractionAlong="0.6561288043672019" postFractionAlong="0.8420387836055212"/>
      <connection id="110" preCellId="../M2R/0/M2R" postCellId="../I1L/2/I1L" preSegmentId="5" postSegmentId="2" preFractionAlong="0.8299579189553186" postFractionAlong="0.20050952355088747"/>
    </projection>
    <projection id="NCXLS_M2R_M3L" presynapticPopulation="M2R" postsynapticPopulation="M3L" synapse="Glutamate">
      <connection id="106" preCellId="../M2R/0/M2R" postCellId="../M3L/0/M3L" preSegmentId="6" postSegmentId="1" preFractionAlong="0.8616571554970481" postFractionAlong="0.4512677953712668"/>
    </projection>
    <electricalProjection id="NCXLS_M2R_M2L_GJ" presynapticPopulation="M2R" postsynapticPopulation="M2L">
      <electricalConnection id="107" preCell="0" postCell="0" synapse="Generic_GJ" preSegment="6" postSegment="3" preFractionAlong="0.40164517721204185" postFractionAlong="0.18680084104503558"/>
    </electricalProjection>
    <projection id="NCXLS_M2R_M3R" presynapticPopulation="M2R" postsynapticPopulation="M3R" synapse="Glutamate">
      <connection id="108" preCellId="../M2R/0/M2R" postCellId="../M3R/0/M3R" preSegmentId="2" postSegmentId="8" preFractionAlong="0.6793587899216466" postFractionAlong="0.48752757040499983"/>
    </projection>
    <electricalProjection id="NCXLS_M2R_NSML_GJ" presynapticPopulation="M2R" postsynapticPopulation="NSML">
      <electricalConnection id="111" preCell="0" postCell="0" synapse="Generic_GJ" preSegment="1" postSegment="1" preFractionAlong="0.3221934506479628" postFractionAlong="0.013404814251991026"/>
    </electricalProjection>
    <electricalProjection id="NCXLS_M2R_NSMR_GJ" presynapticPopulation="M2R" postsynapticPopulation="NSMR">
      <electricalConnection id="112" preCell="0" postCell="0" synapse="Generic_GJ" preSegment="8" postSegment="1" preFractionAlong="0.9418212689647267" postFractionAlong="0.6555581974173488"/>
    </electricalProjection>
  </network>
</neuroml>
