<?xml version='1.0' encoding='UTF-8'?>
<neuroml xmlns="http://www.neuroml.org/schema/neuroml2" xmlns:xsi="http://www.w3.org/2001/XMLSchema-instance" xsi:schemaLocation="http://www.neuroml.org/schema/neuroml2 https://raw.githubusercontent.com/NeuroML/NeuroML2/development/Schemas/NeuroML2/NeuroML_v2beta4.xsd" id="gvft_network_bio_prior_lamW_0.500_DF_0.037_t20.net">
  <notes>NeuroML2 network generated from GVFT simulation on 2025-05-04 12:21:48
</notes>
  <include href="AVAL.cell.nml"/>
  <include href="AVAR.cell.nml"/>
  <include href="AVKL.cell.nml"/>
  <include href="AVKR.cell.nml"/>
  <include href="RIS.cell.nml"/>
  <include href="RMDDL.cell.nml"/>
  <include href="RMDDR.cell.nml"/>
  <include href="RMDVL.cell.nml"/>
  <include href="RMDVR.cell.nml"/>
  <include href="SMBVL.cell.nml"/>
  <include href="SMBVR.cell.nml"/>
  <include href="URXL.cell.nml"/>
  <include href="URXR.cell.nml"/>
  <include href="I6.cell.nml"/>
  <include href="M3L.cell.nml"/>
  <include href="I5.cell.nml"/>
  <include href="M1.cell.nml"/>
  <include href="I1R.cell.nml"/>
  <include href="MCR.cell.nml"/>
  <include href="I2R.cell.nml"/>
  <include href="I4.cell.nml"/>
  <include href="NSMR.cell.nml"/>
  <include href="M4.cell.nml"/>
  <include href="I3.cell.nml"/>
  <include href="MI.cell.nml"/>
  <include href="I2L.cell.nml"/>
  <include href="M5.cell.nml"/>
  <include href="NSML.cell.nml"/>
  <include href="M2R.cell.nml"/>
  <include href="M3R.cell.nml"/>
  <include href="MCL.cell.nml"/>
  <include href="I1L.cell.nml"/>
  <include href="M2L.cell.nml"/>
  <include href="Acetylcholine.synapse.nml"/>
  <include href="Glutamate.synapse.nml"/>
  <include href="Generic_GJ.synapse.nml"/>
  <include href="Serotonin_Glutamate.synapse.nml"/>
  <network id="gvft_network_bio_prior_lamW_0.500_DF_0.037_t20.net" type="networkWithTemperature" temperature="20.0 degC">
    <population id="M1" component="M1" type="populationList" size="1">
      <instance id="0">
        <location x="-0.65829146" y="0.8894472" z="0.0"/>
      </instance>
    </population>
    <population id="M2L" component="M2L" type="populationList" size="1">
      <instance id="0">
        <location x="-0.638191" y="-0.38693467" z="0.0"/>
      </instance>
    </population>
    <population id="M2R" component="M2R" type="populationList" size="1">
      <instance id="0">
        <location x="-0.43718594" y="0.69849247" z="0.0"/>
      </instance>
    </population>
    <population id="M3L" component="M3L" type="populationList" size="1">
      <instance id="0">
        <location x="0.03517589" y="-0.42713568" z="0.0"/>
      </instance>
    </population>
    <population id="M3R" component="M3R" type="populationList" size="1">
      <instance id="0">
        <location x="-0.08542714" y="0.0753769" z="0.0"/>
      </instance>
    </population>
    <population id="M4" component="M4" type="populationList" size="1">
      <instance id="0">
        <location x="-0.8994975" y="-0.03517589" z="0.0"/>
      </instance>
    </population>
    <population id="M5" component="M5" type="populationList" size="1">
      <instance id="0">
        <location x="-0.40703517" y="-0.12562814" z="0.0"/>
      </instance>
    </population>
    <population id="I1L" component="I1L" type="populationList" size="1">
      <instance id="0">
        <location x="-0.55778897" y="-0.65829146" z="0.0"/>
      </instance>
    </population>
    <population id="I1R" component="I1R" type="populationList" size="1">
      <instance id="0">
        <location x="-0.57788944" y="-0.40703517" z="0.0"/>
      </instance>
    </population>
    <population id="I2L" component="I2L" type="populationList" size="1">
      <instance id="0">
        <location x="0.8894472" y="-0.47738695" z="0.0"/>
      </instance>
    </population>
    <population id="I2R" component="I2R" type="populationList" size="1">
      <instance id="0">
        <location x="-0.94974875" y="0.49748746" z="0.0"/>
      </instance>
    </population>
    <population id="I3" component="I3" type="populationList" size="1">
      <instance id="0">
        <location x="0.9798995" y="0.23618092" z="0.0"/>
      </instance>
    </population>
    <population id="I4" component="I4" type="populationList" size="1">
      <instance id="0">
        <location x="0.83919597" y="0.45728645" z="0.0"/>
      </instance>
    </population>
    <population id="I5" component="I5" type="populationList" size="1">
      <instance id="0">
        <location x="0.23618092" y="-0.83919597" z="0.0"/>
      </instance>
    </population>
    <population id="I6" component="I6" type="populationList" size="1">
      <instance id="0">
        <location x="0.71859294" y="0.5276382" z="0.0"/>
      </instance>
    </population>
    <population id="MCL" component="MCL" type="populationList" size="1">
      <instance id="0">
        <location x="0.24623117" y="0.9698492" z="0.0"/>
      </instance>
    </population>
    <population id="MCR" component="MCR" type="populationList" size="1">
      <instance id="0">
        <location x="-0.5276382" y="-0.21608041" z="0.0"/>
      </instance>
    </population>
    <population id="MI" component="MI" type="populationList" size="1">
      <instance id="0">
        <location x="-0.04522614" y="-0.61809045" z="0.0"/>
      </instance>
    </population>
    <population id="NSML" component="NSML" type="populationList" size="1">
      <instance id="0">
        <location x="0.51758796" y="0.03517589" z="0.0"/>
      </instance>
    </population>
    <population id="NSMR" component="NSMR" type="populationList" size="1">
      <instance id="0">
        <location x="0.1758794" y="0.14572865" z="0.0"/>
      </instance>
    </population>
    <population id="AVAL" component="AVAL" type="populationList" size="1">
      <instance id="0">
        <location x="5.0" y="0.0" z="0.0"/>
      </instance>
    </population>
    <population id="AVAR" component="AVAR" type="populationList" size="1">
      <instance id="0">
        <location x="5.0" y="0.0" z="0.0"/>
      </instance>
    </population>
    <population id="AVKL" component="AVKL" type="populationList" size="1">
      <instance id="0">
        <location x="5.0" y="0.0" z="0.0"/>
      </instance>
    </population>
    <population id="AVKR" component="AVKR" type="populationList" size="1">
      <instance id="0">
        <location x="5.0" y="0.0" z="0.0"/>
      </instance>
    </population>
    <population id="RIS" component="RIS" type="populationList" size="1">
      <instance id="0">
        <location x="5.0" y="0.0" z="0.0"/>
      </instance>
    </population>
    <population id="RMDDL" component="RMDDL" type="populationList" size="1">
      <instance id="0">
        <location x="5.0" y="0.0" z="0.0"/>
      </instance>
    </population>
    <population id="RMDDR" component="RMDDR" type="populationList" size="1">
      <instance id="0">
        <location x="5.0" y="0.0" z="0.0"/>
      </instance>
    </population>
    <population id="RMDVL" component="RMDVL" type="populationList" size="1">
      <instance id="0">
        <location x="5.0" y="0.0" z="0.0"/>
      </instance>
    </population>
    <population id="RMDVR" component="RMDVR" type="populationList" size="1">
      <instance id="0">
        <location x="5.0" y="0.0" z="0.0"/>
      </instance>
    </population>
    <population id="SMBVL" component="SMBVL" type="populationList" size="1">
      <instance id="0">
        <location x="5.0" y="0.0" z="0.0"/>
      </instance>
    </population>
    <population id="SMBVR" component="SMBVR" type="populationList" size="1">
      <instance id="0">
        <location x="5.0" y="0.0" z="0.0"/>
      </instance>
    </population>
    <population id="URXL" component="URXL" type="populationList" size="1">
      <instance id="0">
        <location x="5.0" y="0.0" z="0.0"/>
      </instance>
    </population>
    <population id="URXR" component="URXR" type="populationList" size="1">
      <instance id="0">
        <location x="5.0" y="0.0" z="0.0"/>
      </instance>
    </population>
    <projection id="NCXLS_MCL_I3" presynapticPopulation="MCL" postsynapticPopulation="I3" synapse="Acetylcholine">
      <connection id="0" preCellId="../MCL/0/MCL" postCellId="../I3/0/I3" preSegmentId="2" postSegmentId="7" preFractionAlong="0.583600773443762" postFractionAlong="0.03629627841074945"/>
    </projection>
    <projection id="NCXLS_MCL_I4" presynapticPopulation="MCL" postsynapticPopulation="I4" synapse="Acetylcholine">
      <connection id="1" preCellId="../MCL/0/MCL" postCellId="../I4/0/I4" preSegmentId="8" postSegmentId="8" preFractionAlong="0.18469462949420534" postFractionAlong="0.9315393301575323"/>
    </projection>
    <projection id="NCXLS_MCL_I2L" presynapticPopulation="MCL" postsynapticPopulation="I2L" synapse="Acetylcholine">
      <connection id="2" preCellId="../MCL/0/MCL" postCellId="../I2L/0/I2L" preSegmentId="5" postSegmentId="7" preFractionAlong="0.8881608320201092" postFractionAlong="0.3670311756215858"/>
    </projection>
    <projection id="NCXLS_MCL_I6" presynapticPopulation="MCL" postsynapticPopulation="I6" synapse="Acetylcholine">
      <connection id="3" preCellId="../MCL/0/MCL" postCellId="../I6/0/I6" preSegmentId="3" postSegmentId="9" preFractionAlong="0.5315039845028434" postFractionAlong="0.1438197695359088"/>
    </projection>
    <projection id="NCXLS_M2R_I2R" presynapticPopulation="M2R" postsynapticPopulation="I2R" synapse="Acetylcholine">
      <connection id="4" preCellId="../M2R/0/M2R" postCellId="../I2R/0/I2R" preSegmentId="5" postSegmentId="5" preFractionAlong="0.051361073032714866" postFractionAlong="0.60814294238315"/>
    </projection>
    <projection id="NCXLS_M2R_I1L" presynapticPopulation="M2R" postsynapticPopulation="I1L" synapse="Acetylcholine">
      <connection id="5" preCellId="../M2R/0/M2R" postCellId="../I1L/0/I1L" preSegmentId="5" postSegmentId="8" preFractionAlong="0.4133742958750194" postFractionAlong="0.8564264888586445"/>
    </projection>
    <projection id="NCXLS_M2R_MCR" presynapticPopulation="M2R" postsynapticPopulation="MCR" synapse="Acetylcholine">
      <connection id="6" preCellId="../M2R/0/M2R" postCellId="../MCR/0/MCR" preSegmentId="8" postSegmentId="2" preFractionAlong="0.24195290950759718" postFractionAlong="0.9849534329255505"/>
    </projection>
    <projection id="NCXLS_M2R_M3R" presynapticPopulation="M2R" postsynapticPopulation="M3R" synapse="Acetylcholine">
      <connection id="7" preCellId="../M2R/0/M2R" postCellId="../M3R/0/M3R" preSegmentId="3" postSegmentId="3" preFractionAlong="0.48751604483474764" postFractionAlong="0.14647076007831694"/>
    </projection>
    <projection id="NCXLS_M2R_M1" presynapticPopulation="M2R" postsynapticPopulation="M1" synapse="Glutamate">
      <connection id="8" preCellId="../M2R/0/M2R" postCellId="../M1/0/M1" preSegmentId="8" postSegmentId="3" preFractionAlong="0.7491485236809293" postFractionAlong="0.23509711527075228"/>
    </projection>
    <projection id="NCXLS_M2R_MI" presynapticPopulation="M2R" postsynapticPopulation="MI" synapse="Acetylcholine">
      <connection id="9" preCellId="../M2R/0/M2R" postCellId="../MI/0/MI" preSegmentId="3" postSegmentId="7" preFractionAlong="0.6034992949717009" postFractionAlong="0.0899438712548345"/>
    </projection>
    <projection id="NCXLS_M2R_M3L" presynapticPopulation="M2R" postsynapticPopulation="M3L" synapse="Glutamate">
      <connection id="10" preCellId="../M2R/0/M2R" postCellId="../M3L/0/M3L" preSegmentId="2" postSegmentId="7" preFractionAlong="0.4267353366720945" postFractionAlong="0.4139095234360195"/>
    </projection>
    <projection id="NCXLS_M2R_M4" presynapticPopulation="M2R" postsynapticPopulation="M4" synapse="Acetylcholine">
      <connection id="11" preCellId="../M2R/0/M2R" postCellId="../M4/0/M4" preSegmentId="7" postSegmentId="2" preFractionAlong="0.43944228129548757" postFractionAlong="0.7848683119938884"/>
    </projection>
    <projection id="NCXLS_M2R_I5" presynapticPopulation="M2R" postsynapticPopulation="I5" synapse="Acetylcholine">
      <connection id="12" preCellId="../M2R/0/M2R" postCellId="../I5/0/I5" preSegmentId="5" postSegmentId="8" preFractionAlong="0.8623416119638762" postFractionAlong="0.6218240863057747"/>
    </projection>
    <projection id="NCXLS_M2R_M5" presynapticPopulation="M2R" postsynapticPopulation="M5" synapse="Acetylcholine">
      <connection id="13" preCellId="../M2R/0/M2R" postCellId="../M5/0/M5" preSegmentId="6" postSegmentId="7" preFractionAlong="0.6515859022678052" postFractionAlong="0.42394950727415015"/>
    </projection>
    <electricalProjection id="NCXLS_M2R_M2L_GJ" presynapticPopulation="M2R" postsynapticPopulation="M2L">
      <electricalConnection id="14" preCell="0" postCell="0" synapse="Generic_GJ" preSegment="1" postSegment="6" preFractionAlong="0.8239170278274891" postFractionAlong="0.1801933868998743"/>
    </electricalProjection>
    <projection id="NCXLS_M2R_I1R" presynapticPopulation="M2R" postsynapticPopulation="I1R" synapse="Acetylcholine">
      <connection id="15" preCellId="../M2R/0/M2R" postCellId="../I1R/0/I1R" preSegmentId="5" postSegmentId="1" preFractionAlong="0.8272048000867352" postFractionAlong="0.7689840001764066"/>
    </projection>
    <projection id="NCXLS_MCR_I2R" presynapticPopulation="MCR" postsynapticPopulation="I2R" synapse="Acetylcholine">
      <connection id="16" preCellId="../MCR/0/MCR" postCellId="../I2R/0/I2R" preSegmentId="3" postSegmentId="4" preFractionAlong="0.8773061903120576" postFractionAlong="0.8365630353048717"/>
    </projection>
    <projection id="NCXLS_MCR_I1L" presynapticPopulation="MCR" postsynapticPopulation="I1L" synapse="Acetylcholine">
      <connection id="17" preCellId="../MCR/0/MCR" postCellId="../I1L/0/I1L" preSegmentId="9" postSegmentId="8" preFractionAlong="0.7928649871024711" postFractionAlong="0.9377374698954221"/>
    </projection>
    <projection id="NCXLS_MCR_M4" presynapticPopulation="MCR" postsynapticPopulation="M4" synapse="Acetylcholine">
      <connection id="18" preCellId="../MCR/0/MCR" postCellId="../M4/0/M4" preSegmentId="8" postSegmentId="2" preFractionAlong="0.6055786770307615" postFractionAlong="0.24267135033180454"/>
    </projection>
    <projection id="NCXLS_MCR_M2L" presynapticPopulation="MCR" postsynapticPopulation="M2L" synapse="Acetylcholine">
      <connection id="19" preCellId="../MCR/0/MCR" postCellId="../M2L/0/M2L" preSegmentId="8" postSegmentId="5" preFractionAlong="0.23351185859326462" postFractionAlong="0.8080114200967736"/>
    </projection>
    <projection id="NCXLS_MCR_I1R" presynapticPopulation="MCR" postsynapticPopulation="I1R" synapse="Acetylcholine">
      <connection id="20" preCellId="../MCR/0/MCR" postCellId="../I1R/0/I1R" preSegmentId="8" postSegmentId="9" preFractionAlong="0.8336972169940262" postFractionAlong="0.3816092179827253"/>
    </projection>
    <projection id="NCXLS_M3R_MCL" presynapticPopulation="M3R" postsynapticPopulation="MCL" synapse="Acetylcholine">
      <connection id="21" preCellId="../M3R/0/M3R" postCellId="../MCL/0/MCL" preSegmentId="4" postSegmentId="4" preFractionAlong="0.8534027221808783" postFractionAlong="0.6322787673435242"/>
    </projection>
    <projection id="NCXLS_M3R_I3" presynapticPopulation="M3R" postsynapticPopulation="I3" synapse="Acetylcholine">
      <connection id="22" preCellId="../M3R/0/M3R" postCellId="../I3/0/I3" preSegmentId="5" postSegmentId="6" preFractionAlong="0.9482070618154644" postFractionAlong="0.5736057861238032"/>
    </projection>
    <projection id="NCXLS_M3R_I4" presynapticPopulation="M3R" postsynapticPopulation="I4" synapse="Acetylcholine">
      <connection id="23" preCellId="../M3R/0/M3R" postCellId="../I4/0/I4" preSegmentId="2" postSegmentId="6" preFractionAlong="0.522260404529016" postFractionAlong="0.9272623257936373"/>
    </projection>
    <electricalProjection id="NCXLS_M3R_M3L_GJ" presynapticPopulation="M3R" postsynapticPopulation="M3L">
      <electricalConnection id="24" preCell="0" postCell="0" synapse="Generic_GJ" preSegment="8" postSegment="2" preFractionAlong="0.5869584351538735" postFractionAlong="0.3296795737301249"/>
    </electricalProjection>
    <projection id="NCXLS_M3R_I2L" presynapticPopulation="M3R" postsynapticPopulation="I2L" synapse="Acetylcholine">
      <connection id="25" preCellId="../M3R/0/M3R" postCellId="../I2L/0/I2L" preSegmentId="3" postSegmentId="5" preFractionAlong="0.32807921789716654" postFractionAlong="0.4047253114449356"/>
    </projection>
    <projection id="NCXLS_M3R_I5" presynapticPopulation="M3R" postsynapticPopulation="I5" synapse="Acetylcholine">
      <connection id="26" preCellId="../M3R/0/M3R" postCellId="../I5/0/I5" preSegmentId="8" postSegmentId="4" preFractionAlong="0.27366625410182666" postFractionAlong="0.2643451177266962"/>
    </projection>
    <projection id="NCXLS_M3R_I6" presynapticPopulation="M3R" postsynapticPopulation="I6" synapse="Acetylcholine">
      <connection id="27" preCellId="../M3R/0/M3R" postCellId="../I6/0/I6" preSegmentId="3" postSegmentId="5" preFractionAlong="0.8432594806477427" postFractionAlong="0.027287650650565598"/>
    </projection>
    <projection id="NCXLS_M3R_NSML" presynapticPopulation="M3R" postsynapticPopulation="NSML" synapse="Acetylcholine">
      <connection id="28" preCellId="../M3R/0/M3R" postCellId="../NSML/0/NSML" preSegmentId="5" postSegmentId="1" preFractionAlong="0.806391300461047" postFractionAlong="0.7615508155461025"/>
    </projection>
    <projection id="NCXLS_M3R_NSMR" presynapticPopulation="M3R" postsynapticPopulation="NSMR" synapse="Acetylcholine">
      <connection id="29" preCellId="../M3R/0/M3R" postCellId="../NSMR/0/NSMR" preSegmentId="9" postSegmentId="9" preFractionAlong="0.09909645036243164" postFractionAlong="0.8614986228540221"/>
    </projection>
    <projection id="NCXLS_M1_MCL" presynapticPopulation="M1" postsynapticPopulation="MCL" synapse="Acetylcholine">
      <connection id="30" preCellId="../M1/0/M1" postCellId="../MCL/0/MCL" preSegmentId="4" postSegmentId="5" preFractionAlong="0.8139161065660845" postFractionAlong="0.5183981907879688"/>
    </projection>
    <projection id="NCXLS_M1_I2R" presynapticPopulation="M1" postsynapticPopulation="I2R" synapse="Acetylcholine">
      <connection id="31" preCellId="../M1/0/M1" postCellId="../I2R/0/I2R" preSegmentId="4" postSegmentId="8" preFractionAlong="0.32595154395443526" postFractionAlong="0.15667213434751803"/>
    </projection>
    <projection id="NCXLS_M1_I3" presynapticPopulation="M1" postsynapticPopulation="I3" synapse="Acetylcholine">
      <connection id="32" preCellId="../M1/0/M1" postCellId="../I3/0/I3" preSegmentId="8" postSegmentId="5" preFractionAlong="0.9882360298548315" postFractionAlong="0.8152377161393224"/>
    </projection>
    <projection id="NCXLS_M1_I1L" presynapticPopulation="M1" postsynapticPopulation="I1L" synapse="Acetylcholine">
      <connection id="33" preCellId="../M1/0/M1" postCellId="../I1L/0/I1L" preSegmentId="3" postSegmentId="5" preFractionAlong="0.48144641048275083" postFractionAlong="0.9904570074037514"/>
    </projection>
    <projection id="NCXLS_M1_M2R" presynapticPopulation="M1" postsynapticPopulation="M2R" synapse="Glutamate">
      <connection id="34" preCellId="../M1/0/M1" postCellId="../M2R/0/M2R" preSegmentId="7" postSegmentId="1" preFractionAlong="0.8331908044356465" postFractionAlong="0.3235473582966508"/>
    </projection>
    <projection id="NCXLS_M1_MCR" presynapticPopulation="M1" postsynapticPopulation="MCR" synapse="Acetylcholine">
      <connection id="35" preCellId="../M1/0/M1" postCellId="../MCR/0/MCR" preSegmentId="7" postSegmentId="3" preFractionAlong="0.35927691576455967" postFractionAlong="0.003604239888287175"/>
    </projection>
    <electricalProjection id="NCXLS_M1_M3R_GJ" presynapticPopulation="M1" postsynapticPopulation="M3R">
      <electricalConnection id="36" preCell="0" postCell="0" synapse="Generic_GJ" preSegment="6" postSegment="1" preFractionAlong="0.6992747953353902" postFractionAlong="0.12856826460296888"/>
    </electricalProjection>
    <projection id="NCXLS_M1_I4" presynapticPopulation="M1" postsynapticPopulation="I4" synapse="Acetylcholine">
      <connection id="37" preCellId="../M1/0/M1" postCellId="../I4/0/I4" preSegmentId="6" postSegmentId="7" preFractionAlong="0.4161398150084874" postFractionAlong="0.5030441163645629"/>
    </projection>
    <projection id="NCXLS_M1_MI" presynapticPopulation="M1" postsynapticPopulation="MI" synapse="Acetylcholine">
      <connection id="38" preCellId="../M1/0/M1" postCellId="../MI/0/MI" preSegmentId="6" postSegmentId="3" preFractionAlong="0.1909697896671958" postFractionAlong="0.5205739373148293"/>
    </projection>
    <projection id="NCXLS_M1_M3L" presynapticPopulation="M1" postsynapticPopulation="M3L" synapse="Acetylcholine">
      <connection id="39" preCellId="../M1/0/M1" postCellId="../M3L/0/M3L" preSegmentId="4" postSegmentId="9" preFractionAlong="0.2907342284586226" postFractionAlong="0.3281085611065191"/>
    </projection>
    <electricalProjection id="NCXLS_M1_M4_GJ" presynapticPopulation="M1" postsynapticPopulation="M4">
      <electricalConnection id="40" preCell="0" postCell="0" synapse="Generic_GJ" preSegment="7" postSegment="3" preFractionAlong="0.765458447246864" postFractionAlong="0.35788853072568927"/>
    </electricalProjection>
    <projection id="NCXLS_M1_I2L" presynapticPopulation="M1" postsynapticPopulation="I2L" synapse="Acetylcholine">
      <connection id="41" preCellId="../M1/0/M1" postCellId="../I2L/0/I2L" preSegmentId="2" postSegmentId="1" preFractionAlong="0.3405507114390913" postFractionAlong="0.8131920399794735"/>
    </projection>
    <projection id="NCXLS_M1_I5" presynapticPopulation="M1" postsynapticPopulation="I5" synapse="Acetylcholine">
      <connection id="42" preCellId="../M1/0/M1" postCellId="../I5/0/I5" preSegmentId="7" postSegmentId="1" preFractionAlong="0.9695265606398866" postFractionAlong="0.9812446006823907"/>
    </projection>
    <projection id="NCXLS_M1_I6" presynapticPopulation="M1" postsynapticPopulation="I6" synapse="Acetylcholine">
      <connection id="43" preCellId="../M1/0/M1" postCellId="../I6/0/I6" preSegmentId="4" postSegmentId="6" preFractionAlong="0.1460703839583538" postFractionAlong="0.7241589492063322"/>
    </projection>
    <projection id="NCXLS_M1_NSML" presynapticPopulation="M1" postsynapticPopulation="NSML" synapse="Acetylcholine">
      <connection id="44" preCellId="../M1/0/M1" postCellId="../NSML/0/NSML" preSegmentId="7" postSegmentId="2" preFractionAlong="0.385100678940517" postFractionAlong="0.11277055848915307"/>
    </projection>
    <electricalProjection id="NCXLS_M1_M5_GJ" presynapticPopulation="M1" postsynapticPopulation="M5">
      <electricalConnection id="45" preCell="0" postCell="0" synapse="Generic_GJ" preSegment="2" postSegment="3" preFractionAlong="0.5302190478209937" postFractionAlong="0.2829279290829039"/>
    </electricalProjection>
    <projection id="NCXLS_M1_M2L" presynapticPopulation="M1" postsynapticPopulation="M2L" synapse="Acetylcholine">
      <connection id="46" preCellId="../M1/0/M1" postCellId="../M2L/0/M2L" preSegmentId="4" postSegmentId="5" preFractionAlong="0.2706971809221477" postFractionAlong="0.6018098088569807"/>
    </projection>
    <projection id="NCXLS_M1_NSMR" presynapticPopulation="M1" postsynapticPopulation="NSMR" synapse="Acetylcholine">
      <connection id="47" preCellId="../M1/0/M1" postCellId="../NSMR/0/NSMR" preSegmentId="8" postSegmentId="6" preFractionAlong="0.8566938033265644" postFractionAlong="0.4603808754259775"/>
    </projection>
    <projection id="NCXLS_M1_I1R" presynapticPopulation="M1" postsynapticPopulation="I1R" synapse="Acetylcholine">
      <connection id="48" preCellId="../M1/0/M1" postCellId="../I1R/0/I1R" preSegmentId="4" postSegmentId="6" preFractionAlong="0.4012555349790091" postFractionAlong="0.1908005996302896"/>
    </projection>
    <projection id="NCXLS_M3L_MCL" presynapticPopulation="M3L" postsynapticPopulation="MCL" synapse="Acetylcholine">
      <connection id="49" preCellId="../M3L/0/M3L" postCellId="../MCL/0/MCL" preSegmentId="8" postSegmentId="5" preFractionAlong="0.3237242309869084" postFractionAlong="0.9896928677865222"/>
    </projection>
    <projection id="NCXLS_M3L_I2R" presynapticPopulation="M3L" postsynapticPopulation="I2R" synapse="Acetylcholine">
      <connection id="50" preCellId="../M3L/0/M3L" postCellId="../I2R/0/I2R" preSegmentId="4" postSegmentId="7" preFractionAlong="0.9374405289874431" postFractionAlong="0.27696428084220726"/>
    </projection>
    <projection id="NCXLS_M3L_I1L" presynapticPopulation="M3L" postsynapticPopulation="I1L" synapse="Acetylcholine">
      <connection id="51" preCellId="../M3L/0/M3L" postCellId="../I1L/0/I1L" preSegmentId="4" postSegmentId="6" preFractionAlong="0.37505894411310625" postFractionAlong="0.11156899238482709"/>
    </projection>
    <electricalProjection id="NCXLS_M3L_M2R_GJ" presynapticPopulation="M3L" postsynapticPopulation="M2R">
      <electricalConnection id="52" preCell="0" postCell="0" synapse="Generic_GJ" preSegment="1" postSegment="5" preFractionAlong="0.3385446476334715" postFractionAlong="0.4531740289687326"/>
    </electricalProjection>
    <projection id="NCXLS_M3L_MCR" presynapticPopulation="M3L" postsynapticPopulation="MCR" synapse="Acetylcholine">
      <connection id="53" preCellId="../M3L/0/M3L" postCellId="../MCR/0/MCR" preSegmentId="7" postSegmentId="4" preFractionAlong="0.061784344228770105" postFractionAlong="0.4697519452994411"/>
    </projection>
    <projection id="NCXLS_M3L_M3R" presynapticPopulation="M3L" postsynapticPopulation="M3R" synapse="Acetylcholine">
      <connection id="54" preCellId="../M3L/0/M3L" postCellId="../M3R/0/M3R" preSegmentId="6" postSegmentId="2" preFractionAlong="0.9479695655444975" postFractionAlong="0.35989850979392257"/>
    </projection>
    <projection id="NCXLS_M3L_M1" presynapticPopulation="M3L" postsynapticPopulation="M1" synapse="Acetylcholine">
      <connection id="55" preCellId="../M3L/0/M3L" postCellId="../M1/0/M1" preSegmentId="4" postSegmentId="9" preFractionAlong="0.26540588759490646" postFractionAlong="0.1788787388826426"/>
    </projection>
    <electricalProjection id="NCXLS_M3L_M4_GJ" presynapticPopulation="M3L" postsynapticPopulation="M4">
      <electricalConnection id="56" preCell="0" postCell="0" synapse="Generic_GJ" preSegment="7" postSegment="1" preFractionAlong="0.3125587034702625" postFractionAlong="0.5777914549604904"/>
    </electricalProjection>
    <projection id="NCXLS_M3L_M5" presynapticPopulation="M3L" postsynapticPopulation="M5" synapse="Acetylcholine">
      <connection id="57" preCellId="../M3L/0/M3L" postCellId="../M5/0/M5" preSegmentId="3" postSegmentId="6" preFractionAlong="0.39848768913933497" postFractionAlong="0.06632561133806758"/>
    </projection>
    <electricalProjection id="NCXLS_M3L_M2L_GJ" presynapticPopulation="M3L" postsynapticPopulation="M2L">
      <electricalConnection id="58" preCell="0" postCell="0" synapse="Generic_GJ" preSegment="8" postSegment="4" preFractionAlong="0.76916528212332" postFractionAlong="0.48589823198882"/>
    </electricalProjection>
    <projection id="NCXLS_M3L_NSMR" presynapticPopulation="M3L" postsynapticPopulation="NSMR" synapse="Acetylcholine">
      <connection id="59" preCellId="../M3L/0/M3L" postCellId="../NSMR/0/NSMR" preSegmentId="5" postSegmentId="1" preFractionAlong="0.9526981391702748" postFractionAlong="0.7836074487998993"/>
    </projection>
    <projection id="NCXLS_M3L_I1R" presynapticPopulation="M3L" postsynapticPopulation="I1R" synapse="Acetylcholine">
      <connection id="60" preCellId="../M3L/0/M3L" postCellId="../I1R/0/I1R" preSegmentId="4" postSegmentId="9" preFractionAlong="0.7063792099030417" postFractionAlong="0.41703522451317077"/>
    </projection>
    <projection id="NCXLS_M4_I1L" presynapticPopulation="M4" postsynapticPopulation="I1L" synapse="Acetylcholine">
      <connection id="61" preCellId="../M4/0/M4" postCellId="../I1L/0/I1L" preSegmentId="6" postSegmentId="9" preFractionAlong="0.7235592919944186" postFractionAlong="0.6078237721413878"/>
    </projection>
    <projection id="NCXLS_M4_MCR" presynapticPopulation="M4" postsynapticPopulation="MCR" synapse="Acetylcholine">
      <connection id="62" preCellId="../M4/0/M4" postCellId="../MCR/0/MCR" preSegmentId="4" postSegmentId="6" preFractionAlong="0.6240209399944638" postFractionAlong="0.20828558606423364"/>
    </projection>
    <projection id="NCXLS_M4_MI" presynapticPopulation="M4" postsynapticPopulation="MI" synapse="Acetylcholine">
      <connection id="63" preCellId="../M4/0/M4" postCellId="../MI/0/MI" preSegmentId="8" postSegmentId="7" preFractionAlong="0.42384552450057666" postFractionAlong="0.43309450452034004"/>
    </projection>
    <projection id="NCXLS_M4_M3L" presynapticPopulation="M4" postsynapticPopulation="M3L" synapse="Glutamate">
      <connection id="64" preCellId="../M4/0/M4" postCellId="../M3L/0/M3L" preSegmentId="2" postSegmentId="8" preFractionAlong="0.551788781106658" postFractionAlong="0.41362841810985407"/>
    </projection>
    <projection id="NCXLS_M4_I2L" presynapticPopulation="M4" postsynapticPopulation="I2L" synapse="Acetylcholine">
      <connection id="65" preCellId="../M4/0/M4" postCellId="../I2L/0/I2L" preSegmentId="1" postSegmentId="6" preFractionAlong="0.06941695859013763" postFractionAlong="0.007420307880650179"/>
    </projection>
    <projection id="NCXLS_M4_I5" presynapticPopulation="M4" postsynapticPopulation="I5" synapse="Acetylcholine">
      <connection id="66" preCellId="../M4/0/M4" postCellId="../I5/0/I5" preSegmentId="9" postSegmentId="5" preFractionAlong="0.40838666001770063" postFractionAlong="0.46856137613341253"/>
    </projection>
    <electricalProjection id="NCXLS_M4_M5_GJ" presynapticPopulation="M4" postsynapticPopulation="M5">
      <electricalConnection id="67" preCell="0" postCell="0" synapse="Generic_GJ" preSegment="6" postSegment="3" preFractionAlong="0.6092463103757779" postFractionAlong="0.6095015963905811"/>
    </electricalProjection>
    <projection id="NCXLS_M4_M2L" presynapticPopulation="M4" postsynapticPopulation="M2L" synapse="Acetylcholine">
      <connection id="68" preCellId="../M4/0/M4" postCellId="../M2L/0/M2L" preSegmentId="4" postSegmentId="2" preFractionAlong="0.6183153022315322" postFractionAlong="0.5055796518296253"/>
    </projection>
    <projection id="NCXLS_M4_I1R" presynapticPopulation="M4" postsynapticPopulation="I1R" synapse="Acetylcholine">
      <connection id="69" preCellId="../M4/0/M4" postCellId="../I1R/0/I1R" preSegmentId="3" postSegmentId="8" preFractionAlong="0.2049610188775588" postFractionAlong="0.7744681959637522"/>
    </projection>
    <projection id="NCXLS_I5_I1L" presynapticPopulation="I5" postsynapticPopulation="I1L" synapse="Acetylcholine">
      <connection id="70" preCellId="../I5/0/I5" postCellId="../I1L/0/I1L" preSegmentId="2" postSegmentId="4" preFractionAlong="0.21378812698020266" postFractionAlong="0.2616490132446003"/>
    </projection>
    <projection id="NCXLS_NSML_I3" presynapticPopulation="NSML" postsynapticPopulation="I3" synapse="Serotonin_Glutamate">
      <connection id="71" preCellId="../NSML/0/NSML" postCellId="../I3/0/I3" preSegmentId="4" postSegmentId="2" preFractionAlong="0.9218958025766426" postFractionAlong="0.859567588811114"/>
    </projection>
    <projection id="NCXLS_NSML_I4" presynapticPopulation="NSML" postsynapticPopulation="I4" synapse="Serotonin_Glutamate">
      <connection id="72" preCellId="../NSML/0/NSML" postCellId="../I4/0/I4" preSegmentId="4" postSegmentId="3" preFractionAlong="0.6504790652781709" postFractionAlong="0.675814866416092"/>
    </projection>
    <projection id="NCXLS_NSML_I2L" presynapticPopulation="NSML" postsynapticPopulation="I2L" synapse="Serotonin_Glutamate">
      <connection id="73" preCellId="../NSML/0/NSML" postCellId="../I2L/0/I2L" preSegmentId="9" postSegmentId="5" preFractionAlong="0.14712034506758465" postFractionAlong="0.5437389561639286"/>
    </projection>
    <projection id="NCXLS_NSML_I6" presynapticPopulation="NSML" postsynapticPopulation="I6" synapse="Serotonin_Glutamate">
      <connection id="74" preCellId="../NSML/0/NSML" postCellId="../I6/0/I6" preSegmentId="6" postSegmentId="9" preFractionAlong="0.29550885504779345" postFractionAlong="0.46319587796544825"/>
    </projection>
    <projection id="NCXLS_M5_I2R" presynapticPopulation="M5" postsynapticPopulation="I2R" synapse="Acetylcholine">
      <connection id="75" preCellId="../M5/0/M5" postCellId="../I2R/0/I2R" preSegmentId="5" postSegmentId="5" preFractionAlong="0.9034554360782215" postFractionAlong="0.6593020939717295"/>
    </projection>
    <projection id="NCXLS_M5_I1L" presynapticPopulation="M5" postsynapticPopulation="I1L" synapse="Acetylcholine">
      <connection id="76" preCellId="../M5/0/M5" postCellId="../I1L/0/I1L" preSegmentId="5" postSegmentId="1" preFractionAlong="0.8912929267033972" postFractionAlong="0.4827100462391418"/>
    </projection>
    <projection id="NCXLS_M5_MCR" presynapticPopulation="M5" postsynapticPopulation="MCR" synapse="Acetylcholine">
      <connection id="77" preCellId="../M5/0/M5" postCellId="../MCR/0/MCR" preSegmentId="1" postSegmentId="4" preFractionAlong="0.3842305380393489" postFractionAlong="0.11586799419138583"/>
    </projection>
    <projection id="NCXLS_M5_M4" presynapticPopulation="M5" postsynapticPopulation="M4" synapse="Acetylcholine">
      <connection id="78" preCellId="../M5/0/M5" postCellId="../M4/0/M4" preSegmentId="8" postSegmentId="4" preFractionAlong="0.4382274945490999" postFractionAlong="0.8066361217252598"/>
    </projection>
    <projection id="NCXLS_M5_M2L" presynapticPopulation="M5" postsynapticPopulation="M2L" synapse="Acetylcholine">
      <connection id="79" preCellId="../M5/0/M5" postCellId="../M2L/0/M2L" preSegmentId="3" postSegmentId="7" preFractionAlong="0.20058403008324033" postFractionAlong="0.3438938432523665"/>
    </projection>
    <projection id="NCXLS_M5_I1R" presynapticPopulation="M5" postsynapticPopulation="I1R" synapse="Acetylcholine">
      <connection id="80" preCellId="../M5/0/M5" postCellId="../I1R/0/I1R" preSegmentId="5" postSegmentId="7" preFractionAlong="0.08785618432651454" postFractionAlong="0.8579306536685337"/>
    </projection>
    <projection id="NCXLS_M2L_MCL" presynapticPopulation="M2L" postsynapticPopulation="MCL" synapse="Acetylcholine">
      <connection id="81" preCellId="../M2L/0/M2L" postCellId="../MCL/0/MCL" preSegmentId="4" postSegmentId="6" preFractionAlong="0.31800641939440033" postFractionAlong="0.3388429515830208"/>
    </projection>
    <projection id="NCXLS_M2L_I2R" presynapticPopulation="M2L" postsynapticPopulation="I2R" synapse="Acetylcholine">
      <connection id="82" preCellId="../M2L/0/M2L" postCellId="../I2R/0/I2R" preSegmentId="5" postSegmentId="6" preFractionAlong="0.08449010424482895" postFractionAlong="0.06850296310213089"/>
    </projection>
    <projection id="NCXLS_M2L_I3" presynapticPopulation="M2L" postsynapticPopulation="I3" synapse="Acetylcholine">
      <connection id="83" preCellId="../M2L/0/M2L" postCellId="../I3/0/I3" preSegmentId="9" postSegmentId="6" preFractionAlong="0.13129039410461318" postFractionAlong="0.6620092319346323"/>
    </projection>
    <electricalProjection id="NCXLS_M2L_M2R_GJ" presynapticPopulation="M2L" postsynapticPopulation="M2R">
      <electricalConnection id="84" preCell="0" postCell="0" synapse="Generic_GJ" preSegment="1" postSegment="9" preFractionAlong="0.9000135234720708" postFractionAlong="0.6954083623956674"/>
    </electricalProjection>
    <projection id="NCXLS_M2L_MCR" presynapticPopulation="M2L" postsynapticPopulation="MCR" synapse="Acetylcholine">
      <connection id="85" preCellId="../M2L/0/M2L" postCellId="../MCR/0/MCR" preSegmentId="9" postSegmentId="1" preFractionAlong="0.06451261073803383" postFractionAlong="0.4859817845641028"/>
    </projection>
    <projection id="NCXLS_M2L_M3R" presynapticPopulation="M2L" postsynapticPopulation="M3R" synapse="Acetylcholine">
      <connection id="86" preCellId="../M2L/0/M2L" postCellId="../M3R/0/M3R" preSegmentId="2" postSegmentId="2" preFractionAlong="0.6499706222505548" postFractionAlong="0.8800566733340838"/>
    </projection>
    <projection id="NCXLS_M2L_M1" presynapticPopulation="M2L" postsynapticPopulation="M1" synapse="Acetylcholine">
      <connection id="87" preCellId="../M2L/0/M2L" postCellId="../M1/0/M1" preSegmentId="9" postSegmentId="5" preFractionAlong="0.5212867904991895" postFractionAlong="0.4711120202722413"/>
    </projection>
    <projection id="NCXLS_M2L_I4" presynapticPopulation="M2L" postsynapticPopulation="I4" synapse="Acetylcholine">
      <connection id="88" preCellId="../M2L/0/M2L" postCellId="../I4/0/I4" preSegmentId="9" postSegmentId="2" preFractionAlong="0.1618089594771992" postFractionAlong="0.692411958940341"/>
    </projection>
    <projection id="NCXLS_M2L_MI" presynapticPopulation="M2L" postsynapticPopulation="MI" synapse="Acetylcholine">
      <connection id="89" preCellId="../M2L/0/M2L" postCellId="../MI/0/MI" preSegmentId="3" postSegmentId="3" preFractionAlong="0.29020049550655747" postFractionAlong="0.7701222076697677"/>
    </projection>
    <electricalProjection id="NCXLS_M2L_M3L_GJ" presynapticPopulation="M2L" postsynapticPopulation="M3L">
      <electricalConnection id="90" preCell="0" postCell="0" synapse="Generic_GJ" preSegment="9" postSegment="7" preFractionAlong="0.8189483743113387" postFractionAlong="0.12490394462716736"/>
    </electricalProjection>
    <projection id="NCXLS_M2L_I2L" presynapticPopulation="M2L" postsynapticPopulation="I2L" synapse="Acetylcholine">
      <connection id="91" preCellId="../M2L/0/M2L" postCellId="../I2L/0/I2L" preSegmentId="8" postSegmentId="7" preFractionAlong="0.9855122903884784" postFractionAlong="0.9367194793273512"/>
    </projection>
    <projection id="NCXLS_M2L_I5" presynapticPopulation="M2L" postsynapticPopulation="I5" synapse="Acetylcholine">
      <connection id="92" preCellId="../M2L/0/M2L" postCellId="../I5/0/I5" preSegmentId="2" postSegmentId="5" preFractionAlong="0.35488420292685796" postFractionAlong="0.7099551052298295"/>
    </projection>
    <projection id="NCXLS_M2L_I6" presynapticPopulation="M2L" postsynapticPopulation="I6" synapse="Acetylcholine">
      <connection id="93" preCellId="../M2L/0/M2L" postCellId="../I6/0/I6" preSegmentId="2" postSegmentId="5" preFractionAlong="0.6638898356775905" postFractionAlong="0.07091331078599106"/>
    </projection>
    <projection id="NCXLS_M2L_NSML" presynapticPopulation="M2L" postsynapticPopulation="NSML" synapse="Acetylcholine">
      <connection id="94" preCellId="../M2L/0/M2L" postCellId="../NSML/0/NSML" preSegmentId="8" postSegmentId="2" preFractionAlong="0.7075313013009391" postFractionAlong="0.8892777088335996"/>
    </projection>
    <electricalProjection id="NCXLS_M2L_M5_GJ" presynapticPopulation="M2L" postsynapticPopulation="M5">
      <electricalConnection id="95" preCell="0" postCell="0" synapse="Generic_GJ" preSegment="8" postSegment="5" preFractionAlong="0.528607822691929" postFractionAlong="0.3660407068030652"/>
    </electricalProjection>
    <projection id="NCXLS_M2L_NSMR" presynapticPopulation="M2L" postsynapticPopulation="NSMR" synapse="Acetylcholine">
      <connection id="96" preCellId="../M2L/0/M2L" postCellId="../NSMR/0/NSMR" preSegmentId="8" postSegmentId="7" preFractionAlong="0.5794318227199275" postFractionAlong="0.8157960756711387"/>
    </projection>
    <projection id="NCXLS_M2L_I1R" presynapticPopulation="M2L" postsynapticPopulation="I1R" synapse="Acetylcholine">
      <connection id="97" preCellId="../M2L/0/M2L" postCellId="../I1R/0/I1R" preSegmentId="3" postSegmentId="8" preFractionAlong="0.9064151326404393" postFractionAlong="0.9184516719271222"/>
    </projection>
    <projection id="NC_I1L_RMDDL" presynapticPopulation="I1L" postsynapticPopulation="RMDDL" synapse="Acetylcholine">
      <connection id="1000" preCellId="../I1L/0/I1L" postCellId="../RMDDL/0/RMDDL" preSegmentId="1" postSegmentId="7" preFractionAlong="0.04486746306259981" postFractionAlong="0.5619541425098686"/>
    </projection>
    <projection id="NC_I1L_RMDVL" presynapticPopulation="I1L" postsynapticPopulation="RMDVL" synapse="Acetylcholine">
      <connection id="1001" preCellId="../I1L/0/I1L" postCellId="../RMDVL/0/RMDVL" preSegmentId="5" postSegmentId="7" preFractionAlong="0.18623220476421387" postFractionAlong="0.7239867499737503"/>
    </projection>
    <projection id="NC_I1R_RMDDR" presynapticPopulation="I1R" postsynapticPopulation="RMDDR" synapse="Acetylcholine">
      <connection id="1002" preCellId="../I1R/0/I1R" postCellId="../RMDDR/0/RMDDR" preSegmentId="9" postSegmentId="9" preFractionAlong="0.7146489034571513" postFractionAlong="0.36737688664738455"/>
    </projection>
    <projection id="NC_I1R_RMDVR" presynapticPopulation="I1R" postsynapticPopulation="RMDVR" synapse="Acetylcholine">
      <connection id="1003" preCellId="../I1R/0/I1R" postCellId="../RMDVR/0/RMDVR" preSegmentId="4" postSegmentId="8" preFractionAlong="0.793967726043636" postFractionAlong="0.6104112036936661"/>
    </projection>
    <projection id="NC_I2L_URXL" presynapticPopulation="I2L" postsynapticPopulation="URXL" synapse="Glutamate">
      <connection id="1004" preCellId="../I2L/0/I2L" postCellId="../URXL/0/URXL" preSegmentId="7" postSegmentId="9" preFractionAlong="0.5885518145706807" postFractionAlong="0.13697450097106467"/>
    </projection>
    <projection id="NC_I2R_URXR" presynapticPopulation="I2R" postsynapticPopulation="URXR" synapse="Glutamate">
      <connection id="1005" preCellId="../I2R/0/I2R" postCellId="../URXR/0/URXR" preSegmentId="4" postSegmentId="1" preFractionAlong="0.05611147851974019" postFractionAlong="0.6068886817472076"/>
    </projection>
    <projection id="NC_AVKL_I1L" presynapticPopulation="AVKL" postsynapticPopulation="I1L" synapse="Acetylcholine">
      <connection id="1006" preCellId="../AVKL/0/AVKL" postCellId="../I1L/0/I1L" preSegmentId="3" postSegmentId="7" preFractionAlong="0.6841643870577806" postFractionAlong="0.04445661442668469"/>
    </projection>
    <projection id="NC_AVKR_I1R" presynapticPopulation="AVKR" postsynapticPopulation="I1R" synapse="Acetylcholine">
      <connection id="1007" preCellId="../AVKR/0/AVKR" postCellId="../I1R/0/I1R" preSegmentId="2" postSegmentId="6" preFractionAlong="0.44403866304037454" postFractionAlong="0.4597824418424993"/>
    </projection>
    <projection id="NC_RIS_I1L" presynapticPopulation="RIS" postsynapticPopulation="I1L" synapse="Glutamate">
      <connection id="1008" preCellId="../RIS/0/RIS" postCellId="../I1L/0/I1L" preSegmentId="8" postSegmentId="3" preFractionAlong="0.33613048048314553" postFractionAlong="0.22372573250328387"/>
    </projection>
    <projection id="NC_RIS_I1R" presynapticPopulation="RIS" postsynapticPopulation="I1R" synapse="Glutamate">
      <connection id="1009" preCellId="../RIS/0/RIS" postCellId="../I1R/0/I1R" preSegmentId="8" postSegmentId="9" preFractionAlong="0.37446688913055337" postFractionAlong="0.8603672346719318"/>
    </projection>
    <projection id="NC_AVAL_I2L" presynapticPopulation="AVAL" postsynapticPopulation="I2L" synapse="Acetylcholine">
      <connection id="1010" preCellId="../AVAL/0/AVAL" postCellId="../I2L/0/I2L" preSegmentId="5" postSegmentId="9" preFractionAlong="0.5354489996474344" postFractionAlong="0.8608012033322129"/>
    </projection>
    <projection id="NC_AVAR_I2R" presynapticPopulation="AVAR" postsynapticPopulation="I2R" synapse="Acetylcholine">
      <connection id="1011" preCellId="../AVAR/0/AVAR" postCellId="../I2R/0/I2R" preSegmentId="4" postSegmentId="2" preFractionAlong="0.6815575346293953" postFractionAlong="0.08564466587406072"/>
    </projection>
    <projection id="NC_SMBVL_I4" presynapticPopulation="SMBVL" postsynapticPopulation="I4" synapse="Acetylcholine">
      <connection id="1012" preCellId="../SMBVL/0/SMBVL" postCellId="../I4/0/I4" preSegmentId="7" postSegmentId="9" preFractionAlong="0.49483906781987486" postFractionAlong="0.9657337012362295"/>
    </projection>
    <projection id="NC_SMBVR_I4" presynapticPopulation="SMBVR" postsynapticPopulation="I4" synapse="Acetylcholine">
      <connection id="1013" preCellId="../SMBVR/0/SMBVR" postCellId="../I4/0/I4" preSegmentId="4" postSegmentId="8" preFractionAlong="0.16161664810477816" postFractionAlong="0.6314760518374166"/>
    </projection>
  </network>
</neuroml>
