<?xml version='1.0' encoding='UTF-8'?>
<neuroml xmlns="http://www.neuroml.org/schema/neuroml2" xmlns:xsi="http://www.w3.org/2001/XMLSchema-instance" xsi:schemaLocation="http://www.neuroml.org/schema/neuroml2 https://raw.githubusercontent.com/NeuroML/NeuroML2/development/Schemas/NeuroML2/NeuroML_v2beta4.xsd" id="gvft_network_bio_prior_lamW_0.500_DF_0.037_t50.net">
  <notes>NeuroML2 network generated from GVFT simulation on 2025-05-04 12:21:59
</notes>
  <include href="AVAL.cell.nml"/>
  <include href="AVAR.cell.nml"/>
  <include href="AVKL.cell.nml"/>
  <include href="AVKR.cell.nml"/>
  <include href="RIS.cell.nml"/>
  <include href="RMDDL.cell.nml"/>
  <include href="RMDDR.cell.nml"/>
  <include href="RMDVL.cell.nml"/>
  <include href="RMDVR.cell.nml"/>
  <include href="SMBVL.cell.nml"/>
  <include href="SMBVR.cell.nml"/>
  <include href="URXL.cell.nml"/>
  <include href="URXR.cell.nml"/>
  <include href="I6.cell.nml"/>
  <include href="M3L.cell.nml"/>
  <include href="I5.cell.nml"/>
  <include href="M1.cell.nml"/>
  <include href="I1R.cell.nml"/>
  <include href="MCR.cell.nml"/>
  <include href="I2R.cell.nml"/>
  <include href="I4.cell.nml"/>
  <include href="NSMR.cell.nml"/>
  <include href="M4.cell.nml"/>
  <include href="I3.cell.nml"/>
  <include href="MI.cell.nml"/>
  <include href="I2L.cell.nml"/>
  <include href="M5.cell.nml"/>
  <include href="NSML.cell.nml"/>
  <include href="M2R.cell.nml"/>
  <include href="M3R.cell.nml"/>
  <include href="MCL.cell.nml"/>
  <include href="I1L.cell.nml"/>
  <include href="M2L.cell.nml"/>
  <include href="Acetylcholine.synapse.nml"/>
  <include href="Glutamate.synapse.nml"/>
  <include href="Generic_GJ.synapse.nml"/>
  <include href="Serotonin_Glutamate.synapse.nml"/>
  <network id="gvft_network_bio_prior_lamW_0.500_DF_0.037_t50.net" type="networkWithTemperature" temperature="20.0 degC">
    <population id="M1" component="M1" type="populationList" size="1">
      <instance id="0">
        <location x="-0.9296482" y="0.65829146" z="0.0"/>
      </instance>
    </population>
    <population id="M2L" component="M2L" type="populationList" size="1">
      <instance id="0">
        <location x="-0.30653268" y="0.47738695" z="0.0"/>
      </instance>
    </population>
    <population id="M2R" component="M2R" type="populationList" size="1">
      <instance id="0">
        <location x="-0.6482412" y="0.065326646" z="0.0"/>
      </instance>
    </population>
    <population id="M3L" component="M3L" type="populationList" size="1">
      <instance id="0">
        <location x="0.28643218" y="-0.7085427" z="0.0"/>
      </instance>
    </population>
    <population id="M3R" component="M3R" type="populationList" size="1">
      <instance id="0">
        <location x="-0.04522614" y="0.3467337" z="0.0"/>
      </instance>
    </population>
    <population id="M4" component="M4" type="populationList" size="1">
      <instance id="0">
        <location x="0.8492462" y="0.959799" z="0.0"/>
      </instance>
    </population>
    <population id="M5" component="M5" type="populationList" size="1">
      <instance id="0">
        <location x="0.959799" y="-0.6482412" z="0.0"/>
      </instance>
    </population>
    <population id="I1L" component="I1L" type="populationList" size="1">
      <instance id="0">
        <location x="-0.03517589" y="-0.03517589" z="0.0"/>
      </instance>
    </population>
    <population id="I1R" component="I1R" type="populationList" size="1">
      <instance id="0">
        <location x="0.33668342" y="0.12562814" z="0.0"/>
      </instance>
    </population>
    <population id="I2L" component="I2L" type="populationList" size="1">
      <instance id="0">
        <location x="0.31658292" y="-0.7788945" z="0.0"/>
      </instance>
    </population>
    <population id="I2R" component="I2R" type="populationList" size="1">
      <instance id="0">
        <location x="-0.0050251363" y="-0.025125638" z="0.0"/>
      </instance>
    </population>
    <population id="I3" component="I3" type="populationList" size="1">
      <instance id="0">
        <location x="0.67839193" y="-0.19597991" z="0.0"/>
      </instance>
    </population>
    <population id="I4" component="I4" type="populationList" size="1">
      <instance id="0">
        <location x="0.86934674" y="0.44723618" z="0.0"/>
      </instance>
    </population>
    <population id="I5" component="I5" type="populationList" size="1">
      <instance id="0">
        <location x="0.98994976" y="-0.28643218" z="0.0"/>
      </instance>
    </population>
    <population id="I6" component="I6" type="populationList" size="1">
      <instance id="0">
        <location x="0.51758796" y="0.36683416" z="0.0"/>
      </instance>
    </population>
    <population id="MCL" component="MCL" type="populationList" size="1">
      <instance id="0">
        <location x="-0.79899496" y="0.04522614" z="0.0"/>
      </instance>
    </population>
    <population id="MCR" component="MCR" type="populationList" size="1">
      <instance id="0">
        <location x="-1.0" y="0.45728645" z="0.0"/>
      </instance>
    </population>
    <population id="MI" component="MI" type="populationList" size="1">
      <instance id="0">
        <location x="-0.67839193" y="-0.65829146" z="0.0"/>
      </instance>
    </population>
    <population id="NSML" component="NSML" type="populationList" size="1">
      <instance id="0">
        <location x="-0.90954775" y="-0.8190955" z="0.0"/>
      </instance>
    </population>
    <population id="NSMR" component="NSMR" type="populationList" size="1">
      <instance id="0">
        <location x="-0.53768843" y="0.44723618" z="0.0"/>
      </instance>
    </population>
    <population id="AVAL" component="AVAL" type="populationList" size="1">
      <instance id="0">
        <location x="5.0" y="0.0" z="0.0"/>
      </instance>
    </population>
    <population id="AVAR" component="AVAR" type="populationList" size="1">
      <instance id="0">
        <location x="5.0" y="0.0" z="0.0"/>
      </instance>
    </population>
    <population id="AVKL" component="AVKL" type="populationList" size="1">
      <instance id="0">
        <location x="5.0" y="0.0" z="0.0"/>
      </instance>
    </population>
    <population id="AVKR" component="AVKR" type="populationList" size="1">
      <instance id="0">
        <location x="5.0" y="0.0" z="0.0"/>
      </instance>
    </population>
    <population id="RIS" component="RIS" type="populationList" size="1">
      <instance id="0">
        <location x="5.0" y="0.0" z="0.0"/>
      </instance>
    </population>
    <population id="RMDDL" component="RMDDL" type="populationList" size="1">
      <instance id="0">
        <location x="5.0" y="0.0" z="0.0"/>
      </instance>
    </population>
    <population id="RMDDR" component="RMDDR" type="populationList" size="1">
      <instance id="0">
        <location x="5.0" y="0.0" z="0.0"/>
      </instance>
    </population>
    <population id="RMDVL" component="RMDVL" type="populationList" size="1">
      <instance id="0">
        <location x="5.0" y="0.0" z="0.0"/>
      </instance>
    </population>
    <population id="RMDVR" component="RMDVR" type="populationList" size="1">
      <instance id="0">
        <location x="5.0" y="0.0" z="0.0"/>
      </instance>
    </population>
    <population id="SMBVL" component="SMBVL" type="populationList" size="1">
      <instance id="0">
        <location x="5.0" y="0.0" z="0.0"/>
      </instance>
    </population>
    <population id="SMBVR" component="SMBVR" type="populationList" size="1">
      <instance id="0">
        <location x="5.0" y="0.0" z="0.0"/>
      </instance>
    </population>
    <population id="URXL" component="URXL" type="populationList" size="1">
      <instance id="0">
        <location x="5.0" y="0.0" z="0.0"/>
      </instance>
    </population>
    <population id="URXR" component="URXR" type="populationList" size="1">
      <instance id="0">
        <location x="5.0" y="0.0" z="0.0"/>
      </instance>
    </population>
    <projection id="NCXLS_M3L_I1R" presynapticPopulation="M3L" postsynapticPopulation="I1R" synapse="Acetylcholine">
      <connection id="0" preCellId="../M3L/0/M3L" postCellId="../I1R/0/I1R" preSegmentId="2" postSegmentId="1" preFractionAlong="0.16108424691711154" postFractionAlong="0.10366913548223677"/>
    </projection>
    <projection id="NCXLS_M3L_MCL" presynapticPopulation="M3L" postsynapticPopulation="MCL" synapse="Acetylcholine">
      <connection id="1" preCellId="../M3L/0/M3L" postCellId="../MCL/0/MCL" preSegmentId="2" postSegmentId="4" preFractionAlong="0.005806260909242633" postFractionAlong="0.8134623931347242"/>
    </projection>
    <projection id="NCXLS_M3L_MCR" presynapticPopulation="M3L" postsynapticPopulation="MCR" synapse="Acetylcholine">
      <connection id="2" preCellId="../M3L/0/M3L" postCellId="../MCR/0/MCR" preSegmentId="4" postSegmentId="7" preFractionAlong="0.33271158193237393" postFractionAlong="0.031567496409881324"/>
    </projection>
    <projection id="NCXLS_M3L_M5" presynapticPopulation="M3L" postsynapticPopulation="M5" synapse="Glutamate">
      <connection id="3" preCellId="../M3L/0/M3L" postCellId="../M5/0/M5" preSegmentId="4" postSegmentId="4" preFractionAlong="0.568800348883758" postFractionAlong="0.09703577850992506"/>
    </projection>
    <projection id="NCXLS_M3L_I2R" presynapticPopulation="M3L" postsynapticPopulation="I2R" synapse="Acetylcholine">
      <connection id="4" preCellId="../M3L/0/M3L" postCellId="../I2R/0/I2R" preSegmentId="8" postSegmentId="4" preFractionAlong="0.012904196997515771" postFractionAlong="0.6613108500493936"/>
    </projection>
    <projection id="NCXLS_M3L_M3R" presynapticPopulation="M3L" postsynapticPopulation="M3R" synapse="Acetylcholine">
      <connection id="5" preCellId="../M3L/0/M3L" postCellId="../M3R/0/M3R" preSegmentId="7" postSegmentId="3" preFractionAlong="0.5232442393090568" postFractionAlong="0.6610837672688546"/>
    </projection>
    <projection id="NCXLS_M3L_I3" presynapticPopulation="M3L" postsynapticPopulation="I3" synapse="Acetylcholine">
      <connection id="6" preCellId="../M3L/0/M3L" postCellId="../I3/0/I3" preSegmentId="1" postSegmentId="4" preFractionAlong="0.24590304256326667" postFractionAlong="0.321770570248497"/>
    </projection>
    <projection id="NCXLS_M3L_M2L" presynapticPopulation="M3L" postsynapticPopulation="M2L" synapse="Glutamate">
      <connection id="7" preCellId="../M3L/0/M3L" postCellId="../M2L/0/M2L" preSegmentId="3" postSegmentId="6" preFractionAlong="0.36273686812087647" postFractionAlong="0.9996563089563387"/>
    </projection>
    <electricalProjection id="NCXLS_M3L_M2R_GJ" presynapticPopulation="M3L" postsynapticPopulation="M2R">
      <electricalConnection id="8" preCell="0" postCell="0" synapse="Generic_GJ" preSegment="3" postSegment="7" preFractionAlong="0.974990465268697" postFractionAlong="0.6931110595470572"/>
    </electricalProjection>
    <projection id="NCXLS_M3L_I4" presynapticPopulation="M3L" postsynapticPopulation="I4" synapse="Acetylcholine">
      <connection id="9" preCellId="../M3L/0/M3L" postCellId="../I4/0/I4" preSegmentId="4" postSegmentId="4" preFractionAlong="0.8276273793621446" postFractionAlong="0.2221891762083007"/>
    </projection>
    <electricalProjection id="NCXLS_M3L_M4_GJ" presynapticPopulation="M3L" postsynapticPopulation="M4">
      <electricalConnection id="10" preCell="0" postCell="0" synapse="Generic_GJ" preSegment="5" postSegment="6" preFractionAlong="0.295614360210846" postFractionAlong="0.7748602686966518"/>
    </electricalProjection>
    <projection id="NCXLS_M3L_M1" presynapticPopulation="M3L" postsynapticPopulation="M1" synapse="Glutamate">
      <connection id="11" preCellId="../M3L/0/M3L" postCellId="../M1/0/M1" preSegmentId="4" postSegmentId="7" preFractionAlong="0.26008513613644635" postFractionAlong="0.9345872814168397"/>
    </projection>
    <projection id="NCXLS_M3L_I5" presynapticPopulation="M3L" postsynapticPopulation="I5" synapse="Acetylcholine">
      <connection id="12" preCellId="../M3L/0/M3L" postCellId="../I5/0/I5" preSegmentId="4" postSegmentId="5" preFractionAlong="0.029190840494468073" postFractionAlong="0.612924850522739"/>
    </projection>
    <projection id="NCXLS_M3L_I6" presynapticPopulation="M3L" postsynapticPopulation="I6" synapse="Acetylcholine">
      <connection id="13" preCellId="../M3L/0/M3L" postCellId="../I6/0/I6" preSegmentId="8" postSegmentId="1" preFractionAlong="0.9003394834405374" postFractionAlong="0.38852877273702"/>
    </projection>
    <projection id="NCXLS_M3L_NSMR" presynapticPopulation="M3L" postsynapticPopulation="NSMR" synapse="Acetylcholine">
      <connection id="14" preCellId="../M3L/0/M3L" postCellId="../NSMR/0/NSMR" preSegmentId="4" postSegmentId="2" preFractionAlong="0.18082533115237387" postFractionAlong="0.02190107592636792"/>
    </projection>
    <projection id="NCXLS_M3L_I1L" presynapticPopulation="M3L" postsynapticPopulation="I1L" synapse="Acetylcholine">
      <connection id="15" preCellId="../M3L/0/M3L" postCellId="../I1L/0/I1L" preSegmentId="8" postSegmentId="2" preFractionAlong="0.5156418674007825" postFractionAlong="0.926471204559658"/>
    </projection>
    <projection id="NCXLS_MCL_MCR" presynapticPopulation="MCL" postsynapticPopulation="MCR" synapse="Acetylcholine">
      <connection id="16" preCellId="../MCL/0/MCL" postCellId="../MCR/0/MCR" preSegmentId="6" postSegmentId="8" preFractionAlong="0.9905151154502125" postFractionAlong="0.509228813848111"/>
    </projection>
    <projection id="NCXLS_MCL_M1" presynapticPopulation="MCL" postsynapticPopulation="M1" synapse="Acetylcholine">
      <connection id="17" preCellId="../MCL/0/MCL" postCellId="../M1/0/M1" preSegmentId="4" postSegmentId="8" preFractionAlong="0.4704712510750304" postFractionAlong="0.18232876255507124"/>
    </projection>
    <projection id="NCXLS_I2L_M5" presynapticPopulation="I2L" postsynapticPopulation="M5" synapse="Glutamate">
      <connection id="18" preCellId="../I2L/0/I2L" postCellId="../M5/0/M5" preSegmentId="8" postSegmentId="5" preFractionAlong="0.7581831102701669" postFractionAlong="0.8231128908522648"/>
    </projection>
    <projection id="NCXLS_M5_M3L" presynapticPopulation="M5" postsynapticPopulation="M3L" synapse="Glutamate">
      <connection id="19" preCellId="../M5/0/M5" postCellId="../M3L/0/M3L" preSegmentId="3" postSegmentId="5" preFractionAlong="0.682125955506534" postFractionAlong="0.7903682248650875"/>
    </projection>
    <projection id="NCXLS_M5_MCL" presynapticPopulation="M5" postsynapticPopulation="MCL" synapse="Acetylcholine">
      <connection id="20" preCellId="../M5/0/M5" postCellId="../MCL/0/MCL" preSegmentId="7" postSegmentId="4" preFractionAlong="0.7403940300078714" postFractionAlong="0.7762777549589974"/>
    </projection>
    <projection id="NCXLS_M5_MCR" presynapticPopulation="M5" postsynapticPopulation="MCR" synapse="Acetylcholine">
      <connection id="21" preCellId="../M5/0/M5" postCellId="../MCR/0/MCR" preSegmentId="1" postSegmentId="8" preFractionAlong="0.312131223490555" postFractionAlong="0.9556441806277962"/>
    </projection>
    <projection id="NCXLS_M5_MI" presynapticPopulation="M5" postsynapticPopulation="MI" synapse="Acetylcholine">
      <connection id="22" preCellId="../M5/0/M5" postCellId="../MI/0/MI" preSegmentId="3" postSegmentId="7" preFractionAlong="0.18670198455830744" postFractionAlong="0.5133387070264082"/>
    </projection>
    <projection id="NCXLS_M5_I2L" presynapticPopulation="M5" postsynapticPopulation="I2L" synapse="Acetylcholine">
      <connection id="23" preCellId="../M5/0/M5" postCellId="../I2L/0/I2L" preSegmentId="5" postSegmentId="7" preFractionAlong="0.5942683060300878" postFractionAlong="0.35769436255300624"/>
    </projection>
    <projection id="NCXLS_M5_NSML" presynapticPopulation="M5" postsynapticPopulation="NSML" synapse="Acetylcholine">
      <connection id="24" preCellId="../M5/0/M5" postCellId="../NSML/0/NSML" preSegmentId="5" postSegmentId="5" preFractionAlong="0.07269200591879643" postFractionAlong="0.04147986289445238"/>
    </projection>
    <projection id="NCXLS_M5_M2R" presynapticPopulation="M5" postsynapticPopulation="M2R" synapse="Acetylcholine">
      <connection id="25" preCellId="../M5/0/M5" postCellId="../M2R/0/M2R" preSegmentId="7" postSegmentId="7" preFractionAlong="0.08735981466413778" postFractionAlong="0.5473812334694351"/>
    </projection>
    <projection id="NCXLS_M5_I1L" presynapticPopulation="M5" postsynapticPopulation="I1L" synapse="Acetylcholine">
      <connection id="26" preCellId="../M5/0/M5" postCellId="../I1L/0/I1L" preSegmentId="5" postSegmentId="7" preFractionAlong="0.8602056372067265" postFractionAlong="0.44574862306807217"/>
    </projection>
    <electricalProjection id="NCXLS_M3R_M3L_GJ" presynapticPopulation="M3R" postsynapticPopulation="M3L">
      <electricalConnection id="27" preCell="0" postCell="0" synapse="Generic_GJ" preSegment="8" postSegment="8" preFractionAlong="0.31985303892971007" postFractionAlong="0.24316757352572904"/>
    </electricalProjection>
    <projection id="NCXLS_M3R_I1R" presynapticPopulation="M3R" postsynapticPopulation="I1R" synapse="Acetylcholine">
      <connection id="28" preCellId="../M3R/0/M3R" postCellId="../I1R/0/I1R" preSegmentId="4" postSegmentId="1" preFractionAlong="0.9302998154332999" postFractionAlong="0.5738815907652576"/>
    </projection>
    <projection id="NCXLS_M3R_I2L" presynapticPopulation="M3R" postsynapticPopulation="I2L" synapse="Acetylcholine">
      <connection id="29" preCellId="../M3R/0/M3R" postCellId="../I2L/0/I2L" preSegmentId="3" postSegmentId="7" preFractionAlong="0.6991833749902954" postFractionAlong="0.4391008057493109"/>
    </projection>
    <projection id="NCXLS_M3R_M5" presynapticPopulation="M3R" postsynapticPopulation="M5" synapse="Acetylcholine">
      <connection id="30" preCellId="../M3R/0/M3R" postCellId="../M5/0/M5" preSegmentId="2" postSegmentId="1" preFractionAlong="0.842244042083875" postFractionAlong="0.5489629092958968"/>
    </projection>
    <projection id="NCXLS_M3R_I2R" presynapticPopulation="M3R" postsynapticPopulation="I2R" synapse="Acetylcholine">
      <connection id="31" preCellId="../M3R/0/M3R" postCellId="../I2R/0/I2R" preSegmentId="7" postSegmentId="7" preFractionAlong="0.944817071550007" postFractionAlong="0.7957472077895101"/>
    </projection>
    <projection id="NCXLS_M3R_I3" presynapticPopulation="M3R" postsynapticPopulation="I3" synapse="Acetylcholine">
      <connection id="32" preCellId="../M3R/0/M3R" postCellId="../I3/0/I3" preSegmentId="3" postSegmentId="2" preFractionAlong="0.9027510149740777" postFractionAlong="0.48310109209391006"/>
    </projection>
    <projection id="NCXLS_M3R_I4" presynapticPopulation="M3R" postsynapticPopulation="I4" synapse="Acetylcholine">
      <connection id="33" preCellId="../M3R/0/M3R" postCellId="../I4/0/I4" preSegmentId="9" postSegmentId="1" preFractionAlong="0.8859023776825637" postFractionAlong="0.0003070750337554884"/>
    </projection>
    <projection id="NCXLS_M3R_M4" presynapticPopulation="M3R" postsynapticPopulation="M4" synapse="Glutamate">
      <connection id="34" preCellId="../M3R/0/M3R" postCellId="../M4/0/M4" preSegmentId="6" postSegmentId="9" preFractionAlong="0.22652864522699934" postFractionAlong="0.4952030088510355"/>
    </projection>
    <projection id="NCXLS_M3R_I5" presynapticPopulation="M3R" postsynapticPopulation="I5" synapse="Acetylcholine">
      <connection id="35" preCellId="../M3R/0/M3R" postCellId="../I5/0/I5" preSegmentId="5" postSegmentId="6" preFractionAlong="0.8164602534328347" postFractionAlong="0.7715701704845336"/>
    </projection>
    <projection id="NCXLS_M3R_I6" presynapticPopulation="M3R" postsynapticPopulation="I6" synapse="Acetylcholine">
      <connection id="36" preCellId="../M3R/0/M3R" postCellId="../I6/0/I6" preSegmentId="4" postSegmentId="1" preFractionAlong="0.9317976544659986" postFractionAlong="0.5503832353083729"/>
    </projection>
    <projection id="NCXLS_M3R_I1L" presynapticPopulation="M3R" postsynapticPopulation="I1L" synapse="Acetylcholine">
      <connection id="37" preCellId="../M3R/0/M3R" postCellId="../I1L/0/I1L" preSegmentId="6" postSegmentId="8" preFractionAlong="0.6646594135390986" postFractionAlong="0.5613690172183667"/>
    </projection>
    <projection id="NCXLS_M2L_M3L" presynapticPopulation="M2L" postsynapticPopulation="M3L" synapse="Glutamate">
      <connection id="38" preCellId="../M2L/0/M2L" postCellId="../M3L/0/M3L" preSegmentId="3" postSegmentId="6" preFractionAlong="0.6688175939601658" postFractionAlong="0.5935961349482209"/>
    </projection>
    <projection id="NCXLS_M2L_I1R" presynapticPopulation="M2L" postsynapticPopulation="I1R" synapse="Acetylcholine">
      <connection id="39" preCellId="../M2L/0/M2L" postCellId="../I1R/0/I1R" preSegmentId="1" postSegmentId="2" preFractionAlong="0.6306243738653324" postFractionAlong="0.1721729688289686"/>
    </projection>
    <projection id="NCXLS_M2L_I2L" presynapticPopulation="M2L" postsynapticPopulation="I2L" synapse="Acetylcholine">
      <connection id="40" preCellId="../M2L/0/M2L" postCellId="../I2L/0/I2L" preSegmentId="5" postSegmentId="1" preFractionAlong="0.5471830820679408" postFractionAlong="0.6594385611161038"/>
    </projection>
    <projection id="NCXLS_M2L_M5" presynapticPopulation="M2L" postsynapticPopulation="M5" synapse="Glutamate">
      <connection id="41" preCellId="../M2L/0/M2L" postCellId="../M5/0/M5" preSegmentId="4" postSegmentId="7" preFractionAlong="0.4219306307317797" postFractionAlong="0.7649392396719134"/>
    </projection>
    <projection id="NCXLS_M2L_I2R" presynapticPopulation="M2L" postsynapticPopulation="I2R" synapse="Acetylcholine">
      <connection id="42" preCellId="../M2L/0/M2L" postCellId="../I2R/0/I2R" preSegmentId="3" postSegmentId="6" preFractionAlong="0.4545961069547201" postFractionAlong="0.7862182306426042"/>
    </projection>
    <projection id="NCXLS_M2L_M3R" presynapticPopulation="M2L" postsynapticPopulation="M3R" synapse="Acetylcholine">
      <connection id="43" preCellId="../M2L/0/M2L" postCellId="../M3R/0/M3R" preSegmentId="9" postSegmentId="2" preFractionAlong="0.6833254325358847" postFractionAlong="0.2427325524497712"/>
    </projection>
    <projection id="NCXLS_M2L_I3" presynapticPopulation="M2L" postsynapticPopulation="I3" synapse="Acetylcholine">
      <connection id="44" preCellId="../M2L/0/M2L" postCellId="../I3/0/I3" preSegmentId="7" postSegmentId="3" preFractionAlong="0.9875538288615654" postFractionAlong="0.6423598237167781"/>
    </projection>
    <projection id="NCXLS_M2L_I4" presynapticPopulation="M2L" postsynapticPopulation="I4" synapse="Acetylcholine">
      <connection id="45" preCellId="../M2L/0/M2L" postCellId="../I4/0/I4" preSegmentId="9" postSegmentId="5" preFractionAlong="0.26609609240954823" postFractionAlong="0.4407494003715766"/>
    </projection>
    <projection id="NCXLS_M2L_M4" presynapticPopulation="M2L" postsynapticPopulation="M4" synapse="Glutamate">
      <connection id="46" preCellId="../M2L/0/M2L" postCellId="../M4/0/M4" preSegmentId="3" postSegmentId="7" preFractionAlong="0.9270794050436362" postFractionAlong="0.4874761446534416"/>
    </projection>
    <projection id="NCXLS_M2L_I5" presynapticPopulation="M2L" postsynapticPopulation="I5" synapse="Acetylcholine">
      <connection id="47" preCellId="../M2L/0/M2L" postCellId="../I5/0/I5" preSegmentId="1" postSegmentId="5" preFractionAlong="0.9206138979503482" postFractionAlong="0.9150999076078628"/>
    </projection>
    <projection id="NCXLS_M2L_I6" presynapticPopulation="M2L" postsynapticPopulation="I6" synapse="Acetylcholine">
      <connection id="48" preCellId="../M2L/0/M2L" postCellId="../I6/0/I6" preSegmentId="8" postSegmentId="7" preFractionAlong="0.7024971168239118" postFractionAlong="0.6629958963989008"/>
    </projection>
    <projection id="NCXLS_M2L_I1L" presynapticPopulation="M2L" postsynapticPopulation="I1L" synapse="Acetylcholine">
      <connection id="49" preCellId="../M2L/0/M2L" postCellId="../I1L/0/I1L" preSegmentId="3" postSegmentId="7" preFractionAlong="0.34803894342153896" postFractionAlong="0.23538500695330788"/>
    </projection>
    <projection id="NCXLS_M2R_M3L" presynapticPopulation="M2R" postsynapticPopulation="M3L" synapse="Acetylcholine">
      <connection id="50" preCellId="../M2R/0/M2R" postCellId="../M3L/0/M3L" preSegmentId="6" postSegmentId="6" preFractionAlong="0.741966705314293" postFractionAlong="0.7788736482559626"/>
    </projection>
    <projection id="NCXLS_M2R_I1R" presynapticPopulation="M2R" postsynapticPopulation="I1R" synapse="Acetylcholine">
      <connection id="51" preCellId="../M2R/0/M2R" postCellId="../I1R/0/I1R" preSegmentId="6" postSegmentId="3" preFractionAlong="0.7646359942849736" postFractionAlong="0.006516315691875274"/>
    </projection>
    <projection id="NCXLS_M2R_MI" presynapticPopulation="M2R" postsynapticPopulation="MI" synapse="Acetylcholine">
      <connection id="52" preCellId="../M2R/0/M2R" postCellId="../MI/0/MI" preSegmentId="5" postSegmentId="9" preFractionAlong="0.7939044001326908" postFractionAlong="0.6300447206413533"/>
    </projection>
    <projection id="NCXLS_M2R_I2L" presynapticPopulation="M2R" postsynapticPopulation="I2L" synapse="Acetylcholine">
      <connection id="53" preCellId="../M2R/0/M2R" postCellId="../I2L/0/I2L" preSegmentId="3" postSegmentId="3" preFractionAlong="0.9069460031486639" postFractionAlong="0.5663818006102074"/>
    </projection>
    <projection id="NCXLS_M2R_M5" presynapticPopulation="M2R" postsynapticPopulation="M5" synapse="Glutamate">
      <connection id="54" preCellId="../M2R/0/M2R" postCellId="../M5/0/M5" preSegmentId="7" postSegmentId="4" preFractionAlong="0.9807427252251976" postFractionAlong="0.7055682020755667"/>
    </projection>
    <projection id="NCXLS_M2R_I2R" presynapticPopulation="M2R" postsynapticPopulation="I2R" synapse="Acetylcholine">
      <connection id="55" preCellId="../M2R/0/M2R" postCellId="../I2R/0/I2R" preSegmentId="5" postSegmentId="4" preFractionAlong="0.03748594712534026" postFractionAlong="0.37447789825458755"/>
    </projection>
    <projection id="NCXLS_M2R_NSML" presynapticPopulation="M2R" postsynapticPopulation="NSML" synapse="Acetylcholine">
      <connection id="56" preCellId="../M2R/0/M2R" postCellId="../NSML/0/NSML" preSegmentId="2" postSegmentId="1" preFractionAlong="0.9600582757647734" postFractionAlong="0.2717937526236749"/>
    </projection>
    <projection id="NCXLS_M2R_M3R" presynapticPopulation="M2R" postsynapticPopulation="M3R" synapse="Glutamate">
      <connection id="57" preCellId="../M2R/0/M2R" postCellId="../M3R/0/M3R" preSegmentId="9" postSegmentId="7" preFractionAlong="0.7616519889681673" postFractionAlong="0.5747762456722708"/>
    </projection>
    <projection id="NCXLS_M2R_I3" presynapticPopulation="M2R" postsynapticPopulation="I3" synapse="Acetylcholine">
      <connection id="58" preCellId="../M2R/0/M2R" postCellId="../I3/0/I3" preSegmentId="7" postSegmentId="3" preFractionAlong="0.09681205659514314" postFractionAlong="0.5202555846134271"/>
    </projection>
    <projection id="NCXLS_M2R_I4" presynapticPopulation="M2R" postsynapticPopulation="I4" synapse="Acetylcholine">
      <connection id="59" preCellId="../M2R/0/M2R" postCellId="../I4/0/I4" preSegmentId="6" postSegmentId="4" preFractionAlong="0.7971677722253737" postFractionAlong="0.9683192062321018"/>
    </projection>
    <projection id="NCXLS_M2R_M4" presynapticPopulation="M2R" postsynapticPopulation="M4" synapse="Acetylcholine">
      <connection id="60" preCellId="../M2R/0/M2R" postCellId="../M4/0/M4" preSegmentId="4" postSegmentId="5" preFractionAlong="0.4740315823689203" postFractionAlong="0.5567976977124081"/>
    </projection>
    <projection id="NCXLS_M2R_I5" presynapticPopulation="M2R" postsynapticPopulation="I5" synapse="Acetylcholine">
      <connection id="61" preCellId="../M2R/0/M2R" postCellId="../I5/0/I5" preSegmentId="1" postSegmentId="6" preFractionAlong="0.9515042120351598" postFractionAlong="0.27168987066689065"/>
    </projection>
    <projection id="NCXLS_M2R_I6" presynapticPopulation="M2R" postsynapticPopulation="I6" synapse="Acetylcholine">
      <connection id="62" preCellId="../M2R/0/M2R" postCellId="../I6/0/I6" preSegmentId="1" postSegmentId="2" preFractionAlong="0.5757810148254003" postFractionAlong="0.9770518594542353"/>
    </projection>
    <projection id="NCXLS_M2R_I1L" presynapticPopulation="M2R" postsynapticPopulation="I1L" synapse="Acetylcholine">
      <connection id="63" preCellId="../M2R/0/M2R" postCellId="../I1L/0/I1L" preSegmentId="2" postSegmentId="5" preFractionAlong="0.727627290571009" postFractionAlong="0.1437412560197192"/>
    </projection>
    <projection id="NCXLS_M4_M3L" presynapticPopulation="M4" postsynapticPopulation="M3L" synapse="Glutamate">
      <connection id="64" preCellId="../M4/0/M4" postCellId="../M3L/0/M3L" preSegmentId="8" postSegmentId="8" preFractionAlong="0.6585951811884713" postFractionAlong="0.4881594782772217"/>
    </projection>
    <projection id="NCXLS_M4_I1R" presynapticPopulation="M4" postsynapticPopulation="I1R" synapse="Acetylcholine">
      <connection id="65" preCellId="../M4/0/M4" postCellId="../I1R/0/I1R" preSegmentId="4" postSegmentId="9" preFractionAlong="0.2627527078124131" postFractionAlong="0.3404477530416592"/>
    </projection>
    <projection id="NCXLS_M4_MI" presynapticPopulation="M4" postsynapticPopulation="MI" synapse="Acetylcholine">
      <connection id="66" preCellId="../M4/0/M4" postCellId="../MI/0/MI" preSegmentId="7" postSegmentId="6" preFractionAlong="0.2101176862323586" postFractionAlong="0.2840900603188071"/>
    </projection>
    <projection id="NCXLS_M4_I2L" presynapticPopulation="M4" postsynapticPopulation="I2L" synapse="Acetylcholine">
      <connection id="67" preCellId="../M4/0/M4" postCellId="../I2L/0/I2L" preSegmentId="4" postSegmentId="1" preFractionAlong="0.15726344724733732" postFractionAlong="0.8981538896257594"/>
    </projection>
    <projection id="NCXLS_M4_M5" presynapticPopulation="M4" postsynapticPopulation="M5" synapse="Glutamate">
      <connection id="68" preCellId="../M4/0/M4" postCellId="../M5/0/M5" preSegmentId="1" postSegmentId="7" preFractionAlong="0.12669060890519246" postFractionAlong="0.16795420436741426"/>
    </projection>
    <projection id="NCXLS_M4_I2R" presynapticPopulation="M4" postsynapticPopulation="I2R" synapse="Acetylcholine">
      <connection id="69" preCellId="../M4/0/M4" postCellId="../I2R/0/I2R" preSegmentId="2" postSegmentId="5" preFractionAlong="0.7890108430548304" postFractionAlong="0.8545352003016795"/>
    </projection>
    <projection id="NCXLS_M4_I3" presynapticPopulation="M4" postsynapticPopulation="I3" synapse="Acetylcholine">
      <connection id="70" preCellId="../M4/0/M4" postCellId="../I3/0/I3" preSegmentId="3" postSegmentId="9" preFractionAlong="0.2999634508814911" postFractionAlong="0.5791405007134393"/>
    </projection>
    <projection id="NCXLS_M4_I4" presynapticPopulation="M4" postsynapticPopulation="I4" synapse="Acetylcholine">
      <connection id="71" preCellId="../M4/0/M4" postCellId="../I4/0/I4" preSegmentId="2" postSegmentId="1" preFractionAlong="0.7193225538047202" postFractionAlong="0.0623255023840773"/>
    </projection>
    <projection id="NCXLS_M4_I5" presynapticPopulation="M4" postsynapticPopulation="I5" synapse="Acetylcholine">
      <connection id="72" preCellId="../M4/0/M4" postCellId="../I5/0/I5" preSegmentId="3" postSegmentId="5" preFractionAlong="0.44633402572063796" postFractionAlong="0.8482746006672285"/>
    </projection>
    <projection id="NCXLS_M4_I6" presynapticPopulation="M4" postsynapticPopulation="I6" synapse="Acetylcholine">
      <connection id="73" preCellId="../M4/0/M4" postCellId="../I6/0/I6" preSegmentId="9" postSegmentId="4" preFractionAlong="0.019756329185807164" postFractionAlong="0.42308736985390427"/>
    </projection>
    <projection id="NCXLS_M4_I1L" presynapticPopulation="M4" postsynapticPopulation="I1L" synapse="Acetylcholine">
      <connection id="74" preCellId="../M4/0/M4" postCellId="../I1L/0/I1L" preSegmentId="1" postSegmentId="9" preFractionAlong="0.161886823356587" postFractionAlong="0.3287937599934202"/>
    </projection>
    <projection id="NCXLS_M1_M3L" presynapticPopulation="M1" postsynapticPopulation="M3L" synapse="Glutamate">
      <connection id="75" preCellId="../M1/0/M1" postCellId="../M3L/0/M3L" preSegmentId="1" postSegmentId="1" preFractionAlong="0.47366475695218824" postFractionAlong="0.9215831340605264"/>
    </projection>
    <projection id="NCXLS_M1_I1R" presynapticPopulation="M1" postsynapticPopulation="I1R" synapse="Acetylcholine">
      <connection id="76" preCellId="../M1/0/M1" postCellId="../I1R/0/I1R" preSegmentId="7" postSegmentId="1" preFractionAlong="0.9355681707661002" postFractionAlong="0.2613886808010255"/>
    </projection>
    <projection id="NCXLS_M1_MCL" presynapticPopulation="M1" postsynapticPopulation="MCL" synapse="Acetylcholine">
      <connection id="77" preCellId="../M1/0/M1" postCellId="../MCL/0/MCL" preSegmentId="4" postSegmentId="9" preFractionAlong="0.7861761049242482" postFractionAlong="0.8574875572237353"/>
    </projection>
    <projection id="NCXLS_M1_MCR" presynapticPopulation="M1" postsynapticPopulation="MCR" synapse="Acetylcholine">
      <connection id="78" preCellId="../M1/0/M1" postCellId="../MCR/0/MCR" preSegmentId="4" postSegmentId="4" preFractionAlong="0.033844370833002846" postFractionAlong="0.8105931608770096"/>
    </projection>
    <projection id="NCXLS_M1_MI" presynapticPopulation="M1" postsynapticPopulation="MI" synapse="Acetylcholine">
      <connection id="79" preCellId="../M1/0/M1" postCellId="../MI/0/MI" preSegmentId="7" postSegmentId="9" preFractionAlong="0.8576471214221869" postFractionAlong="0.897558409886164"/>
    </projection>
    <projection id="NCXLS_M1_I2L" presynapticPopulation="M1" postsynapticPopulation="I2L" synapse="Acetylcholine">
      <connection id="80" preCellId="../M1/0/M1" postCellId="../I2L/0/I2L" preSegmentId="8" postSegmentId="1" preFractionAlong="0.4982672570007528" postFractionAlong="0.7128396881493003"/>
    </projection>
    <electricalProjection id="NCXLS_M1_M5_GJ" presynapticPopulation="M1" postsynapticPopulation="M5">
      <electricalConnection id="81" preCell="0" postCell="0" synapse="Generic_GJ" preSegment="5" postSegment="8" preFractionAlong="0.44238911710745676" postFractionAlong="0.8025435689765567"/>
    </electricalProjection>
    <projection id="NCXLS_M1_I2R" presynapticPopulation="M1" postsynapticPopulation="I2R" synapse="Acetylcholine">
      <connection id="82" preCellId="../M1/0/M1" postCellId="../I2R/0/I2R" preSegmentId="2" postSegmentId="3" preFractionAlong="0.9743458249772865" postFractionAlong="0.8983220196913693"/>
    </projection>
    <projection id="NCXLS_M1_NSML" presynapticPopulation="M1" postsynapticPopulation="NSML" synapse="Acetylcholine">
      <connection id="83" preCellId="../M1/0/M1" postCellId="../NSML/0/NSML" preSegmentId="6" postSegmentId="1" preFractionAlong="0.8123952417460469" postFractionAlong="0.8371755836394877"/>
    </projection>
    <projection id="NCXLS_M1_M3R" presynapticPopulation="M1" postsynapticPopulation="M3R" synapse="Acetylcholine">
      <connection id="84" preCellId="../M1/0/M1" postCellId="../M3R/0/M3R" preSegmentId="6" postSegmentId="9" preFractionAlong="0.20388392193682658" postFractionAlong="0.02398940747952083"/>
    </projection>
    <projection id="NCXLS_M1_I3" presynapticPopulation="M1" postsynapticPopulation="I3" synapse="Acetylcholine">
      <connection id="85" preCellId="../M1/0/M1" postCellId="../I3/0/I3" preSegmentId="9" postSegmentId="4" preFractionAlong="0.18713720859782146" postFractionAlong="0.43630563095716435"/>
    </projection>
    <electricalProjection id="NCXLS_M1_M2L_GJ" presynapticPopulation="M1" postsynapticPopulation="M2L">
      <electricalConnection id="86" preCell="0" postCell="0" synapse="Generic_GJ" preSegment="3" postSegment="8" preFractionAlong="0.2743870902057053" postFractionAlong="0.13192220842346847"/>
    </electricalProjection>
    <projection id="NCXLS_M1_M2R" presynapticPopulation="M1" postsynapticPopulation="M2R" synapse="Glutamate">
      <connection id="87" preCellId="../M1/0/M1" postCellId="../M2R/0/M2R" preSegmentId="9" postSegmentId="3" preFractionAlong="0.3507725846011295" postFractionAlong="0.30486799260744624"/>
    </projection>
    <projection id="NCXLS_M1_I4" presynapticPopulation="M1" postsynapticPopulation="I4" synapse="Acetylcholine">
      <connection id="88" preCellId="../M1/0/M1" postCellId="../I4/0/I4" preSegmentId="3" postSegmentId="2" preFractionAlong="0.41006244847857054" postFractionAlong="0.12404349923436431"/>
    </projection>
    <projection id="NCXLS_M1_I5" presynapticPopulation="M1" postsynapticPopulation="I5" synapse="Acetylcholine">
      <connection id="89" preCellId="../M1/0/M1" postCellId="../I5/0/I5" preSegmentId="3" postSegmentId="8" preFractionAlong="0.2979745523466443" postFractionAlong="0.15916019772222634"/>
    </projection>
    <projection id="NCXLS_M1_I6" presynapticPopulation="M1" postsynapticPopulation="I6" synapse="Acetylcholine">
      <connection id="90" preCellId="../M1/0/M1" postCellId="../I6/0/I6" preSegmentId="7" postSegmentId="3" preFractionAlong="0.5898824509170308" postFractionAlong="0.703942941806841"/>
    </projection>
    <projection id="NCXLS_M1_NSMR" presynapticPopulation="M1" postsynapticPopulation="NSMR" synapse="Acetylcholine">
      <connection id="91" preCellId="../M1/0/M1" postCellId="../NSMR/0/NSMR" preSegmentId="2" postSegmentId="6" preFractionAlong="0.556307470614679" postFractionAlong="0.2761240784481376"/>
    </projection>
    <projection id="NCXLS_M1_I1L" presynapticPopulation="M1" postsynapticPopulation="I1L" synapse="Acetylcholine">
      <connection id="92" preCellId="../M1/0/M1" postCellId="../I1L/0/I1L" preSegmentId="4" postSegmentId="8" preFractionAlong="0.6481401228647609" postFractionAlong="0.9106037017747185"/>
    </projection>
    <projection id="NC_I1L_RMDDL" presynapticPopulation="I1L" postsynapticPopulation="RMDDL" synapse="Acetylcholine">
      <connection id="1000" preCellId="../I1L/0/I1L" postCellId="../RMDDL/0/RMDDL" preSegmentId="9" postSegmentId="1" preFractionAlong="0.5375906601353175" postFractionAlong="0.2682151227605093"/>
    </projection>
    <projection id="NC_I1L_RMDVL" presynapticPopulation="I1L" postsynapticPopulation="RMDVL" synapse="Acetylcholine">
      <connection id="1001" preCellId="../I1L/0/I1L" postCellId="../RMDVL/0/RMDVL" preSegmentId="5" postSegmentId="3" preFractionAlong="0.2860689422985063" postFractionAlong="0.0638286895906579"/>
    </projection>
    <projection id="NC_I1R_RMDDR" presynapticPopulation="I1R" postsynapticPopulation="RMDDR" synapse="Acetylcholine">
      <connection id="1002" preCellId="../I1R/0/I1R" postCellId="../RMDDR/0/RMDDR" preSegmentId="7" postSegmentId="2" preFractionAlong="0.1261099813368064" postFractionAlong="0.48889338312123976"/>
    </projection>
    <projection id="NC_I1R_RMDVR" presynapticPopulation="I1R" postsynapticPopulation="RMDVR" synapse="Acetylcholine">
      <connection id="1003" preCellId="../I1R/0/I1R" postCellId="../RMDVR/0/RMDVR" preSegmentId="6" postSegmentId="3" preFractionAlong="0.22747564664629127" postFractionAlong="0.4092275940840977"/>
    </projection>
    <projection id="NC_I2L_URXL" presynapticPopulation="I2L" postsynapticPopulation="URXL" synapse="Glutamate">
      <connection id="1004" preCellId="../I2L/0/I2L" postCellId="../URXL/0/URXL" preSegmentId="5" postSegmentId="3" preFractionAlong="0.30763760810008967" postFractionAlong="0.489272519976084"/>
    </projection>
    <projection id="NC_I2R_URXR" presynapticPopulation="I2R" postsynapticPopulation="URXR" synapse="Glutamate">
      <connection id="1005" preCellId="../I2R/0/I2R" postCellId="../URXR/0/URXR" preSegmentId="1" postSegmentId="1" preFractionAlong="0.49618593438883607" postFractionAlong="0.7053090605220667"/>
    </projection>
    <projection id="NC_AVKL_I1L" presynapticPopulation="AVKL" postsynapticPopulation="I1L" synapse="Acetylcholine">
      <connection id="1006" preCellId="../AVKL/0/AVKL" postCellId="../I1L/0/I1L" preSegmentId="2" postSegmentId="5" preFractionAlong="0.9299828176615764" postFractionAlong="0.32866513110544526"/>
    </projection>
    <projection id="NC_AVKR_I1R" presynapticPopulation="AVKR" postsynapticPopulation="I1R" synapse="Acetylcholine">
      <connection id="1007" preCellId="../AVKR/0/AVKR" postCellId="../I1R/0/I1R" preSegmentId="4" postSegmentId="6" preFractionAlong="0.34038670990848374" postFractionAlong="0.7417594768909639"/>
    </projection>
    <projection id="NC_RIS_I1L" presynapticPopulation="RIS" postsynapticPopulation="I1L" synapse="Glutamate">
      <connection id="1008" preCellId="../RIS/0/RIS" postCellId="../I1L/0/I1L" preSegmentId="5" postSegmentId="9" preFractionAlong="0.37071356364571073" postFractionAlong="0.40734375217018726"/>
    </projection>
    <projection id="NC_RIS_I1R" presynapticPopulation="RIS" postsynapticPopulation="I1R" synapse="Glutamate">
      <connection id="1009" preCellId="../RIS/0/RIS" postCellId="../I1R/0/I1R" preSegmentId="2" postSegmentId="9" preFractionAlong="0.24764611704565553" postFractionAlong="0.18499969750197942"/>
    </projection>
    <projection id="NC_AVAL_I2L" presynapticPopulation="AVAL" postsynapticPopulation="I2L" synapse="Acetylcholine">
      <connection id="1010" preCellId="../AVAL/0/AVAL" postCellId="../I2L/0/I2L" preSegmentId="9" postSegmentId="9" preFractionAlong="0.21551539835284284" postFractionAlong="0.39951429804681604"/>
    </projection>
    <projection id="NC_AVAR_I2R" presynapticPopulation="AVAR" postsynapticPopulation="I2R" synapse="Acetylcholine">
      <connection id="1011" preCellId="../AVAR/0/AVAR" postCellId="../I2R/0/I2R" preSegmentId="1" postSegmentId="9" preFractionAlong="0.29085997394293084" postFractionAlong="0.06527438470165803"/>
    </projection>
    <projection id="NC_SMBVL_I4" presynapticPopulation="SMBVL" postsynapticPopulation="I4" synapse="Acetylcholine">
      <connection id="1012" preCellId="../SMBVL/0/SMBVL" postCellId="../I4/0/I4" preSegmentId="5" postSegmentId="8" preFractionAlong="0.8358430248681552" postFractionAlong="0.6578635056049698"/>
    </projection>
    <projection id="NC_SMBVR_I4" presynapticPopulation="SMBVR" postsynapticPopulation="I4" synapse="Acetylcholine">
      <connection id="1013" preCellId="../SMBVR/0/SMBVR" postCellId="../I4/0/I4" preSegmentId="3" postSegmentId="7" preFractionAlong="0.9540204523357757" postFractionAlong="0.47568395378296036"/>
    </projection>
  </network>
</neuroml>
